# Electricity, at eGrid, SRVC, 2010

Dataset: openLCA process, unit process
Category: Utilities
Geography: RNA
Time period: 2010-01-01 to 2010-01-01
Generated by: Samantha Wascavage
Published in: Chris Goemans, Athena Institute
restrictionsDescription: All information can be accessed by everybody.
copyright: false

## General comment
The methodology used to put together the grid information is outlined in reference 1.

## Technology
Typical

## Geography
SRVC Virginia-Carolina electricity grid to includes North and South Carolina and most of Virginia (less RFCW).

## Reference product
- Electricity, at eGrid, SRVC, 2010: 1 kWh

## Inputs from technosphere
- CUTOFF Electricity, biomass, solid, biogenic MSW, at power plant: 0.00961 kWh
  Solid Renewable Fuels (Biomass) MSB, AB, MSW, OBS, TDF,WDS – Municipal Solid Waste – Biogenic Component
- CUTOFF Electricity, biomass,liquid, unspecified, at power plant: 0.008646 kWh
  Liquid Renewable Fuels (Biomass) BLQ, OBL, SLW, WDL - black liquor
- CUTOFF Electricity, hydropower, at power plant, unspecified: 0.01192 kWh
  Hydroelectric WAT – Water (Conventional, Pumped Storage)
- Electricity, nuclear, at power plant: 0.413696 kWh
  Nuclear Fission NUC – Nuclear (Uranium, Plutonium, Thorium)
- CUTOFF Electricity, biomass, gas, landfill, at power plant: 0.001155 kWh
  Gaseous Renewable Fuels (Biomass) LFG, OBG - landfill gas
- Electricity, bituminous coal, at power plant: 0.449549 kWh
  Bituminous Coal BIT, SC, SGC, WC - Anthracite Coal, and Bituminous Coal.
- Electricity, natural gas, at power plant: 0.09991 kWh
  Natural Gas
- Electricity, diesel, at power plant: 0.002572 kWh
  Petroleum (DFO, JF, KER) – Distillate Fuel Oil (includes all Diesel and No. 1, No. 2, and No. 4 Fuel Oils)
- CUTOFF Electricity, MSW, non-biogenic, at power plant: 0.002659 kWh
  Other Fuels MSN, OTH, PUR, WH – Municipal Solid Waste – Non-biogenic components
- Electricity, residual fuel oil, at power plant: 0.000283 kWh
  Petroleum (RFO) – Residual Fuel Oil (includes No. 5 and No. 6 Fuel Oils and Bunker C Fuel Oil)

## Sampling procedure
based on EIA electricity reports for all power plants in the US.

## Sources
- Chris Goemans, Athena Institute
- Statistics Canada
- unspecified
- USEPA
- Statistics Canada
- Statistics Canada
- Statistics Canada
- Statistics Canada
- USEPA
- EIA
- EIA
- EIA
- EIA
- EIA
- EIA
- EIA
- EIA
- EIA
- US DOE
- International Energy Agency
- EIA
