# Solid strip and plank flooring, hardwood, E

Dataset: openLCA process, unit process
Category: Sawmills
Geography: RNA
Time period: 2006-01-01 to 2006-01-01
Generated by: Maureen Puetmann
Published in: Steven S. Hubbard
restrictionsDescription: All information can be accessed by everybody.
copyright: false

## General comment
Important note: although most of the data in the US LCI database has
undergone some sort of review, the database as a whole has not yet
undergone a formal validation process.
Please email comments to lci@nrel.gov.

## Technology
Average technology.

## Geography
Eastern USA, including the following states: MN, IA, MO, WI, IL, NJ, OH, IN, MI, WV, PA, MD, DW, NJ, NY, ME, VT, NH, RI, MA, CT, VA, KY, AR, LA, MS, AL, FL,GA, NC, SC, TN, and TX

## Reference product
- Solid strip and plank flooring, hardwood, E: 1 m3
  Moisture content = 8%. 1m3 of finished strip/planked flooring represents on average 31.5m2 to 104 m2 of flooring at 31.7 and 9.65 mm thickness, respectively.

## By-products
- Wood fuel, hardwood, from flooring production, E: 762.75 kg
  Weight reported on an ovendry basis. Moisture content (ovendry basis) = 8%. Wood residue includes: dry sawdust, dry planer shavings, dry trimmings, dry edgings, and dry wood flour

## Inputs from technosphere
- Diesel, combusted in industrial equipment: 0.276 l
  Includes both fuel oil and diesel for onsite transportation.
- Natural gas, combusted in industrial equipment: 0.0885 l
  Proxy for propane. Used for onsite transportation.
- Transport, combination truck, diesel powered: 433.93 t*km
  Transportation of hardwood lumber over 283 km. at 8% moisture content
- CUTOFF Disposal, fly ash, to unspecified landfill: 1.33 kg
- Natural gas, combusted in industrial boiler: 0.89 m3
- Electricity, at grid, Eastern US, 2000: 13.472 kWh
- Gasoline, combusted in equipment: 0.0244 l
  Used for onsite transportation.
- Sawn lumber, hardwood, rough, kiln dried, at kiln, NE-NC: 2.16 m3
  Based on density of 657 kg/m3/ (volume at 8% moisture content). Mismatch with lumber from input process, which has a density = 627 kg/m3 (volume at 9.6% moisture content).
- Cold rolled sheet, steel, at plant: 0.15 kg
  Steel strapping used in packaging.
- Wood fuel, hardwood,gen at flooring prod plant, combusted in industrial boiler, E: 29.17 kg
  Combustion of wood fuel produced onsite.

## Inputs from nature
- Water, process: 6.22 l

## Emissions to nature
- Water: 0.01286 kg
  Water discharged to surface water and sewer.
- Particulates, < 10 um: 0.00777 kg
- Particulates, unspecified: 0.0106 kg

## Sampling procedure
Surveys

## Sources
- Steven S. Hubbard
- Maureen Puettmann
