# Polyethylene, low density, resin, at plant

Dataset: openLCA process, unit process
Category: Petrochemical Manufacturing
Geography: RNA
Time period: 2002-01-01 to 2003-01-01
Generated by: Franklin Associates
Published in: THE PLASTICS DIVISION OF THE AMERICAN C
restrictionsDescription: All information can be accessed by everybody.
copyright: false

## General comment
Scrap and steam are produced as coproducts during this process. A mass basis was used to partition the credit for scrap, while the energy amount for the steam was reported separately as recovered energy. Complete inventory data and metadata are available in full in the final report and appendices, Cradle-to-Gate Life Cycle Inventory of Nine Plastic Resins and Four Polyurethane Precursors. This report has been extensively reviewed within Franklin Associates and has undergone partial critical review by ACC Plastics Division members and is available at: www.americanchemistry.com. Quantities may vary slightly between the reference to main source and and this module due to rounding. Important note: although most of the data in the US LCI database has undergone some sort of review, the database as a whole has not yet undergone a formal validation process. Please email comments to lci@nrel.gov.

## Technology
Free-radical or ionic polymerization of ethylene via a combination of tubular and autoclave high-pressure reactors

## Geography
North America (US and Canada)

## Reference product
- Polyethylene, low density, resin, at plant: 1 kg

## By-products
- Recovered energy: 0.397739 MJ

## Inputs from technosphere
- CUTOFF Disposal, solid waste, unspecified, to municipal incineration: 0.000236868 kg
- Electricity, at grid, US, 2008: 0.188498 kWh
- Transport, pipeline, unspecified petroleum products: 0.194583 t*km
- Ethylene, at plant: 1.00779 kg
- Liquefied petroleum gas, combusted in industrial boiler: 3.18477e-5 l
- Residual fuel oil, combusted in industrial boiler: 0.00133011 l
- Electricity, at cogen, for natural gas turbine: 0.724055 kWh
- CUTOFF Disposal, solid waste, unspecified, to sanitary landfill: 6.28656e-5 kg
- Natural gas, combusted in industrial boiler: 0.0483713 m3

## Inputs from nature
- Water, process, unspecified natural origin/m3: 0.00188894 m3
  Consumptive use includes: water incorporated into the product, water evaporated during the process, and/or water used and released to a body other than that from which it was drawn.

## Emissions to nature
- Particulates, < 2.5 um: 5.5446e-6 kg
- Methane, trichlorofluoro-, CFC-11: 1e-7 kg
  This emission was reported by fewer than three companies. To indicate known emissions while protecting the confidentiality of individual company responses, the emission is reported only by order of magnitude.
- Carbon monoxide: 1e-5 kg
  (same comment as for Methane, trichlorofluoro-, CFC-11)
- Phosphorus: 1e-7 kg
- Oil and grease, unspecified: 1e-6 kg
  (same comment as for Methane, trichlorofluoro-, CFC-11)
- Suspended solids, unspecified: 1e-5 kg
  (same comment as for Methane, trichlorofluoro-, CFC-11)
- Methane: 6.59413e-6 kg
- Dissolved solids: 1e-6 kg
  (same comment as for Methane, trichlorofluoro-, CFC-11)
- 2-Propanol: 1e-7 kg
  (same comment as for Methane, trichlorofluoro-, CFC-11)
- Nitrogen oxides: 1e-6 kg
  (same comment as for Methane, trichlorofluoro-, CFC-11)
- Zinc: 1e-8 kg
  (same comment as for Methane, trichlorofluoro-, CFC-11)
- Phenol compounds, unspecified: 1e-9 kg
  (same comment as for Methane, trichlorofluoro-, CFC-11)
- BOD5, Biological Oxygen Demand: 1e-5 kg
  (same comment as for Methane, trichlorofluoro-, CFC-11)
- Dinitrogen monoxide: 1e-6 kg
  (same comment as for Methane, trichlorofluoro-, CFC-11)
- Particulates, > 2.5 um, and < 10um: 2.59705e-5 kg
- COD, Chemical Oxygen Demand: 0.0001 kg
  (same comment as for Methane, trichlorofluoro-, CFC-11)
- Methane, difluromonochloro-, HCFC-22: 1e-6 kg
  (same comment as for Methane, trichlorofluoro-, CFC-11)
- Organic substances, unspecified: 5e-5 kg
- Carbon dioxide, fossil: 0.01 kg
  (same comment as for Methane, trichlorofluoro-, CFC-11)
- Aluminum: 1e-7 kg
  (same comment as for Methane, trichlorofluoro-, CFC-11)
- NMVOC, non-methane volatile organic compounds, unspecified: 0.00087329 kg
- Particulates, unspecified: 4.51308e-5 kg
- Chlorine: 1e-9 kg
  (same comment as for Methane, trichlorofluoro-, CFC-11)
- Sulfur oxides: 1e-8 kg
  (same comment as for Methane, trichlorofluoro-, CFC-11)

## Sampling procedure
Data are from primary sources.

## Sources
- THE PLASTICS DIVISION OF THE AMERICAN C
