# Roundwood, softwood, green, at logyard, NE-NC

Dataset: openLCA process, unit process
Category: Logging
Geography: RNA
Time period: 2006-01-01 to 2007-01-01
Generated by: Pascal Lesage
Published in: Richard D. Bergman
restrictionsDescription: All information can be accessed by everybody.
copyright: false

## General comment
All weights given on an ovendry basis.
Important note: although most of the data in the US LCI database has
undergone some sort of review, the database as a whole has not yet
undergone a formal validation process.
Please email comments to lci@nrel.gov.

## Technology
Average transport distance.

## Geography
NE/NC = Northeast (NE) and Northcentral (NC) United States. Some states are however omitted: Connecticut, Delaware, Illinois, Iowa, New Jersey, and Ohio.

## Reference product
- Roundwood, softwood, green, at logyard, NE-NC: 1 m3
  Weight reported on an ovendry basis. Moisture content = 96.5%, Green volume specific sensity = 0.36.

## By-products
- Bark, softwood, green, at logyard, NE-NC: 49.2 kg
  (same comment as for Roundwood, softwood, green, at logyard, NE-NC)

## Inputs from technosphere
- Roundwood, softwood, green, at mill, NE-NC: 1 m3
  Green volum specific gravity = 0.36.
- Electricity, at Grid, RFC, 2008: 4.05 kWh
  Represents 5% of total mill consumption of grid electricity.
- Diesel, combusted in industrial equipment: 0.78 l
  Diesel used for on-site transportation. Represents 40% of mill use of diesel for transport.
- Gasoline, combusted in equipment: 0.146 l
  Gasoline used for on-site transportation. Represents 40% of mill use of gasoline for transport.
- Electricity, onsite boiler, softwood mill, average, NE-NC: 0.68 kWh
  Represents 5% of total mill consumption of electricity generated onsite.
- Bark, softwood, green, at mill, NE-NC: 49.2 kg
  Weight reported on an ovendry basis.

## Inputs from nature
- Water, well, in ground: 165 l
  Amount of water consumed as water spray for logs and lumber yard

## Sampling procedure
Questionnaires from 6 mills member of the Northeastern Lumber Manufacturer’s Association (NeLMA). Mills of the NeLMA are assumed to be representative of the softwood industry in the NE/NC region.

## Sources
- Richard D. Bergman
- Maureen Puettmann
