# Electricity, at eGrid, SPSO, 2008

Dataset: openLCA process, unit process
Category: Utilities
Geography: RNA
Time period: 2008-01-01 to 2008-01-01
Generated by: Alberta Carpenter
Published in: Chris Goemans, Athena Institute
restrictionsDescription: All information can be accessed by everybody.
copyright: false

## General comment
The methodology used to put together the grid information is outlined in reference 1.

## Technology
Typical

## Geography
SPSO South electricity grid to include Oklahoma, and portions of Arkansas, Louisiana, Texas and New Mexico.

## Reference product
- Electricity, at eGrid, SPSO, 2008: 1 kWh

## Inputs from technosphere
- Electricity, bituminous coal, at power plant: 0.457287 kWh
  Subbituminous Coal
- Electricity, bituminous coal, at power plant: 0.00819302 kWh
  Bituminous Coal BIT - Anthracite Coal, and Bituminous Coal.
- CUTOFF Electricity, other gases, unspecified, at power plant: 0.00439616 kWh
  Other Gases OG – Other Gas (Butane, Coal Processes, Coke-Oven, Refinery, and other processes)
- CUTOFF Electricity, biomass, solid, agriculture by-products, at power plant: 5.04528e-6 kWh
  Solid Renewable Fuels (Biomass) AB – Agriculture Crop By-products / Straw / Energy Crops
- Electricity, diesel, at power plant: 0.00053139 kWh
  Petroleum (DFO) – Distillate Fuel Oil (includes all Diesel and No. 1, No. 2, and No. 4 Fuel Oils)
- Electricity, diesel, at power plant: 2.84173e-7 kWh
  Petroleum (DFO) JF - jet fuel
- Electricity, biomass, at power plant: 0.00215768 kWh
  Solid Renewable Fuels (Biomass) WDS – Wood/Wood Waste Solids (Paper Pellets, Railroad Ties, Utility Poles, Wood Chips, and other wood solids)
- CUTOFF Electricity, biomass,liquid, unspecified, at power plant: 0.00425445 kWh
  Liquid Renewable Fuels (Biomass) BLQ - black liquor
- CUTOFF Electricity, tire derived fuel, at power plant: 0.000364704 kWh
  Solid Renewable Fuels (Biomass) TDF - tires, tire derived fuel
- CUTOFF Electricity, biomass,solid, unspecified, at power plant: 0.000821735 kWh
  Solid Renewable Fuels (Biomass) OBS – Other Biomass Solid (Animal Manure and Waste, Solid By-products, and other solid biomass not specified)
- CUTOFF Electricity, hydropower, at power plant, unspecified: 0.0272448 kWh
  Hydroelectric WAT – Water (Conventional, Pumped Storage)
- CUTOFF Electricity, other gases, unspecified, at power plant: 0.000391766 kWh
  Other Gases BFG - blast furnace gas
- Electricity, residual fuel oil, at power plant: 4.67568e-5 kWh
  Petroleum (RFO) – Residual Fuel Oil (includes No. 5 and No. 6 Fuel Oils and Bunker C Fuel Oil)
- Electricity, natural gas, at power plant: 0.323047 kWh
  Natural Gas
- CUTOFF Electricity, at wind power plant, unspecified: 0.0271036 kWh
  Wind
- Electricity, lignite coal, at power plant: 0.142705 kWh
  Lignite Coal
- CUTOFF Electricity, petroleum, waste oil, at power plant: 4.8697e-5 kWh
  Petroleum (Other Fossil) WO – Waste/Other Oil (including Crude Oil, Liquid Butane, Liquid Propane, Oil Waste, Re-Refined Motor Oil, Sludge Oil, Tar Oil, or other petroleum-based liquid wastes)
- CUTOFF Electricity, other fuels, unspecified, at power plant: 0.000271579 kWh
  Other Fuels OTH – Other (Batteries, Chemicals, Coke Breeze, Hydrogen, Pitch, Sulfur, Tar Coal, and miscellaneous technologies)
- CUTOFF Electricity, biomass, gas, landfill, at power plant: 2.72455e-5 kWh
  Gaseous Renewable Fuels (Biomass) LFG - landfill gas
- CUTOFF Electricity, other fuels, unspecified, at power plant: 0.00110244 kWh
  Other Fuels PUR - purchased steam

## Sampling procedure
based on EIA electricity reports for all power plants in the US.

## Sources
- Chris Goemans, Athena Institute
- unspecified
- USEPA
- Statistics Canada
- Statistics Canada
- Statistics Canada
- Statistics Canada
- Statistics Canada
- Statistics Canada
- USEPA
- EIA
- EIA
- EIA
- EIA
- EIA
- EIA
- EIA
- EIA
- EIA
- EIA
- EIA
- US DOE
- International Energy Agency
- US DOE
