# Coal mine site construction; Concrete structures and asphalt paving; Underground mine

Dataset: openLCA process, unit process
Category: Bit. Coal and Lignite Surface Mining
Geography: US
Time period: 2007-01-01 to 2007-12-28
Generated by: Timothy Skone
Owner: National Energy Technology Laboratory
Reviewer: Robert James
Published in: National Energy Technology Laboratory (NETL). 2010. Coal mine site construction; Concrete structures and asphalt paving; Underground mine
restrictionsDescription: Use of this dataset is not restricted, but a statement of attribution is required. Please use the following attribution statement:
National Energy Technology Laboratory's (NETL) Unit Process Library
626 Cochrans Mill Road, P.O. Box 10940
Pittsburgh, PA 15236-0940
http://www.netl.doe.gov/research/energy-analysis/life-cycle-analysis/unit-process-library
Neither the U.S. Department of Energy (DOE) National Energy Technology Laboratory (NETL) nor any person acting on behalf of these organizations:
A. Makes any warranty or representation, express or implied, with respect to the accuracy, completeness, or usefulness of the information contained in this document, or that the use of any information, apparatus, method, or process disclosed in this document may not infringe on privately owned rights; or
B. Assumes any liability with this report as to its use, or damages resulting from the use of any information, apparatus, method, or process disclosed in this document.
Reference herein to any specific commercial product, process, or service by trade name, trademark, manufacturer, or otherwise, does not necessarily constitute or imply its endorsement, recommendation, or favoring by NETL. The views and opinions of the authors expressed herein do not necessarily state or reflect those of NETL.
copyright: true

## General comment
This process is part of the NETL Unit Process Library. To access the library and the original dataset:
1) Navigate to the NETL LCA home page (http://www.netl.doe.gov/lca)
2) Then navigate to the “Unit Process Library”
3) From the library, the unit process of interest can be found either through the "Complete Listing of the Unit Process Library link" or through the link to the "Unit Process Database" spreadsheet
4) For each process, a Data Sheet (DS) and Data File (DF) are available

BRIEF DESCRIPTION
This parameterized unit process considers the necessary construction materials for concrete structures and asphalt paving for an Illinois No. 6 coal mine site. It assumes concrete structures and paving are composed entirely of cement or asphalt, respectively.

GOAL AND SCOPE
The scope of this unit process covers the materials required for the construction of a coal mine site for the underground extraction of Illinois No. 6 (I-6) bituminous coal. The coal mine site includes asphalt-paved roads and concrete structures necessary to support the pathway of I-6 coal, within Life Cycle (LC) Stage #1. After coal is extracted and cleaned, it is transported by rail (LC Stage #2) to an energy conversion facility (LC Stage #3). This unit process is combined with other LC Stage #1 construction unit processes for the I-6 coal pathway under an assembly unit process, Coal preparation facility; Multiple processes; Illinois No. 6 Coal, Underground coal mine, U.S., which quantifies the fraction of coal mine site construction needed to produce 1 kg of I-6 bituminous coal.

This unit process assumes that asphalt and concrete comprise the majority of construction materials necessary for the construction of a coal mine site and, therefore, does not account for other types of construction materials. Concrete and asphalt are produced upstream of the coal mine site. Therefore, the production of concrete and asphalt (and the resources and emissions associated with the production of concrete and asphalt) are outside the boundaries of this unit process. Mine commissioning (energy and emissions associated with installation of mine facilities at the mine site) and construction requirements of mine equipment and facilities, such as the wastewater treatment plant, mining machinery, storage equipment, and other equipment, are quantified in separate unit processes.

BOUNDARY AND DESCRIPTION
This unit process assumes that asphalt and concrete comprise all of the construction materials necessary for the construction of a mine site. The weights of asphalt and concrete were estimated for the Illinois No. 6 bituminous coal mine site based on the average developed acreage and material requirements of two mine applications in the State of Illinois. Applications from Sugarcamp Energy, LLC mine (Sugarcamp mine) in Macedonia, Illinois, and the Hillsboro Energy, LLC Deer Run Mine (Deer Run Mine) in Montgomery County, Illinois, were used as the primary references for this process (Hillsboro Energy 2007; Sugar Camp 2007). These applications indicate the total developed acres, total paved road areas, and the dimensions of concrete structures required for a coal mine site. Note that the amount of materials used at each mine site depends upon an array of factors, including mine capacity as well as specific site characteristics such as topography. However, the two mines represent recently installed facilities that are similar in nature to the mine site that is considered for construction within this unit process.

An graphical overview of the boundary of this unit process is available in the associated documentation (referenced in the Citation and Associated Documentation section below).Upstream emissions associated with the production and delivery of concrete and asphalt are calculated outside the boundary of this unit process, based on proprietary profiles available within the GaBi model. The Illinois No. 6 bituminous coal mine site constructed in this unit process is incorporated into the underground coal mine assembly process.

This unit process uses the developed land area of each mine site (e.g., Hillsboro, 2007; Sugar Camp, 2007) to develop material use factors (e.g., kg of concrete/developed hectare or kg of asphalt/developed hectare) for each mine site and, subsequently, material use factors that represent the study mine. The average developed land area of the Sugar Camp and Deer Run mines is 292 hectares (721 acres), which is thus the area of developed land assumed for the study mine. The calculation of the concrete and asphalt pavement requirements for the study mine is described below.

The concrete structures of this unit process include foundations, tanks, tubes (used for storage of coal near the coal stacker), and roofs at the mining sites. It is assumed that when the mine site applications (Sugar Camp 2007; Hillsboro 2007) express concrete use in terms of yards (yd), they imply an actual dimension of cubic yards (yd3). The total cubic yards of concrete for each mine site was divided by the developed acres of each mine site to determine the relationship between concrete use and mine acreage. The average concrete use per developed acre is 10.9 m3/hectare (5.7 yd3/acre). This concrete use factor was applied to the developed acreage of the study mine and multiplied by the density of the concrete (Portland Cement Association 2009). The total mass of concrete used for the study mine is to 7,391,888 kg (16,296,323 lb).

This unit process assumes that mine roads are composed of a layer of asphalt applied on top of a concrete road base. The material composition of a paved road is 5 percent asphalt (as bitumen) and 95 percent concrete (this split between asphalt and concrete is accounted for in the “Asphalt [Construction materials]” input to this unit process). To determine the percentage of the study mine that is paved with roads, the road area reported by each mine site application (Sugar Camp 2007; Hillsboro 2007) was divided by the developed acreage of each mine site. On average, 4.71 percent of the mine sites are paved with roads. By applying this percentage to the total developed acreage of the study mine, the total area of paved roads is 14 hectares (34 acres). The thickness of the mine roads is 0.61 m (2 ft) (Hillsboro 2007; Sugar Camp 2007), which translates to a total volume of 83,912 cubic meters (109,752 cubic yard) of road paving material. This volume of road paving material was multiplied by the density of asphalt pavement (Papagiannakis, et al. 2006) to determine that the total weight of road pavement for the mine of this unit process is 198,934,060 kg (438,574,529 lb).

Further information regarding the data sources and calculations used for this unit process is available in the associated documentation (referenced in the Citation and Associated Documentation section below).

This process contains one or more surrogate product flows as replacements for proprietary product flows used in the NETL Unit Process Library. All surrogate flow were taken from the U.S. Life Cycle Inventory Database; a list of surrogate flows used in this process is provided below:
1) Bitumen, at refinery
2) Portland cement, at plant: This flow is a proxy for Ready Mixed Concrete. This process calculates the required mass of Portland Cement as a fraction of the required mass of Ready Mixed Concrete to construct concrete structures and asphalt paving at an underground coal mine. The default parameter setting assumes that Portland Cement comprises 14.1% (by mass) of Ready Mixed Concrete (NIST 2009); however, this parameter may be modified by the user. This process does not consider other material and energy inputs for producing Ready Mixed Concrete.

CITATION AND ASSOCIATED DOCUMENTATION
This document should be cited as:
National Energy Technology Laboratory (NETL). 2015. NETL Life Cycle Inventory Data – Unit Process: Coal mine site construction; Concrete structures and asphalt paving; Underground mine. U.S. Department of Energy, National Energy Technology Laboratory. Last Updated: October 2010 (version 01). Retrieved on [DATE] from [URL for this dataset].

This dataset is part of the NETL Unit Process Library. The Library offers additional information concerning this dataset in the form of a Detailed Spreadsheet Documentation (DS) file and a Process Documentation File (DF). The DS file is an Excel file that contains all of the parameters, inputs, and outputs for a given system as well as background data, calculations and quality scores. The DF file is a PDF document that contains major assumptions and data sources that are the basis for each unit process. The NETL Unit Process Library is located on the NETL website (netl.doe.gov) under Research / Energy Analysis / Energy Trends and Issues / Life Cycle Analysis / Unit Process Library.

This dataset was converted directly from the DS with additional supporting information provided by the DF. Full citations for the DS and DF are given below.

DS File
National Energy Technology Laboratory (NETL). 2010. NETL Life Cycle Inventory Data – Unit Process: Illinois No. 6 Underground Bituminous Coal Mine Site, Construction. U.S. Department of Energy, National Energy Technology Laboratory. Last Updated: October 2010 (version 01). Retrieved on 6/30/2014 from: http://www.netl.doe.gov/File%20Library/Research/Energy%20Analysis/Life%20Cycle%20Analysis/UP_Library/DS_Stage1_C_CoalMineSite_I6_2010-01.xls.

DF File
National Energy Technology Laboratory (NETL). 2010. NETL Life Cycle Inventory Data – Unit Process:Illinois No. 6 Underground Bituminous Coal Mine Site, Construction. U.S. Department of Energy, National Energy Technology Laboratory. Last Updated: October 2010 (version 01). Retrieved on 6/30/2014 from: http://www.netl.doe.gov/File%20Library/Research/Energy%20Analysis/Life%20Cycle%20Analysis/UP_Library/DF_Stage1_C_CoalMineSite_I6_2010-01.pdf

## Technology
The scope of this unit process covers the materials required for the construction of a coal mine site for the underground extraction of Illinois No. 6 (I-6) bituminous coal. The coal mine site includes asphalt-paved roads and concrete structures necessary to support the pathway of I-6 coal, within Life Cycle (LC) Stage #1. After coal is extracted and cleaned, it is transported by rail (LC Stage #2) to an energy conversion facility (LC Stage #3). A graphical overview of the boundary of this unit process is available in the associated documentation (referenced in the Citation and Associated Documentation section in the Description field).

The concrete structures of this unit process include foundations, tanks, tubes (used for storage of coal near the coal stacker), and roofs at the mining sites.This unit process assumes that mine roads are composed of a layer of asphalt applied on top of a concrete road base. Further information regarding the technology used in this unit process is available in the associated documentation (referenced in the Citation and Associated Documentation section in the Description field).

## Geography
IL

## Time period
This data set is representative of best available public data from 01/01/2007 to 12/31/2007 and is not subject to limited usability within sub-time spans (e.g. summer, winter).

## Parameters
- Portland_Cement: 1.04226e6; = Concrete*Cement_Fraction
- Cement_Fraction: 0.141
  [kg/kg] Mass of Portland Cement per kilogram of Ready Mixed Concrete
- Concrete: 7.39189e6
  [kg/Item] Mass of Ready Mixed Concrete required for Coal mine site construction; Concrete structures and asphalt paving; Underground mine

## Reference product
- Coal mine site construction; Concrete structures and asphalt paving; Underground mine: 1 Item(s); data quality (2,1,2,1,2)

## Inputs from technosphere
- Portland cement, at plant: 1.04226e6 kg; = Portland_Cement; data quality (2,1,2,1,2)
- Bitumen, at refinery: 1.98934e8 kg; data quality (2,1,2,1,2)

## Inventory method
Attributional

## Modelling constants
All elementary and technosphere flows are calculated on a functional unit basis. Calculations involving combustion primarily to generate useful work are done using lower heating values (LHV) and calculations involving combustion primarily to generate useful heat are done using higher heating values (HHV). Unless explicitly stated in the associated reference documents applicable calculations assumed standard atmospheric temperature and pressure (SATP).

## Completeness
Individual relevant flows captured

## Data selection
Best publically available data

## Data treatment
No allocation applied

## Data collection
No primary data collected

## Intended application
This is a gate-to-gate basic process and can be used for any type of LCA study.

## Project
National Energy Technology Laboratory (NETL) Unit Process Library

## Sources
- National Energy Technology Laboratory (NETL). 2010. Coal mine site construction; Concrete structures and asphalt paving; Underground mine
- Portland Cement Association. 2009. Concrete Technology: Frequently Asked Questions
- Papagiannakis, A.T., et al. 2006. Pavement: Appendix C. Structural and Climatic Input, Structure Asphalt Concrete Pavement
- National Institute of Standards and Technology (NIST). 2009. Product List: Generic 100% Portland Cement
- Sugar Camp Energy, LLC. 2007. Applications for Underground Mine Permits, #382
- Hillsboro Energy LLC. 2007. Applications for Underground Mine Permits, #399
