# Ethanol, denatured, switchgrass, biochemical

Dataset: openLCA process, unit process
Category: Ethyl alcohol manufacturing
Geography: RNA
Time period: 2009-01-01 to 2009-01-01
Generated by: Daniel Inman
Published in: Hsu, D.
restrictionsDescription: All information can be accessed by everybody.
copyright: false

## Technology
modern

## Geography
North America

## Time period
2009

## Reference product
- Ethanol, denatured, switchgrass, biochemical: 26100 kg

## Inputs from technosphere
- CUTOFF Sulphite, at plant: 0.333 kg
  boiler chemicals http://www.accepta.com/water_treatment_chemicals/boiler-water-treatment.asp
- Combustion, wet wood residue, AP-42: 616000 MJ
  HHV is from GREET for corn stover. From http://www1.eere.energy.gov/biomass/docs/energy_analysis.ppt#346,8,Feedstock Potential, 37% of feed energy is in non-ethanol producing reactants.
- Switchgrass, at conversion plant, 2022: 98 t
- CUTOFF Ethanol fermentation plant: 2.97e-5 Item(s)
  plant lifetime is 20 years. only need 1 hr. 90000 tons of ethanol is about 31 Mgal/yr in ecoinvent process.
- Sodium hydroxide, production mix, at plant: 0.333 kg
  boiler chemicals http://www.accepta.com/water_treatment_chemicals/boiler-water-treatment.asp. proxy: Sodium hydroxide, 50% in H2O, production mix, at plant/RER with US electricity U
- CUTOFF Chemicals organic, at plant: 24.9 kg
  waste water chemicals. assumed 50% organic.
- CUTOFF Energy, output: 70560 MJ
  from electricity
- Corn steep liquor: 1300 kg
- Quicklime, at plant: 2440 kg
  proxy: Lime, hydrated, packed, at plant/CH with US electricity U
- Electricity, at grid, US, 2008: 19600 kWh
  calculated based on regression fit of several aspen sensitivity runs. Proxy: Electricity, medium voltage, at grid/US with US electricity U
- Gasoline, at refinery: 464 l
  About a 0.6% impurity content in product stream (water, CO2, alcohols)
- CUTOFF Sulphuric acid, liquid, at plant: 3340 kg
- CUTOFF Hydrochloric acid, 30% in H2O, at plant: 0.333 kg
  (same comment as for CUTOFF Sulphite, at plant)
- Phosphorous fertilizer, production mix, at plant: 163 kg
  proxy: Diammonium phosphate, as N, at regional storehouse/RER with US electricity U
- CUTOFF Chemicals inorganic, at plant: 1.9 kg
  cooling tower chemicals. assumed all were inorganic.
- Enzyme, Cellulase, Novozyme Celluclast: 567 kg
  calculated based on regression fit of several aspen sensitivity runs.
- CUTOFF Disposal, inert waste, 5% water, to inert material landfill: 9610 kg
  gypsum waste. calculated based on regression fit of several aspen sensitivity runs.

## Inputs from nature
- Oxygen, in air: 72600 kg
  calculated based on regression fit of several aspen sensitivity runs.
- Nitrogen, in air: 246000 kg
  calculated based on regression fit of several aspen sensitivity runs.
- Water, cooling, well, in ground: 200000 kg
  calculated based on regression fit of several aspen sensitivity runs.
- Water, process, unspecified natural origin/kg: 6240 kg
  Water brought in with enzyme stream. calculated based on regression fit of several aspen sensitivity runs.

## Emissions to nature
- Carbon dioxide, biogenic: 93100 kg
  calculated based on regression fit of several aspen sensitivity runs.
- Oxygen: 18500 kg
  calculated based on regression fit of several aspen sensitivity runs.
- Nitrogen dioxide: 64.6 kg
  calculated based on regression fit of several aspen sensitivity runs.
- Water: 239000 kg
  calculated based on regression fit of several aspen sensitivity runs.
- Phosphate: 147 kg
  diammonium phosphate. calculated based on regression fit of several aspen sensitivity runs.
- Acetic acid: 108 kg
  calculated based on regression fit of several aspen sensitivity runs.
- Methane, biogenic: 4.15 kg
  calculated based on regression fit of several aspen sensitivity runs.
- Lactic acid, methyl ester: 16.5 kg
  lactic acid. calculated based on regression fit of several aspen sensitivity runs.
- Sulfur dioxide: 100 kg
- Sulfuric acid: 1.55 kg
- Nitrogen: 246000 kg
  calculated based on regression fit of several aspen sensitivity runs.
- Carbon monoxide, biogenic: 64.6 kg
  calculated based on regression fit of several aspen sensitivity runs.
- Organic substances, unspecified: 1420 kg
  furfural, glyceral, sccacid, csl, xylose, solslds, lgnsol, HMF, arabanose, galactose, glucoolig, cellob, xylolig, extract, protein. calculated based on regression fit of several aspen sensitivity runs.

## Sources
- Hsu, D.
- Hess, J.
