# Methylene diphenyl diisocyanate resin, at plant, US PNW

Dataset: openLCA process, unit process
Category: Plastics Material and Resin Manufacturing
Geography: RNA
Time period: 2000-01-01 to 2000-01-01
Generated by: Jamie Meil
Published in: Dr. Jim Wilson
restrictionsDescription: All information can be accessed by everybody.
copyright: true

## General comment
Base process data presented with allocations to within process co-products noted. Refer to allocation worksheet for specifics. All allocations performed using mass or volume. To take profile back to cradle the user must add US LCI profile information for PNW LVL and SE OSB modules. Resin adhesive cradle-to-gate LCI is provided for easy reference., Data reproduced here from US SE OSB module
Important note: although most of the data in the US LCI database has
undergone some sort of review, the database as a whole has not yet
undergone a formal validation process.
Please email comments to lci@nrel.gov.

## Technology
typical

## Geography
US Pacific North West

## Reference product
- Methylene diphenyl diisocyanate resin, at plant, US PNW: 1 kg

## Inputs from technosphere
- CUTOFF Disposal, inert solid waste, to unspecified treatment: 0.027 kg
- Electricity, at grid, Western US, 2000: 1.23 kWh
- Diesel, at refinery: 5.01 l
  Used as feedstock
- Transport, combination truck, average fuel mix: 2.65 t*km
- Natural gas, processed, at plant: 0.51 m3
  Used as feedstock
- Natural gas, combusted in industrial boiler: 0.91 m3

## Inputs from nature
- Water: 362 l

## Emissions to nature
- Methane: 0.000889 kg
- Phenol: 9.99e-7 kg
- Sulfate: 0.0061 kg
- Dissolved organic matter: 0.00033 kg
- Sulfur oxides: 0.00035 kg
- VOC, volatile organic compounds: 6.3e-5 kg
- Nitrogen oxides: 0.0013 kg
- Hydrocarbons, unspecified: 2.3e-5 kg
- Ammonium, ion: 0.0002 kg
- Carbon monoxide: 0.000957 kg
- Particulates, unspecified: 0.00018 kg
- Carbon dioxide, fossil: 0.41 kg
- Aluminum: 8e-6 kg
- Zinc: 5.1e-5 kg
- Metallic ions, unspecified: 0.00023 kg
- Hydrogen chloride: 9.98e-6 kg
- COD, Chemical Oxygen Demand: 0.0053 kg
- Magnesium: 0.0959 kg
- Calcium, ion: 0.00011 kg
- Dissolved solids: 0.0081 kg
- Organic substances, unspecified: 0.00016 kg
- BOD5, Biological Oxygen Demand: 0.00081 kg
- Potassium: 0.00037 kg
- Suspended solids, unspecified: 0.0022 kg
- Hydrogen: 0.0018 kg
- Acids, unspecified: 3.4e-5 kg

## Sources
- Dr. Jim Wilson
