# Electricity, at eGrid, MROW, 2010

Dataset: openLCA process, unit process
Category: Utilities
Geography: RNA
Time period: 2010-01-01 to 2010-01-01
Generated by: Samantha Wascavage
Published in: Chris Goemans, Athena Institute
restrictionsDescription: All information can be accessed by everybody.
copyright: false

## General comment
The methodology used to put together the grid information is outlined in reference 1.

## Technology
Typical

## Geography
Includes generation and transmission of electricity for the MRO West electricity grid to include Minnesota, Iowa, most of the Dakotas (less RMPA) and Nebraska (less RMPA) and parts of Montana (less NWPP) and Wisconsin (less MRO E)

## Reference product
- Electricity, at eGrid, MROW, 2010: 1 kWh

## Inputs from technosphere
- Electricity, diesel, at power plant: 0.000977 kWh
  Petroleum (DFO, JF, KER) – Distillate Fuel Oil (includes all Diesel and No. 1, No. 2, and No. 4 Fuel Oils)
- Electricity, nuclear, at power plant: 0.213923 kWh
  Nuclear Fission
- Electricity, bituminous coal, at power plant: 0.008987 kWh
  Bituminous Coal BIT, SC, SGC, WC - Anthracite Coal, and Bituminous Coal.
- Electricity, natural gas, at power plant: 0.029429 kWh
  Natural Gas
- CUTOFF Electricity, other gases, unspecified, at power plant: 0.000174 kWh
  Other Gases OG, PG, BFG - Other Gas (Butane, Coal Processes, Coke-Oven, Refinery, and other processes)
- CUTOFF Electricity, MSW, non-biogenic, at power plant: 0.001873 kWh
  Other Fuels MSN, OTH, PUR, WH - Municipal Solid Waste – Non-biogenic components
- CUTOFF Electricity, at wind power plant, unspecified: 0.069715 kWh
  Wind
- CUTOFF Electricity, biomass,liquid, unspecified, at power plant: 0.002346 kWh
  Liquid Renewable Fuels (Biomass) BLQ, OBL, SLW, WDL - Black liquor
- Electricity, bituminous coal, at power plant: 0.430156 kWh
  Subbituminous Coal
- CUTOFF Electricity, biomass, gas, landfill, at power plant: 0.001624 kWh
  Gaseous Renewable Fuels (Biomass) LFG, OBG - landfill gas
- Electricity, lignite coal, at power plant: 0.13026 kWh
  Lignite Coal
- Electricity, residual fuel oil, at power plant: 9e-6 kWh
  Petroleum (RFO) – Residual Fuel Oil (includes No. 5 and No. 6 Fuel Oils and Bunker C Fuel Oil)
- CUTOFF Electricity, hydropower, at power plant, unspecified: 0.101862 kWh
  Hydroelectric
- CUTOFF Electricity, biomass, solid, agriculture by-products, at power plant: 0.007163 kWh
  Solid Renewable Fuels (Biomass) AB, MSB, MSW, OB, TDF, WDS - Agriculture Crop By-products/Straw/Energy Crops
- CUTOFF Electricity, petroleum coke, at power plant: 0.001502 kWh
  Petroleum (Other Fossil) PC, SG, WO - petroleum coke

## Sampling procedure
based on EIA electricity reports for all power plants in the US.

## Sources
- Chris Goemans, Athena Institute
- Statistics Canada
- unspecified
- USEPA
- Statistics Canada
- Statistics Canada
- Statistics Canada
- Statistics Canada
- USEPA
- EIA
- EIA
- EIA
- EIA
- EIA
- EIA
- EIA
- EIA
- EIA
- US DOE
- International Energy Agency
- EIA
