# Petroleum refining, at refinery

Dataset: openLCA process, unit process
Category: Petroleum Refineries
Geography: RNA
Time period: 2003-01-01 to 2003-01-01
Generated by: Franklin Associates
Published in: THE PLASTICS DIVISION OF THE AMERICAN C
restrictionsDescription: All information can be accessed by everybody.
copyright: false

## General comment
This module expresses data on the basis 1 kilogram of general refinery product as well as data allocated to specific refinery products. The data are allocated to specific refinery products based on the percent by mass of each product in the refinery output. Refinery products include gasoline, distillate/diesel oil, LPG, residual oil, kerosene/jet fuel, and other (still gas, petroleum, coke, asphalt, and petrochemical feedstocks). Complete inventory data and metadata are available in full in the final report and appendices, Cradle-to-Gate Life Cycle Inventory of Nine Plastic Resins and Four Polyurethane Precursors. This report has been extensively reviewed within Franklin Associates and has undergone partial critical review by ACC Plastics Division members and is available at: www.americanchemistry.com. Quantities may vary slightly between the reference to main source and and this module due to rounding. Important note: although most of the data in the US LCI database has undergone some sort of review, the database as a whole has not yet undergone a formal validation process. Please email comments to lci@nrel.gov.

## Technology
Desalting, atmospheric distillation, vacuum distillation, and hydrotreating

## Geography
US

## Reference product
- Diesel, at refinery: 0.252345 l
  Mass (0.2188 kg/kg output) used for allocation. Conversion to volume used 1.153 L/kg (from a 7.24lb/gal as density factor).

## By-products
- Residual fuel oil, at refinery: 0.0518261 l
  Mass (0.0489 kg/kg output) used for allocation. Conversion to volume used 1.059 L/kg (from 7.88 lb/gal as density factor).
- Petroleum refining coproduct, at refinery: 0.0514537 kg
  Mass (0.0515 kg/kg output) used for allocation. For internal offgas or material use.
- Gasoline, at refinery: 0.570087 l
  Mass (0.4213 kg/kg output) used for allocation. Conversion to volume used 1.353 L/kg (from 6.47 lb/gal as density factor).
- Refinery gas, at refinery: 0.0611691 m3
  Mass (0.0451 kg/kg output) used for allocation. Conversion to volume used 1.356 m3/kg (from a density factor of 0.046 lb/ft3 for natural gas).
- Petroleum refining, at refinery: 1 kg
  Product Output added for EcoSpold Semantic validation.
- Kerosene, at refinery: 0.112458 l
  Mass (0.0910 kg/kg output) used for allocation. Conversion to volume used 1.236 L/kg (from 6.75 lb/gal as density factor).
- Bitumen, at refinery: 0.0371748 kg
  Mass (0.0372 kg/kg output) used for allocation.
- Liquefied petroleum gas, at refinery: 0.0490832 l
  100% propane. Mass (0.0266 kg/kg output) used for allocation. Conversion to volume used 1.84 L/kg (from a 4.52 lb/gal as density factor).
- Petroleum coke, at refinery: 0.0595942 kg
  Mass (0.0596 kg/kg output) used for allocation.

## Inputs from technosphere
- Transport, ocean freighter, residual fuel oil powered: 4.4089 t*km
  Represents transportation from site of crude oil extraction to petroleum refinery; Values for ocean freighter transport are calculated based on average fuel consumption rates as determined from a personal communication with Rich Sonnenschein, U.S. Department of Transportation, Maritime Administration in February 2004: 10% of ocean freighters use diesel fuel, 90% use residual fuel, and a freighter that consumes residual fuel consumes 1.9 gallons per 1,000 ton-miles
- Liquefied petroleum gas, combusted in industrial boiler: 0.00114923 l
- Residual fuel oil, combusted in industrial boiler: 0.0272298 l
- Transport, barge, diesel powered: 0.000288148 t*km
  Represents transportation from site of crude oil extraction to petroleum refinery; Values for barge transport are calculated based on average fuel consumption rates as reported in Transportation Energy Data Book: Edition 22 from Oak Ridge National Laboratory, September 2002: 22% of barges use diesel fuel in their engines, 78% use residual oil to generate steam for steam turbines, and a barge that consumes residual oil consumes 3.4 gallons per 1,000 ton-miles
- CUTOFF Disposal, solid waste, unspecified, to sanitary landfill: 0.00560421 kg
- Transport, pipeline, unspecified petroleum products: 0.652171 t*km
  Represents transportation from site of crude oil extraction to petroleum refinery
- Crude oil, extracted: 1.01848 kg
  This weight reflects material loss at processing. MATERIAL USE.
- Natural gas, combusted in industrial boiler: 0.0111079 m3
- Electricity, at grid, US, 2008: 0.143108 kWh
- Transport, barge, residual fuel oil powered: 0.000958092 t*km
  (same comment as for Transport, barge, diesel powered)
- Transport, ocean freighter, diesel powered: 0.489877 t*km
  (same comment as for Transport, ocean freighter, residual fuel oil powered)

## Emissions to nature
- NMVOC, non-methane volatile organic compounds, unspecified origin: 0.000678355 kg
- Benzene: 1.0756e-6 kg
- Ammonia: 1.53513e-5, 3.57748e-6 kg (2 entries, compartments not in this file)
- Polycyclic organic matter, unspecified: 5.57743e-8 kg
- Nitrogen oxides: 0.000423482 kg
- Nickel: 5.75031e-9 kg
- Antimony: 2.03766e-9 kg
- Chromium: 6.75595e-10, 3.04612e-9 kg (2 entries, compartments not in this file)
- Carbon monoxide: 0.000424251 kg
- Methane, tetrachloro-, CFC-10: 1.36233e-9 kg
- Suspended solids, unspecified: 2.79459e-5 kg
- Oils, unspecified: 1.06461e-5 kg
- Particulates, < 10 um: 3.14805e-5 kg
- Selenium: 1.60179e-9 kg
- Vanadium: 5.35608e-8 kg
- Ethylene dibromide: 4.26875e-9 kg
- Arsenic: 2.57107e-10 kg
- SO2: 0.000246934 kg
- Sulfide: 1.86306e-7 kg
- Lead: 9.84604e-10 kg
- Carbon dioxide, fossil: 0.000251404 kg
- Phenol: 2.26229e-7 kg
- Particulates, < 2.5 um: 2.30632e-5 kg
- COD, Chemical Oxygen Demand: 0.000232883 kg
- Mercury: 6.03312e-11 kg
- Methane, fossil: 3.69707e-5 kg
- Methane, chlorotrifluoro-, CFC-13: 2.17973e-8 kg
- BOD5, Biological Oxygen Demand: 3.39344e-5 kg

## Sampling procedure
Data collected from secondary sources.

## Sources
- THE PLASTICS DIVISION OF THE AMERICAN C
