# Phenol formaldehyde, at plant

Dataset: openLCA process, unit process
Category: Plastics Material and Resin Manufacturing
Geography: RNA
Generated by: Jamie Meil
Published in: Eric T. Sackimoto
restrictionsDescription: All information can be accessed by everybody.
copyright: true

## General comment
Base process data presented with allocations to within process co-products noted. Refer to allocation worksheet for specifics. All allocations performed using mass or volume., early 90's cradle-to-gate profile first published by the ATHENA Institute (1993) and adapted for CORRIM use
Important note: although most of the data in the US LCI database has
undergone some sort of review, the database as a whole has not yet
undergone a formal validation process.
Please email comments to lci@nrel.gov.

## Technology
Typical

## Geography
US Pacific North West

## Reference product
- Phenol formaldehyde, at plant: 1 kg

## Inputs from technosphere
- Gasoline, combusted in equipment: 3.03e-6 l
- Electricity, at grid, US, 2000: 1.42 kWh
- Diesel, at refinery: 0.749 l
- Transport, combination truck, average fuel mix: 0.178 t*km
- Diesel, combusted in industrial boiler: 0.0742 l
- Natural gas, combusted in industrial boiler: 0.7 m3
- Natural gas, processed, at plant: 0.528 m3

## Emissions to nature
- Formaldehyde: 0.00132 kg
- Phenol: 0.00132 kg
- VOC, volatile organic compounds: 6.71e-6 kg

## Sources
- Leonard R. Johnson
- Eric T. Sackimoto
- Maureen Puetmann
