# Coal loading silo; Manufacture; For railcar loading of coal, underground mine; 295 metric tonnes

Dataset: openLCA process, unit process
Category: Bit. Coal and Lignite Surface Mining
Geography: CA
Time period: 2006-01-01 to 2006-12-31
Generated by: Timothy Skone
Owner: National Energy Technology Laboratory
Reviewer: Robert James
Published in: National Energy Technology Laboratory (NETL). 2010. Coal loading silo; Manufacture; For railcar loading of coal, underground mine; 295 metric tonnes
restrictionsDescription: Use of this dataset is not restricted, but a statement of attribution is required. Please use the following attribution statement:
National Energy Technology Laboratory's (NETL) Unit Process Library
626 Cochrans Mill Road, P.O. Box 10940
Pittsburgh, PA 15236-0940
http://www.netl.doe.gov/research/energy-analysis/life-cycle-analysis/unit-process-library
Neither the U.S. Department of Energy (DOE) National Energy Technology Laboratory (NETL) nor any person acting on behalf of these organizations:
A. Makes any warranty or representation, express or implied, with respect to the accuracy, completeness, or usefulness of the information contained in this document, or that the use of any information, apparatus, method, or process disclosed in this document may not infringe on privately owned rights; or
B. Assumes any liability with this report as to its use, or damages resulting from the use of any information, apparatus, method, or process disclosed in this document.
Reference herein to any specific commercial product, process, or service by trade name, trademark, manufacturer, or otherwise, does not necessarily constitute or imply its endorsement, recommendation, or favoring by NETL. The views and opinions of the authors expressed herein do not necessarily state or reflect those of NETL.
copyright: true

## General comment
This process is part of the NETL Unit Process Library. To access the library and the original dataset:
1) Navigate to the NETL LCA home page (http://www.netl.doe.gov/lca)
2) Then navigate to the “Unit Process Library”
3) From the library, the unit process of interest can be found either through the "Complete Listing of the Unit Process Library link" or through the link to the "Unit Process Database" spreadsheet
4) For each process, a Data Sheet (DS) and Data File (DF) are available

BRIEF DESCRIPTION
This unit process is based on specifications for a George Third & Son, 325-ton coal silo, used for railcar loading of Illinois No. 6 bituminous coal at the mine site. It assumes silo constructed entirely of steel plate, with negligible amounts of other materials.

GOAL AND SCOPE
The scope of this unit process covers the materials required for the construction of a single, 295 metric tonne (325 short ton), steel coal-loading silo, used to load Illinois No. 6 bituminous coal into railcars. The unit process is based on the reference flow of 1 piece of coal-loading silo under Life Cycle (LC) Stage #1, as described below and shown in the associated documentation (referenced in the Citation and Associated Documentation section below). The coal-loading silo is assumed to be constructed entirely of steel; other materials are assumed to be negligible. By default, all steel within this study was assumed to be steel plate, based on available GaBi profiles, unless other steel types were specified per available data, or a higher grade of steel would be required, per NETL engineering judgment. Therefore, all steel considered in this unit process was assumed to be steel plate.

This coal-loading silo construction unit process, along with other construction unit processes for Illinois No. 6 bituminous coal preparation equipment, is combined in a separate assembly process for Illinois No. 6 bituminous coal processing, Coal preparation facility; Multiple processes; Illinois No. 6 Coal, Underground coal mine, U.S. This assembly unit process quantifies the fraction of each piece of equipment needed under LC Stage #1 to produce 1 kg of Illinois No. 6 bituminous coal ready for transport (LC Stage #2) to the energy conversion facility (LC Stage #3). Underground coal mine operations are modeled in DS_Stage1_O_CoalMine_I6_2009.01.xls, which quantifies the extraction and preparation of 1 kg of coal.

BOUNDARY AND DESCRIPTION
Construction of the coal-loading silo is based on manufacturer specifications contained in a printed advertisement for a 325–ton, steel coal-loading silo built by George Third & Son for Wolverine Coal Mine, located in British Columbia, Canada. The coal-loading silo is used to load coal into individual rail cars at the Illinois No. 6 bituminous coal mine site.

A visual representation of the boundary of this unit process is available in the associated documentation (referenced in the Citation and Associated Documentation section below). Emissions related to the physical assembly of the loading silo (e.g., emitted when putting together the components of the silo, including transport of the components) are not considered in this study. Upstream emission from the production of raw materials used in the construction of the loading silo (e.g., steel plate) are calculated outside the boundary of this process, based on proprietary profiles available within the GaBi model. As discussed above and shown in the associated documentation, the loading silo constructed in this unit process is incorporated into the construction assembly process for LC Stage #1.

The total weight of a loading silo is available, but does not provide a material breakdown of the components of the silo. Therefore, the silo was assumed to be composed solely of steel plate.

The dimensions and weight of the silo are provided in the associated documentation (reference below). The shape of the silo is a cylinder on top of a cone, to facilitate loading into the railcars.

Additional details regarding input and output flows, calculation methods and modeled input and output flows are contained in the associated documentation (referenced below).

CITATION AND ASSOCIATED DOCUMENTATION
This document should be cited as:
National Energy Technology Laboratory (NETL). 2015. NETL Life Cycle Inventory Data – Unit Process: Coal loading silo; Manufacture; For railcar loading of coal, underground mine; 295 metric tonnes. U.S. Department of Energy, National Energy Technology Laboratory. Last Updated: September 2015 (Version 01). Retrieved on [DATE] from [URL for this dataset].

This dataset is part of the NETL Unit Process Library. The Library offers additional information concerning this dataset in the form of a Detailed Spreadsheet Documentation (DS) file and a Process Documentation File (DF). The DS file is an Excel file that contains all of the parameters, inputs, and outputs for a given system as well as background data, calculations and quality scores. The DF file is a PDF document that contains major assumptions and data sources that are the basis for each unit process. The NETL Unit Process Library is located on the NETL website (netl.doe.gov) under Research / Energy Analysis / Energy Trends and Issues / Life Cycle Analysis / Unit Process Library.

This dataset was converted directly from the DS with additional supporting information provided by the DF. Full citations for the DS and DF are given below.

DS File
National Energy Technology Laboratory (NETL). 2010. NETL Life Cycle Inventory Data – Unit Process: Steel Coal-Loading Silo, 325 Tons, Construction. U.S. Department of Energy, National Energy Technology Laboratory. Last Updated: January 2010 (version 01). Retrieved on 6/30/2014 from: http://www.netl.doe.gov/File%20Library/Research/Energy%20Analysis/Life%20Cycle%20Analysis/UP_Library/DS_Stage1_C_Steel_Coal_Loading_Silo_325_Tons_2010-01.xls

DF File
National Energy Technology Laboratory (NETL). 2010. NETL Life Cycle Inventory Data – Unit Process: Steel Coal-Loading Silo, 325 Tons, Construction. U.S. Department of Energy, National Energy Technology Laboratory. Last Updated: January 2010 (version 01). Retrieved on 6/30/2014 from: http://www.netl.doe.gov/File%20Library/Research/Energy%20Analysis/Life%20Cycle%20Analysis/UP_Library/DF_Stage1_C_Steel_Coal_Loading_Silo_325_Tons_2010-01.pdf

## Technology
The scope of this unit process covers the materials required for the construction of a single, 295 metric tonne (325 short ton), steel coal-loading silo, used to load Illinois No. 6 bituminous coal into railcars. Construction of the coal-loading silo is based on manufacturer specifications contained in a printed advertisement for a 325–ton, steel coal-loading silo built by George Third & Son for Wolverine Coal Mine, located in British Columbia, Canada. The coal-loading silo is used to load coal into individual rail cars at the Illinois No. 6 bituminous coal mine site.

The associated documentation (referenced in the Citation and Associated Documentation section in the Description field) provides: a visual representation of the boundary of this unit process; the dimensions and weight of the silo; additional details regarding input and output flows; calculation methods; and modeled input and output flows.

## Geography
British Columbia

## Time period
This data set is representative of best available public data from 01/01/2006 to 12/31/2006 and is not subject to limited usability within sub-time spans (e.g. summer, winter).

## Reference product
- Coal loading silo; Manufacture; For railcar loading of coal, underground mine; 295 metric tonnes: 1 Item(s); data quality (2,3,1,2,1)

## Inputs from technosphere
- Steel plate; Blast furnace route; Production mix; 85% recovery rate: 294835 kg; data quality (2,3,1,2,1)

## Inventory method
Attributional

## Modelling constants
All elementary and technosphere flows are calculated on a functional unit basis. Calculations involving combustion primarily to generate useful work are done using lower heating values (LHV) and calculations involving combustion primarily to generate useful heat are done using higher heating values (HHV). Unless explicitly stated in the associated reference documents applicable calculations assumed standard atmospheric temperature and pressure (SATP).

## Completeness
Individual relevant flows captured

## Data selection
Best publically available data

## Data treatment
No allocation applied

## Data collection
No primary data collected

## Intended application
This is a gate-to-gate manufacturing process and can be used for any type of LCA study.

## Project
National Energy Technology Laboratory (NETL) Unit Process Library

## Sources
- George Third & Son. 2006. Advertisement in "First Class Health Care"
- National Energy Technology Laboratory (NETL). 2010. Coal loading silo; Manufacture; For railcar loading of coal, underground mine; 295 metric tonnes
