# Lumber, softwood, ACQ treated, SE

Dataset: openLCA process, unit process
Category: Wood Preservation
Geography: RNA
Time period: 2005-01-01 to 2009-12-31
Generated by: Chris Bolin
Reviewer: Paul Cooper
Published in: Chris Bolin
restrictionsDescription: All information can be accessed by everybody.
copyright: false

## General comment
Pressure-treated alkaline copper quaternary compound type D (ACQ-D) softwood lumber. Base process data presented with allocations to within process co-products noted. Refer to allocation worksheet for specifics. All allocations performed using mass or volume., This sheet sets out each unit process in the production of one cubic meter of ACQ surfaced pressure treated softwood lumber as produced in the US Southeast. Important note: although most of the data in the US LCI database has undergone some sort of review, the database as a whole has not yet undergone a formal validation process. Please email comments to lci@nrel.gov.; Geography: US Southeast

## Technology
typical

## Geography
US Southeast

## Reference product
- Lumber, softwood, ACQ treated, SE: 1 m3
  17.0 nominal BF = 1 acutal cubic feet (ft3)
  Retention =0.1550 lb/ft3 = 2.4012 kg/m3, dry basis.

## Inputs from technosphere
- CUTOFF Disposal, solid waste, unspecified, to unspecified landfill: 0.31 kg
  Preservative Production;
  Solid waste disposal associated with the mining of metals for preservative manufacture. Solid waste disposal as reported in treater surveys as chemical or process wastes, hazardous wastes, and other (normal trash or municipal waste).
- Electricity, at Grid, SERC, 2008: 4.858 kWh
  Preservative Production
- CUTOFF Copper, at plant: 1.6 kg
  Preservative Production - ACQ type D
- CUTOFF Quaternary (DDAC), at plant: 0.8 kg
  Preservative Production - ACQ type D
- Liquefied petroleum gas, combusted in industrial boiler: 0.334 l
  Preservative Wood Treatment
- Electricity, at Grid, SERC, 2008: 7.229 kWh
  Preservative Wood Treatment
- CUTOFF Monoethanolamine (MEA), at plant: 4.4 kg
  Preservative Production - ACQ type D
- Transport, train, diesel powered: 54.97 t*km
  Lumber to treating plant
- Transport, combination truck, diesel powered: 132 t*km
  Lumber and wood preservative to treating plant
- CUTOFF Disposal, solid waste, unspecified, to unspecified landfill: 5.6 kg
  Preservative Wood Treatment;
  Solid waste disposal associated with the mining of metals for preservative manufacture. Solid waste disposal as reported in treater surveys as chemical or process wastes, hazardous wastes, and other (normal trash or municipal waste).
- Diesel, combusted in industrial boiler: 1.209 l
  Preservative Wood Treatment
- Natural gas, processed, at plant: 5.166 m3
  Preservative production; feedstock
- Transport, barge, residual fuel oil powered: 0.2021 t*km
  Chemicals for preservative production
- Natural gas, combusted in industrial boiler: 0.3178 m3
  Preservative Wood Treatment
- Gasoline, combusted in equipment: 0.02987 l
  Preservative Wood Treatment
- Gasoline, combusted in equipment: 0.0003194 l
  Preservative Production
- Natural gas, combusted in industrial boiler: 1.319 m3
  Preservative Production
- Diesel, combusted in industrial boiler: 0.0002898 l
  Preservative Production
- Surfaced dried lumber, at planer mill, US SE: 528.94 kg
  1942.4 lbs/MBF x 17.0 BF/ft3 = 33.0208 lb/ft3 = 528.9425 kg/m3;
  Ref. SELum worksheet Column C, Row 6

## Inputs from nature
- Water, process, unspecified natural origin/m3: 90 l
  Preservative Production
- Water, process, unspecified natural origin/m3: 0.28 l
  Preservative Wood Treatment

## Emissions to nature
- VOC, volatile organic compounds: 0.00401 kg
  Preservative Production
- Particulates, < 10 um: 0.1135 kg
  Preservative Production
- Sulfur oxides: 8.082e-5 kg
  Preservative Production
- Sulfur dioxide: 0.006094 kg
  Preservative Production
- Copper: 7.005e-5 kg
  Preservative Wood Treatment: Stormwater runoff, unspecified location.
- Ammonia: 0.12, 0.12 kg (2 entries, compartments not in this file)
  Preservative Wood Treatment
- Copper: 0.0001214 kg
  Preservative Wood Treatment
- Carbon monoxide: 0.008648 kg
  Preservative Production
- Carbon dioxide, fossil: 6.024 kg
  Preservative Production
- Methane: 0.009754 kg
  Preservative Production
- Nitrogen oxides: 0.01811 kg
  Preservative Production

## Sampling procedure
Industry survey

## Sources
- Chris Bolin
- Chris Bolin
