# Electricity, at eGrid, MROE, 2010

Dataset: openLCA process, unit process
Category: Utilities
Geography: RNA
Time period: 2010-01-01 to 2010-01-01
Generated by: Samantha Wascavage
Published in: Chris Goemans, Athena Institute
restrictionsDescription: All information can be accessed by everybody.
copyright: false

## General comment
The methodology used to put together the grid information is outlined in reference 1.

## Technology
Typical

## Geography
MRO East electricity grid to include most of Wisconsin and northern Michigan.

## Reference product
- Electricity, at eGrid, MROE, 2010: 1 kWh

## Inputs from technosphere
- CUTOFF Electricity, biomass, gas, landfill, at power plant: 0.004145 kWh
  Gaseous Renewable Fuels (Biomass) LFG, OBG - landfill gas
- Electricity, nuclear, at power plant: 0.385675 kWh
  Nuclear Fission
- CUTOFF Electricity, petroleum coke, at power plant: 0.012642 kWh
  Petroleum (Other Fossil) PC, SG, WO - petroleum coke
- CUTOFF Electricity, hydropower, at power plant, unspecified: 0.029567 kWh
  Hydroelectric
- CUTOFF Electricity, biomass,liquid, unspecified, at power plant: 0.015804 kWh
  Liquid Renewable Fuels (Biomass) BLQ - black liquor also includes, OBL, SLW, WDL
- Electricity, residual fuel oil, at power plant: 0.000159 kWh
  Petroleum (RFO) - Residual Fuel Oil (includes No. 5 and No. 6 Fuel Oils and Bunker C Fuel Oil)
- CUTOFF Electricity, other fuels, unspecified, at power plant: 0.000992 kWh
  Other Fuels PUR, OTH, MSN, WH - purchased steam
- Electricity, bituminous coal, at power plant: 0.048745 kWh
  Bituminous Coal BIT - Anthracite Coal, and Bituminous Coal also includes SC, SGC, WC.
- Electricity, bituminous coal, at power plant: 0.445984 kWh
  Subbituminous Coal
- CUTOFF Electricity, at wind power plant, unspecified: 0.012083 kWh
  Wind
- Electricity, diesel, at power plant: 0.000754 kWh
  Petroleum (DFO) - Distillate Fuel Oil (includes all Diesel and No. 1, No. 2, and No. 4 Fuel Oils also includes JF, KER)
- Electricity, natural gas, at power plant: 0.036577 kWh
  Natural Gas
- CUTOFF Electricity, biomass,solid, unspecified, at power plant: 0.006873 kWh
  Solid Renewable Fuels (Biomass) OBS - Other Biomass Solid (Animal Manure and Waste, Solid By-products, and other solid biomass not specified also includes AB, MSB, MSW, TDF,WDS)

## Sampling procedure
based on EIA electricity reports for all power plants in the US.

## Sources
- Chris Goemans, Athena Institute
- Statistics Canada
- unspecified
- USEPA
- Statistics Canada
- Statistics Canada
- Statistics Canada
- Statistics Canada
- USEPA
- EIA
- EIA
- EIA
- EIA
- EIA
- EIA
- EIA
- EIA
- EIA
- US DOE
- International Energy Agency
- EIA
