# Electricity, at eGrid, AKMS, 2010

Dataset: openLCA process, unit process
Category: Utilities
Geography: RNA
Time period: 2010-01-01 to 2010-01-01
Generated by: Samantha Wascavage
Published in: Chris Goemans, Athena Institute
restrictionsDescription: All information can be accessed by everybody.
copyright: false

## General comment
The methodology used to put together the grid information is outlined in reference 1.

## Technology
Typical

## Geography
Alaska electricity grid for all Alaskan regions except the South (Anchorage area) and Central (Fairbanks area) Alaskan regions (AKGD)

## Reference product
- Electricity, at eGrid, AKMS, 2010: 1 kWh

## Inputs from technosphere
- Electricity, natural gas, at power plant: 0.03927 kWh
- Electricity, diesel, at power plant: 0.255258 kWh
  Petroleum (DFO) - Distillate Fuel Oil (includes all Diesel and No. 1, No. 2, and No. 4 Fuel Oils, also includes DFO, JF, KER)
- CUTOFF Electricity, hydropower, at power plant, unspecified: 0.705471 kWh
- CUTOFF Electricity, at wind power plant, unspecified: 1e-6 kWh

## Sampling procedure
based on EIA electricity reports for all power plants in the US.

## Sources
- Chris Goemans, Athena Institute
- Statistics Canada
- unspecified
- USEPA
- Statistics Canada
- Statistics Canada
- Statistics Canada
- Statistics Canada
- USEPA
- EIA
- EIA
- EIA
- EIA
- EIA
- EIA
- EIA
- EIA
- EIA
- US DOE
- International Energy Agency
- EIA
