# Electricity, at Grid, MRO, 2008

Dataset: openLCA process, unit process
Category: Utilities
Geography: RNA
Time period: 2008-01-01 to 2008-01-01
Generated by: Alberta Carpenter
Published in: Chris Goemans, Athena Institute
restrictionsDescription: All information can be accessed by everybody.
copyright: false

## General comment
The methodology used to put together the grid information is outlined in reference 1.

## Technology
Typical

## Geography
Manitoba, Minnesota, Nebraska, North Dakota, Saskatchewan and parts of Illinois, Michigan, South Dakota and Wisconsin.

## Reference product
- Electricity, at Grid, MRO, 2008: 1 kWh

## Inputs from technosphere
- CUTOFF Electricity, petroleum coke, at power plant: 0.00485257 kWh
  PC – Petroleum Coke
- Electricity, bituminous coal, at power plant: 0.557485 kWh
  SUB – Subbituminous Coal
- CUTOFF Electricity, biomass,liquid, unspecified, at power plant: 0.00441425 kWh
  BLQ – Black Liquor
- Electricity, bituminous coal, at power plant: 0.0232378 kWh
  BIT - Anthracite Coal, and Bituminous Coal.
- CUTOFF Electricity, hydropower, at power plant, unspecified: 0.0327458 kWh
  WAT – Water (Conventional, Pumped Storage)
- CUTOFF Electricity, biomass, liquid, sludge, at power plant: 7.77017e-5 kWh
  SLW – Sludge Waste
- Electricity, diesel, at power plant: 0.00149156 kWh
  DFO – Distillate Fuel Oil (includes all Diesel and No. 1, No. 2, and No. 4 Fuel Oils)
- CUTOFF Electricity, biomass, solid, biogenic MSW, at power plant: 0.00157487 kWh
  MSB – Municipal Solid Waste – Biogenic Component
- Electricity, bituminous coal, at power plant: 9.25421e-6 kWh
  SC - Coal Synfuel. Coal-based solid fuel that has been processed by a coal synfuel plant, and coal-based fuels such as briquettes, pellets, or extrusions, which are formed from fresh or recycled coal and binding materials.
- CUTOFF Electricity, petroleum, waste oil, at power plant: 1.46653e-5 kWh
  WO – Waste/Other Oil (including Crude Oil, Liquid Butane, Liquid Propane, Oil Waste, Re-Refined Motor Oil, Sludge Oil, Tar Oil, or other petroleum-based liquid wastes)
- CUTOFF Electricity, at wind power plant, unspecified: 0.0495443 kWh
  WND – Wind
- CUTOFF Electricity, tire derived fuel, at power plant: 0.000301384 kWh
  TDF – Tired (tire derived fuel)
- CUTOFF Electricity, biomass,solid, unspecified, at power plant: 0.00189631 kWh
  OBS – Other Biomass Solid (Animal Manure and Waste, Solid By-products, and other solid biomass not specified)
- Electricity, natural gas, at power plant: 0.0353679 kWh
  NG – Natural Gas
- Electricity, nuclear, at power plant: 0.147775 kWh
  NUC – Nuclear (Uranium, Plutonium, Thorium)
- CUTOFF Electricity, biomass, gas, unspecified, at power plant: 0.000164677 kWh
  OBG – Other Biomass Gases (Digester Gas, Methane, and other biomass gases)
- CUTOFF Electricity, MSW, non-biogenic, at power plant: 0.00123739 kWh
  MSN – Municipal Solid Waste – Non-biogenic components
- CUTOFF Electricity, other fuels, unspecified, at power plant: 0.000368016 kWh
  PUR – Purchased Steam
- CUTOFF Electricity, biomass, solid, agriculture by-products, at power plant: 6.74522e-5 kWh
  AB – Agriculture Crop By-products / Straw / Energy Crops
- CUTOFF Electricity, other gases, unspecified, at power plant: 0.000121914 kWh
  OG – Other Gas (Butane, Coal Processes, Coke-Oven, Refinery, and other processes)
- Electricity, biomass, at power plant: 0.00456276 kWh
  WDS – Wood/Wood Waste Solids (Paper Pellets, Railroad Ties, Utility Poles, Wood Chips, and other wood solids)
- Electricity, residual fuel oil, at power plant: 0.000211675 kWh
  RFO – Residual Fuel Oil (includes No. 5 and No. 6 Fuel Oils and Bunker C Fuel Oil)
- CUTOFF Electricity, biomass, gas, landfill, at power plant: 0.00218475 kWh
  LFG – Landfill Gas
- Electricity, lignite coal, at power plant: 0.129534 kWh
  LIG – Lignite Coal
- CUTOFF Electricity, geothermal, unspecified: 0.000511983 kWh
  GEO – Geothermal
- CUTOFF Electricity, other fuels, unspecified, at power plant: 0.000246416 kWh
  OTH – Other (Batteries, Chemicals, Coke Breeze, Hydrogen, Pitch, Sulfur, Tar Coal, and miscellaneous technologies)

## Sampling procedure
based on EIA electricity reports for all power plants in the US.

## Sources
- Chris Goemans, Athena Institute
- unspecified
- USEPA
- Statistics Canada
- Statistics Canada
- Statistics Canada
- Statistics Canada
- Statistics Canada
- Statistics Canada
- USEPA
- EIA
- EIA
- EIA
- EIA
- EIA
- EIA
- EIA
- EIA
- EIA
- EIA
- EIA
- US DOE
- International Energy Agency
- US DOE
