# Ethylene oxide, at plant

Dataset: openLCA process, unit process
Category: All Other Basic Organic Chemical Manufacturing
Geography: RNA
Time period: 1990-01-01 to 2005-01-01
Generated by: Franklin Associates
Published in: THE PLASTICS DIVISION OF THE AMERICAN C
restrictionsDescription: All information can be accessed by everybody.
copyright: false

## General comment
The average energy and emissions data collected between 1990 and 1992 were reviewed by an ethylene oxide producer and deemed acceptable for ethylene oxide production in 2005. However, updated raw material data were provided in 2005. Complete inventory data and metadata are available in full in the final report and appendices, Cradle-to-Gate Life Cycle Inventory of Nine Plastic Resins and Four Polyurethane Precursors. This report has been extensively reviewed within Franklin Associates and has undergone partial critical review by ACC Plastics Division members and is available at: www.americanchemistry.com. Quantities may vary slightly between the reference to main source and and this module due to rounding. Important note: although most of the data in the US LCI database has undergone some sort of review, the database as a whole has not yet undergone a formal validation process. Please email comments to lci@nrel.gov.

## Technology
Direct oxidation of ethylene using air or oxygen

## Geography
US and Europe

## Reference product
- Ethylene oxide, at plant: 1 kg

## Inputs from technosphere
- Electricity, at grid, US, 2008: 0.223104 kWh
- CUTOFF Disposal, solid waste, unspecified, to sanitary landfill: 0.0168 kg
- Oxygen, liquid, at plant: 0.88 kg
- Transport, pipeline, natural gas: 0.00141592 t*km
- Ethylene, at plant: 0.788 kg
- Natural gas, combusted in industrial boiler: 0.101007 m3
- Transport, pipeline, unspecified petroleum products: 0.152147 t*km

## Inputs from nature
- Water, process, unspecified natural origin/m3: 0.00075709 m3
  Consumptive use includes: water incorporated into the product, water evaporated during the process, and/or water used and released to a body other than that from which it was drawn.

## Emissions to nature
- Chromium, unspecified: 2.5e-5 kg
- COD, Chemical Oxygen Demand: 0.00282 kg
- Ethylene oxide: 9.54e-5 kg
- Ammonia: 5e-8 kg
- Acetaldehyde: 0.0001 kg
- BOD5, Biological Oxygen Demand: 0.00223 kg
- Nitrogen oxides: 1.4e-6 kg
- Organic substances, unspecified: 0.000682 kg
- Zinc: 1e-5 kg
- Aldehydes: 0.00028 kg
- Methane: 0.00305 kg
- Carbon monoxide: 3e-7 kg
- NMVOC, non-methane volatile organic compounds, unspecified: 0.01813 kg
- Sulfur oxides: 3e-7 kg
- Fluoride: 2e-7 kg
- Carbon dioxide, fossil: 0.5905 kg

## Sampling procedure
Data are from primary sources.

## Sources
- THE PLASTICS DIVISION OF THE AMERICAN C
