# Polystyrene, general purpose, at plant, CTR

Dataset: openLCA process, unit process
Category: All Other Basic Organic Chemical Manufacturing
Geography: RNA
Time period: 2000-01-01 to 2003-01-01
Generated by: Franklin Associates
Published in: THE PLASTICS DIVISION OF THE ACC
restrictionsDescription: All information can be accessed by everybody.
copyright: false

## General comment
Scrap is produced as a coproduct during this process. A mass basis was used to partition the credit for scrap. Complete inventory data and metadata are available in full in the final report and appendices, Cradle-to-Gate Life Cycle Inventory of Nine Plastic Resins and Four Polyurethane Precursors. This report has been extensively reviewed within Franklin Associates and has undergone partial critical review by ACC Plastics Division members and is available at: www.americanchemistry.com. Quantities may vary slightly between the reference to main source and and this module due to rounding. Important note: although most of the data in the US LCI database has undergone some sort of review, the database as a whole has not yet undergone a formal validation process. Please email comments to lci@nrel.gov.

## Technology
Polymerization of styrene by mass suspension

## Geography
US

## Reference product
- Polystyrene, general purpose, at plant, CTR: 1 kg

## By-products
- Recovered energy, for Polystyrene, general purpose, at plant, CTR: 0.010008 MJ

## Inputs from technosphere
- CUTOFF Disposal, solid waste,process, to municipal incineration: 0.0033583 kg
- CUTOFF Disposal, solid waste, process, to sanitary landfill: 0.034706 kg
- CUTOFF Disposal, solid waste, process, to waste-to-energy: 0.001508 kg
- CUTOFF Disposal, solid waste, fuel, to municipal incineration: 0.087834 kg

## Inputs from nature
- Energy, solar: 0.00039809 MJ
- Gas, natural, in ground: 0.85488 m3
  This flow represents the amount of natural gas that is used for fuel. The energy content of the natural gas used for fuel is 36.7 MJ per m3.
- Energy, kinetic (in wind), converted: 0.00938 MJ
- Water, consumptive use, unspecified origin/m3: 0.011755 m3
- Energy, from biomass: 0.0039062 MJ
- Energy, geothermal: 0.0094795 MJ
- Uranium oxide, 332 GJ per kg, in ore: 4.6988e-6 kg
- Energy, unspecified: 0.012696 MJ
  Energy unspecified reflects "other fossil" fuels
- Coal, unprocessed bituminous, in ground: 0.19174 kg
- Coal, lignite, in ground: 0.018433 kg
- Oil, crude, in ground: 0.72575 kg
  This flow represents the amount of crude oils that is a material input for producing the resin output. The energy content of the crude oil used as EMR/feedstock is 43.7 MJ per kg. The energy content multiplied by the mass should be considered an Energy of Material Resource (EMR)/feedstock energy.
- Gas, natural, in ground: 0.41211 kg
  This flow represents the amount of natural gas that is a material input for producing the resin output. The energy content of the natural gas used as EMR/feedstock is 49.8 MJ per kg. The energy content multiplied by the mass should be considered an Energy of Material Resource (EMR)/feedstock energy.
- Oil, crude, in ground: 0.15012 kg
  This flow represents the amount of crude oil that is used for fuel. The energy content of the crude oil used for fuel is 43.7 MJ per kg.
- Energy, from hydro power: 0.18014 MJ

## Emissions to nature
- Naphthalenes, alkylated, unspecified: 1.373e-9 kg
- Arsenic: 4.8621e-8 kg
- Fluorene, 1-methyl-: 2.4422e-11 kg
- Hexanoic acid: 9.3092e-8 kg
- Styrene: 1.0967e-12, 9.9955e-7 kg (2 entries, compartments not in this file)
- Sulfur dioxide: 0.0047333 kg
- Phenanthrene: 3.539e-10, 2.4272e-10 kg (2 entries, compartments not in this file)
- Radium-226/kg: 1.6019e-14 kg
- Sulfur oxides: 0.0021156 kg
- Hydrocarbons, unspecified: 1e-8, 1.4394e-6 kg (2 entries, compartments not in this file)
- Sulfide: 9.4016e-7 kg
- Chlorine: 1.337e-7 kg
- Ethylene dibromide: 3.5746e-9 kg
- Molybdenum: 1.0167e-8 kg
- Docosane: 2.2963e-10 kg
- Bromoform: 1.7108e-12 kg
- Vanadium: 5.6556e-8 kg
- Methyl ethyl ketone: 2.5702e-7, 1.7274e-11 kg (2 entries, compartments not in this file)
- Chromium VI: 2.2359e-10, 7.1017e-9 kg (2 entries, compartments not in this file)
- Phthalate, dioctyl-: 3.2023e-12 kg
- Chloroform: 2.5882e-12 kg
- Selenium: 2.4964e-8, 1.2286e-7 kg (2 entries, compartments not in this file)
- Ethane, 1,2-dibromo-: 5.2641e-14 kg
- 2-Chloroacetophenone: 3.0707e-13 kg
- Fluoranthene: 6.3827e-11 kg
- Beryllium: 5.4289e-9, 2.4211e-9 kg (2 entries, compartments not in this file)
- Methane, chlorotrifluoro-, CFC-13: 1.8288e-8 kg
- Sulfate: 0.00012727 kg
- Copper, ion: 1.0393e-7 kg
- Cobalt: 9.8149e-9, 5.1177e-8 kg (2 entries, compartments not in this file)
- Propanal: 1.667e-11 kg
- Radioactive species, Nuclides, unspecified: 7.7451 Bq
- Fluorenes, alkylated, unspecified: 4.8556e-9 kg
- Magnesium: 9.8886e-7, 0.00018552 kg (2 entries, compartments not in this file)
- Dissolved solids: 0.012819 kg
- Aluminum: 4.2845e-5 kg
- Nitrogen, total: 1.3274e-7 kg
- Benzo(ghi)perylene: 2.4272e-12 kg
- Copper: 4.1836e-10, 6.751e-8 kg (2 entries, compartments not in this file)
- Toluene: 5.0104e-7, 0.00014987 kg (2 entries, compartments not in this file)
- Ammonia: 1.7878e-5, 3.0647e-6 kg (2 entries, compartments not in this file)
- Radioactive species, unspecified: 5092.6 Bq
- Particulates, < 2.5 um: 0.00024504 kg
- Toluene, 2,4-dinitro-: 1.2283e-14 kg
- Benzo(a)pyrene: 3.4161e-12 kg
- Biphenyl: 5.4252e-9, 1.5283e-10 kg (2 entries, compartments not in this file)
- Nickel: 1.5371e-7, 6.3257e-7 kg (2 entries, compartments not in this file)
- Aldehydes, unspecified: 8.6276e-8 kg
- Lead: 5.4892e-8, 2.8432e-7 kg (2 entries, compartments not in this file)
- Hexane: 2.9391e-12 kg
- Methacrylic acid, methyl ester: 8.7734e-13 kg
- Silver: 5.6685e-7 kg
- Tin: 1.0184e-7 kg
- Ammonium chloride: 2.494e-7 kg
- Mercury: 1.1398e-8, 5.6938e-10 kg (2 entries, compartments not in this file)
- Titanium, ion: 3.946e-7 kg
- Hydrogen: 2.5342e-6 kg
- Benzene, ethyl-: 1.1988e-5, 1.0314e-6 kg (2 entries, compartments not in this file)
- Methane, monochloro-, R-40: 8.6372e-12, 2.325e-11 kg (2 entries, compartments not in this file)
- Eicosane: 6.6762e-9 kg
- o-Xylene: 4.7451e-9 kg
- Furan: 4.0224e-13 kg
- Benzoic acid: 4.495e-7 kg
- Benzyl chloride: 3.0707e-11 kg
- Tetradecane: 1.0348e-8 kg
- Antimony: 2.5196e-8, 3.314e-9 kg (2 entries, compartments not in this file)
- TOC, Total Organic Carbon: 5.6257e-7 kg
- Methane, tetrachloro-, CFC-10: 1.1638e-9 kg
- Acenaphthylene: 2.2474e-11 kg
- Chloride: 0.011465 kg
- Dibenzothiophene: 4.2077e-11 kg
- 2-Hexanone: 2.9309e-9 kg
- Fluoride: 7.4101e-9, 8.6728e-7 kg (2 entries, compartments not in this file)
- Phosphate: 1e-6 kg
- Dodecane: 2.4329e-8 kg
- 4-Methyl-2-pentanone: 9.0512e-10 kg
- COD, Chemical Oxygen Demand: 0.001133 kg
- Ethane, chloro-: 1.8424e-12 kg
- Xylene: 8.6928e-5, 2.1135e-7 kg (2 entries, compartments not in this file)
- Octadecane: 6.6083e-9 kg
- Phenols, unspecified: 2.7944e-8, 7.6672e-8 kg (2 entries, compartments not in this file)
- Thallium: 5.4101e-9 kg
- Phenol: 7.0188e-13, 8.0822e-7 kg (2 entries, compartments not in this file)
- Radionuclides (Including Radon): 6.6793e-6 kg
- Cyanide: 1.0155e-9, 1.0967e-10 kg (2 entries, compartments not in this file)
- Surfactants: 1.024e-7 kg
- Benzene, pentamethyl-: 1.6083e-11 kg
- Boron: 1.386e-6 kg
- 5-methyl Chrysene: 1.9777e-12 kg
- Cadmium, ion: 1.4172e-8 kg
- Kerosene: 1.1944e-7 kg
- n-Hexacosane: 1.4325e-10 kg
- Calcium, ion: 0.00093024 kg
- NMVOC, non-methane volatile organic compounds, unspecified origin: 0.00076818 kg
- BOD5, Biological Oxygen Demand: 0.00044216 kg
- m-Xylene: 1.286e-8 kg
- Benzene: 9.7022e-5, 4.8848e-7 kg (2 entries, compartments not in this file)
- Strontium: 2.4115e-5 kg
- Organic substances, unspecified: 1.1103e-5 kg
- Carbon monoxide: 0.00072792 kg
- Sulfur: 1.0962e-6 kg
- Formaldehyde: 1.1622e-6 kg
- Polycyclic organic matter, unspecified: 4.6552e-8 kg
- Zinc: 2.789e-10, 1.0665e-6 kg (2 entries, compartments not in this file)
- Cadmium: 1.979e-8 kg
- Sodium, ion: 0.0026813 kg
- Dibenzofuran: 4.0803e-11 kg
- VOC, volatile organic compounds: 0.00097879 kg
- Butadiene: 2.5769e-9 kg
- Vinyl acetate: 3.3339e-13 kg
- Anthracene: 1.8878e-11 kg
- Naphthalene: 1.5714e-8, 8.0131e-9 kg (2 entries, compartments not in this file)
- Ethane, 1,1,1-trichloro-, HCFC-140: 8.7734e-13 kg
- Benzene, 1-methyl-4-(1-methylethyl)-: 2.1443e-11 kg
- Hydrogen fluoride: 1.3483e-5 kg
- Manganese: 6.9254e-8, 1.8213e-6 kg (2 entries, compartments not in this file)
- Methane, fossil: 0.017522 kg
- Dioxins, measured as 2,3,7,8-tetrachlorodibenzo-p-dioxin: 1.7257e-13 kg
- Phenanthrenes, alkylated, unspecified: 5.6929e-10 kg
- p-Cresol: 1.3754e-8 kg
- Oils, unspecified: 3.184e-5 kg
- Barium: 0.00055216 kg
- Particulates, > 2.5 um, and < 10um: 7.4059e-5 kg
- Acetone: 2.1985e-9 kg
- Benzenes, alkylated, unspecified: 8.3784e-8 kg
- Particulates, < 10 um: 0.00030277 kg
- Ethene, tetrachloro-: 4.393e-9 kg
- Dinitrogen monoxide: 3.9683e-5, 9.0612e-7 kg (2 entries, compartments not in this file)
- p-Xylene: 4.7451e-9 kg
- Hexadecane: 2.6623e-8 kg
- Cumene: 2.325e-13 kg
- Carbon dioxide, fossil: 2.7464 kg
- Yttrium: 2.9729e-9 kg
- Ammonium, ion: 5.3323e-8 kg
- Arsenic, ion: 8.8118e-8 kg
- Methane, chlorodifluoro-, HCFC-22: 1.0006e-6 kg
- Radium-228/kg: 8.1941e-17 kg
- Chromium: 1.1515e-6, 4.5545e-8 kg (2 entries, compartments not in this file)
- Mercaptans, unspecified: 8.7944e-9 kg
- Propene: 1.7004e-7 kg
- Hydrazine, methyl-: 7.4574e-12 kg
- Iron: 8.0943e-5 kg
- Lithium, ion: 0.00015088 kg
- Fluorene: 8.1805e-11, 2.2625e-9 kg (2 entries, compartments not in this file)
- Acetaldehyde: 5.0573e-8 kg
- Bromide: 5.6433e-5 kg
- Carbon monoxide, fossil: 0.0014717 kg
- Decane: 1.283e-8 kg
- Methane, bromo-, Halon 1001: 7.0188e-12 kg
- Lead-210/kg: 4.6045e-17 kg
- Particulates, unspecified: 0.00036054 kg
- Acetophenone: 6.5801e-13 kg
- o-Cresol: 1.2773e-8 kg
- Suspended solids, unspecified: 0.0045908 kg
- Ethane, 1,2-dichloro-: 1.7547e-12 kg
- Chrysene: 8.9898e-12 kg
- Acenaphthene: 4.5846e-11 kg
- Benzo(b,j,k)fluoranthene: 9.8886e-12 kg
- Sulfuric acid, dimethyl ester: 2.1056e-12 kg
- Carbon disulfide: 5.7027e-12 kg
- t-Butyl methyl ether: 1.5354e-12 kg
- PAH, polycyclic aromatic hydrocarbons: 1.1072e-8 kg
- Nitrogen oxides: 0.0059908 kg
- Phenol, 2,4-dimethyl-: 1.2413e-8 kg
- Organic acids: 9.1647e-10 kg
- Indeno(1,2,3-cd)pyrene: 5.4839e-12 kg
- Benzo(a)anthracene: 7.1917e-12 kg
- Naphthalene, 2-methyl-: 6.7598e-9 kg
- Surfactants, unspecified: 1.2437e-7 kg
- Isophorone: 2.5443e-11 kg
- Methane, dichloro-, HCC-30: 6.1248e-8 kg
- Hydrogen chloride: 0.000113 kg
- Methane: 0.00065981 kg
- Pyrene: 2.9666e-11 kg
- Benzene, chloro-: 9.6508e-13 kg

## Sampling procedure
Data are from both primary and secondary sources. Data for the production of GPPS resin using mass polymerization were provided by four leading producers (6 plants) in North America. The GPPS producers who provided data for this module verified that the characteristics of their plants are representative of a majority of North American GPPS production.

## Sources
- THE PLASTICS DIVISION OF THE ACC
