# Electricity, at eGrid, MROW, 2008

Dataset: openLCA process, unit process
Category: Utilities
Geography: RNA
Time period: 2008-01-01 to 2008-01-01
Generated by: Alberta Carpenter
Published in: Chris Goemans, Athena Institute
restrictionsDescription: All information can be accessed by everybody.
copyright: false

## General comment
The methodology used to put together the grid information is outlined in reference 1.

## Technology
Typical

## Geography
Includes generation and transmission of electricity for the MRO West electricity grid to include Minnesota, Iowa, most of the Dakotas (less RMPA) and Nebraska (less RMPA) and parts of Montana (less NWPP) and Wisconsin (less MRO E)

## Reference product
- Electricity, at eGrid, MROW, 2008: 1 kWh

## Inputs from technosphere
- CUTOFF Electricity, biomass,liquid, unspecified, at power plant: 0.00151148 kWh
  Liquid Renewable Fuels (Biomass) BLQ - Black liquor
- CUTOFF Electricity, biomass, solid, biogenic MSW, at power plant: 0.00169034 kWh
  Solid Renewable Fuels (Biomass) MSB -Municipal Solid Waste – Biogenic Component
- CUTOFF Electricity, other fuels, unspecified, at power plant: 0.000264483 kWh
  Other Fuels OTH - Other (Batteries, Chemicals, Coke Breeze, Hydrogen, Pitch, Sulfur, Tar Coal, and miscellaneous technologies)
- CUTOFF Electricity, at wind power plant, unspecified: 0.0529417 kWh
  Wind
- CUTOFF Electricity, other fuels, unspecified, at power plant: 0.000246303 kWh
  Other Fuels PUR - purchase steam
- Electricity, diesel, at power plant: 5.27955e-7 kWh
  Petroleum (DFO) KER - kerosene
- Electricity, bituminous coal, at power plant: 0.500925 kWh
  Subbituminous Coal
- Electricity, bituminous coal, at power plant: 9.93273e-6 kWh
  Bituminous Coal - SC - Coal Synfuel. Coal-based solid fuel that has been processed by a coal synfuel plant, and coal-based fuels such as briquettes, pellets, or extrusions, which are formed from fresh or recycled coal and binding materials.
- CUTOFF Electricity, geothermal, unspecified: 0.000549522 kWh
  Geothermal
- Electricity, nuclear, at power plant: 0.20715 kWh
  Nuclear Fission
- CUTOFF Electricity, hydropower, at power plant, unspecified: 0.0364693 kWh
  Hydroelectric
- CUTOFF Electricity, other gases, unspecified, at power plant: 0.000130853 kWh
  Other Gases OG - Other Gas (Butane, Coal Processes, Coke-Oven, Refinery, and other processes)
- Electricity, residual fuel oil, at power plant: 0.00010993 kWh
  Petroleum (RFO) – Residual Fuel Oil (includes No. 5 and No. 6 Fuel Oils and Bunker C Fuel Oil)
- Electricity, biomass, at power plant: 0.00314026 kWh
  Solid Renewable Fuels (Biomass) WDS - Wood/Wood Waste Solids (Paper Pellets, Railroad Ties, Utility Poles, Wood Chips, and other wood solids)
- CUTOFF Electricity, biomass, liquid, sludge, at power plant: 7.52829e-5 kWh
  Liquid Renewable Fuels (Biomass) SLW - sludge waste
- CUTOFF Electricity, biomass,solid, unspecified, at power plant: 0.00202018 kWh
  Solid Renewable Fuels (Biomass) OBS - Other Biomass Solid (Animal Manure and Waste, Solid By-products, and other solid biomass not specified)
- Electricity, natural gas, at power plant: 0.0304322 kWh
  Natural Gas
- CUTOFF Electricity, biomass, gas, unspecified, at power plant: 0.000160891 kWh
  Gaseous Renewable Fuels (Biomass) OBG - Other Biomass Gases (Digester Gas, Methane, and other biomass gases)
- Electricity, bituminous coal, at power plant: 0.0175752 kWh
  Bituminous Coal BIT - Anthracite Coal, and Bituminous Coal.
- CUTOFF Electricity, biomass, solid, agriculture by-products, at power plant: 7.23978e-5 kWh
  Solid Renewable Fuels (Biomass) AB - Agriculture Crop By-products/Straw/Energy Crops
- CUTOFF Electricity, petroleum coke, at power plant: 0.0010876 kWh
  Petroleum (Other Fossil) PC - petroleum coke
- CUTOFF Electricity, waste oil, at power plant: 1.57406e-5 kWh
  Petroleum (Other Fossil) WO – Waste/Other Oil (including Crude Oil, Liquid Butane, Liquid Propane, Oil Waste, Re-Refined Motor Oil, Sludge Oil, Tar Oil, or other petroleum-based liquid wastes)
- CUTOFF Electricity, biomass, gas, landfill, at power plant: 0.00147437 kWh
  Gaseous Renewable Fuels (Biomass) LFG - landfill gas
- Electricity, diesel, at power plant: 0.00135852 kWh
  Petroleum (DFO) – Distillate Fuel Oil (includes all Diesel and No. 1, No. 2, and No. 4 Fuel Oils)
- CUTOFF Electricity, MSW, non-biogenic, at power plant: 0.00132812 kWh
  Other Fuels MSN - Municipal Solid Waste – Non-biogenic components
- Electricity, lignite coal, at power plant: 0.139031 kWh
  Lignite Coal
- CUTOFF Electricity, tire derived fuel, at power plant: 0.000229023 kWh
  Solid Renewable Fuels (Biomass) TDF - tires, tire derived fuel

## Sampling procedure
based on EIA electricity reports for all power plants in the US.

## Sources
- Chris Goemans, Athena Institute
- unspecified
- USEPA
- Statistics Canada
- Statistics Canada
- Statistics Canada
- Statistics Canada
- Statistics Canada
- Statistics Canada
- USEPA
- EIA
- EIA
- EIA
- EIA
- EIA
- EIA
- EIA
- EIA
- EIA
- EIA
- EIA
- US DOE
- International Energy Agency
- US DOE
