# Softwood logs with bark, harvested at medium intensity site, at mill, US PNW

Dataset: openLCA process, unit process
Category: Logging
Geography: RNA
Time period: 2003-01-01 to 2004-01-01
Generated by: Jamie Meil
Published in: Leonard R. Johnson
restrictionsDescription: All information can be accessed by everybody.
copyright: true

## General comment
Base process data presented with allocations to within process co-products noted. Refer to allocation worksheet for specifics. All allocations performed using mass or volume., harvesting on a medium productivity site
Important note: although most of the data in the US LCI database has
undergone some sort of review, the database as a whole has not yet
undergone a formal validation process.
Please email comments to lci@nrel.gov.

## Technology
Typical

## Geography
US Pacific North West

## Reference product
- Softwood logs with bark, harvested at medium intensity site, at mill, US PNW: 1 m3

## Inputs from technosphere
- Diesel, combusted in industrial equipment: 2.564 l
- Transport, combination truck, average fuel mix: 160.3 t*km
- Reforesting, medium intensity site, US PNW: 12.29 m2
- CUTOFF Lubricants, unspecified, at plant: 0.039877 kg

## Sources
- Leonard R. Johnson
- Michael Milota
- Maureen Puetmann
