# Harvesting, fresh fruit bunch, at farm

Dataset: openLCA process, unit process
Geography: RNA
Time period: 1985-01-01 to 1991-01-01
Generated by: Franklin Associates
Published in: THE PLASTICS DIVISION OF THE AMERICAN C
restrictionsDescription: All information can be accessed by everybody.
copyright: false

## General comment
Assumes amount harvested is directly input to palm kernel production with no losses due to land-applied or animal feed wastes. Complete inventory data and metadata are available in full in the final report and appendices, Cradle-to-Gate Life Cycle Inventory of Nine Plastic Resins and Four Polyurethane Precursors. This report has been extensively reviewed within Franklin Associates and has undergone partial critical review by ACC Plastics Division members and is available at: www.americanchemistry.com. Quantities may vary slightly between the reference to main source and and this module due to rounding. Important note: although most of the data in the US LCI database has undergone some sort of review, the database as a whole has not yet undergone a formal validation process. Please email comments to lci@nrel.gov.

## Technology
Harvested by manually cutting from palm trees

## Geography
Maylasia

## Reference product
- Harvesting, fresh fruit bunch, at farm: 1 kg
  Assumes amount harvested is directly input to palm kernel production with no losses due to land-applied or animal feed wastes.

## Inputs from technosphere
- CUTOFF Disposal, solid waste, unspecified, to sanitary landfill: 1.2e-5 kg
- Diesel, combusted in industrial equipment: 0.0163542 l
  Includes diesel fuel and distillate oil amounts.

## Inputs from nature
- Fresh fruit bunches: 1 kg

## Emissions to nature
- Sulfur oxides: 2.3e-6 kg
- NMVOC, non-methane volatile organic compounds, unspecified: 1e-6 kg
- Carbon monoxide: 2.3e-6 kg
- Particulates, unspecified: 6.6e-5 kg
- Carbon dioxide, biogenic: 0.00856 kg
- Nitrogen oxides: 5.5e-6 kg

## Sampling procedure
Data are from secondary sources.

## Sources
- THE PLASTICS DIVISION OF THE AMERICAN C
