# Electricity, at eGrid, NEWE, 2010

Dataset: openLCA process, unit process
Category: Utilities
Geography: RNA
Time period: 2010-01-01 to 2010-01-01
Generated by: Samantha Wascavage
Published in: Chris Goemans, Athena Institute
restrictionsDescription: All information can be accessed by everybody.
copyright: false

## General comment
The methodology used to put together the grid information is outlined in reference 1.

## Technology
Typical

## Geography
Maine, New Hampshire, Vermont,Massachusetts, Rhode Island and Connecticut.

## Reference product
- Electricity, at eGrid, NEWE, 2010: 1 kWh

## Inputs from technosphere
- Electricity, bituminous coal, at power plant: 0.094512 kWh
  Bituminous Coal BIT, SC, SGC, WC - Anthracite Coal, and Bituminous Coal.
- CUTOFF Electricity, petroleum, waste oil, at power plant: 9.3e-5 kWh
  Petroleum (Other Fossil) WO, PC, SG – Waste/Other Oil (including Crude Oil, Liquid Butane, Liquid Propane, Oil Waste, Re-Refined Motor Oil, Sludge Oil, Tar Oil, or other petroleum-based liquid wastes)
- CUTOFF Electricity, at wind power plant, unspecified: 0.002958 kWh
  Wind
- CUTOFF Electricity, MSW, non-biogenic, at power plant: 0.011339 kWh
  Other Fuels MSN, OTH, PUR, WH - Municipal Solid Waste – Non-biogenic components
- Electricity, nuclear, at power plant: 0.289129 kWh
  Nuclear Fission
- CUTOFF Electricity, other gases, unspecified, at power plant: 0.000101 kWh
  Other Gases - OG, BFG, PG (Butane, Coal Processes, Coke-Oven, Refinery, and other processes)
- Electricity, natural gas, at power plant: 0.421159 kWh
  Natural Gas
- Electricity, diesel, at power plant: 0.069517 kWh
  Petroleum (DFO, JF, KER) - Distillate Fuel Oil (includes all Diesel and No. 1, No. 2, and No. 4 Fuel Oils)
- CUTOFF Electricity, biomass, solid, biogenic MSW, at power plant: 0.041586 kWh
  Solid Renewable Fuels (Biomass) MSB, AB, MSW, OBS, TDF, WDS - Municipal Solid Waste – Biogenic Component
- CUTOFF Electricity, solar, unspecified, at power plant: 2e-6 kWh
  Solar (Photovoltaic, Thermal)
- CUTOFF Electricity, biomass, gas, landfill, at power plant: 0.001651 kWh
  Gaseous Renewable Fuels (Biomass) LFG, OBG - landfill gas
- Electricity, residual fuel oil, at power plant: 0.00682 kWh
  Petroleum (RFO) – Residual Fuel Oil (includes No. 5 and No. 6 Fuel Oils and Bunker C Fuel Oil)
- CUTOFF Electricity, biomass,liquid, unspecified, at power plant: 0.00872 kWh
  Liquid Renewable Fuels (Biomass) BLQ, OBL, SLW, WDL- black liquor
- CUTOFF Electricity, hydropower, at power plant, unspecified: 0.055115 kWh
  Hydroelectric
- Electricity, bituminous coal, at power plant: 0.0203055 kWh
  Subbituminous Coal

## Sampling procedure
based on EIA electricity reports for all power plants in the US.

## Sources
- Chris Goemans, Athena Institute
- Statistics Canada
- unspecified
- USEPA
- Statistics Canada
- Statistics Canada
- Statistics Canada
- Statistics Canada
- USEPA
- EIA
- EIA
- EIA
- EIA
- EIA
- EIA
- EIA
- EIA
- EIA
- US DOE
- International Energy Agency
- EIA
