# Ethanol, denatured, mixed feedstocks, at conversion facility, 2022

Dataset: openLCA process, unit process
Category: Ethanol
Geography: RNA
Time period: 2009-01-01 to 2009-01-01
Generated by: Daniel Inman
Published in: Hsu, D.
restrictionsDescription: All information can be accessed by everybody.
copyright: false

## Technology
modern

## Geography
North America

## Time period
2009

## Reference product
- Ethanol, denatured, mixed feedstocks, at conversion facility, 2022: 1 kg

## Inputs from technosphere
- Ethanol, denatured, wheat straw, biochemical: 0.129 kg
- Ethanol, denatured, forest residues, thermochem: 0.129 kg
- Ethanol, denatured, corn dry mill: 0.484 kg
- Ethanol, denatured, switchgrass, biochemical: 0.129 kg
- Ethanol, denatured, corn stover, biochemical: 0.129 kg

## Sources
- Hsu, D.
- Hess, J.
