# Pyrolysis gasoline, at plant

Dataset: openLCA process, unit process
Category: All Other Basic Organic Chemical Manufacturing
Geography: RNA
Time period: 2003-01-01 to 2003-01-01
Generated by: Franklin Associates
Published in: THE PLASTICS DIVISION OF THE AMERICAN C
restrictionsDescription: All information can be accessed by everybody.
copyright: false

## General comment
Numerous coproduct streams are produced during this process. Fuel gas and off-gas are two coproducts produced that are exported to another process for fuel use. When the fuel coproducts are exported from the hydrocracker, they carry with them the allocated share of the inputs and outputs for their production. The ratio of the mass of the exported fuel over the total mass output is removed from the total inputs and outputs of the hydrocracker, and the remaining inputs and outputs are allocated over the material hydrocracker products. No energy credit is applied for the exported fuels, since both the inputs and outputs for the exported fuels have been removed from the data set. Complete inventory data and metadata are available in full in the final report and appendices, Cradle-to-Gate Life Cycle Inventory of Nine Plastic Resins and Four Polyurethane Precursors. This report has been extensively reviewed within Franklin Associates and has undergone partial critical review by ACC Plastics Division members and is available at: www.americanchemistry.com. Quantities may vary slightly between the reference to main source and and this module due to rounding. Important note: although most of the data in the US LCI database has undergone some sort of review, the database as a whole has not yet undergone a formal validation process. Please email comments to lci@nrel.gov.

## Technology
Steam cracking of natural gas and petroleum

## Geography
North America (US and Canada)

## Reference product
- Pyrolysis gasoline, at plant: 1 kg

## Inputs from technosphere
- CUTOFF Disposal, solid waste, unspecified, to sanitary landfill: 0.000360541 kg
- CUTOFF Natural gas, processed, for olefins production, at plant, internal offgas use: 0.10382 kg
  A portion of the material feed combusts within the hydrocracker and produces an offgas, which provides an internal energy source.
- Transport, barge, residual fuel oil powered: 0.0900337 t*km
- CUTOFF Disposal, solid waste, unspecified, to waste-to-energy: 4.71149e-6 kg
- CUTOFF Petroleum refining, for olefins production, at plant, material use: 0.418615 kg
  Specific raw materials from oil refining and natural gas processing include ethane, propane, liquid feed, heavy raffinate, and DNG
- Transport, pipeline, unspecified petroleum products: 0.170236 t*km
- Gasoline, combusted in equipment: 1.8443e-5 l
- Electricity, at grid, US, 2008: 0.11597 kWh
- Transport, train, diesel powered: 0.0248981 t*km
- Diesel, combusted in industrial equipment: 1.60163e-5 l
  Includes diesel fuel and distillate oil amounts.
- Natural gas, combusted in industrial boiler, at hydrocracker, for pyrolysis gas: 0.0963996 m3
- Electricity, at cogen, for natural gas turbine: 0.0423233 kWh
- CUTOFF Petroleum refining, for olefins production, at plant, internal offgas use: 0.07518 kg
  (same comment as for CUTOFF Natural gas, processed, for olefins production, at plant, inter)
- CUTOFF Disposal, solid waste, unspecified, to municipal incineration: 0.00688534 kg
- Transport, pipeline, natural gas: 1.10667 t*km
- Transport, barge, diesel powered: 0.0270778 t*km
- CUTOFF Natural gas, processed, for olefins production, at plant, material use: 0.584241 kg
  (same comment as for CUTOFF Petroleum refining, for olefins production, at plant, material )
- Transport, combination truck, diesel powered: 0.0327569 t*km

## Inputs from nature
- Water, process, unspecified natural origin/m3: 0.000353771 m3
  Consumptive use includes: water incorporated into the product, water evaporated during the process, and/or water used and released to a body other than that from which it was drawn.

## Emissions to nature
- Organic substances, unspecified: 1e-6 kg
  This emission was reported by fewer than three companies. To indicate known emissions while protecting the confidentiality of individual company responses, the emission is reported only by order of magnitude.
- Benzene, ethyl-: 1e-8 kg
  (same comment as for Organic substances, unspecified)
- Benzene: 1e-8 kg
  (same comment as for Organic substances, unspecified)
- NMVOC, non-methane volatile organic compounds, unspecified: 0.000112933 kg
- TOC, Total Organic Carbon: 1e-6 kg
  (same comment as for Organic substances, unspecified)
- BOD5, Biological Oxygen Demand: 3.4867e-7 kg
- Particulates, unspecified: 9.95728e-6 kg
- Particulates, > 2.5 um, and < 10um: 0.0001 kg
  (same comment as for Organic substances, unspecified)
- Toluene: 1e-7 kg
  (same comment as for Organic substances, unspecified)
- Styrene: 1e-9 kg
  (same comment as for Organic substances, unspecified)
- Methane: 1e-6 kg
  (same comment as for Organic substances, unspecified)
- Sulfur oxides: 4.42194e-6 kg
- Chlorine: 1e-7 kg
  (same comment as for Organic substances, unspecified)
- Hydrogen chloride: 1e-9 kg
  (same comment as for Organic substances, unspecified)
- Naphthalene: 1e-11 kg
  (same comment as for Organic substances, unspecified)
- Acetone: 1e-11 kg
  (same comment as for Organic substances, unspecified)
- Methane, difluromonochloro-, HCFC-22: 1e-9 kg
  (same comment as for Organic substances, unspecified)
- Phenol compounds, unspecified: 1e-6 kg
  (same comment as for Organic substances, unspecified)
- Suspended solids, unspecified: 2.80768e-6 kg
- Carbon monoxide: 1e-6 kg
  (same comment as for Organic substances, unspecified)
- COD, Chemical Oxygen Demand: 1e-5 kg
  (same comment as for Organic substances, unspecified)
- VOC, volatile organic compounds: 1e-5 kg
  (same comment as for Organic substances, unspecified)
- Hydrogen: 5.48666e-6 kg
- Xylene: 1e-9 kg
  (same comment as for Organic substances, unspecified)

## Sampling procedure
Data collected from primary sources.

## Sources
- THE PLASTICS DIVISION OF THE AMERICAN C
