# Transport, motor home, gasoline powered

Dataset: openLCA process, unit process
Category: Other Transit and Ground Passenger Transportation
Geography: RNA
Time period: 2010-01-01 to 2010-01-01
Generated by: Nathan Hardesty
Published in: U.S. Environmental Protection Agency (EP
restrictionsDescription: All information can be accessed by everybody.
copyright: false

## General comment
This dataset represents the U.S. average airborne emissions for operating a gasoline powered motor home. The inventory includes all vehicle operation processes, including off-network and refueling activities.
The refinery-to-pump transportation and distribution data are calculated from Argonne National Laboratory's GREET 1.8d.1 model.
The vehicle operation data are calculated from EPA's MOVES2010a model, using the assumptions described in the corresponding detailed spreadsheet. Emissions factors in MOVES2010a are largely based on EPA's Mobile Source Observation Database, which in turn includes data from a variety of vehicle studies (References 5-7).
MOVES2010a acknowledges sources of uncertainty in the model structure, the population and acitivty data, and other model parameters. As of July 2011, the uncertainty calculation function of the model has not been activated.

## Technology
Combustion of gasoline in a motor home.

## Geography
US

## Reference product
- Transport, motor home, gasoline powered: 1 p*km

## Inputs from technosphere
- Transport, barge, average fuel mix: 0.0129729 t*km
- Transport, combination truck, average fuel mix: 0.0200238 t*km
- Transport, ocean freighter, average fuel mix: 0.171197 t*km
- Transport, pipeline, unspecified petroleum products: 0.196546 t*km
- Transport, train, diesel powered: 0.037385 t*km
- Gasoline, at refinery: 0.0687636 l

## Emissions to nature
- Ammonia: 6.08018e-6 kg
- Methane: 1.13121e-5 kg
- Nitrogen dioxide: 4.89846e-5 kg
- Sulfur dioxide: 2.93074e-6 kg
- Particulates, < 2.5 um: 5.11794e-6 kg
  PM2.5 from organic carbon, elemental carbon, and sulfate particulates.
- Particulates, < 10 um: 7.42656e-6 kg
  PM10 from brakewear.
- Dinitrogen monoxide: 6.04922e-6 kg
- Particulates, < 2.5 um: 1.94413e-6 kg
  PM2.5 from brakewear.
- VOC, volatile organic compounds: 0.000456621 kg
- Carbon dioxide, fossil: 0.157601 kg
- Nitrogen oxides: 0.000767624 kg
- Particulates, < 10 um: 1.50327e-6 kg
  PM10 from tirewear.
- Particulates, < 10 um: 5.55807e-6 kg
  PM10 from organic carbon, elemental carbon, and sulfate particulates.
- Hydrocarbons (other than methane): 0.000443426 kg
- Carbon monoxide, fossil: 0.00780242 kg
- Particulates, < 2.5 um: 3.60496e-7 kg
  PM2.5 from tirewear.
- Nitrogen oxide: 0.000718639 kg

## Sources
- U.S. Environmental Protection Agency (EP
- National Institute of Standards and Tech
- EPA
- U.S. Alternative Fuels and Advanced Vehi
- Eastern Research Group
- Assessment and Standards Division, Offic
- Assessment and Standards Division, Offic
- Wang, M.
