# Corn, production, average, US, 2022

Dataset: openLCA process, unit process
Category: Corn Farming
Geography: RNA
Time period: 2010-01-01 to 2100-12-31
Generated by: Daniel Inman
Published in: Hsu, D.
restrictionsDescription: All information can be accessed by everybody.
copyright: false

## Technology
Future technology

## Geography
North America

## Time period
2010 and after

## Reference product
- Corn, production, average, US, 2022: 11000 kg

## Inputs from technosphere
- CUTOFF Irrigating: 384 m3
  Cubic meters of water applied as irrigation during the growing season. This water use is consumptive. Assumeing 15 percent of corn acres are irrigated. Data from NASS 2002. USDA NASS. 2002. Census of Agriculture: Farm and Ranch Irrigation Survey. Table 28. Available online: http://www.agcensus.usda.gov/Publications/2002/FRIS/tables/fris03_28.pdf
  Verified 10/14/08. A factor of 0.7 has been applied to account for consumptive water use (ANL repot)
- Tillage, reduce, corn production: 0.242 ha
  24.2% of corn area is "reduced tilled". Data from: Conservation Technology Information Center. 2007. Amendment to the National Crop Residue Management Survey.
- Harvest, corn, single pass: 0.685 ha
  single pass harvester is scaled because of the additional materials (grian and stover) processed. 1 ha single pass harvest is scaled to 1.46 ha. The .46 is attributed to stover (31.5%) the rest is grain.
- Tillage, intensive, corn production: 0.354 ha
  35.4% of corn area is "intensively tilled". Data from: Conservation Technology Information Center. 2007. Amendment to the National Crop Residue Management Survey.
- Fertilizer, corn, 2022: 1 ha
  Fertilizer data from: USDA NASS 2006. Agricultural Chemical Usage 2005 Field Crops Summary. Page 8.
- Pesticide, corn, 2022: 1 ha
  Transformation of land to and from cancel out because new area was not used in this base case (2007-data). Transformation reflects the total land area used for production for the duration of 1 year (EcoInvent 2.0 manual) Planting data extrapolated from USDA ERS. 2008. USDA Lon-term crop projections.
- CUTOFF Planting: 1 ha
  All area planted to corn. Data from NASS 2006: http://www.nass.usda.gov/QuickStats/index2.jsp
  Verified 10/14/08.
- Tillage, conservation, corn production: 0.404 ha
  40.4% of corn area is "conservatively tilled". Data from: Conservation Technology Information Center. 2007. Amendment to the National Crop Residue Management Survey.

## Inputs from nature
- Transformation, from arable: 1 ha
  Transformation of land to and from cancel out because new area was not used in this base case (2007-data). Transformation reflects the total land area used for production for the duration of 1 year (EcoInvent 2.0 manual). Planting data extrapolated from USDA ERS. 2008. USDA Lon-term crop projections.
- Occupation, arable: 0.58 ha
  Area based on 2022 adjusted yield. Occupation is amortized for the duration of growing the crop, 7 months (0.58 yr) was used. Yield data are extrapolated from: USDA NASS corn data 1964 - 2007. Available online: http://www.nass.usda.gov/QuickStats
  Verified 10/14/08
- Seed corn: 22.8 kg
  Mean seeding rate for corn (30,000 plants per acre) in kg per ha, not adjusted for germination. Pioneer Seeds: Doerge and Imholte. Crop Insights 15(5) Available online: http://www.pioneer.com/web/site/portal/menuitem.8da514bd9c4d58de3c3d48e7d10093a0/
  Verified 10/14/08. A factor of 10% was applied to account for germination (30,000 p/ac).
- Energy, from biomass: 164000 MJ
  LHV for corn stover, data from Phyllis database http://www.ecn.nl/phyllis/
  Verified 10/14/08
- Transformation, to arable: 1 ha
- Carbon dioxide, in air: 15300 kg
  Carbon balance, based on dry corn being 44.6% C. Phyllis Database: http://www.ecn.nl/phyllis/dataTable.asp
  Verified 10/14/08. This value is adjusted for 15.5% moisture in the grain at harvest.

## Sources
- Hsu, D.
- Nemecek, T.
- USDA NASS
