# Aluminum, primary, ingot, at plant, 1998

Dataset: openLCA process, unit process
Category: Other Aluminum Rolling and Drawing
Geography: RNA
Time period: 1998-01-01 to 1998-01-01
Generated by: James Littlefield, Franklin Associates
Published in: Franklin Associates, A Division of ERG
restrictionsDescription: All information can be accessed by everybody.
copyright: false

## General comment
Molten aluminum is discharged from a smelter into the holding and ingot casting facility. In this step, molten metal is typically combined with high quality, in-house scrap and then cast into aluminum ingots (References 6 and 7). A melt loss occurs when dross is skimmed off the molten aluminum. Electricity for ingot casting is assumed to be produced by the same fuel mix used for aluminum smelting because smelting and ingot casting usually occur in the same facility.
Important note: although most of the data in the US LCI database has
undergone some sort of review, the database as a whole has not yet
undergone a formal validation process.
Please email comments to lci@nrel.gov.

## Technology
Casting of molten metal discharged from smelter.

## Geography
North America

## Reference product
- Aluminum, primary, ingot, at plant, 1998: 1 kg

## Inputs from technosphere
- Residual fuel oil, combusted in industrial boiler: 0.01861 l
- Gasoline, combusted in equipment: 7.344e-5 l
- CUTOFF Disposal, solid waste, unspecified, to unspecified treatment: 0.02123 kg
- Diesel, combusted in industrial boiler: 0.0001836 l
- Liquefied petroleum gas, combusted in industrial boiler: 0.0015022 l
- Natural gas, combusted in industrial boiler: 0.051815 m3
- Aluminum, primary, smelt, at plant: 1 kg
- Electricity, aluminum smelting and ingot casting regions: 0.2112 kWh

## Emissions to nature
- Dissolved organic matter: 1.3e-5 kg
- Iron: 8.6e-7 kg
- COD, Chemical Oxygen Demand: 0.00021 kg
- Particulates, unspecified: 5.8e-5 kg
- Fluoride: 2.7e-6 kg
- Oils, unspecified: 2.3e-5 kg
- Detergents, unspecified: 1.5e-8 kg
- Metals, unspecified: 1.6e-6 kg
- Organic substances, unspecified: 1.1e-5 kg
- Suspended solids, unspecified: 6.7e-5 kg
- BOD5, Biological Oxygen Demand: 4.1e-5 kg
- Metallic ions, unspecified: 2.6e-6 kg
- Lead: 3.2e-9, 9.4e-9 kg (2 entries, compartments not in this file)
- Carbon dioxide, fossil: 0.00093 kg
- Nitrogen oxides: 2.6e-5 kg
- Sulfur: 5.7e-7 kg
- Fluorine: 1.9e-5 kg
- Sulfur oxides: 1.1e-5 kg
- Hydrogen fluoride: 2.3e-6 kg
- NMVOC, non-methane volatile organic compounds, unspecified origin: 3.8e-6 kg
- Mercury: 1.4e-11 kg
- Dissolved solids: 0.00018 kg
- Cyanide: 1.7e-9 kg
- Carbon monoxide: 6e-6 kg
- Hydrogen chloride: 5.3e-5 kg
- Chloride: 7.888e-6 kg
- Ammonium, ion: 3.6e-7 kg
- Chlorine: 1.8e-5 kg
- Phenol: 1.2e-9 kg

## Sources
- Franklin Associates, A Division of ERG
- The Aluminum Association
- Energy Information Administration (EIA)
- US Geological Survey
- IAI Statistical Report: Electrical Power
- US EPA
