# Secondary bonding application, rigid composites part, at plant

Dataset: openLCA process, unit process
Category: Plastics Product Manufacturing
Geography: US
Time period: 2011-01-01 to 2012-01-01
Generated by: Franklin Associates
Published in: American Composites Manufacturers Assn.
restrictionsDescription: All information can be accessed by everybody.
copyright: false

## General comment
Secondary bonding should not be confused with secondary lamination, which is a different process, as it uses more bond material and can be much more energy intensive. Complete inventory data and metadata are shown in full in the final report, Life Cycle Inventory of Polymer Composites. The report is not publicly available. This report has been extensively reviewed within Franklin Associates by Rebe Feraldi, Anne Marie Molen, and Melissa Huff and has undergone partial critical review by ACMA members. Important note: although most of the data in the US LCI database has undergone some sort of review, the database as a whole has not yet undergone a formal validation process. Please email comments to lci@nrel.gov.

## Technology
Application of adhesive material to bond two rigid composite parts.

## Geography
US

## Reference product
- Secondary bonding application, rigid composites part, at plant: 1 kg

## Inputs from technosphere
All rows: lognormal geomSd 1
- Transport, combination truck, diesel powered: 1.065 t*km
- CUTOFF Adhesive, UPR-based, at plant: 1.071 kg
- CUTOFF Adhesive tube dispensers, at plant: 0.0099 kg
- Electricity, at Grid, US, 2010: 0.090829 kWh
- CUTOFF Disposal, solid waste, unspecified, to sanitary landfill: 0.083 kg
- Natural gas, combusted in industrial boiler: 0.0010862 m3

## Emissions to nature
- VOC, volatile organic compounds: 0.031 kg; lognormal geomSd 1

## Sampling procedure
Data are from primary sources. The composites fabricators who provided data for this module verified that the characteristics of their plants are representative of North American composites fabrication facilities providing secondary bonding of composite parts. The representativeness of the composites fabrication processes are unknown, but estimated to be less than 10% of the US production volume.

## Sources
- American Composites Manufacturers Assn.
