# Steel, cold-formed studs and track, at plant

Dataset: openLCA process, unit process
Category: Rolling and Drawing of Purchased Steel
Geography: RNA
Time period: 2012-01-01 to 2017-01-01
Generated by: PE INTERNATIONAL AG
Reviewer: PE INTERNATIONAL AG
Published in: Steel Framing Alliance (SFA)
restrictionsDescription: All information can be accessed by everybody.
copyright: true

## General comment
The gate-to-gate data set covers all relevant input and output flows of the represented gate to gate unit process. The inventory is mainly based on industry data and is completed, where necessary, by secondary data. Dummy flows indicate inputs and outputs without corresponding USLCI process data for upstream production of materials or downstream treatment of waste (as of 2014).

## Technology
Cold-formed steel studs produced via slitting and roll forming steel sheet. The gate-to-gate process includes on-site propane combustion emissions. Inbound and outbound transportation of raw materials and finished product is not included.

## Geography
The data set represents gate-to-gate production in North America (specifically US and Canada) of Steel Framing Alliance (SFA) members.

## Time period
annual average

## Reference product
- Steel, cold-formed studs and track, at plant: 1 kg

## By-products
- CUTOFF Disposal, wood waste, to residual material landfill: 0.000309 kg
- CUTOFF Galvanized steel scrap, at plant: 0.0284 kg
- CUTOFF Disposal, solid waste, unspecified, to unspecified landfill: 5.47e-5 kg

## Inputs from technosphere
- CUTOFF Plastic band, for packaging: 0.000204 kg; lognormal geomSd 0
- CUTOFF Lubricating oil: 9.22e-5 kg; lognormal geomSd 0
- CUTOFF Steel band, for packaging: 0.00202 kg; lognormal geomSd 0
- CUTOFF Pallet, for packaging: 0.0206 kg; lognormal geomSd 0
- Electricity, at Grid, US, 2010: 0.194049 MJ; lognormal geomSd 1
- CUTOFF Propane, combusted in equipment: 0.00131307 kg; lognormal geomSd 0
- Galvanized steel sheet, at plant: 1.03 kg; lognormal geomSd 0

## Emissions to nature
- Carbon dioxide, fossil: 0.00356 kg; lognormal geomSd 0

## Review details
The LCI method applied is in compliance with ISO 14040 and 14044. The documentation includes all relevant information in view of the data quality and scope of the application of the respective LCI result / data set. The dataset represents the state-of-the-art in view of the referenced functional unit.

## Sources
- Steel Framing Alliance (SFA)
