# Polyethylene, linear low density, resin, at plant

Dataset: openLCA process, unit process
Category: Petrochemical Manufacturing
Geography: RNA
Time period: 2003-01-01 to 2003-01-01
Generated by: Franklin Associates
Published in: THE PLASTICS DIVISION OF THE AMERICAN C
restrictionsDescription: All information can be accessed by everybody.
copyright: false

## General comment
Scrap is produced as a coproduct during this process. A mass basis was used to partition the credit for scrap. Complete inventory data and metadata are available in full in the final report and appendices, Cradle-to-Gate Life Cycle Inventory of Nine Plastic Resins and Four Polyurethane Precursors. This report has been extensively reviewed within Franklin Associates and has undergone partial critical review by ACC Plastics Division members and is available at: www.americanchemistry.com. Quantities may vary slightly between the reference to main source and and this module due to rounding. Important note: although most of the data in the US LCI database has undergone some sort of review, the database as a whole has not yet undergone a formal validation process. Please email comments to lci@nrel.gov.

## Technology
Polymerization of ethylene via combination of a solution and gas phase processes

## Geography
North America (US and Canada)

## Reference product
- Polyethylene, linear low density, resin, at plant: 1 kg

## Inputs from technosphere
- Residual fuel oil, combusted in industrial boiler: 0.0033376 l
- CUTOFF Disposal, solid waste, unspecified, to sanitary landfill: 0.00035 kg
- Diesel, combusted in industrial equipment: 6.258e-6 l
- Electricity, at grid, US, 2008: 0.126984 kWh
- Gasoline, combusted in equipment: 8.344e-6 l
- Ethylene, at plant: 0.9994 kg
- Natural gas, combusted in industrial boiler: 0.0420758 m3
- Electricity, at cogen, for natural gas turbine: 0.152778 kWh
- Transport, pipeline, unspecified petroleum products: 0.192964 t*km
- CUTOFF Disposal, solid waste, unspecified, to municipal incineration: 0.00013 kg
- CUTOFF Disposal, solid waste, unspecified, to waste-to-energy: 9.1e-5 kg

## Inputs from nature
- Water, process, unspecified natural origin/m3: 0.000226949 m3
  Consumptive use includes: water incorporated into the product, water evaporated during the process, and/or water used and released to a body other than that from which it was drawn.

## Emissions to nature
- Phosphorus: 1e-7 kg
  This emission was reported by fewer than three companies. To indicate known emissions while protecting the confidentiality of individual company responses, the emission is reported only by order of magnitude.
- Phenol compounds, unspecified: 1e-9 kg
  (same comment as for Phosphorus)
- Dissolved solids: 2.4e-5 kg
- Nitrogen oxides: 3e-5 kg
- Aluminum: 1e-6 kg
  (same comment as for Phosphorus)
- Particulates, < 2.5 um: 1e-5 kg
  (same comment as for Phosphorus)
- Oil and grease, unspecified: 3.4e-6 kg
- Aluminum compounds, unspecified: 1e-7 kg
- Sulfur oxides: 1.6e-7 kg
- Butene: 1e-7 kg
  (same comment as for Phosphorus)
- COD, Chemical Oxygen Demand: 1e-5 kg
  (same comment as for Phosphorus)
- Carbon monoxide: 0.0001 kg
- Methane, difluromonochloro-, HCFC-22: 1e-8 kg
  (same comment as for Phosphorus)
- Carbon dioxide, fossil: 0.0508 kg
- NMVOC, non-methane volatile organic compounds, unspecified: 0.00036 kg
- Dinitrogen monoxide: 1.7e-5 kg
- Furans, unspecified: 1e-6 kg
  (same comment as for Phosphorus)
- Particulates, unspecified: 1e-5 kg
  (same comment as for Phosphorus)
- Suspended solids, unspecified: 3.4e-5 kg
- BOD5, Biological Oxygen Demand: 1e-6 kg
  (same comment as for Phosphorus)
- Cyclohexane: 1e-7 kg
  (same comment as for Phosphorus)
- Organic substances, unspecified: 1e-5 kg
  (same comment as for Phosphorus)
- Methane: 2e-6 kg
- Process solvents, unspecified: 1e-7 kg
  (same comment as for Phosphorus)
- Zinc: 1e-8 kg
  (same comment as for Phosphorus)
- Particulates, > 2.5 um, and < 10um: 1.4e-5 kg

## Sampling procedure
Data are from primary sources.

## Sources
- THE PLASTICS DIVISION OF THE AMERICAN C
