# Rough green lumber processing, at sawmill, US SE

Dataset: openLCA process, unit process
Category: Sawmills
Geography: RNA
Time period: 1999-01-01 to 2002-01-01
Generated by: Jamie Meil
Published in: Michael Milota
restrictionsDescription: All information can be accessed by everybody.
copyright: true

## General comment
Base process data presented with allocations to within process co-products noted. Refer to allocation worksheet for specifics. All allocations performed using mass or volume.,
Important note: although most of the data in the US LCI database has
undergone some sort of review, the database as a whole has not yet
undergone a formal validation process.
Please email comments to lci@nrel.gov.

## Technology
typical

## Geography
US South east

## Reference product
- Rough green lumber, at sawmill, US SE: 1 kg

## By-products
- Pulp chips, at sawmill, US SE: 0.635 kg
- Sawdust, at sawmill, US SE: 0.119 kg
- Bark, at sawmill, US SE: 0.261 kg

## Inputs from technosphere
- CUTOFF Disposal, wood waste, to residual material landfill: 0.000731 kg
- Softwood logs with bark, harvested at average intensity site, at mill, US SE: 0.00378 m3
- Liquefied petroleum gas, combusted in industrial boiler: 3.07e-7 l
- Gasoline, combusted in equipment: 0.000174 l
- CUTOFF Kerosene, combusted in industrial boiler: 5.44e-6 l
- Diesel, combusted in industrial boiler: 0.00103 l
- Electricity, at grid, Eastern US, 2000: 0.0655 kWh

## Emissions to nature
- Bark: 0.0269 kg
- Particulates, unspecified: 0.00166 kg

## Sampling procedure
survey method

## Sources
- Leonard R. Johnson
- Maureen Puetmann
- Michael Milota
