# Sawn lumber, hardwood, rough, green, at sawmill, NE-NC

Dataset: openLCA process, unit process
Category: Sawmills
Geography: RNA
Time period: 2005-01-01 to 2006-01-01
Generated by: Maureen Puetmann
Published in: Richard D. Bergman
restrictionsDescription: All information can be accessed by everybody.
copyright: false

## General comment
Allocation based on mass.
Important note: although most of the data in the US LCI database has
undergone some sort of review, the database as a whole has not yet
undergone a formal validation process.
Please email comments to lci@nrel.gov.

## Technology
Average technology. Some data extrapolated from similar processes.

## Geography
NE/NC = Northeast (NE) and Northcentral (NC) United States. The 20 states are Connecticut, Delaware, Illinois, Indiana, Iowa, Maine, Maryland, Massachusetts, Michigan, Minnesota, Missouri, New Hampshire, New Jersey, New York, Ohio, Pennsylvania, Rhode Island, Vermont, West Virginia, Wisconsin.

## Reference product
- Sawn lumber, hardwood, rough, green, at sawmill, NE-NC: 1 kg
  Weight reported on an ovendry basis. Moisture content (ovendry basis) = 87%

## By-products
- Bark, hardwood, green, at sawmill, NE-NC: 0.186 kg
  Weight reported on an ovendry basis. Moisture content (ovendry basis) = 87%
- Hogged fuel, hardwood, green, at sawmill, NE-NC: 0.036 kg
  Weight reported on an ovendry basis. Moisture content (ovendry basis) = 83.8%
- Wood fuel, hardwood, green, at sawmill, NE-NC: 0.238 kg
  Weight reported on an ovendry basis. Moisture content (ovendry basis) = 86.3%
- Sawdust, hardwood, green, at sawmill, NE-NC: 0.0801 kg
  Weight reported on an ovendry basis. Moisture content (ovendry basis) = 91.1%
- Wood chips, hardwood, green, at sawmill, NE-NC: 0.263 kg
  Weight reported on an ovendry basis. Moisture content (ovendry basis) = 86.3%

## Inputs from technosphere
- Diesel, combusted in industrial equipment: 0.00175 l
  20% of mill use based on Softwood SE CORRIM Report: transporation on-site
- Natural gas, combusted in industrial equipment: 7.13e-5 l
  20% of mill use based on Softwood SE CORRIM Report: transporation on-site
- Heat, onsite boiler, hardwood mill, average, NE-NC: 0.525 MJ
  Heat for facility heating
- CUTOFF Disposal, solid waste, unspecified, to inert material landfill: 0.0162 kg
- Gasoline, combusted in equipment: 0.000152 l
  20% of mill use based on Softwood SE CORRIM Report: transporation on-site
- Electricity, at grid, Eastern US, 2000: 0.0999 kWh
  45.0% of total electricity is used for sawing and based on 1.0 m^3 planed dried lumber
- Bark, hardwood, green, at logyard, NE-NC: 0.186 kg
  Weight reported on an ovendry basis. Moisture content (ovendry basis) = 87%
- Roundwood, hardwood, green, at logyard, NE-NC: 0.00313 m3
  Weight reported on an ovendry basis. Moisture content (ovendry basis) = 87%
- CUTOFF Recycling, wood waste, unspecified: 0.000481 kg
- Electricity, onsite boiler, hardwood mill, average, NE-NC: 0.00171 kWh
  45.0% of total electricity is used for sawing and based on 1.0 m^3 planed dried lumber

## Emissions to nature
- Particulates, unspecified: 0.002483 kg

## Sampling procedure
Questionnaires from 20 mills (17 companies) from the 20 states of Forest Service (FS) Northeastern (NE) Region. Hardwood sawmills were members of the Hardwood Manufacturer Association (HMA).

## Sources
- Richard D. Bergman
- Maureen Puettmann
- Forest Products Laboratory
- Forest Products Laboratory
- NHLA
- Andrew J. Baker
