# Fertilizer, corn, 2022

Dataset: openLCA process, unit process
Category: Corn Farming
Geography: RNA
Time period: 2005-01-01 to 2009-12-31
Generated by: Daniel Inman
Published in: Hsu, D.
restrictionsDescription: All information can be accessed by everybody.
copyright: false

## Technology
Modern technology

## Geography
North America

## Time period
2005-2009

## Reference product
- Fertilizer, corn, 2022: 1 ha

## Inputs from technosphere
- Transport, combination truck, diesel powered: 1.47 t*km
  Transport of UAN fertilizer to the field. assuming 80.6 km round trip distance.
- Lime, agricultural, corn production: 1 ha
- Nitrogen fertilizer, production mix, at plant: 36.4 kg
  proxy: Urea ammonium nitrate, as N, at regional storehouse/RER with US electricity U
- CUTOFF Potassium nitrate, as K2O, at regional storehouse: 94 kg
- CUTOFF Slurry spreading, by vacuum tanker: 1.01 m3
  Accounting for manure spreading. 25% of all manure applied to corn is applied as a slurry. USDA ERS AMRS 2005
- Phosphorous fertilizer, production mix, at plant: 10.2 kg
  proxy: Triple superphosphate, as P2O5, at regional storehouse/RER with US electricity U
- Ammonia, steam reforming, liquid, at plant: 123 kg
  proxy: Ammonia, liquid, at regional storehouse/RER with US electricity U
- CUTOFF Solid manure loading and spreading, by hydraulic loader and spreader: 3.02 kg
  Accounting for manure spreading. This includes both broadcast and dry-applied. 75%

## Emissions to nature
- Ammonia: 0.504 kg
  NH3 emissions as a result of slurry manure application. Assuming application of wet manure (85% moisture). Dry manure is 2% N by wt. Approximately 25% of all manure applied to corn is dry.
- Dinitrogen monoxide: 0.0668 kg
  N2O emissions as a result of slurry manure application. Assuming application of wet manure (85% moisture). Dry manure is 2% N by wt. Approximately 25% of all manure applied to corn is dry.

## Sources
- Hsu, D.
- NASS
