# Switchgrass, ground and stored, 2022

Dataset: openLCA process, unit process
Geography: RNA
Time period: 2010-01-01 to 2100-01-01
Generated by: Daniel Inman
Published in: Hsu, D.
restrictionsDescription: All information can be accessed by everybody.
copyright: false

## Technology
future

## Geography
North America

## Time period
2010

## Reference product
- Switchgrass, ground and stored, 2022: 1 t

## Inputs from technosphere
- Switchgrass, carted, 2022: 1.33 t
  comes in wet
- CUTOFF Agricultural machinery, general, production: 0.9 kg
- Electricity, at grid, US, 2008: 63.928 kWh
  Electricity needed for dust collection: Proxy: Electricity, medium voltage, at grid/US with US electricity U.
- CUTOFF Conveyor belt, at plant: 3.4747e-5 m
  conveyor for grinder in-feed system
- CUTOFF Maize drying: 50 kg
- CUTOFF Loading bales: 1.43 Item(s)
  loading bales for grinder. Calculation of number of bales comes from 2000 lbs of corn stover divided by weight per bale. Trailer volume is 2511 ft^3 (INL table 4-5), density is 12 lbs/ft^3 dry (=20 wet at 40% moisture).
- CUTOFF Fodder loading, by self-loading trailer: 2.2653 m3
  loading to storage
- Grinding: 0.97003 sh tn
- CUTOFF Dried roughage store, non ventilated: 9.5711e-8 m3

## Emissions to nature
- Water: 333 kg
  water dried per ton of final moisture corn stover.

## Sources
- Hsu, D.
- Hess, J.
- Jacobson, J.J.
