# Toluene diisocyanate, at plant

Dataset: openLCA process, unit process
Category: Petrochemical Manufacturing
Geography: RNA
Time period: 2003-01-01 to 2003-01-01
Generated by: Franklin Associates
Published in: THE PLASTICS DIVISION OF THE AMERICAN C
restrictionsDescription: All information can be accessed by everybody.
copyright: false

## General comment
The toluene diisocyanate data for this module includes data for the production of carbon monoxide, dinitrotoluene (DNT), phosgene, and toluene diamine (TDA). Heat was exported as a coproduct for some producers. The energy amount for the exported heat was reported separately as recovered energy. A large amount of hydrogen chloride is produced as a coproduct during this process. A mass basis was used to partition the credit for each product. This process has net water outputs. The mass imbalance is due to unavailability of the weight of water inputs to production and outputs to nature. The coproduct amount for hydrogen chloride is not shown due to confidentiality issues. Complete inventory data and metadata are available in full in the final report and appendices, Cradle-to-Gate Life Cycle Inventory of Nine Plastic Resins and Four Polyurethane Precursors. This report has been extensively reviewed within Franklin Associates and has undergone partial critical review by ACC Plastics Division members and is available at: www.americanchemistry.com. Quantities may vary slightly between the reference to main source and and this module due to rounding. Important note: although most of the data in the US LCI database has undergone some sort of review, the database as a whole has not yet undergone a formal validation process. Please email comments to lci@nrel.gov.

## Technology
Phosgenation of toluene diamine (TDA)

## Geography
US

## Reference product
- Toluene diisocyanate, at plant: 1 kg

## By-products
- Recovered energy: 0.783849 MJ
  Credit for steam or heat co-product sold externally.

## Inputs from technosphere
- Electricity, at cogen, for natural gas turbine: 0.256043 kWh
  The electricity amount from cogeneration is assumed to be produced from natural gas at a 50% efficiency.
- Natural gas, combusted in industrial boiler: 0.312541 m3
- Toluene, at plant: 0.308448 kg
- CUTOFF Disposal, solid waste, unspecified, to municipal incineration: 0.0007 kg
- Transport, pipeline, natural gas: 0.212503 t*km
  Although data for carbon monxide production are not shown separately due to confidentiality issues, this transport data is specific to carbon monoxide transported to TDI producers. It is also specific to chlorine and caustic soda transported to MDI and TDI producers
- CUTOFF Disposal, solid waste, unspecified, to sanitary landfill: 0.000182163 kg
- Transport, combination truck, diesel powered: 0.00614714 t*km
- Transport, pipeline, unspecified petroleum products: 0.00699975 t*km
- Soda powder, at plant: 0.00403308 kg
- Chlorine, production mix, at plant: 0.461945 kg
- Sodium hydroxide, production mix, at plant: 0.0226294 kg
- Transport, train, diesel powered: 0.0651106 t*km
- Ammonia, steam reforming, liquid, at plant: 0.125852 kg
  Includes ammonia required for nitric acid inputs
- Transport, ocean freighter, residual fuel oil powered: 2.17962 t*km
- Transport, barge, residual fuel oil powered: 0.00572315 t*km
  Values for barge transport are calculated based on average fuel consumption rates as reported in Transportation Energy Data Book: Edition 22 from Oak Ridge National Laboratory, September 2002: 22% of barges use diesel fuel in their engines, 78% use residual oil to generate steam for steam turbines, and a barge that consumes residual oil consumes 3.4 gallons per 1,000 ton-miles
- Transport, ocean freighter, diesel powered: 0.24218 t*km
- Sulfuric acid, at plant: 0.008262 kg
- CUTOFF Natural gas, processed, for olefins production, at plant, material use: 0.131 kg
- CUTOFF Disposal, solid waste, unspecified, to waste-to-energy: 0.0343 kg
- Electricity, at grid, US, 2008: 0.0794089 kWh
- Transport, barge, diesel powered: 0.00172125 t*km
  (same comment as for Transport, barge, residual fuel oil powered)

## Emissions to nature
- NMVOC, non-methane volatile organic compounds, unspecified: 2.39821e-5 kg
- Benzene, 1,2-dichloro-: 1e-7, 1e-6 kg (2 entries, compartments not in this file)
  This emission was reported by fewer than three companies. To indicate known emissions while protecting the confidentiality of individual company responses, the emission is reported only by order of magnitude.
- Hydrogen chloride: 1e-6 kg
  (same comment as for Benzene, 1,2-dichloro-)
- Chlorine: 2.8454e-7 kg
- Copper: 1e-9 kg
  (same comment as for Benzene, 1,2-dichloro-)
- Mercury: 1e-10 kg
  (same comment as for Benzene, 1,2-dichloro-)
- Nitrogen oxides: 0.000122374 kg
- Dissolved solids: 0.001 kg
  (same comment as for Benzene, 1,2-dichloro-)
- Ammonia: 2.0085e-5, 0.000260696 kg (2 entries, compartments not in this file)
- Sodium hydroxide: 0.001 kg
  (same comment as for Benzene, 1,2-dichloro-)
- Cyanide: 2.96297e-8 kg
- Carbon monoxide: 0.00146963 kg
- Chloroform: 1e-9 kg
  (same comment as for Benzene, 1,2-dichloro-)
- Methane, difluromonochloro-, HCFC-22: 1e-5 kg
  (same comment as for Benzene, 1,2-dichloro-)
- Carbonyl chloride: 1e-8 kg
  This emission (a.k.a. 'phosgene') was reported by fewer than three companies. To indicate known emissions while protecting the confidentiality of individual company responses, the emission is reported only by order of magnitude.
- Nickel: 1e-9 kg
  (same comment as for Benzene, 1,2-dichloro-)
- Particulates, < 2.5 um: 1e-6 kg
  (same comment as for Benzene, 1,2-dichloro-)
- Toluene diisocyanate (TDI): 1e-7 kg
  (same comment as for Benzene, 1,2-dichloro-)
- BOD5, Biological Oxygen Demand: 4.9854e-5 kg
- Particulates, > 2.5 um, and < 10um: 1.11365e-5 kg
- Organic substances, unspecified: 1e-7 kg
  (same comment as for Benzene, 1,2-dichloro-)
- Toluenediamine (TDA): 1e-8 kg
  (same comment as for Benzene, 1,2-dichloro-)
- COD, Chemical Oxygen Demand: 0.000169067 kg
- Carbon dioxide, fossil: 0.000652972 kg
- Lead: 1e-10 kg
  (same comment as for Benzene, 1,2-dichloro-)
- VOC, volatile organic compounds: 1e-7 kg
  (same comment as for Benzene, 1,2-dichloro-)
- Nitrates: 1e-5 kg
  (same comment as for Benzene, 1,2-dichloro-)
- Suspended solids, unspecified: 3.71743e-5 kg
  (same comment as for Benzene, 1,2-dichloro-)
- Particulates, unspecified: 5.73641e-6 kg
- Phosphates: 1e-6 kg
  (same comment as for Benzene, 1,2-dichloro-)
- TOC, Total Organic Carbon: 0.000806612 kg
- TOC, Total Organic Carbon: 1e-5 kg
  (same comment as for Benzene, 1,2-dichloro-)

## Sampling procedure
Data are from primary sources.

## Sources
- THE PLASTICS DIVISION OF THE AMERICAN C
