# Marine piling, softwood, CCA treated, SE

Dataset: openLCA process, unit process
Category: Wood Preservation
Geography: RNA
Time period: 2005-01-01 to 2009-12-31
Generated by: Chris Bolin;
Reviewer: Paul Cooper
Published in: Chris Bolin
restrictionsDescription: All information can be accessed by everybody.
copyright: false

## General comment
Pressure-treated chromated copper arsenate (CCA) softwood debarked logs seasoned (poles) for use in marine applications. Base process data presented with allocations to within process co-products noted. Refer to allocation worksheet for specifics. All allocations performed using mass or volume., This sheet sets out each unit process in the production of one cubic meter of CCA treated softwood marine piling as produced in the US Southeast. Important note: although most of the data in the US LCI database has undergone some sort of review, the database as a whole has not yet undergone a formal validation process. Please email comments to lci@nrel.gov.; Geography: US Southeast

## Technology
typical

## Geography
US Southeast

## Time period
2005-2009

## Reference product
- Marine piling, softwood, CCA treated, SE: 1 m3
  Retention = 1.32 lb/ft3 = 21.15 kg/m3

## Inputs from technosphere
- Residual fuel oil, combusted in industrial boiler: 1.16 l
  Preservative Production
- Debarked wood, at plywood plant, US SE: 99.129 kg
  519 kg/m3; 19% purchased dried; energy inputs to dry wood on site is included.
- Electricity, at Grid, SERC, 2008: 230 kWh
  Preservative Production
- Debarked wood, at plywood plant, US SE: 370.05 kg
  519 kg/m3; 71.3% purchased green
- Diesel, combusted in industrial boiler: 0.59 l
  Preservative Production
- Natural gas, combusted in industrial boiler: 2.3 m3
  Preservative Wood Treatment
- Natural gas, combusted in industrial boiler: 2.3 m3
  Preservative Production
- CUTOFF Copper Chromium Arsenate (CCA), at plant: 21 kg
  Preservative Wood Treatment
- Transport, train, diesel powered: 50 t*km
  Preservative Production; 11% of Cr transport; 5% of As Transport; survey data
- CUTOFF Disposal, solid waste, unspecified, to unspecified landfill: 30 kg
  Preservative Production; Solid waste disposal associated with metals mining. Solid waste disposal as reported in treater surveys as other (normal trash or municipal waste). Other waste disposal—Amount of normal trash or municipal waste that is typically collected in trash cans or dumpsters.
- Electricity, at Grid, SERC, 2008: 37 kWh
  Preservative Wood Treatment
- CUTOFF Disposal, solid waste, unspecified, to unspecified treatment: 0.357 kg
  Preservative Production; Hazardous and Process waste disposed—Amount of hazardous waste for the survey year and units (pounds, tons, drums, etc.). Chemical and process waste disposed—Amount of waste and units from the treatment process, such as from tanks, treatment equipment, and drip pad area, but not including hazardous waste. This may be regulated in your state as chemical, industrial, or special waste.
- Diesel, combusted in industrial boiler: 0.34 l
  Preservative Wood Treatment
- Gasoline, combusted in equipment: 0.036 l
  Preservative Production
- Debarked wood, at plywood plant, US SE: 49.305 kg
  519 kg/m3; 9.5% air dried
- Transport, combination truck, diesel powered: 26.31 t*km
  Preservative Production; 80% of Cr transport; 100% of Cu transport; survey data
- Bituminous coal, combusted in industrial boiler: 0.0873 kg
  Preservative Production
- Transport, ocean freighter, residual fuel oil powered: 540 t*km
  Preservative Production; 95% of As transport; 9% or Cr transport; survey data
- Gasoline, combusted in equipment: 0.16 l
  Preservative Wood Treatment
- Natural gas, combusted in industrial equipment: 0.00066 m3
  Preservative Wood Treatment; surrogate for LPG
- Wood waste, unspecified, combusted in industrial boiler: 83.2 kg
  Preservative Wood Treatmentbased on green moisture content 50%
- CUTOFF Disposal, solid waste, unspecified, to unspecified landfill: 2.9 kg
  Preservative Wood Treatment; Solid waste disposal associated with metals mining. Solid waste disposal as reported in treater surveys as other (normal trash or municipal waste). Other waste disposal—Amount of normal trash or municipal waste that is typically collected in trash cans or dumpsters.
- Transport, combination truck, diesel powered: 180 t*km
  Preservative Wood Treatment; 100% piles; 100% CCA concentrate; survey data
- Diesel, combusted in industrial equipment: 5.03 l
  Preservative Wood Treatment

## Inputs from nature
- Water, process, unspecified natural origin/m3: 290 m3
  Preservative Wood Treatment
- Water, process, unspecified natural origin/m3: 680 m3
  Preservative Production

## Emissions to nature
- Methane: 0.00102 kg
  Preservative Production
- Mercury: 2.11e-7 kg
  Preservative Production
- Nitrous oxide: 4.59e-5 kg
  Preservative Production
- Sulfur oxides: 0.000141 kg
  Preservative Production
- Arsenic: 6.37e-5 kg
  Preservative Wood Treatment; storm water runoff; unspecified location
- Carbon dioxide, fossil: 11.8 kg
  Preservative Production
- Nitrogen oxides: 0.0604 kg
  Preservative Production
- Chromium: 0.000248 kg
  Preservative Wood Treatment; storm water runoff; unspecified location
- Sulfur dioxide: 0.0186 kg
  Preservative Production
- Particulates, < 10 um: 0.654 kg
  Preservative Production
- Carbon monoxide: 0.0263 kg
  Preservative Production
- VOC, volatile organic compounds: 0.0127 kg
  Preservative Wood Treatmentat kiln; emission from the wood product being dried
- Copper: 0.000108 kg
  Preservative Wood Treatment; storm water runoff; unspecified location

## Sampling procedure
Industry survey

## Sources
- Chris Bolin
- Chris Bolin
