# Forest residue, preprocessed, at conversion facility

Dataset: openLCA process, unit process
Geography: RNA
Time period: 2008-01-01 to 2008-01-01
Generated by: Daniel Inman
Published in: Hsu, D.
restrictionsDescription: All information can be accessed by everybody.
copyright: false

## General comment
It assumes two transport steps by semi-tractor trailer. It assumes the trailer will be loaded at the preprcessing facility by gravity, i.e., no additional step or equipment necessary. The distance from the preprocessing facility to the conversion plant is assumed to be 1/2 the distance from the landing to the conversion facility. We assume unloading is by gravity at the conversion facility (either a trailer that has a "live bottom" or is tipped) requiring, if any, negligable energy/emissions which we omit consideration of. (Leinonen 2004 provides foundation for the loading and unloading assertions on pgs 44-45 and Fig 14, respetively.) Thus, the only step modeled is transport. Transport infrastructure is accounted for by utilizing Ecoinvent "transport" modules. The transport vehicle is a "chip van." We use the closest approximation to the chip van that the Ecoinvent database has available (a lorry).

This process assumes incremental allocation of co-products in the feedstock production processes.

## Geography
North America

## Time period
2008

## Reference product
- Forest residue, preprocessed, at conversion facility: 1 t

## Inputs from technosphere
- Forest residue, dried, stored: 1 t
- Transport, combination truck, diesel powered: 34 t*km
  This Ecoinvent lorry was chosen because Leinonen 2004 (p.48) quotes US DOT regs as typically limiting payload to 25 short tons. EURO5 is the most stringest emission standard and is used to represent 2022 regulations in the USA even though it is likely that standards will be tighter by then.

## Sources
- Hsu, D.
- Pan, F.
