# Veneer, hardwood, dry, at veneer mill, E

Dataset: openLCA process, unit process
Category: Softwood Veneer and Plywood Manufacturing
Geography: RNA
Time period: 2007-01-01 to 2007-01-01
Generated by: Maureen Puettmann
Published in: Richard D. Bergman
restrictionsDescription: All information can be accessed by everybody.
copyright: false

## General comment
All weights given on an ovendry basis. All moisture contents are on an ovendry basis. MC% =(weight of water in wood / weight of oven dry wood) *100. Reference to specific gravities use oven dry mass and volumes at specified moisture contents. Reference to densities use mass and volume at specified moistrue contents.

Important note: although most of the data in the US LCI database has
undergone some sort of review, the database as a whole has not yet
undergone a formal validation process.
Please email comments to lci@nrel.gov.

## Technology
Typical

## Geography
E= Eastern US United States. The states included MN, IA, MO, WI, IL, NJ, OH, IN, MI, WV, PA, MD, DW, NJ, NY, ME, VT, NH, RI, MA, CT, VA, KY, AR, LA, MS, AL, FL,GA, NC, SC, and TN

## Reference product
- Veneer, hardwood, dry, at veneer mill, E: 1 kg
  Based on a weighted average green density and specific gravity of 613 kg/m3 and 0.578. Moisture content (ovendry basis) = 6.0%.

## By-products
- Clippings, hardwood, dry, at veneer mill, E: 0.0057944 kg
  (same comment as for Veneer, hardwood, dry, at veneer mill, E)
- Wood fuel, hardwood, dry, at veneer mill, E: 0.0085981 kg
  (same comment as for Veneer, hardwood, dry, at veneer mill, E)

## Inputs from technosphere
- Electricity, at grid, Eastern US, 2000: 0.091381 kWh
  Electricity used for emission control devices at the veneer mill; Represents 4.4% of mill use of electricity.
- Veneer, hardwood, green, at veneer mill, E: 1.015 kg
  Weight reported on an ovendry basis. Moisture content (ovendry basis) = 85%
- Diesel, combusted in industrial equipment: 0.00066355 l
  Amount of diesel consumed during veneer drying. Represents 5% of mill use of diesel
- Natural gas, combusted in industrial equipment: 8.2804e-7 l
  Amount of natural gas consumed during conditioning. Represents 14.3% of mill use of natural gas; proxy for propane
- Gasoline, combusted in equipment: 0.00016019 l
  Amount of gasoline consumed during veneer drying. Represents 14.3% of mill use of gasoline
- Heat, drying veneer, hardwood, at veneer mill, E: 7.0477 MJ
  Represents 71.2% veneer mill heat energy consumption
- Electricity, at grid, Eastern US, 2000: 0.024974 kWh
  Amount of electricity consumed during veneer drying. Represents 1.2% of mill use of electricity. 1 kilowatt hour = 3.6 megajoule.

## Emissions to nature
- VOC, volatile organic compounds: 0.00056075 kg
  Two mills reporting VOCs during veneer drying.
- Carbon monoxide: 0.00010075 kg
  EPA data
- Acetaldehyde: 0.00018692 kg
  One mill reported acetaldehyde emissions during veneer drying.
- Hydrocarbons, unspecified: 0.00079439 kg
  EPA data (total hydrocarbons as C per EPA Method 25A)
- Phenol: 2.8037e-6 kg
  EPA data
- Particulates: 0.0003271 kg
  EPA data
- Methanol: 5.7944e-5 kg
  EPA data
- Acetone: 4.7664e-5 kg
  EPA Plywood Manufacturing—Emission Factor Documentation, AP-42, Chapter 10, Table 10.5-3, 2002
- Formaldehyde: 7.1028e-6 kg
  EPA data

## Sampling procedure
Questionnaires from 4 veneer and 5 flooring mills in the E. United States representing 32 states.

## Sources
- Richard D. Bergman
- Maureen Puettmann
