# Anthracite coal, combusted in industrial boiler

Dataset: openLCA process, unit process
Category: Steam and Air-Conditioning Supply
Geography: RNA
Generated by: Jeff Hernbloom
Published in: Franklin Associates
restrictionsDescription: All information can be accessed by everybody.
copyright: false

## General comment
In cases where industrial boiler data were not available, utility boiler data were adjusted accordingly.,
Important note: although most of the data in the US LCI database has
undergone some sort of review, the database as a whole has not yet
undergone a formal validation process.
Please email comments to lci@nrel.gov.

## Geography
North America

## Reference product
- Anthracite coal, combusted in industrial boiler: 1 kg

## Inputs from technosphere
- CUTOFF Disposal, solid waste, unspecified, to unspecified treatment: 0.010649 kg
- Transport, combination truck, average fuel mix: 0.17381 t*km
  Represents transportation from coal production/processing to industrial boiler.
- CUTOFF Disposal, anthracite coal combustion byproducts, to unspecified reuse: 0.0136 kg
- Anthracite coal, at mine: 1 kg
- Transport, train, diesel powered: 1.036 t*km
  Represents transportation from coal production/processing to industrial boiler.

## Emissions to nature
- Particulates, > 2.5 um, and < 10um: 0.00045399 kg
- Benzene: 9.4685e-5 kg
- Naphthalene: 6.5e-5 kg
  Sources for PAH data are old or unverifiable. Use this PAH data with caution.
- Acetaldehyde: 3.6778e-7 kg
- Carbon dioxide, fossil: 2.84 kg
- Nickel: 6.6041e-6 kg
- Carbon monoxide, fossil: 0.00068043 kg
- Lead: 2.8662e-6 kg
- VOC, volatile organic compounds: 6.8487e-5 kg
- Hydrogen fluoride: 0.00049642 kg
- Suspended solids, unspecified: 2.1828e-6 kg
- Nitrogen oxides: 0.0071206 kg
- Methane, fossil: 2e-5 kg
- Mercury: 6.6584e-7 kg
- Particulates, unspecified: 0.003224 kg
- Sulfur dioxide: 0.045449 kg
- Arsenic: 1.0256e-7 kg
- Acrolein: 4.392e-9 kg
- Formaldehyde: 6.6461e-6 kg
- Cadmium: 4.9278e-8 kg
- Chromium: 7.034e-6 kg
- Phenanthrene: 3.4e-6 kg
  Sources for PAH data are old or unverifiable. Use this PAH data with caution.
- Biphenyl: 1.25e-5 kg
  Sources for PAH data are old or unverifiable. Use this PAH data with caution.
- Selenium: 6.5e-7 kg
- Manganese: 9.5626e-7 kg
- Oils, unspecified: 1.0914e-6 kg
- Beryllium: 8.001e-8 kg

## Sources
- Franklin Associates
- EPA
- EPA
- EIA
- EPA
- DOE
- unspecified
- unspecified
- Franklin Associates
- EPA
- unspecified
- Minerals Yearbook
- unspecified
- Speight
