# Paper, mechanical, uncoated, average production, at mill

Dataset: openLCA process, unit process
Category: Pulp, Paper, and Paperboard Mills
Geography: RNA
Time period: 2006-01-01 to 2006-01-01
Generated by: Caroline Gaudreault
Reviewer: Martha Stevenson
Published in: AF&PA
restrictionsDescription: All information can be accessed by everybody.
copyright: false

## General comment
Uncoated Mechanical Paper, average North American production, at mill. By-products were allocated 0% of the impacts to enable the user to choose and apply their own allocation method more easily. All flows are production-weighted means. Data were developed for a full LCA that was critically reviewed. Reviewers were: • Martha Stevenson, Chairperson – Private Consultant to the public interest with ten years of experience in sustainability, environmental management, packaging and materials recovery; led the development of the Design Guidelines for Sustainable Packaging and the COMPASS software used to compare the environmental impacts of package designs; • Pascal Lesage – Life cycle assessment consultant, Researcher at École Polytechnique de Montréal [at the Inter-University Research Centre for the Life Cycle of Products, Processes and Services (CIRAIG) in Montreal]; and • Dale Phenicie, Environmental Affairs Consulting – Consultant with 35 years of experience in environmental protection and process consulting for the forest products industry. Has served on several U.S. EPA Task Forces dealing with water quality issues and authored several AF&PA Environmental, Health and Safety/Sustainability reports.

## Technology
current technology mix for uncoated mechanical

## Time period
Primary data collected from participating companies and associations for their operational activities are representative for 2006 and 2007.

## Reference product
- Paper, mechanical, uncoated, average production, at mill: 861.83 kg
  861.83 dry kg is equal to 1 market-dried short ton (5% water).

## By-products
- Turpentine, at uncoated mechanical paper mill: 0.27714 kg
  Produced as byproduct of pulp production. Sold i.e., not used on site. Allocation set to 0%.
- Electricity, at uncoated mechanical paper mill: 65 kWh
  (same comment as for Turpentine, at uncoated mechanical paper mill)
- Steam, at uncoated mechanical paper mill: 238 MJ
  (same comment as for Turpentine, at uncoated mechanical paper mill)
- Tall oil, at uncoated mechanical paper mill: 3.5743 kg
  (same comment as for Turpentine, at uncoated mechanical paper mill)

## Inputs from technosphere
- CUTOFF Core board, at plant: 3.3475 kg
  Packaging material
- CUTOFF Disposal, wastewater treatment plant residuals, to uns. landfill: 52.707 kg
  Typically company-owned, but some third party. (uns. = unspecified)
- CUTOFF Electricity from hydro: 57.5 kWh
  Generation at company facilities. Ei: Electricity, hydropower, at run-of-river power plant
- Polyethylene, low density, resin, at plant: 0.08709 kg
  Packaging material
- Transport, ocean freighter, average fuel mix: 4.1755 t*km
  Transportation of chemicals. Kaolin, Fatty acids, DTPA: 0 km. Dithionite and Hydrogen peroxide: 517 km. Transports of fuels. Residual fuel oil , Distillate fuel oil: 682 km. Kerosene and gasoline, Other fossil assumed to be diesel: 1183 km.
- Polypropylene resin, at plant: 1.016 kg
  Packaging material
- Natural gas, combusted in industrial boiler: 3.0658 m3
  Purchased steam, assumed to be natural gas.
- CUTOFF Pulp, deinked market, bleached, at mill: 26.943 kg
- CUTOFF Sodium hydrosulfite: 13.154 kg
  ei: dithionite
- Transport, train, diesel powered: 39.127 t*km
  Transport market pulp. Bleached kraft market pulp, Deinked bleached market pulp: 1452 km.
- CUTOFF Pulp slurry, groundwood, bleached, average production, at mill: 13.789 kg
- CUTOFF Disposal, wastewater treatment plant residuals, to uns. Incinerator: 16.057 kg
  Typically on-site with energy recovery. (uns. = unspecified)
- Transport, combination truck, average fuel mix: 404.41 t*km
  Transportation of pulpwood and chips to pulp mill. Pulpwood: 200 km (rounded trip distance), chips: 254 km (rounded trip distance).
- CUTOFF DTPA: 0.80286 kg
  ei: DTPA, diethylenetriaminepentaacetic acid, at plant
- CUTOFF Disposal, solid waste, unspecified, to unspecified incinerator: 1.9323 kg
  Typically on-site with energy recovery.
- Electricity, at grid, Eastern US, 2000: 369.81 kWh
  Net purchased, National average grid, Medium voltage: <50 kV
- Transport, train, diesel powered: 68.619 t*km
  Transportation of chemicals. Kaolin: 1204 km. Dithionite and Hydrogen peroxide: 1088 km. Fatty acids and DTPA: 2438 km. Transports of fuels. Coal: 653 km. Residual fuel oil, Distillate fuel oil: 1114 km. Liquefied petroleum gas: 1246 km. Tire derived fuel: 1156 km.
- CUTOFF Disposal, unspecified ashes, to unspecified landfill: 10.251 kg
  Mix of wood and coal ashes. Based on typical ash contents can be assumed to be 78% from wood and 22% from coal. Typically company-owned, but some third party.
- CUTOFF Clay, at mine: 34.292 kg
  ei: Kaolin
- CUTOFF Pulp chips, at sawmill, US: 434.36 kg
  Mass of incoming pulp chips intended for pulping. US LCI: "Pulp chips, at sawmill,US SE/kg" can be used as a proxy. The actual mix of chips is: northern softwood chips: 66%, northern hardwood chips: 18%, southern softwood chips: 11% and southern hardwood chips: 6%. Pulp chips usage in the process is distrubuted as follows: 75% ends up in pulp and 25% in black liquor. Combusted onsite as part of the pulping chemical recovery process that is integral to and is essential to the economic viability of all modern pulp mills. Substitution of other fuels for this fuel is not recommended.
- CUTOFF Disposal, solid waste, unspecified, to unspecified beneficial use: 4.5359 kg
  Typically off-site.
- Transport, train, diesel powered: 5.6647 t*km
  Transport of packaging. Containerboard: 1410 km. Core board: 1276 km. Polypropylene and Polyethylene: 1806 km. Steel: 1083 km.
- CUTOFF Mixed paper: 47.718 kg
- CUTOFF Old news paper: 144.24 kg
- Pulp, kraft market, bleached, average production, at mill: 22.317 kg
- Transport, train, diesel powered: 210.24 t*km
  Transportation of pulpwood and chips to pulp mill. Pulpwood: 375 km, chips: 127 km.
- Pulpwood, softwood, average, at forest road, INW: 0.1633 m3
  Mass of incoming northern softwood logs (assumed 36.5% West based on mill location) intended for pulping. Assumed density: 450 kg/m3. Wood usage in the process is distrubuted as follows: 66% ends up in pulp, 13% in self-generated hogged fuel and 22% in black liquor. All the hogged fuel is combusted onsite. Combustion of this fuel is important to the economic viability of all modern pulp mills. Substitution of other fuels for this fuel is not recommended. Need to be paired with "Self-generated hogged fuel, combusted in industrial boiler, at pulp and paper mill". Black liquor solides are combusted onsite as part of the pulping chemical recovery process that is integral to and is essential to the economic viability of all modern pulp mills. Substitution of other fuels for this fuel is not recommended.
- CUTOFF Fatty acides: 2.9756 kg
  ei: Fatty acids, from vegetarian oil, at plant
- CUTOFF Pulpwood, softwood, average, at forest road, US S: 0.212 m3
  Mass of incoming southern softwood logs intended for pulping. Assumed density: 450 kg/m3. US LCI: "Softwood logs with bark, harvested at average intensity site, at mill, US SE/US" can be used but transportation needs to be removed as it is already included here. Wood usage in the process is distrubuted as follows: 66% ends up in pulp, 13% in self-generated hogged fuel and 22% in black liquor. All the hogged fuel is combusted onsite. Combustion of this fuel is important to the economic viability of all modern pulp mills. Substitution of other fuels for this fuel is not recommended. Need to be paired with "Self-generated hogged fuel, combusted in industrial boiler, at pulp and paper mill". Black liquor solides are combusted onsite as part of the pulping chemical recovery process that is integral to and is essential to the economic viability of all modern pulp mills. Substitution of other fuels for this fuel is not recommended.
- Pulpwood, softwood, average, at forest road, NE-NC: 0.4818 m3
  Mass of incoming northern softwood logs (assumed 63.5% East/Central based on mill location) intended for pulping. Assumed density: 450 kg/m3. Wood usage in the process is distrubuted as follows: 66% ends up in pulp, 13% in self-generated hogged fuel and 22% in black liquor. All the hogged fuel is combusted onsite. Combustion of this fuel is important to the economic viability of all modern pulp mills. Substitution of other fuels for this fuel is not recommended. Need to be paired with "Self-generated hogged fuel, combusted in industrial boiler, at pulp and paper mill". Black liquor solides are combusted onsite as part of the pulping chemical recovery process that is integral to and is essential to the economic viability of all modern pulp mills. Substitution of other fuels for this fuel is not recommended.
- CUTOFF Electricity, at grid, ON: 265.74 kWh
- Containerboard, average production, at mill: 8.0286 kg
  Packaging material
- CUTOFF Pulpwood, hardwood, average, at forest road, US S: 0.07572 m3
  Mass of incoming southern hardwood logs intended for pulping. Assumed density: 650 kg/m3. US LCI: "Roundwood, hardwood, green, at mill, SE/US" can be used but transportation needs to be removed as it is already included here. Wood usage in the process is distrubuted as follows: 66% ends up in pulp, 13% in self-generated hogged fuel and 22% in black liquor. All the hogged fuel is combusted onsite. Combustion of this fuel is important to the economic viability of all modern pulp mills. Substitution of other fuels for this fuel is not recommended. Need to be paired with "Self-generated hogged fuel, combusted in industrial boiler, at pulp and paper mill". Black liquor solides are combusted onsite as part of the pulping chemical recovery process that is integral to and is essential to the economic viability of all modern pulp mills. Substitution of other fuels for this fuel is not recommended.
- CUTOFF Electricity, at grid, QC: 825.1 kWh
- CUTOFF Hydrogen peroxide: 9.979 kg
  ei: Hydrogen peroxide, 50% in H2O, at plant
- Transport, combination truck, average fuel mix: 6.8327 t*km
  Transport market pulp. Bleached kraft market pulp, Deinked bleached market pulp: 256 km.
- CUTOFF Electricity, at grid, BC: 397.68 kWh
- CUTOFF Pulp slurry, sulfite, bleached, average production, at mill: 12.247 kg
- Fuels, burned at uncoated mechanical paper, average production, at mill: 8061 MJ
  Includes all fuels burned on site
- Transport, combination truck, average fuel mix: 1.9564 t*km
  Transport of packaging. Containerboard: 201 km. Core board: 369 km. Polypropylene and Polyethylene: 417 km. Steel: 257 km.
- Transport, barge, average fuel mix: 30.513 t*km
  Transportation of chemicals. Kaolin, Fatty acids, DTPA: 0 km. Dithionite and Hydrogen peroxide: 489 km. Transports of fuels. Coal: 515 km. Residual fuel oil, Distillate fuel oil: 163 km. Kerosene and gasoline, Other fossil assumed to be diesel : 163 km. Tire derived fuel: 315 km.
- Transport, combination truck, average fuel mix: 9.1102 t*km
  Transportation of chemicals. Kaolin: 295 km. Dithionite and Hydrogen peroxide: 183 km. Fatty acids and DTPA: 272 km. Transports of fuels. Coal: 153 km. Residual fuel oil, Distillate fuel oil: 50 km. Liquefied petroleum gas, Kerosene and gasoline, Other fossil assumed to be diesel: 80 km. Tire derived fuel: 98 km.
- Transport, pipeline, natural gas: 111 t*km
  Transports of fuels. Natural gas: 33584 tkm/MMcf, Average transportation for natural gas in North America according to the US LCI database
- Hot rolled sheet, steel, at plant: 0.17962 kg
  Packaging material
- CUTOFF Old magazines: 35.471 kg
- CUTOFF Disposal, solid waste, unspecified, to unspecified landfill: 28.395 kg
  Typically company-owned, but some third party.
- CUTOFF Disposal, solid waste, unspecified, to unspecified land application: 6.187 kg
  Typically off-site agricultural/silvicultural
- CUTOFF Disposal, wastewater treatment plant residuals, to uns. land application: 20.412 kg
  Typically off-site agricultural/silvicultural. (uns. = unspecified)

## Inputs from nature
- Process water: 46162 kg
  Estimated based on individual mill process effluent and cooling water flows and process characteristics. Share between process and cooling estimated.
- Cooling water, non-contact: 44029 kg
  (same comment as for Process water)

## Emissions to nature
- Zinc: 0.0050367 kg
  In effluent.
- Ammonia: 0.019126 kg
  From process
- Manganese: 0.0064011 kg
  In effluent.
- Nickel: 0.00196 kg
  From onsite management of solid waste. All metals reported as elemental althought in most cases they are releases into metal compounds.
- Vanadium: 0.000373 kg
  (same comment as for Nickel)
- Ammonia_toxic: 0.018661 kg
  In effluent.
- Copper: 8.2065e-5 kg
  In effluent.
- Arsenic: 5.1291e-5 kg
  In effluent.
- Manganese: 0.0807 kg
  (same comment as for Nickel)
- Methanol: 0.14391 kg
  From process
- BOD5, Biological Oxygen Demand: 1.3825 kg
  In effluent.
- Phenol: 0.013932 kg
  From process
- Arsenic: 0.000728 kg
  (same comment as for Nickel)
- Phenol: 7.5818e-6 kg
  In effluent.
- PAH, polycyclic aromatic hydrocarbons: 0.0020904 kg
  In effluent.
- Lead: 9.2323e-6 kg
  In effluent.
- Ammonia: 0.00339 kg
  (same comment as for Nickel)
- Acetaldehyde: 3.78e-7 kg
  (same comment as for Nickel)
- Nitrogen, total: 0.38885 kg
  In effluent.
- Barium: 0.00096426 kg
  In effluent.
- Chromium: 0.00458 kg
  (same comment as for Nickel)
- PAH, polycyclic aromatic hydrocarbons: 3e-6 kg
  (same comment as for Nickel)
- Mercury: 5.84e-6 kg
  (same comment as for Nickel)
- Zinc: 0.00572 kg
  (same comment as for Nickel)
- Barium: 0.0141 kg
  (same comment as for Nickel)
- Methanol: 0.0019571 kg
  In effluent.
- Phosphorus, total: 0.041829 kg
  In effluent.
- Copper: 0.00623 kg
  (same comment as for Nickel)
- Suspended solids, unspecified: 2.3091 kg
  In effluent.
- Water, evaporated: 1945 kg
  Estimated based on individual mill process effluent and cooling water flows and process characteristics. Share between process and cooling estimated. Includes evaporation and other losses (e.g., water in solid waste).
- Nickel: 0.00018054 kg
  In effluent.
- AOX, Adsorbable Organic Halogen as Cl: 0.020062 kg
  In effluent.
- Process effluent: 45175 kg
  (same comment as for Water, evaporated)
- Chromium: 4.5136e-5 kg
  In effluent.
- Cooling water, non-contact: 44029 kg
  (same comment as for Water, evaporated)
- Formaldehyde: 0.00091277 kg
  In effluent.
- Lead: 0.0134 kg
  (same comment as for Nickel)
- Acetaldehyde: 0.00406 kg
  From process
- Acetaldehyde: 0.00023835 kg
  In effluent.
- Mercury: 2.5851e-8 kg
  In effluent.

## Sampling procedure
The survey included results from 8 paper mills representing 1.7 million short tons per year (TPY), nearly 61% of 2006/2007 North American production volume.

## Sources
- AF&PA
