# Roundwood, softwood, green, at logyard, INW

Dataset: openLCA process, unit process
Category: Logging
Geography: RNA
Time period: 2006-01-01 to 2007-01-01
Generated by: Maureen Puetmann
Published in: Francis G. Wagner
restrictionsDescription: All information can be accessed by everybody.
copyright: false

## General comment
All weights given on an ovendry basis. Percent Moisture content (oven dry basis) = wt of wood wet - wt of wood dry/wt of wood dry x100
Important note: although most of the data in the US LCI database has
undergone some sort of review, the database as a whole has not yet
undergone a formal validation process.
Please email comments to lci@nrel.gov.

## Technology
Average

## Geography
Meant to represent operations in eastern Washington, eastern Oregon, Idaho and western Montana. Actual representative mill sample found in eastern Washington and Idaho only.

## Reference product
- Roundwood, softwood, green, at logyard, INW: 1 kg
  Weight reported on an ovendry basis, density=436 kg/m3 based on oven dry mass

## By-products
- Bark, softwood, green, at logyard, INW: 0.0739 kg
  Weight reported on an ovendry basis, density=436 kg/m3 based on oven dry mass

## Inputs from technosphere
- Bark, softwood, green, at mill, INW: 0.0739 kg
  Based on green specific gravity of 0.41 (od mass and green volume)
- Electricity, at grid, Western US, 2000: 0.00401 kWh
- Residual fuel oil, at refinery: 6.42e-5 l
  Proxy for motor oil
- Diesel, combusted in industrial equipment: 0.00295 l
- Residual fuel oil, at refinery: 2.57e-5 l
  Proxy for hydraulic oil
- Roundwood, softwood, green, at mill, INW: 1 kg
  Based on green specific gravity of 0.41 (od mass and green volume)
- CUTOFF Disposal, solid waste, unspecified, to unspecified landfill: 0.7289 kg
  Reported by one mill, representing wood, mud, and rock. Estimated density at 2704 kg/m3. Based on one mill reporting only: not weighed
- Gasoline, combusted in equipment: 6.42e-5 l
  Based on one mill reporting only: not weighed
- CUTOFF Disposal, wood waste, to residual material landfill: 0.0128 kg
  Based on one mill reporting only: not weighed

## Inputs from nature
- Water, process: 0.0437 kg

## Emissions to nature
- Hydrocarbons, unspecified: 5.42e-7 kg
  Fugitive emissions from storage tanks.
- Particulates, unspecified: 0.00019 kg

## Sampling procedure
Questionnaires from 4 mills assumed to be representative of the softwood lumber industry in US Inland West.

## Sources
- Forest Products Laboratory
- Francis G. Wagner
- Maureen Puettmann
