# Roundwood, softwood, state-private moist cold forest, gentle slope, at frst rd, INW

Dataset: openLCA process, unit process
Category: Logging
Geography: RNA
Time period: 1989-01-01 to 1996-01-01
Generated by: Maureen Puetmann
Published in: Leonard R. Johnson
restrictionsDescription: All information can be accessed by everybody.
copyright: false

## General comment
1. FIA inventory were from 1989 to 1996 depending on jurisdiction 2. Allocation on a mass basis.
3. Important note: although most of the data in the US LCI database has
undergone some sort of review, the database as a whole has not yet
undergone a formal validation process.
Please email comments to lci@nrel.gov.

## Technology
Average technology. Some data extrapolated from similar processes.

## Geography
US Inland West including Montana, Idaho, and eastern Washington

## Reference product
- Roundwood, sftwd, state-private moist cold forest, gentle slope, at frst rd, INW: 210.24 m3
  Ovendry density = 450 kg/m3

## By-products
- Bark, softwood, state-private moist cold forest, gentle slope, at frst rd, INW: 10460 kg
  Ovendry density = 450 kg/m3. Bark volume evaluated at 23.2 m3/ha
- Pulpwood, sftwd, state-private moist cold forest, gentle slope, at frst rd, INW: 50.927 m3
  Ovendry density = 450 kg/m3

## Inputs from technosphere
- Felling, feller buncher, > 200 HP, INW: 4.186 h
  Seedling, Site Prep, etc associated with 1 acre. Based on a rate of 0.016 standard machine hours per m3
- Loader operation, large, INW: 10.673 h
  Based on a rate of 0.041 standard machine hours per m3
- Skidding, wheeled skidder, 120-140 HP: 21.354 h
  Mechanical Felling of thinning and final harvest. Based on a rate of 0.082 standard machine hours per m3
- Delimbing, slide boom delimber: 3.5576 h
  Skidding of thinning and final harvest. Based on a rate of 0.014 standard machine hours per m3
- Site preparation, state or private moist cold softwood forest, gentle slope, INW: 1 ha
- Reforesting, average state or private moist cold softwood forest, INW: 1 ha

## Inputs from nature
- Wood, soft, INW, standing: 284.41 m3
- Carbon dioxide, in air: 41986 kg
  Based on carbon content of pulpwood
- Carbon dioxide, in air: 173330 kg
  Based on carbon content of roundwood
- Carbon dioxide, in air: 19163 kg
  Based on carbon content of bark

## Sampling procedure
Harvesting production, cost and fuel consumption rates were assimilated from existing studies of harvesting equipment typical of the systems used to harvest sites in the Inland West. These studies included both published information and personal interviews with timber harvesting contractors.
The costs, production and consumption rates were developed for equipment options within each component of the system. Harvesting systems were developed as combinations of these harvesting components. Although there are many combinations of harvesting equipment and systems that can be used for harvesting timber, this analysis assumes the use of the most common systems operating on the range of slope classifications identified for the harvested sites.

## Sources
- Maureen Puettmann
- Leonard R. Johnson
