# Greenhouse seedling, softwood, INW

Dataset: openLCA process, unit process
Category: Forest Nurseries, Gathering Forest Prod.
Geography: RNA
Time period: 1989-01-01 to 1996-01-01
Generated by: Maureen Puetmann
Published in: Leonard R. Johnson
restrictionsDescription: All information can be accessed by everybody.
copyright: false

## General comment
Important note: although most of the data in the US LCI database has undergone some sort of review, the database as a whole has not yet undergone a formal validation process. Please email comments to lci@nrel.gov.

## Technology
Average technology. Some data extrapolated from similar processes.

## Geography
US Inland West including Montana, Idaho, and eastern Washington

## Reference product
- Greenhouse seedling, softwood, INW: 1 Item(s)

## Inputs from technosphere
- CUTOFF Potassium fertilizer, production mix, at plant: 0.000175 kg
- Phosphorous fertilizer, production mix, at plant: 7.16e-5 kg
- Electricity, at grid, Western US, 2000: 0.042 kWh
- CUTOFF Softwood seed, at greenhouse, INW: 2 Item(s)
- Nitrogen fertilizer, production mix, at plant: 4.28e-5 kg
- Natural gas, combusted in industrial equipment: 0.00654 l

## Sampling procedure
Region specific data on the level of resource consumption during seedling growth is limited. Estimates for these values were developed using a limited set of published data and through direct inquiries of forest nursery managers.

## Sources
- Maureen Puettmann
- Leonard R. Johnson
