# Slack wax, at plant, US SE

Dataset: openLCA process, unit process
Category: Petrochemical Manufacturing
Geography: RNA
Generated by: Jamie Meil
Published in: Dr. Earl Kline
restrictionsDescription: All information can be accessed by everybody.
copyright: true

## General comment
Base process data presented with allocations to within process co-products noted. Refer to allocation worksheet for specifics. All allocations performed using mass or volume., UK profile adjusted for US production
Important note: although most of the data in the US LCI database has
undergone some sort of review, the database as a whole has not yet
undergone a formal validation process.
Please email comments to lci@nrel.gov.

## Technology
Typical

## Geography
US Southeast

## Reference product
- Slack wax, at plant, US SE: 1 kg

## Inputs from technosphere
- Crude oil, at production: 1.02 kg
  Used as feedstock
- Diesel, combusted in industrial boiler: 0.0322 l
- Transport, combination truck, average fuel mix: 2.3 t*km
- Natural gas, combusted in industrial boiler: 7.05e-5 m3
- CUTOFF Disposal, chemical waste, unspecified, to residual material landfill: 0.00028 kg
- Electricity, at grid, Eastern US, 2000: 0.00278 kWh

## Emissions to nature
- Acids, unspecified: 2.5e-5 kg
- Methane: 0.000363 kg
- Carbon monoxide: 0.0535 kg
- COD, Chemical Oxygen Demand: 1e-5 kg
- Suspended solids, unspecified: 5e-5 kg
- Dissolved organic matter: 1.6e-5 kg
- BOD5, Biological Oxygen Demand: 5e-6 kg
- Particulates, unspecified: 0.149 kg
- Nitrogen oxides: 0.00595 kg

## Sources
- Leonard R. Johnson
- Maureen Puetmann
- Dr. Earl Kline
