# Transport, single unit truck, long-haul, gasoline powered, Northeast region

Dataset: openLCA process, unit process
Category: General Freight Trucking
Geography: RNA
Time period: 2010-01-01 to 2010-01-01
Generated by: Nathan Hardesty
Published in: U.S. Environmental Protection Agency (EP
restrictionsDescription: All information can be accessed by everybody.
copyright: false

## General comment
This dataset represents the Northeast U.S. (CT, DC, DE, ME, MD, MA, NH, NJ, NY, PA, RI, VT (Reference 11)) average airborne emissions for operating a gasoline powered, single unit truck in a long-haul manner (trips greater than 200 miles [322 km]). The inventory includes all vehicle operation processes, including off-network and refueling activities.
The refinery-to-pump transportation and distribution data are calculated from Argonne National Laboratory's GREET 1.8d.1 model.
The vehicle operation data are calculated from EPA's MOVES2010a model, using the assumptions described in the corresponding detailed spreadsheet. Emissions factors in MOVES2010a are largely based on EPA's Mobile Source Observation Database, which in turn includes data from a variety of vehicle studies (References 7-9).
MOVES2010a acknowledges sources of uncertainty in the model structure, the population and acitivty data, and other model parameters. As of July 2011, the uncertainty calculation function of the model has not been activated.

## Technology
Combustion of gasoline in a single unit, long-haul truck.

## Geography
US

## Reference product
- Transport, single unit truck, long-haul, gasoline powered, Northeast region: 1 t*km

## Inputs from technosphere
- Transport, train, diesel powered: 0.0745624 t*km
- Transport, combination truck, average fuel mix: 0.0399363 t*km
- CUTOFF Transport, ocean tanker, average fuel mix: 0.341442 t*km
- Transport, pipeline, unspecified petroleum products: 0.392001 t*km
- Gasoline, at refinery: 0.137145 l
- Transport, barge, average fuel mix: 0.0258737 t*km

## Emissions to nature
- Particulates, < 2.5 um: 8.20655e-7 kg
  PM2.5 from tirewear.
- Nitrogen oxides: 0.00121235 kg
- Nitrogen dioxide: 0.000102715 kg
- Methane: 1.70631e-5 kg
- Particulates, < 2.5 um: 4.8884e-6 kg
  PM2.5 from brakewear.
- Particulates, < 10 um: 5.75719e-6 kg
  PM10 from organic carbon, elemental carbon, and sulfate particulates.
- Particulates, < 2.5 um: 5.3013e-6 kg
  PM2.5 from organic carbon, elemental carbon, and sulfate particulates.
- VOC, volatile organic compounds: 0.000482437 kg
- Particulates, < 10 um: 3.42213e-6 kg
  PM10 from tirewear.
- Nitrogen oxide: 0.00110964 kg
- Sulfur dioxide: 6.22596e-6 kg
- Hydrocarbons (other than methane): 0.000466788 kg
- Carbon monoxide, fossil: 0.0106109 kg
- Dinitrogen monoxide: 1.48171e-5 kg
- Carbon dioxide, fossil: 0.318919 kg
- Particulates, < 10 um: 1.86737e-5 kg
  PM10 from brakewear.
- Ammonia: 1.32098e-5 kg

## Sources
- U.S. Environmental Protection Agency (EP
- National Institute of Standards and Tech
- EPA
- U.S. Alternative Fuels and Advanced Vehi
- Transportation Characteristics Branch, U
- Eastern Research Group
- Assessment and Standards Division, Offic
- Assessment and Standards Division, Offic
- Wang, M.
- National Climatic Data Center, National
- Alam, M.
