# Bituminous coal, at mine

Dataset: openLCA process, unit process
Category: Coal Mining
Geography: RNA
Time period: 1994-01-01 to 2002-01-01
Generated by: Franklin Associates
Published in: Franklin Associates
restrictionsDescription: All information can be accessed by everybody.
copyright: false

## General comment
Important note: although most of the data in the US LCI database has
undergone some sort of review, the database as a whole has not yet
undergone a formal validation process.
Please email comments to lci@nrel.gov.

## Technology
Represents surface and underground mining. Coal cleaning is done by mechanical, not chemical, methods.

## Geography
United States

## Reference product
- Bituminous coal, at mine: 1 kg

## Inputs from technosphere
- Residual fuel oil, combusted in industrial boiler: 0.00087 l
- Gasoline, combusted in equipment: 0.000836 l
- Electricity, at grid, US, 2000: 0.0387 kWh
- CUTOFF Disposal, solid waste, unspecified, to underground deposit: 0.235 kg
- Diesel, combusted in industrial boiler: 0.0088 l
- Bituminous coal, combusted in industrial boiler: 0.000431 kg
- Natural gas, combusted in industrial boiler: 0.000162 m3

## Inputs from nature
- Coal, bituminous, 24.8 MJ per kg: 1.24 kg

## Emissions to nature
- VOC, volatile organic compounds: 2.57e-5 kg
- Methane: 0.00399 kg
- Suspended solids, unspecified: 0.0001 kg
- Manganese: 5.76e-6 kg
- Iron: 8.64e-6 kg
- Particulates, unspecified: 0.00163 kg

## Sources
- Hong, B.D
- Energy Information Administration
- Energy Information Administration
- unspecified
- Energy Information Administration
- Energy Information Administration
- U.S. EPA
- D.A. Kirchgessner
- J.G. Speight
- Franklin Associates
- U.S. Census bureau
- U.S. Census bureau
- unspecified
- U.S. Department of Energy
- unspecified
- unspecified
- unspecified
- U.S. EPA
