# Electricity, at eGrid, SPNO, 2010

Dataset: openLCA process, unit process
Category: Utilities
Geography: RNA
Time period: 2010-01-01 to 2010-01-01
Generated by: Samantha Wascavage
Published in: Chris Goemans, Athena Institute
restrictionsDescription: All information can be accessed by everybody.
copyright: false

## General comment
The methodology used to put together the grid information is outlined in reference 1.

## Technology
Typical

## Geography
SPNO North electricity grid to include Kansas and western Missouri (less SRMW).

## Reference product
- Electricity, at eGrid, SPNO, 2010: 1 kWh

## Inputs from technosphere
- CUTOFF Electricity, petroleum coke, at power plant: 0.001036 kWh
  PC, SG, WO – Petroleum Coke
- Electricity, natural gas, at power plant: 0.07879 kWh
  NG – Natural Gas
- CUTOFF Electricity, other gases, unspecified, at power plant: 0.000124 kWh
  PG, BFG, OG – Propane
- CUTOFF Electricity, biomass, solid, agriculture by-products, at power plant: 0.000381 kWh
  AB, MSB, MSW, OBS, TDF, WDS Agriculture Crop By-products / Straw / Energy Crops
- Electricity, bituminous coal, at power plant: 0.018334 kWh
  BIT, SC, SGC, WC - Anthracite Coal, and Bituminous Coal.
- Electricity, nuclear, at power plant: 0.169387 kWh
  NUC – Nuclear (Uranium, Plutonium, Thorium)
- Electricity, bituminous coal, at power plant: 0.683809 kWh
  SUB – Subbituminous Coal
- CUTOFF Electricity, at wind power plant, unspecified: 0.047112 kWh
  WND – Wind
- Electricity, diesel, at power plant: 0.000793 kWh
  DFO, JF, KER – Distillate Fuel Oil (includes all Diesel and No. 1, No. 2, and No. 4 Fuel Oils)
- CUTOFF Electricity, hydropower, at power plant, unspecified: 0.000234 kWh
  WAT – Water (Conventional, Pumped Storage)

## Sampling procedure
based on EIA electricity reports for all power plants in the US.

## Sources
- Chris Goemans, Athena Institute
- Statistics Canada
- unspecified
- USEPA
- Statistics Canada
- Statistics Canada
- Statistics Canada
- Statistics Canada
- USEPA
- EIA
- EIA
- EIA
- EIA
- EIA
- EIA
- EIA
- EIA
- EIA
- US DOE
- International Energy Agency
- EIA
