# Electricity, at eGrid, SRSO, 2010

Dataset: openLCA process, unit process
Category: Utilities
Geography: RNA
Time period: 2010-01-01 to 2010-01-01
Generated by: Samantha Wascavage
Published in: Chris Goemans, Athena Institute
restrictionsDescription: All information can be accessed by everybody.
copyright: false

## General comment
The methodology used to put together the grid information is outlined in reference 1.

## Technology
Typical

## Geography
SRSO South electricity grid to include most of Georgia (less SRTV) and Alabama (less STRV) and southeast Mississippi and the panhandle of Florida.

## Reference product
- Electricity, at eGrid, SRSO, 2010: 1 kWh

## Inputs from technosphere
- CUTOFF Electricity, biomass,liquid, unspecified, at power plant: 0.017306 kWh
  BLQ, OBL, SLW, WDL – Black Liquor
- CUTOFF Electricity, petroleum coke, at power plant: 0.001957 kWh
  Petroleum (Other Fossil) PC, SG, WO - petroleum coke
- Electricity, nuclear, at power plant: 0.224039 kWh
  Nuclear Fission NUC – Nuclear (Uranium, Plutonium, Thorium)
- Electricity, bituminous coal, at power plant: 0.371978 kWh
  Bituminous Coal BIT, SC, SGC, WC - Anthracite Coal, and Bituminous Coal.
- Electricity, bituminous coal, at power plant: 0.082181 kWh
  Subbituminous Coal
- Electricity, diesel, at power plant: 0.000389 kWh
  Petroleum (DFO, JF, KER) – Distillate Fuel Oil (includes all Diesel and No. 1, No. 2, and No. 4 Fuel Oils)
- CUTOFF Electricity, hydropower, at power plant, unspecified: 0.02937 kWh
  Hydroelectric WAT – Water (Conventional, Pumped Storage)
- CUTOFF Electricity, biomass, solid, agriculture by-products, at power plant: 0.008235 kWh
  Solid Renewable Fuels (Biomass) AB, MSB, MSW, OBS, TDF, WDS – Agriculture Crop By-products / Straw / Energy Crops
- CUTOFF Electricity, biomass, gas, landfill, at power plant: 0.000162 kWh
  Gaseous Renewable Fuels (Biomass) LFG, OBG - landfill gas
- CUTOFF Electricity, at wind power plant, unspecified: 0.013197 kWh
  WND – Wind
- CUTOFF Electricity, other fuels, unspecified, at power plant: 0.001549 kWh
  OTH, MSN, PUR, WH – Other (Batteries, Chemicals, Coke Breeze, Hydrogen, Pitch, Sulfur, Tar Coal, and miscellaneous technologies)
- Electricity, residual fuel oil, at power plant: 0.000389 kWh
  Petroleum (RFO) – Residual Fuel Oil (includes No. 5 and No. 6 Fuel Oils and Bunker C Fuel Oil)
- CUTOFF Electricity, other gases, unspecified, at power plant: 7e-6 kWh
  OG, BFG, PG – Other Gas (Butane, Coal Processes, Coke-Oven, Refinery, and other processes)
- Electricity, natural gas, at power plant: 0.249241 kWh
  Natural Gas

## Sampling procedure
based on EIA electricity reports for all power plants in the US.

## Sources
- Chris Goemans, Athena Institute
- Statistics Canada
- unspecified
- USEPA
- Statistics Canada
- Statistics Canada
- Statistics Canada
- Statistics Canada
- USEPA
- EIA
- EIA
- EIA
- EIA
- EIA
- EIA
- EIA
- EIA
- EIA
- US DOE
- International Energy Agency
- EIA
