# Ammonia, steam reforming, liquid, at plant

Dataset: openLCA process, unit process
Category: All Other Basic Inorganic Chemical Manufacturing
Geography: RNA
Time period: 1973-01-01 to 2003-01-01
Generated by: Franklin Associates
Published in: THE PLASTICS DIVISION OF THE AMERICAN C
restrictionsDescription: All information can be accessed by everybody.
copyright: false

## General comment
Mass imbalance is due to unavailability of the weight of water inputs to production. Complete inventory data and metadata are available in full in the final report and appendices, Cradle-to-Gate Life Cycle Inventory of Nine Plastic Resins and Four Polyurethane Precursors. This report has been extensively reviewed within Franklin Associates and has undergone partial critical review by ACC Plastics Division members and is available at: www.americanchemistry.com. Quantities may vary slightly between the reference to main source and and this module due to rounding. Important note: although most of the data in the US LCI database has undergone some sort of review, the database as a whole has not yet undergone a formal validation process. Please email comments to lci@nrel.gov.

## Technology
Steam reforming of natural gas

## Geography
US

## Reference product
- Ammonia, steam reforming, liquid, at plant: 1 kg
  Mass imbalance is due to unavailability of the weight of water inputs to production.

## Inputs from technosphere
- Natural gas, processed, for olefins production, at plant: 0.267 kg
  MATERIAL USE
- Transport, pipeline, natural gas: 0.42944 t*km
- Transport, combination truck, diesel powered: 0.0042944 t*km
- CUTOFF Disposal, solid waste, unspecified, to sanitary landfill: 0.0002 kg
- Transport, train, diesel powered: 0.0042944 t*km
- Electricity, at grid, US, 2008: 0.13999 kWh
- Natural gas, combusted in industrial boiler: 0.13977 m3

## Inputs from nature
- Nitrogen, in air: 0.418 kg
- Water, process, unspecified natural origin/m3: 0.0015255 m3
  Consumptive use includes: water incorporated into the product, water evaporated during the process, and/or water used and released to a body other than that from which it was drawn.

## Emissions to nature
- Ammonia: 0.001, 6e-5 kg (2 entries, compartments not in this file)
- Organic substances, unspecified: 0.001 kg
- Carbon dioxide, fossil: 0.097 kg
- BOD5, Biological Oxygen Demand: 5e-5 kg
- Suspended solids, unspecified: 5e-5 kg
- Oil and grease, unspecified: 5e-5 kg
- COD, Chemical Oxygen Demand: 0.00023 kg

## Sampling procedure
Data are from secondary sources.

## Sources
- THE PLASTICS DIVISION OF THE AMERICAN C
