# Electricity, at eGrid, HIOA, 2008

Dataset: openLCA process, unit process
Category: Utilities
Geography: RNA
Time period: 2008-01-01 to 2008-01-01
Generated by: Alberta Carpenter
Published in: Chris Goemans, Athena Institute
restrictionsDescription: All information can be accessed by everybody.
copyright: false

## General comment
The methodology used to put together the grid information is outlined in reference 1.

## Technology
Typical

## Geography
Oahu electricity grid.

## Reference product
- Electricity, at eGrid, HIOA, 2008: 1 kWh

## Inputs from technosphere
- Electricity, residual fuel oil, at power plant: 0.746485 kWh
  Petroleum (RFO) - Residual Fuel Oil (includes No. 5 and No. 6 Fuel Oils and Bunker C Fuel Oil)
- CUTOFF Electricity, biomass, solid, biogenic MSW, at power plant: 0.0223706 kWh
  Solid Renewable Fuels (Biomass) MSB - Municipal Solid Waste – Biogenic Component
- CUTOFF Electricity, MSW, non-biogenic, at power plant: 0.0175768 kWh
  Other Fuels MSN
- CUTOFF Electricity, petroleum, waste oil, at power plant: 0.000753535 kWh
  Petroleum (Other Fossil) WO - Waste/Other Oil (including Crude Oil, Liquid Butane, Liquid Propane, Oil Waste, Re-Refined Motor Oil, Sludge Oil, Tar Oil, or other petroleum-based liquid wastes)
- Electricity, bituminous coal, at power plant: 0.191014 kWh
  Bituminous Coal - BIT - Anthracite Coal, and Bituminous Coal.
- CUTOFF Electricity, tire derived fuel, at power plant: 0.00177159 kWh
  Solid Renewable Fuels (Biomass) TDF - tires, tire derived fuel
- Electricity, diesel, at power plant: 0.00561876 kWh
  Petroleum (DFO) KER - Kerosene
- Electricity, diesel, at power plant: 0.00913249 kWh
  Petroleum (DFO) - Distillate Fuel Oil (includes all Diesel and No. 1, No. 2, and No. 4 Fuel Oils)
- CUTOFF Electricity, other gases, unspecified, at power plant: 0.00468947 kWh
  Other Gases OG
- Electricity, bituminous coal, at power plant: 0.000587855 kWh
  Bituminous Coal WC - Waste/Other Coal (Anthracite Culm, Bituminous Gob, Fine Coal, Lignite Waste, Waste Coal)

## Sampling procedure
based on EIA electricity reports for all power plants in the US.

## Sources
- Chris Goemans, Athena Institute
- unspecified
- USEPA
- Statistics Canada
- Statistics Canada
- Statistics Canada
- Statistics Canada
- Statistics Canada
- Statistics Canada
- USEPA
- EIA
- EIA
- EIA
- EIA
- EIA
- EIA
- EIA
- EIA
- EIA
- EIA
- EIA
- US DOE
- International Energy Agency
- US DOE
