# Sawn lumber, hardwood, planed, kiln dried, at planer mill, SE

Dataset: openLCA process, unit process
Category: Sawmills
Geography: RNA
Time period: 2005-01-01 to 2006-01-01
Generated by: Maureen Puettmann
Published in: Richard D. Bergman
restrictionsDescription: All information can be accessed by everybody.
copyright: false

## General comment
Allocation on a mass basis.
Important note: although most of the data in the US LCI database has
undergone some sort of review, the database as a whole has not yet
undergone a formal validation process.
Please email comments to lci@nrel.gov.

## Technology
Average technology. Some data extrapolated from similar processes.

## Geography
SE = Southeast United States. The 8 states are Arkansas, Louisiana, Mississippi, Alabama, Tennessee, North Carolina, South Carolina, Georgia.

## Reference product
- Sawn lumber, hardwood, planed, kiln dried, at planer mill, SE: 1 m3
  Weight reported on an ovendry basis. Moisture content (ovendry basis) = 8.0%

## By-products
- Wood fuel, hardwood, kiln-dried, at planer mill, SE: 109 kg
  Weight reported on an ovendry basis. Moisture content (ovendry basis) = 8.0%
- Sawdust, hardwood, kiln-dried, at planer mill, SE: 14 kg
  Weight reported on an ovendry basis. Moisture content (ovendry basis) = 8.0%
- Shavings, hardwood, kiln-dried, at planer mill, SE: 41.6 kg
  Weight reported on an ovendry basis. Moisture content (ovendry basis) = 8.0%

## Inputs from technosphere
- Sawn lumber, hardwood, rough, kiln dried, at kiln, SE: 1.275 m3
  Oven-dried basis
- Gasoline, combusted in equipment: 0.0876 l
  20% of mill use
- Natural gas, combusted in industrial equipment: 0.00708 l
  20% of mill use; proxy for propane
- Diesel, combusted in industrial equipment: 0.846 l
  20% of mill use
- Electricity, at grid, Eastern US, 2000: 41.6 kWh
  25% of total electricity
- Electricity, onsite boiler, hardwood mill, average, SE: 2.32 kWh
  25% of total electricity

## Sampling procedure
Questionnaires from 12 mills from the 8 states of southeast region. Hardwood sawmills were members of the Hardwood Manufacturer Association (HMA).

## Sources
- Richard D. Bergman
- Maureen Puettmann
- Forest Products Laboratory
- Forest Products Laboratory
- NHLA
