# Aniline, at plant

Dataset: openLCA process, unit process
Category: All Other Basic Organic Chemical Manufacturing
Geography: RNA
Time period: 2003-01-01 to 2004-01-01
Generated by: Franklin Associates
Published in: THE PLASTICS DIVISION OF THE AMERICAN C
restrictionsDescription: All information can be accessed by everybody.
copyright: false

## General comment
The aniline dataset represented in this module includes data for nitric acid and nitrobenzene to conceal the confidential data of a provider company. Steam/heat is produced as a coproduct during this process. The energy amount for this coproduct is reported separately as recovered energy. This process has net water outputs. The mass imbalance is due to unavailability of the weight of water inputs to production and outputs to nature. Quantities may vary slightly between the reference to main source and and this module due to rounding. Important note: although most of the data in the US LCI database has undergone some sort of review, the database as a whole has not yet undergone a formal validation process. Please email comments to lci@nrel.gov.

## Technology
Hydrogenation of nitrobenzene in the presence of a copper-chromium or copper-silica catalyst, or by vapor phase ammonolysis of phenol and ammonia

## Geography
US

## Reference product
- Aniline, at plant: 1 kg

## By-products
- Recovered energy: 0.003045 MJ
  Credit for steam or heat co-product sold externally.

## Inputs from technosphere
- Transport, pipeline, unspecified petroleum products: 0.002181 t*km
- CUTOFF Disposal, solid waste, unspecified, to waste-to-energy: 0.00156 kg
- Hydrogen, liquid, synthesis gas, at plant: 0.063 kg
- CUTOFF Disposal, solid waste, unspecified, to municipal incineration: 0.0005 kg
- Electricity, at grid, US, 2008: 0.16623 kWh
- Transport, pipeline, natural gas: 0.00024328 t*km
- Transport, barge, residual fuel oil powered: 0.12063 t*km
  Values for barge transport are calculated based on average fuel consumption rates as reported in Transportation Energy Data Book: Edition 22 from Oak Ridge National Laboratory, September 2002: 22% of barges use diesel fuel in their engines, 78% use residual oil to generate steam for steam turbines, and a barge that consumes residual oil consumes 3.4 gallons per 1,000 ton-miles
- Benzene, at plant: 0.848 kg
- Ammonia, steam reforming, liquid, at plant: 0.149 kg
- Natural gas, combusted in industrial boiler: 0.028155 m3
- Transport, barge, diesel powered: 0.03628 t*km
  (same comment as for Transport, barge, residual fuel oil powered)
- Transport, train, diesel powered: 0.081657 t*km
- Electricity, at cogen, for natural gas turbine: 0.079586 kWh

## Inputs from nature
- Oxygen, in air: 0.559 kg

## Emissions to nature
- Nitrogen oxides: 0.00084 kg
- Particulates, < 2.5 um: 1e-5 kg
  This emission was reported by fewer than three companies. To indicate known emissions while protecting the confidentiality of individual company responses, the emission is reported only by order of magnitude.
- Ammonia: 3.3e-6 kg
- Sulfur oxides: 1e-8 kg
  (same comment as for Particulates, < 2.5 um)
- Mercury: 1e-9 kg
  (same comment as for Particulates, < 2.5 um)
- Hydrogen chloride: 1e-7 kg
  (same comment as for Particulates, < 2.5 um)
- Particulates, > 2.5 um, and < 10um: 4.5e-5 kg
- Chlorine: 9.7e-8 kg
- Sulfuric acid: 1e-8 kg
  (same comment as for Particulates, < 2.5 um)
- Copper: 1e-7 kg
  (same comment as for Particulates, < 2.5 um)
- Methane, difluromonochloro-, HCFC-22: 1e-6 kg
  (same comment as for Particulates, < 2.5 um)
- Lead: 1e-8 kg
  (same comment as for Particulates, < 2.5 um)
- NMVOC, non-methane volatile organic compounds, unspecified: 7.2e-6 kg
- Carbon monoxide: 1.1e-5 kg
- Organic substances, unspecified: 1e-5 kg
- Perfluorocarbons, unspecified: 1e-5 kg
  (same comment as for Particulates, < 2.5 um)
- Nickel compounds, unspecified: 1e-6 kg
  (same comment as for Particulates, < 2.5 um)
- TOC, Total Organic Carbon: 1e-5 kg
  Waterborne emissions collected for nitrobenzene and aniline included those sent to deepwell disposal. Emissions sent to deepwell disposal are not included in the table as they are not released to a water source. The following emissions were reported as being sent to deepwell disposal: toluene, phenol, 2-DNP, aniline, and nitrobenzene. This emission was reported by fewer than three companies. To indicate known emissions while protecting the confidentiality of individual company responses, the emission is reported only by order of magnitude.

## Sources
- THE PLASTICS DIVISION OF THE AMERICAN C
