# Roundwood, softwood, green, at mill, INW

Dataset: openLCA process, unit process
Category: Logging
Geography: RNA
Time period: 2006-01-01 to 2007-01-01
Generated by: Maureen Puetmann
Published in: Francis G. Wagner
restrictionsDescription: All information can be accessed by everybody.
copyright: false

## General comment
All weights given on an ovendry basis. Percent Moisture content (oven dry basis) = wt of wood wet - wt of wood dry/wt of wood dry x100
Important note: although most of the data in the US LCI database has
undergone some sort of review, the database as a whole has not yet
undergone a formal validation process.
Please email comments to lci@nrel.gov.

## Technology
Average

## Geography
Meant to represent operations in eastern Washington, eastern Oregon, Idaho and western Montana. Actual representative mill sample found in eastern Washington and Idaho only.

## Reference product
- Roundwood, softwood, green, at mill, INW: 1 kg
  Weight reported on an ovendry basis, density=436 kg/m3 based on oven dry mass

## By-products
- Bark, softwood, green, at mill, INW: 0.0739 kg
  Weight reported on an ovendry basis, density=436 kg/m3 based on oven dry mass

## Inputs from technosphere
- Transport, combination truck, diesel powered: 0.0153 t*km
  Transport of bark over 129 km. Note: mass of 1 kg ovendry basis = 1.6 kg at 60% moisture content.
- Roundwood, softwood, average, at forest road, INW: 0.00244 m3
  Based on green specific gravity of 0.41 (od mass and green volume)
- Transport, combination truck, diesel powered: 0.2064 t*km
  Transport of roundwood logs over 129 km. Note: mass of 1 kg ovendry basis = 1.6 kg at 60% moisture content.
- Bark, softwood, average, at forest road, INW: 0.0739 kg
  Based on green specific gravity of 0.41 (od mass and green volume)

## Sampling procedure
Questionnaires from 4 mills assumed to be representative of the softwood lumber industry in US Inland West.

## Sources
- Forest Products Laboratory
- Francis G. Wagner
- Maureen Puettmann
