# Heat, drying veneer, hardwood, at veneer mill, E

Dataset: openLCA process, unit process
Category: Softwood Veneer and Plywood Manufacturing
Geography: RNA
Time period: 2007-01-01 to 2007-01-01
Generated by: Maureen Puettmann
Published in: Richard D. Bergman
restrictionsDescription: All information can be accessed by everybody.
copyright: false

## General comment
All weights given on an ovendry basis.

Important note: although most of the data in the US LCI database has
undergone some sort of review, the database as a whole has not yet
undergone a formal validation process.
Please email comments to lci@nrel.gov.

## Technology
Average Transport distance

## Geography
E= Eastern US United States. The states included MN, IA, MO, WI, IL, NJ, OH, IN, MI, WV, PA, MD, DW, NJ, NY, ME, VT, NH, RI, MA, CT, VA, KY, AR, LA, MS, AL, FL,GA, NC, SC, and TN

## Reference product
- Heat, drying veneer, hardwood, at veneer mill, E: 3770.5 MJ
  Amount of heat consumed on-site from burning wood and fossil fuels during veneer drying. Represents 71.3% veneer mill use of heat.

## By-products
- Heat, block conditiong, at veneer mill, E: 1520 MJ
  Amount of heat consumed on-site from burning wood and fossil fuels during block conditioning. Represents 28.7% veneer mill use of heat.
- Heat, pressing panels, hardwood, at engineered wood flooring plant, E: 722 MJ
  Amount of heat energy consumed during pressing. Reporesent 64.3% of flooring plant use of energy.
- Heat, drying stain, at engineered wood flooring mill, E: 401 MJ
  Amount of heat energy consumed during the prefinishing process. Represents 35.7% of total process energy for flooring plant

## Inputs from technosphere
- Liquefied petroleum gas, combusted in industrial boiler: 5.36 l
  Process energy needed to produce 1.0 m3 engineered wood flooring; all fuel quantities listed below were multipled by using the following HHV; 20.9 MJ per OD kg for wood, 38.4 MJ per cubic meter for natural gas, 38.7 MJ per liter for fuel oil #1 and #2, 41.8 MJ per liter for fuel oil #6, and 26.6 MJ per liter for propane to determine the process energy input
- Natural gas, combusted in industrial boiler: 0.3 m3
- Wood fuel, hardwood, purchased, combusted in industrial boiler, E: 106 kg
- Wood fuel, hardwood, generated at mill, combusted in industrial boiler, E: 194 kg

## Sampling procedure
Questionnaires from 4 veneer mills and 5 flooring plants in the E. United States representing 32 states.

## Sources
- Richard D. Bergman
