# Electricity, at Grid, TRE, 2010

Dataset: openLCA process, unit process
Category: Utilities
Geography: RNA
Time period: 2010-01-01 to 2010-01-01
Generated by: Samantha Wascavage
Published in: Chris Goemans, Athena Institute
restrictionsDescription: All information can be accessed by everybody.
copyright: false

## General comment
The methodology used to put together the grid information is outlined in reference 1.

## Technology
Typical

## Geography
Texas

## Reference product
- Electricity, at Grid, TRE, 2010: 1 kWh

## Inputs from technosphere
- Electricity, natural gas, at power plant: 0.450391 kWh
  NG – Natural Gas
- CUTOFF Electricity, other fuels, unspecified, at power plant: 0.001015 kWh
  OTH, MSN, PUR, WH – Other (Batteries, Chemicals, Coke Breeze, Hydrogen, Pitch, Sulfur, Tar Coal, and miscellaneous technologies)
- Electricity, bituminous coal, at power plant: 0.241411 kWh
  SUB – Subbituminous Coal
- Electricity, nuclear, at power plant: 0.125547 kWh
  NUC – Nuclear (Uranium, Plutonium, Thorium)
- CUTOFF Electricity, biomass,liquid, unspecified, at power plant: 0.000737 kWh
  BLQ, OBL, SLW, WDL – Black Liquor
- CUTOFF Electricity, petroleum coke, at power plant: 0.000402 kWh
  PC, WO – Petroleum Coke
- Electricity, diesel, at power plant: 0.000326 kWh
  DFO, JF, KER – Distillate Fuel Oil (includes all Diesel and No. 1, No. 2, and No. 4 Fuel Oils)
- CUTOFF Electricity, biomass, gas, landfill, at power plant: 0.000936 kWh
  LFG, OBG – Landfill Gas
- Electricity, lignite coal, at power plant: 0.112157 kWh
  LIG – Lignite Coal
- CUTOFF Electricity, hydropower, at power plant, unspecified: 0.002412 kWh
  WAT – Water (Conventional, Pumped Storage)
- CUTOFF Electricity, other gases, unspecified, at power plant: 0.007503 kWh
  OG, PG, BFG – Other Gas (Butane, Coal Processes, Coke-Oven, Refinery, and other processes)
- CUTOFF Electricity, at wind power plant, unspecified: 0.05716 kWh
  WND – Wind

## Sampling procedure
based on EIA electricity reports for all power plants in the US.

## Sources
- Chris Goemans, Athena Institute
- Statistics Canada
- unspecified
- USEPA
- Statistics Canada
- Statistics Canada
- Statistics Canada
- Statistics Canada
- USEPA
- EIA
- EIA
- EIA
- EIA
- EIA
- EIA
- EIA
- EIA
- EIA
- US DOE
- International Energy Agency
- EIA
