# Engineered flooring, hardwood, unfinished, E

Dataset: openLCA process, unit process
Category: Engineered Wood Member (ex. Truss) Manufacturing
Geography: RNA
Time period: 2007-01-01 to 2007-01-01
Generated by: Maureen Puettmann
Published in: Richard D. Bergman
restrictionsDescription: All information can be accessed by everybody.
copyright: false

## General comment
All weights given on an ovendry basis. All moisture contents are on an ovendry basis. MC% =(weight of water in wood / weight of oven dry wood) *100. Reference to specific gravities use oven dry mass and volumes at specified moisture contents. Reference to densities use mass and volume at specified moistrue contents.

Important note: although most of the data in the US LCI database has
undergone some sort of review, the database as a whole has not yet
undergone a formal validation process.
Please email comments to lci@nrel.gov.

## Technology
Typical

## Geography
E= Eastern US United States. The states included MN, IA, MO, WI, IL, NJ, OH, IN, MI, WV, PA, MD, DW, NJ, NY, ME, VT, NH, RI, MA, CT, VA, KY, AR, LA, MS, AL, FL,GA, NC, SC, and TN

## Reference product
- Engineered flooring, hardwood, unfinished, E: 1 m3
  Based on a weighted average green density and specific gravity of 613 kg/m3 and 0.578. Moisture content (ovendry basis) = 6.0%.

## By-products
- Wood fuel, hardwood, dry, at engineered wood flooring plant, E: 4.148 kg
  (same comment as for Engineered flooring, hardwood, unfinished, E)
- Sawdust, hardwood, dry, at engineered wood flooring plant, E: 114.5 kg
  (same comment as for Engineered flooring, hardwood, unfinished, E)
- Shavings, hardwood, dry, at engineered wood flooring plant, E: 11.44 kg
  (same comment as for Engineered flooring, hardwood, unfinished, E)

## Inputs from technosphere
- Diesel, combusted in industrial equipment: 0.3503 l
  Amount of diesel consumed during trimming. Represents 5% of mill use of diesel
- Natural gas, combusted in industrial equipment: 0.0004425 m3
  Amount of natural gas consumed during trimming. Represents 14.3% of mill use of natural gas; proxy for propane
- Electricity, at grid, Eastern US, 2000: 66.97 kWh
  Amount of electricity consumed during trimming. Represents 6% of mill use of electricity
- Pressed raw panels, purchased, hardwood, at eng wood flooring plant, E: 177 kg
  Panesl purchased off-site
- Gasoline, combusted in equipment: 0.0817 l
  Amount of gasoline consumed during trimming. Represents 14.3% of mill use of gasoline
- Pressed raw panels, hardwood, at engineered wood flooring plant, E: 596 kg
  Panels manufactured on-site

## Emissions to nature
- Particulates, < 10 um: 0.07 kg
  Two mills reported

## Sampling procedure
Questionnaires from 4 veneer and 5 flooring mills in the E. United States representing 32 states.

## Sources
- Richard D. Bergman
- Maureen Puettmann
