# Composite wood I-joist processing, at plant, US PNW

Dataset: openLCA process, unit process
Category: Engineered Wood Member (ex. Truss) Manufacturing
Geography: RNA
Time period: 2000-01-01 to 2000-01-01
Generated by: Jamie Meil
Published in: Dr. Jim Wilson
restrictionsDescription: All information can be accessed by everybody.
copyright: true

## General comment
Base process data presented with allocations to within process co-products noted. Refer to allocation worksheet for specifics. All allocations performed using mass or volume. To take profile back to cradle the user must add US LCI profile information for PNW LVL and SE OSB modules. Resin adhesive cradle-to-gate LCI is provided for easy reference., this is a weighted average profile for all I-joist dimensions produced in the two plants
Important note: although most of the data in the US LCI database has
undergone some sort of review, the database as a whole has not yet
undergone a formal validation process.
Please email comments to lci@nrel.gov.

## Technology
Typical

## Geography
US Pacific North West

## Reference product
- Composite wood I-joist, at plant, US PNW: 1 kg

## By-products
- Sawdust, from I-Joist processing, at plant, US PNW: 0.114 kg

## Inputs from technosphere
- Laminated veneer lumber, at plant, US PNW: 0.561 kg
- Diesel, combusted in industrial boiler: 0.000331 l
- Electricity, at grid, Western US, 2000: 0.0918 kWh
- Liquefied petroleum gas, combusted in industrial boiler: 6.78e-5 l
- Transport, combination truck, average fuel mix: 0.143 t*km
- Methylene diphenyl diisocyanate resin, at plant, US PNW: 0.00606 kg
- Transport, train, diesel powered: 1.58 t*km
- Natural gas, combusted in industrial boiler: 0.000151 m3
- Oriented strand board product, US SE: 0.546 kg

## Inputs from nature
- Water: 0.0702 l

## Emissions to nature
- Acetone: 6.93e-8 kg
- Methanol: 8.42e-6 kg
- Formaldehyde: 8.91e-8 kg

## Sources
- Dr. Jim Wilson
