# Electricity, at Grid, FRCC, 2008

Dataset: openLCA process, unit process
Category: Utilities
Geography: RNA
Time period: 2008-01-01 to 2008-01-01
Generated by: Alberta Carpenter
Published in: Chris Goemans, Athena Institute
restrictionsDescription: All information can be accessed by everybody.
copyright: false

## General comment
The methodology used to put together the grid information is outlined in reference 1.

## Technology
Typical

## Geography
Florida

## Reference product
- Electricity, at Grid, FRCC, 2008: 1 kWh

## Inputs from technosphere
- CUTOFF Electricity, hydropower, at power plant, unspecified: 0.00098771 kWh
  WAT – Water (Conventional, Pumped Storage)
- CUTOFF Electricity, petroleum, waste oil, at power plant: 6.25292e-6 kWh
  WO – Waste/Other Oil (including Crude Oil, Liquid Butane, Liquid Propane, Oil Waste, Re-Refined Motor Oil, Sludge Oil, Tar Oil, or other petroleum-based liquid wastes)
- Electricity, biomass, at power plant: 0.00373357 kWh
  WDS – Wood/Wood Waste Solids (Paper Pellets, Railroad Ties, Utility Poles, Wood Chips, and other wood solids)
- CUTOFF Electricity, tire derived fuel, at power plant: 0.000154492 kWh
  TDF – Tired (tire derived fuel)
- Electricity, natural gas, at power plant: 0.482558 kWh
  NG – Natural Gas
- CUTOFF Electricity, biomass, solid, biogenic MSW, at power plant: 0.00724112 kWh
  MSB – Municipal Solid Waste – Biogenic Component
- CUTOFF Electricity, biomass,liquid, unspecified, at power plant: 0.00414417 kWh
  BLQ – Black Liquor
- Electricity, bituminous coal, at power plant: 0.00050912 kWh
  SC - Coal Synfuel. Coal-based solid fuel that has been processed by a coal synfuel plant, and coal-based fuels such as briquettes, pellets, or extrusions, which are formed from fresh or recycled coal and binding materials.
- CUTOFF Electricity, other gases, unspecified, at power plant: 2.96886e-7 kWh
  PG – Propane
- Electricity, diesel, at power plant: 0.00182038 kWh
  DFO – Distillate Fuel Oil (includes all Diesel and No. 1, No. 2, and No. 4 Fuel Oils)
- CUTOFF Electricity, other fuels, unspecified, at power plant: 0.0055556 kWh
  WH – Waste heat not directly attributed to a fuel source. Note that WH should only be reported where the fuel source for the waste heat is undetermined, and for combined cycle steam turbines that are not supplementary fired
- CUTOFF Electricity, other fuels, unspecified, at power plant: 0.00212101 kWh
  OTH – Other (Batteries, Chemicals, Coke Breeze, Hydrogen, Pitch, Sulfur, Tar Coal, and miscellaneous technologies)
- CUTOFF Electricity, petroleum coke, at power plant: 0.0157845 kWh
  PC – Petroleum Coke
- CUTOFF Electricity, MSW, non-biogenic, at power plant: 0.00568955 kWh
  MSN – Municipal Solid Waste – Non-biogenic components
- CUTOFF Electricity, biomass, gas, unspecified, at power plant: 0.000210458 kWh
  OBG – Other Biomass Gases (Digester Gas, Methane, and other biomass gases)
- CUTOFF Electricity, biomass, gas, landfill, at power plant: 0.000994021 kWh
  LFG – Landfill Gas
- CUTOFF Electricity, biomass, solid, agriculture by-products, at power plant: 0.00221224 kWh
  AB – Agriculture Crop By-products / Straw / Energy Crops
- CUTOFF Electricity, biomass,solid, unspecified, at power plant: 0.000489495 kWh
  OBS – Other Biomass Solid (Animal Manure and Waste, Solid By-products, and other solid biomass not specified)
- Electricity, nuclear, at power plant: 0.153952 kWh
  NUC – Nuclear (Uranium, Plutonium, Thorium)
- Electricity, residual fuel oil, at power plant: 0.039707 kWh
  RFO – Residual Fuel Oil (includes No. 5 and No. 6 Fuel Oils and Bunker C Fuel Oil)
- Electricity, bituminous coal, at power plant: 0.27213 kWh
  BIT - Anthracite Coal, and Bituminous Coal.

## Sampling procedure
based on EIA electricity reports for all power plants in the US.

## Sources
- Chris Goemans, Athena Institute
- unspecified
- USEPA
- Statistics Canada
- Statistics Canada
- Statistics Canada
- Statistics Canada
- Statistics Canada
- Statistics Canada
- USEPA
- EIA
- EIA
- EIA
- EIA
- EIA
- EIA
- EIA
- EIA
- EIA
- EIA
- EIA
- US DOE
- International Energy Agency
- US DOE
