# Spring wheat straw, ground and stored, 2022

Dataset: openLCA process, unit process
Category: Wheat Farming
Geography: RNA
Time period: 2008-01-01 to 2022-01-01
Generated by: Daniel Inman
Published in: Hsu, D.
restrictionsDescription: All information can be accessed by everybody.
copyright: false

## General comment
1 metric ton of wheat straw, dried to 12%
moisture.

## Technology
future

## Geography
North America

## Time period
2022

## Reference product
- Spring wheat straw, ground and stored, 2022: 1 t

## Inputs from technosphere
- CUTOFF Loading bales: 1.43 Item(s)
  loading bales for grinder. Calculation of number of bales comes from 2000 lbs of corn stover divided by weight per bale. Trailer volume is 2511 ft^3 (INL table 4-5), density is 12 lbs/ft^3 dry (=20 wet at 40% moisture).
- CUTOFF Conveyor belt, at plant: 3.47472e-5 m
  conveyor for grinder in-feed system
- Grinding: 0.970034 sh tn
- CUTOFF Conveyor belt, at plant: 3.47472e-5 m
- Electricity, at grid, US, 2008: 61.289 MJ
  proxy: Electricity, medium voltage, at grid/US with US electricity. Electricity needed for dust collection.
- CUTOFF Maize drying: 33.3 kg
- CUTOFF Dried roughage store, non ventilated: 1.17232e-7 m3
  30 year lifetime for storage from INL feedstock design report.
- Electricity, at grid, US, 2008: 3.25506 MJ
  proxy: Electricity, medium voltage, at grid/US with US electricity. Electricity needed for twine removal.
- CUTOFF Fodder loading, by self-loading trailer: 2.77505 m3
- CUTOFF Agricultural machinery, general, production: 0.9 kg
- Electricity, at grid, US, 2008: 53.6645 MJ
  proxy: Electricity, medium voltage, at grid/US with US electricity. Electricity needs for pelletization.
- Spring wheat straw, carted, 2022: 1.33 t

## Emissions to nature
- Water: 333 kg
  water dried per ton of final moisture corn stover. drying from 34% moisture to 12% moisture.

## Sources
- Hsu, D.
- Hess, J.
