# Enzyme, Cellulase, Novozyme Celluclast

Dataset: openLCA process, unit process
Category: All Other Basic Organic Chemical Manufacturing
Geography: RER
Time period: 2004-01-01 to 2004-01-01
Generated by: Daniel Inman
Published in: P.H. Nielsen
restrictionsDescription: All information can be accessed by everybody.
copyright: false

## General comment
based on Figure B. Values recieved from Novozyme. Inventory in terms of equivalents.

## Technology
current

## Time period
2004

## Reference product
- Enzyme, Cellulase, Novozyme Celluclast: 1 kg

## Inputs from nature
- Energy, from coal: 52.076 MJ
  Data is fossil energy. Assumed it was all coal. This number does not affect the GHG emissions. This number is just for energy.
- Water, unspecified natural origin/m3: 0.020852 m3
- Transformation, from pasture and meadow: 0.72264 m2
- Transformation, to industrial area: 0.72264 m2

## Emissions to nature
- Sulfur dioxide: 0.015277 kg
  this is SO2 eq.
- Ethene: 0.0020044 kg
  This is C2H4 eq.
- Carbon dioxide, fossil: 4.0894 kg
  this is CO2 eq.
- Phosphate: 0.0093655 kg
  this is phosphate equiv.

## Sources
- Hsu, D.
- P.H. Nielsen
