# Cotton, whole plant, at field

Dataset: openLCA process, unit process
Category: Cotton Farming
Geography: RNA
Time period: 1997-01-01 to 2000-01-01
Generated by: Olivier Muller
Published in: USDA/National Agricultural Statistics Se
restrictionsDescription: All information can be accessed by everybody.
copyright: false

## General comment
Agricultural Crop Production, Harvested acres are 84% of the planted acres (1998-2000 US average).
The impacts of producing 1 kg of seed are assumed equal to those of producing 1kg of lint.
For Water, only consumptive use is taken into account (i.e. 60.7% of the total water consumption).
Important note: although most of the data in the US LCI database has
undergone some sort of review, the database as a whole has not yet
undergone a formal validation process.
Please email comments to lci@nrel.gov.

## Technology
US average

## Geography
USA

## Reference product
- Cotton straw, at field: 4.5 kg
  Residue to Crop Ratio (20), C content of residues - same value as soybeans and peanuts in (4), N content and dry content of residues (10). Initially considered an output to nature. Changed to unvalued co-product by Pascal Lesage (12/07)

## By-products
- Cotton, at field: 1 kg
  Planted surface (1), Production (1), Seeds (18)

## Inputs from technosphere
- Quicklime, at plant: 0.158 kg
  Fertilizers NPK Ca and method of application (9)
- Liquefied petroleum gas, combusted in industrial boiler: 0.0257 l
  Energy consumption (18). Was initially reported as MJ. Converted using following factors: 50.3 MJ/kg, 1.85L/kg
- Electricity, at grid, US, 2000: 0.247 kWh
  Energy consumption (18)
- CUTOFF Agrochemicals, at plant: 0.009 kg
  Pesticides - consumption (19)
- Natural gas, combusted in industrial boiler: 6.61e-5 m3
  Energy consumption (18)
- Transport, single unit truck, diesel powered: 0.113 t*km
  Transportation of fertilizers (200 km)
- Transport, train, diesel powered: 0.302 t*km
  Transportation of fertilizers (400km)
- CUTOFF Phosphorous Fertilizer (TSP as P2O5), at plant: 0.0503 kg
  Fertilizers NPK Ca and method of application (9)
- Diesel, combusted in industrial equipment: 0.231 l
  Farm tractor. Energy consumption (18)
- Nitrogen fertilizer, production mix, at plant: 0.124 kg
  Fertilizers NPK Ca and method of application (9)
- CUTOFF Potash Fertilizer (K2O), at plant: 0.0556 kg
  Fertilizers NPK Ca and method of application (9)

## Inputs from nature
- Occupation, arable, conventional tillage: 10.4 m2*a
  Planted surface (1), Tillage practices (3)
- Water: 287 l
  Water consumption - consumptive use for irrigation (5), Water consumption - area irrigated and depth of irrigation water applied and ratio surface/ground water (2)
- Water, well: 1020 l
  (same comment as for Water)
- Occupation, arable, conservation tillage: 2.75 m2*a
  Planted surface (1), Tillage practices (3)
- Carbon dioxide: 1.69 kg
  Carbon fixation through plant growth
- Occupation, arable, reduced tillage: 1.55 m2*a
  Planted surface (1), Tillage practices (3)

## Emissions to nature
- Clomazone: 2.45e-5 kg
  Pesticides - consumption (19), Pesticides - application method (11), Pesticides - air emission factors (12), Pesticides - vapor pressure (13)
- Phorate: 4e-5 kg
  (same comment as for Clomazone)
- Oxamyl: 4.41e-5 kg
  (same comment as for Clomazone)
- Hydrocarbons, unspecified: 0.0054 kg
  (same comment as for Clomazone)
- Particulates, unspecified: 4.08e-5 kg
  Particulate emissions during harvesting (16)
- Diuron: 5.63e-5 kg
  (same comment as for Clomazone)
- Prometryn: 6.78e-5 kg
  (same comment as for Clomazone)
- Parathion, methyl: 5.63e-6 kg
  Pesticides - consumption (19), Pesticides - application method (11), Runoff of pesticide (15)
- Disulfoton: 7.69e-7 kg
  (same comment as for Parathion, methyl)
- Paraquat: 4.34e-5 kg
  (same comment as for Clomazone)
- Phorate: 1.03e-6 kg
  (same comment as for Parathion, methyl)
- Metolachlor: 2.06e-5 kg
  (same comment as for Clomazone)
- Cyanazine: 5.43e-6 kg
  (same comment as for Parathion, methyl)
- Metham sodium: 2.37e-6 kg
  (same comment as for Parathion, methyl)
- Tributylphosphorotrithioate: 8.74e-6 kg
  (same comment as for Parathion, methyl)
- Ammonia: 0.00748 kg
  Air emissions of N2O and NH3 and NOx (4)
- Phosphorus compounds, unspecified: 0.000296 kg
  Runoff/leaching of fertilizers (16)
- Monosodium acid methanearsonate: 8.31e-6 kg
  (same comment as for Parathion, methyl)
- Azinphos-methyl: 9.73e-6 kg
  (same comment as for Clomazone)
- Propene, 1,3-dichloro-: 0.00025 kg
  (same comment as for Clomazone)
- Dinitrogen monoxide: 0.00569 kg
  Air emissions of N2O and NH3 and NOx (4)
- Parathion, methyl: 0.000131 kg
  (same comment as for Clomazone)
- Cyanazine: 0.000127 kg
  (same comment as for Clomazone)
- Mancozeb: 1.34e-8 kg
  (same comment as for Parathion, methyl)
- Pendimethalin: 0.00015 kg
  (same comment as for Clomazone)
- Prometryn: 2.91e-6 kg
  (same comment as for Parathion, methyl)
- Trifluralin: 0.000393 kg
  (same comment as for Clomazone)
- Monosodium acid methanearsonate: 0.000194 kg
  (same comment as for Clomazone)
- Oxamyl: 1.14e-6 kg
  (same comment as for Parathion, methyl)
- Ethephon: 0.000216 kg
  (same comment as for Clomazone)
- Metham sodium: 5.52e-5 kg
  (same comment as for Clomazone)
- Clomazone: 1.05e-6 kg
  (same comment as for Parathion, methyl)
- Aldicarb: 4.73e-6 kg
  (same comment as for Parathion, methyl)
- Acephate: 4.36e-5 kg
  (same comment as for Clomazone)
- Propene, 1,3-dichloro-: 6.46e-6 kg
  (same comment as for Parathion, methyl)
- Malathion: 7.47e-6 kg
  (same comment as for Parathion, methyl)
- Ethephon: 9.25e-6 kg
  (same comment as for Parathion, methyl)
- Pendimethalin: 6.45e-6 kg
  (same comment as for Parathion, methyl)
- Norflurazon: 6.42e-5 kg
  (same comment as for Clomazone)
- Disulfoton: 2.97e-5 kg
  (same comment as for Clomazone)
- Acephate: 1.87e-6 kg
  (same comment as for Parathion, methyl)
- Malathion: 0.000174 kg
  (same comment as for Clomazone)
- Azinphos-methyl: 4.17e-7 kg
  (same comment as for Parathion, methyl)
- Suspended solids, unspecified: 10.2 kg
  Erosion (6)
- Aldicarb: 0.00011 kg
  (same comment as for Clomazone)
- Trifluralin: 1.02e-5 kg
  (same comment as for Parathion, methyl)
- Bromoxynil: 1.35e-7 kg
  (same comment as for Parathion, methyl)
- Carbofuran: 7.85e-6 kg
  (same comment as for Clomazone)
- 2,4-D: 2.02e-8 kg
  (same comment as for Parathion, methyl)
- 2,4-D: 4.72e-7 kg
  (same comment as for Clomazone)
- Carbofuran: 3.36e-7 kg
  (same comment as for Parathion, methyl)
- Fluometuron: 9.44e-6 kg
  (same comment as for Parathion, methyl)
- Glyphosate: 7.72e-5 kg
  (same comment as for Clomazone)
- Mancozeb: 5.19e-7 kg
  (same comment as for Clomazone)
- Norflurazon: 2.75e-6 kg
  (same comment as for Parathion, methyl)
- Endosulfan: 1.84e-5 kg
  (same comment as for Clomazone)
- Fluometuron: 0.00022 kg
  (same comment as for Clomazone)
- Paraquat: 1.86e-6 kg
  (same comment as for Parathion, methyl)
- Sodium chlorate: 0.000271 kg
  (same comment as for Clomazone)
- Nitrogen oxides: 0.0202 kg
  Air emissions of N2O and NH3 and NOx (4)
- Metolachlor: 8.85e-7 kg
  (same comment as for Parathion, methyl)
- Nitrogen, total: 0.0152 kg
  Runoff/leaching of fertilizers (16)
- Endosulfan: 7.88e-7 kg
  (same comment as for Parathion, methyl)
- Bromoxynil: 5.21e-6 kg
  (same comment as for Clomazone)
- Diuron: 2.41e-6 kg
  (same comment as for Parathion, methyl)
- Chlorpyrifos: 1.99e-6 kg
  (same comment as for Parathion, methyl)
- Sodium chlorate: 1.16e-5 kg
  (same comment as for Parathion, methyl)
- Tributylphosphorotrithioate: 0.000204 kg
  (same comment as for Clomazone)
- Glyphosate: 3.31e-6 kg
  (same comment as for Parathion, methyl)
- Chlorpyrifos: 4.63e-5 kg
  (same comment as for Clomazone)

## Sources
- USDA/National Agricultural Statistics Se
- USDA/ERS
- Conservation Technology Information Cent
- U.S. EPA
- USGS
- USDA/NRI
- USDA/ERS
- USDA/ERS
- USDA/ERS
- U.S. EPA
- U.S. EPA
- USDA/NCRS
- USGS
- USDA/ERS
- USDA/NRCS
- U.S. EPA
- USDA/ERS
- USDA/ERS
- National Center for Food and Agricultura
- USDA / NCRS Tennessee
