# Phenol resorcinol formaldehyde resin, at plant

Dataset: openLCA process, unit process
Category: Plastics Material and Resin Manufacturing
Geography: RNA
Generated by: Jamie Meil
restrictionsDescription: All information can be accessed by everybody.
copyright: true

## General comment
Base process data presented with allocations to within process co-products noted. Refer to allocation worksheet for specifics. All allocations performed using mass or volume. To take profile back to cradle the user must add LCI profile information for PNW dry and rough green lumber from PNW dry lumber LCI module. Cradle-to-gate LCI information presented for PRF and MUF resins and hardeners which were derived from secondary source., information from secondary source
Important note: although most of the data in the US LCI database has
undergone some sort of review, the database as a whole has not yet
undergone a formal validation process.
Please email comments to lci@nrel.gov.

## Technology
Typcial

## Geography
US Pacific North West

## Reference product
- Phenol resorcinol formaldehyde resin, at plant: 1 kg

## Inputs from technosphere
- CUTOFF Disposal, inert solid waste, to unspecified treatment: 0.20306 kg
- CUTOFF Disposal, wood waste, to unspecified treatment: 0.00214 kg
- CUTOFF Disposal, chemical waste, unspecified, to unspecified treatment: 0.00577 kg

## Inputs from nature
- Uranium, in ground: 0.000641 kg
- Oil, crude, in ground: 0.59083 kg
  The original data was in terms of volume. This was changed to mass using a conversion factor of 850kg/m3
- Gas, natural, in ground: 1.031 m3
- Sodium chloride, in ground: 0.21069 kg
- Copper ore, in ground: 0.0011 kg
- Iron ore, in ground: 0.0003 kg
- Sulfur, in ground: 0.081 kg
- Coal, bituminous, 24.8 MJ per kg, in ground: 0.93872 kg
- Calcium carbonate, in ground: 0.0012 kg

## Emissions to nature
- Acidity, unspecified: 4.19e-5 kg
- Phenol: 2e-5, 4.7e-6 kg (2 entries, compartments not in this file)
- Dissolved organic matter: 1.79e-5 kg
- Methane: 3e-5 kg
- BOD5, Biological Oxygen Demand: 1.89e-5 kg
- Sodium chloride: 0.000541 kg
- Zinc: 0.00214 kg
- Cadmium, ion: 7.51e-6 kg
- Hydrocarbons, unspecified: 0.0021939 kg
- Mercury: 5.1e-6 kg
- Phosphate: 2.9e-6 kg
- Aromatics, unspecified: 2e-5 kg
- Chloride: 3.05e-5 kg
- Dust, unspecified: 0.00464 kg
- Dissolved solids: 0.00632 kg
- Oils, unspecified: 4.25e-5 kg
- Hydrogen chloride: 0.000861 kg
- Nitrogen, total: 1.11e-5, 0.01193 kg (2 entries, compartments not in this file)
- COD, Chemical Oxygen Demand: 0.00121 kg
- Nitrogen oxides: 2.23 kg
- Carbon dioxide: 0.00478 kg
- Ethene: 7.01e-5 kg
- Dimethyl ether: 4.05e-5 kg
- Aluminum: 4.1e-6 kg
  Emitted as Al(III)
- Metallic ions, unspecified: 0.000113 kg
- Methanol: 3e-5 kg
- Suspended solids, unspecified: 0.00355 kg
- Particulates, unspecified: 0.00137 kg
- Dinitrogen monoxide: 0.0138 kg
- Carbonate: 0.00455 kg
- Sulfur dioxide: 0.00848 kg
- Aldehydes, unspecified: 2e-5 kg
- Sodium, ion: 0.000492 kg

## Sources
- Maureen E. Puettman
