# Fuels, burned at bleached kraft market pulp mill, average production, at mill

Dataset: openLCA process, unit process
Category: Pulp, Paper, and Paperboard Mills
Geography: RNA
Time period: 2006-01-01 to 2006-01-01
Generated by: Caroline Gaudreault
Reviewer: Martha Stevenson
Published in: AF&PA
restrictionsDescription: All information can be accessed by everybody.
copyright: false

## General comment
Bleached kraft market pulp, average North American production, at mill. All flows are production-weighted means. Data were developed for a full LCA that was critically reviewed. Reviewers were: • Martha Stevenson, Chairperson – Private Consultant to the public interest with ten years of experience in sustainability, environmental management, packaging and materials recovery; led the development of the Design Guidelines for Sustainable Packaging and the COMPASS software used to compare the environmental impacts of package designs; • Pascal Lesage – Life cycle assessment consultant, Researcher at École Polytechnique de Montréal [at the Inter-University Research Centre for the Life Cycle of Products, Processes and Services (CIRAIG) in Montreal]; and • Dale Phenicie, Environmental Affairs Consulting – Consultant with 35 years of experience in environmental protection and process consulting for the forest products industry. Has served on several U.S. EPA Task Forces dealing with water quality issues and authored several AF&PA Environmental, Health and Safety/Sustainability reports.

## Technology
current technology mix for kraft pulping

## Time period
Primary data collected from participating companies and associations for their operational activities are representative for 2006 and 2007.

## Reference product
- Fuels, burned at bleached kraft market pulp mill, average production, at mill: 10867 MJ

## Inputs from technosphere
- LPG, combusted in industrial boiler, at pulp and paper mill (EXCL.): 0.30706 l
- Bituminous coal, combusted in industrial boiler, at pulp and paper mill (EXCL.): 22.546 kg
- RFO, combusted in industrial boiler, at pulp and paper mill (EXCL.): 39.531 l
  All combusted on site. Actually received at supplier, not refinery.
- Diesel, combusted in industrial boiler, at pulp and paper mill (EXCL.): 1.2627 l
  Proxy for light fuel oil.
- Natural gas, combusted in industrial boiler, at pulp and paper mill (EXCL.): 55.463 m3
- Gasoline, combusted in equipment, at pulp and paper mill (EXCL.): 0.11507 l
  Gasoline and kerosene, assumed to be gasoline.
- Hog fuel, pur., combusted in industrial boiler, at pulp and paper mill (EXCL.): 64.259 kg
  Purchased hogged fuel. Typically from wood products manufacturing.
- Hog fuel, self-gen., combusted in ind. boiler, at pulp and paper mill (EXCL.): 237.66 kg
  Combustion of self-generated hogged fuel from pulpwood. Wood inputs are accounted for in the process named Bleached kraft market pulp, average production, at mill
- Diesel, combusted in industrial boiler, at pulp and paper mill (EXCL.): 0.36528 l
  Other fossil fuels assumed to be diesel.
- TDF, combusted in industrial boiler, at pulp and paper mill (EXCL.): 2.2746 kg
  All combusted. Not present in any database.

## Emissions to nature
- Antimony: 7.1984e-5 kg
  From black liquor recovery, non-recyclable paper combustion and wastewater residuals combustion
- Benzene, hexachloro-: 4.3237e-10 kg
  (same comment as for Antimony)
- Barium: 0.00028484 kg
  (same comment as for Antimony)
- Manganese: 0.00014731 kg
  (same comment as for Antimony)
- Methane: 0.051542 kg
  (same comment as for Antimony)
- Ethane, 1,1,1-trichloro-, HCFC-140: 3.9413e-5 kg
  (same comment as for Antimony)
- Mercury: 2.4695e-6 kg
  (same comment as for Antimony)
- Xylene: 0.00077892 kg
  (same comment as for Antimony)
- Silver: 8.9949e-5 kg
  (same comment as for Antimony)
- Ethene, tetrachloro: 2.5826e-6 kg
  (same comment as for Antimony)
- Vanadium: 1.2564e-6 kg
  (same comment as for Antimony)
- Methane, monochloro, R-40: 0.018536 kg
  (same comment as for Antimony)
- Biphenyl: 0.00013023 kg
  (same comment as for Antimony)
- Benzo(ghi)perylene: 2.8042e-6 kg
  (same comment as for Antimony)
- Nickel: 1.8679e-5 kg
  (same comment as for Antimony)
- Formaldehyde: 0.0056491 kg
  (same comment as for Antimony)
- 4-Methyl-2-pentanone: 0.00036324 kg
  (same comment as for Antimony)
- Phenol: 0.010362 kg
  (same comment as for Antimony)
- Copper: 2.8232e-5 kg
  (same comment as for Antimony)
- Hexane: 0.00038677 kg
  (same comment as for Antimony)
- Aldehydes, C3, unspecified: 0.0046931 kg
  (same comment as for Antimony)
- Benzene, 1,2,4-trichloro-: 0.00011412 kg
  (same comment as for Antimony)
- Lead: 8.2617e-6 kg
  (same comment as for Antimony)
- Sulfur dioxide: 2.7384 kg
  From all combustion processes at pulp and paper mill.
- Carbon dioxide, biogenic: 2022.4 kg
  (same comment as for Antimony)
- Polycyclic organic matter, unspecified: 0.00023196 kg
  (same comment as for Antimony)
- Sulfuric acid: 0.021082 kg
  (same comment as for Antimony)
- Ethene, trichloro: 2.1023e-5 kg
  (same comment as for Antimony)
- Methanol: 0.11083 kg
  (same comment as for Antimony)
- Acrolein: 0.00026657 kg
  (same comment as for Antimony)
- Benzene: 0.00064642 kg
  (same comment as for Antimony)
- Cadmium: 6.5959e-5 kg
  (same comment as for Antimony)
- Carbon monoxide: 0.16978 kg
  (same comment as for Antimony)
- Dioxins, measured as 2,3,7,8-tetrachlorodibenzo-p-dioxin: 2.0704e-13 kg
  (same comment as for Antimony)
- Acetaldehyde: 0.012167 kg
  (same comment as for Antimony)
- Hydrogen sulfide: 0.1452 kg
  Total reduced sulfur assumed to be hydrogen sulfide. From all combustion processes.
- Particulates, unspecified: 0.050624 kg
  (same comment as for Antimony)
- Ethane, 1,1,2-trichloro-: 2.2148e-5 kg
  (same comment as for Antimony)
- Methane, tetrachloro-, CFC-10: 3.683e-5 kg
  (same comment as for Antimony)
- Naphtalene: 0.00012219 kg
  (same comment as for Antimony)
- Toluene: 0.00052873 kg
  (same comment as for Antimony)
- Chloroform: 2.2992e-5 kg
  (same comment as for Antimony)
- Hydrogen chloride: 0.061277 kg
  (same comment as for Antimony)
- Carbon disulfide: 0.00047496 kg
  (same comment as for Antimony)
- Hydrogen fluoride: 0.00093539 kg
  (same comment as for Antimony)
- Zinc: 6.4345e-5 kg
  (same comment as for Antimony)
- Beryllium: 0.00126 kg
  (same comment as for Antimony)
- Methane, dichloro, HCC-30: 0.000178 kg
  (same comment as for Antimony)
- Dinitrogen monoxide: 0.040499 kg
  (same comment as for Antimony)
- Nitrogen oxides: 2.1151 kg
  From all combustion processes at pulp and paper mill.
- Selenium: 0.0014247 kg
  (same comment as for Antimony)
- Styrene: 0.00019062 kg
  (same comment as for Antimony)
- Chromium: 2.3973e-5 kg
  (same comment as for Antimony)
- Arsenic: 2.3806e-6 kg
  (same comment as for Antimony)
- Cresol: 0.0030724 kg
  (same comment as for Antimony)
- Cumene: 0.00067735 kg
  (same comment as for Antimony)

## Sampling procedure
The survey included results from 53 pulp mills representing 15.5 million short tons per year (TPY), nearly 97% of 2006 production volume.

## Sources
- AF&PA
