# Trim and saw process, at plywood plant, US PNW

Dataset: openLCA process, unit process
Category: Softwood Veneer and Plywood Manufacturing
Geography: RNA
Time period: 2000-01-01 to 2000-01-01
Generated by: Jamie Meil
Published in: Eric T. Sackimoto
restrictionsDescription: All information can be accessed by everybody.
copyright: true

## General comment
Base process data presented with allocations to within process co-products noted. Refer to allocation worksheet for specifics. All allocations performed using mass or volume., number of co-products produced, some hogfuel remains in system
Important note: although most of the data in the US LCI database has
undergone some sort of review, the database as a whole has not yet
undergone a formal validation process.
Please email comments to lci@nrel.gov.

## Technology
typical

## Geography
US Pacific North West

## Reference product
- Plywood, at plywood plant, US PNW: 1 kg

## By-products
- Panel trim, from trim and saw at plywood plant, US PNW: 0.114 kg
- Hogfuel, from trim and saw at plywood plant, US PNW: 0.147 kg
- Sawdust, from trim and saw at plywood plant, US PNW: 0.0107 kg

## Inputs from technosphere
- Electricity, at grid, Western US, 2000: 0.0503 kWh
- Pressed raw plywood, from lay-up, at plywood plant, US PNW: 1.27 kg
- Liquefied petroleum gas, combusted in industrial boiler: 0.00049 l

## Emissions to nature
- Particulates, unspecified: 1.07e-6 kg

## Sources
- Leonard R. Johnson
- Eric T. Sackimoto
- Maureen Puetmann
