# Poles, softwood, PCP treated

Dataset: openLCA process, unit process
Category: Wood Preservation
Geography: RNA
Time period: 2005-01-01 to 2009-12-31
Generated by: Chris Bolin;
Reviewer: Paul Cooper
Published in: Chris Bolin
restrictionsDescription: All information can be accessed by everybody.
copyright: false

## General comment
Pressure-treated pentachlorophenol (aka penta or PCP) softwood debarked logs seasoned utility poles. Base process data presented with allocations to within process co-products noted. Refer to allocation worksheet for specifics. All allocations performed using mass or volume. This sheet sets out each unit process in the production of one cubic meter of penta treated utility poles producted in the US Pacific Northwest and Southeast regions. Important note: although most of the data in the US LCI database has undergone some sort of review, the database as a whole has not yet undergone a formal validation process. Please email comments to lci@nrel.gov.; Geography: US

## Technology
typical

## Geography
US

## Time period
2005-2009

## Reference product
- Poles, softwood, PCP treated: 1 m3
  Retention = 0.359 lb/ft3 = 5.750628 kg/m3, dry basis

## Inputs from technosphere
- Natural gas, combusted in industrial equipment: 0.000106 m3
  Preservative Wood Treatment; surrogate for LPG
- CUTOFF Disposal, solid waste, unspecified, to unspecified landfill: 34 kg
  Preservative Wood Treatment; Solid waste disposal associated with the coal mining and coal distillation by product processing. Solid waste disposal as reported in treater surveys as other (normal trash or municipal waste). Other waste disposal—Amount of normal trash or municipal waste that is typically collected in trash cans or dumpsters.
- Electricity, at Grid, WECC, 2008: 12.948 kWh
  Preservative Wood Treatment
- Residual fuel oil, combusted in industrial boiler: 0.578 l
  Preservative Production
- Natural gas, processed, at plant: 1.19 m3
  Preservative Wood Treatment; feedstock
- Residual fuel oil, at refinery: 0.783 l
  Preservative Production; feedstock
- Gasoline, combusted in equipment: 0.22 l
  Preservative Wood Treatment
- CUTOFF Phenol, at plant: 2 kg
  Preservative Production
- Diesel, combusted in industrial boiler: 0.0323 l
  Preservative Production
- Wood waste, unspecified, combusted in industrial boiler: 87.9 kg
  Preservative Wood Treatment; based on green moisture content 50%
- Electricity, at Grid, WECC, 2008: 1.852 kWh
  Preservative Production
- CUTOFF Disposal, solid waste, unspecified, to unspecified treatment: 35 kg
  Preservative Wood Treatment; Hazardous and Process waste disposed—Amount of hazardous waste for the survey year and units (pounds, tons, drums, etc.). Chemical and process waste disposed—Amount of waste and units from the treatment process, such as from tanks, treatment equipment, and drip pad area, but not including hazardous waste. This may be regulated in your state as chemical, industrial, or special waste.
- Bituminous coal, combusted in industrial boiler: 0.125 kg
  Preservative Production
- Diesel, combusted in industrial equipment: 2.5 l
  Preservative Wood Treatment
- Debarked wood, at plywood plant, US PNW: 180 kg
  PNW Fraction = 40%; weighed average mass = 491.4 kg/m3; Energy to dry wood is included in fuel inputs
- Transport, train, diesel powered: 9.9 t*km
  Preservative Production; 95% of penta preservative transport; survey data
- Natural gas, combusted in industrial boiler: 2 m3
  Preservative Wood Treatment
- Natural gas, combusted in industrial boiler: 1.2 m3
  Preservative Production
- Transport, combination truck, diesel powered: 380 t*km
  Preservative Wood Treatment; 100% of log resource; survey data
- CUTOFF Chlorine, at plant: 7.7 kg
  Preservative Production
- Diesel, at refinery: 78.7 l
  Preservative Production; feedstock
- Electricity, at Grid, SERC, 2008: 19.422 kWh
  Preservative Wood Treatment
- Electricity, at Grid, SERC, 2008: 2.778 kWh
  Preservative Production
- Debarked wood, at plywood plant, US SE: 311.4 kg
  SE Fraction = 60%; weighed average mass = 491.4 kg/m3; Energy to dry wood is included in fuel inputs
- Transport, combination truck, diesel powered: 0.52 t*km
  Preservative Production; 5% of penta preservative transport; survey data

## Inputs from nature
- Water, process, unspecified natural origin/m3: 170 l
  Preservative Production
- Water, process, unspecified natural origin/m3: 0.00017 l
  Preservative Wood Treatment

## Emissions to nature
- Sulfur oxides: 0.00089 kg
  Preservative Production
- Hydrogen chloride: 9.9e-7 kg
  Preservative Production
- Carbon monoxide: 0.00063 kg
  Preservative Production
- Pentachlorophenol: 0.00025, 0.00013 kg (2 entries, compartments not in this file)
  Preservative Wood Treatment
- Lead: 3.4e-11 kg
  Preservative Production
- Mercury: 1e-6 kg
  Preservative Production
- Nitrogen oxides: 0.0019 kg
  Preservative Production
- VOC, volatile organic compounds: 0.13 kg
  Preservative Wood Treatment; at kiln: emission from the wood product being dried
- Carbon dioxide, fossil: 0.2 kg
  Preservative Production
- Particulates, < 10 um: 0.00039 kg
  Preservative Production
- VOC, volatile organic compounds: 2.3e-5 kg
  Preservative Production

## Sampling procedure
Industry survey

## Sources
- Chris Bolin
- Chris Bolin
