# Polyol ether, for flexible foam polyurethane production, at plant, CTR

Dataset: openLCA process, unit process
Category: All Other Basic Organic Chemical Manufacturing
Geography: RNA
Time period: 2003-01-01 to 2005-01-01
Generated by: Franklin Associates
Published in: THE PLASTICS DIVISION OF THE ACC
restrictionsDescription: All information can be accessed by everybody.
copyright: false

## General comment
Heat is a coproduct for the production of polyether polyol for use in flexible foam polyurethane. The energy for exported heat was reported separately as recovered energy. Complete inventory data and metadata are available in full in the final report and appendices, Cradle-to-Gate Life Cycle Inventory of Nine Plastic Resins and Four Polyurethane Precursors. This report has been extensively reviewed within Franklin Associates and has undergone partial critical review by ACC Plastics Division members and is available at: www.americanchemistry.com. Quantities may vary slightly between the reference to main source and and this module due to rounding. Important note: although most of the data in the US LCI database has undergone some sort of review, the database as a whole has not yet undergone a formal validation process. Please email comments to lci@nrel.gov.

## Technology
Reaction of polyol initiator with hydroxide catalyst and propylene oxide and ethylene oxide, followed by separation and purification by distillation

## Geography
US

## Reference product
- Recovered energy, for Polyol ether, for flexible foam polyurethane production, at plant, CTR: 0.1861 MJ

## By-products
- Polyol ether, for flexible foam polyurethane production, at plant, CTR: 1 kg

## Inputs from technosphere
- CUTOFF Disposal, solid waste, process, to waste-to-energy: 4.9646e-6 kg
- CUTOFF Disposal, solid waste, fuel, to municipal incineration: 0.17472 kg
- CUTOFF Disposal, solid waste,process, to municipal incineration: 0.0055447 kg
- CUTOFF Disposal, solid waste, process, to sanitary landfill: 0.025986 kg

## Inputs from nature
- Fresh fruit bunches: 0.076503 kg
- Wood, unspecified, standing/kg: 0.035941 kg
- Oil, crude, in ground: 0.23698 kg
- Energy, solar: 0.00076624 MJ
- Energy, from hydro power: 0.34672 MJ
- Uranium oxide, 332 GJ per kg, in ore: 9.0443e-6 kg
- Oxygen, in air: 0.18504 kg
- Energy, from biomass: 0.0075187 MJ
- Water, consumptive use, unspecified origin/m3: 0.017902 m3
- Coal, unprocessed bituminous, in ground: 0.42592 kg
- Energy, unspecified: 0.024437 MJ
- Energy, kinetic (in wind), converted: 0.018055 MJ
- Coal, lignite, in ground: 0.035479 kg
- Gas, natural, in ground: 0.52126 kg
- Energy, geothermal: 0.018246 MJ
- Gas, natural, in ground: 0.91552 m3
- Salt, unspecified: 1.7593 kg

## Emissions to nature
- m-Xylene: 1.1729e-8 kg
- Radioactive species, unspecified: 9805 Bq
- Particulates, < 10 um: 0.00043716 kg
- Toluene: 4.6954e-7, 0.00017199 kg (2 entries, compartments not in this file)
- Nitrogen: 2.4902e-6 kg
- p-Cresol: 1.2466e-8 kg
- Fluoranthene: 1.4025e-10 kg
- Fluorenes, alkylated, unspecified: 4.3711e-9 kg
- Arsenic: 1.0862e-7 kg
- o-Xylene: 4.319e-9 kg
- p-Xylene: 4.319e-9 kg
- Propene: 1.6703e-7 kg
- Hexadecane: 2.4146e-8 kg
- Toluene, 2,4-dinitro-: 6.8836e-12 kg
- Bromide: 4.9733e-5 kg
- Methyl ethyl ketone: 1.8054e-11, 9.5879e-9 kg (2 entries, compartments not in this file)
- Ethylene dibromide: 2.0628e-9 kg
- Acetaldehyde: 1.9791e-7, 1.13e-5 kg (2 entries, compartments not in this file)
- Ammonium chloride: 4.8004e-7 kg
- Ammonia: 4.381e-5, 2.1529e-5 kg (2 entries, compartments not in this file)
- Mercury: 7.2983e-10, 1.2383e-7 kg (2 entries, compartments not in this file)
- Odorous sulfur: 3.8508e-6 kg
- Phenanthrene: 3.2136e-10, 5.3334e-10 kg (2 entries, compartments not in this file)
- Benzene, chloro-: 5.4086e-10 kg
- Propanal: 9.3421e-9 kg
- 2-Chloroacetophenone: 1.7209e-10 kg
- Magnesium: 2.1729e-6, 0.00016501 kg (2 entries, compartments not in this file)
- Cadmium, ion: 1.3468e-8 kg
- Chromium: 8.5597e-8, 3.8136e-6 kg (2 entries, compartments not in this file)
- Chlorine: 2.5183e-6 kg
- Ethane, 1,1,1,2-tetrafluoro-, HFC-134a: 9.5412e-8 kg
- Carbon dioxide, fossil: 3.4855 kg
- Cumene: 1.303e-10 kg
- Dissolved solids: 0.058113 kg
- Copper, ion: 1.3162e-7 kg
- Hydrocarbons, unspecified: 2.7706e-6, 0.00088752 kg (2 entries, compartments not in this file)
- Hydrogen: 3.7979e-6 kg
- Lead: 2.0422e-7, 2.168e-7 kg (2 entries, compartments not in this file)
- Barium: 0.00049626 kg
- Nitrogen, total: 2.555e-7 kg
- Anthracene: 4.1482e-11 kg
- Ethane, 1,1,1-trichloro-, HCFC-140: 4.9169e-10 kg
- Xylene: 1.8651e-7, 9.9756e-5 kg (2 entries, compartments not in this file)
- Methane, monochloro-, R-40: 9.0271e-12, 1.303e-8 kg (2 entries, compartments not in this file)
- Methane, bromo-, Halon 1001: 3.9335e-9 kg
- Particulates, < 2.5 um: 0.00033904 kg
- Antimony: 2.2562e-8, 5.8119e-9 kg (2 entries, compartments not in this file)
- Naphthalene: 7.286e-9, 4.4594e-8 kg (2 entries, compartments not in this file)
- Copper: 2.367e-9, 7.7604e-8 kg (2 entries, compartments not in this file)
- Ethylene oxide: 1.0735e-5 kg
- TOC, Total Organic Carbon: 1.0751e-5, 6.615e-7 kg (2 entries, compartments not in this file)
- Fluoride: 1.6919e-6, 1.1068e-6 kg (2 entries, compartments not in this file)
- Acidity, unspecified: 0.00856 kg
- t-Butyl methyl ether: 8.6045e-10 kg
- 2-Hexanone: 2.6654e-9 kg
- Benzene: 0.00011394, 4.3471e-7 kg (2 entries, compartments not in this file)
- Methane: 0.0020608 kg
- Phenols, unspecified: 0.0011129, 8.2324e-8 kg (2 entries, compartments not in this file)
- Kerosene: 2.299e-7 kg
- Acid gases: 3.7664e-5 kg
- Methacrylic acid, methyl ester: 4.9169e-10 kg
- 5-methyl Chrysene: 4.3457e-12 kg
- Tin: 9.1899e-8 kg
- Beryllium: 5.9873e-9, 4.8445e-9 kg (2 entries, compartments not in this file)
- Metallic ions, unspecified: 0.001 kg
- Titanium, ion: 3.5522e-7 kg
- Zinc: 1.578e-9, 2.1302e-6 kg (2 entries, compartments not in this file)
- Ammonium, ion: 1.0264e-7 kg
- Surfactants, unspecified: 1.4272e-7 kg
- Pyrene: 6.5186e-11 kg
- Cobalt: 8.896e-9, 1.2368e-7 kg (2 entries, compartments not in this file)
- o-Cresol: 1.1568e-8 kg
- Naphthalene, 2-methyl-: 6.1604e-9 kg
- Yttrium: 2.6962e-9 kg
- Furan: 7.7423e-13 kg
- Metals, unspecified: 6.9176e-6 kg
- Vinyl acetate: 1.8684e-10 kg
- n-Hexacosane: 1.4972e-10 kg
- Hexane: 1.6472e-9 kg
- Bromoform: 9.5879e-10 kg
- Calcium, ion: 0.00082559 kg
- Ethane, 1,2-dichloro-: 9.8337e-10 kg
- Boron: 1.2568e-6 kg
- Benzo(a)pyrene: 7.5063e-12 kg
- Cyanide: 6.1461e-8, 1.6186e-11 kg (2 entries, compartments not in this file)
- Organic substances, unspecified: 0.0001027 kg
- Polycyclic organic matter, unspecified: 2.6865e-8 kg
- Acetone: 2.3043e-9 kg
- Docosane: 2.3999e-10 kg
- Fluorene, 1-methyl-: 2.5525e-11 kg
- Selenium: 2.7501e-7, 4.1169e-8 kg (2 entries, compartments not in this file)
- Organic acids: 1.764e-9 kg
- Benzenes, alkylated, unspecified: 7.5424e-8 kg
- Chromium VI: 1.5605e-8 kg
- Dibenzothiophene: 4.4908e-11 kg
- Styrene: 6.1461e-10, 7.5096e-10 kg (2 entries, compartments not in this file)
- Indeno(1,2,3-cd)pyrene: 1.205e-11 kg
- Biphenyl: 4.8838e-9, 3.3581e-10 kg (2 entries, compartments not in this file)
- Sulfur oxides: 0.0020973 kg
- Benzyl chloride: 1.7209e-8 kg
- Phenol, 2,4-dimethyl-: 1.125e-8 kg
- Thallium: 4.8707e-9 kg
- Sulfate: 0.00022496 kg
- Acenaphthene: 1.0074e-10 kg
- Chrysene: 1.9753e-11 kg
- VOC, volatile organic compounds: 0.0010581 kg
- Chloroform: 1.4505e-9 kg
- Sulfide: 1.1066e-7 kg
- Sulfur: 1.0037e-6 kg
- Phenol: 3.9335e-10, 8.9666e-7 kg (2 entries, compartments not in this file)
- Naphthalenes, alkylated, unspecified: 1.236e-9 kg
- Benzene, pentamethyl-: 1.6809e-11 kg
- Acrolein: 6.4694e-7 kg
- Aldehydes, unspecified: 3.1806e-5 kg
- Lithium, ion: 0.00017307 kg
- Methane, fossil: 0.01803 kg
- Octadecane: 5.9895e-9 kg
- Iron: 7.7899e-5 kg
- Chloride: 0.010225 kg
- Dodecane: 2.2073e-8 kg
- PAH, polycyclic aromatic hydrocarbons: 1.0876e-8 kg
- Hydrogen chloride: 0.00023985 kg
- Manganese: 3.5104e-6, 4.0994e-7 kg (2 entries, compartments not in this file)
- Butadiene: 2.5313e-9 kg
- Phthalate, dioctyl-: 1.7947e-9 kg
- Surfactants: 5.9092e-8 kg
- COD, Chemical Oxygen Demand: 0.0035595 kg
- Radium-228/kg: 7.4265e-17 kg
- Radium-226/kg: 1.4518e-14 kg
- Aluminum: 4.0544e-5 kg
- Sulfur dioxide: 0.008168 kg
- Ethane, chloro-: 1.0325e-9 kg
- Carbon monoxide: 0.00048528 kg
- Acenaphthylene: 4.9383e-11 kg
- Carbon dioxide, biogenic: 0.04837 kg
- Acetophenone: 3.6877e-10 kg
- Ethane, 1,2-dibromo-: 2.9501e-11 kg
- Propylene oxide: 0.00040232 kg
- Methane, chlorotrifluoro-, CFC-13: 1.0554e-8 kg
- Eicosane: 6.0602e-9 kg
- Isophorone: 1.4259e-8 kg
- Methane, chlorodifluoro-, HCFC-22: 7.5096e-10 kg
- Decane: 1.164e-8 kg
- Formaldehyde: 2.4413e-6 kg
- Methane, dichloro-, HCC-30: 1.983e-7 kg
- Particulates, unspecified: 0.00076355 kg
- Hexanoic acid: 8.4373e-8 kg
- Fluorene: 1.7975e-10, 2.0393e-9 kg (2 entries, compartments not in this file)
- Cadmium: 3.2587e-8 kg
- Silver: 5.0037e-7 kg
- Benzo(b,j,k)fluoranthene: 2.1729e-11 kg
- Dioxins, measured as 2,3,7,8-tetrachlorodibenzo-p-dioxin: 2.7051e-10 kg
- Mercaptans, unspecified: 5.3334e-6 kg
- Nitrogen oxides: 0.0064477 kg
- Sodium, ion: 0.0023641 kg
- Carbon monoxide, fossil: 0.0015253 kg
- Tetradecane: 9.4303e-9 kg
- Nickel: 9.356e-8, 1.5212e-6 kg (2 entries, compartments not in this file)
- Ethene, tetrachloro-: 9.9138e-9 kg
- Lead-210/kg: 4.1732e-17 kg
- Sodium hydroxide: 0.0011984 kg
- Benzene, ethyl-: 0.00083552, 3.1397e-8 kg (2 entries, compartments not in this file)
- Dibenzofuran: 4.2645e-11 kg
- Suspended solids, unspecified: 0.0043004 kg
- Radioactive species, Nuclides, unspecified: 14.908 Bq
- Vanadium: 3.6527e-8 kg
- Benzene, 1-methyl-4-(1-methylethyl)-: 2.2411e-11 kg
- Benzoic acid: 4.0741e-7 kg
- Strontium: 2.1861e-5 kg
- Methane, tetrachloro-, CFC-10: 2.1395e-7 kg
- NMVOC, non-methane volatile organic compounds, unspecified origin: 0.0076271 kg
- Particulates, > 2.5 um, and < 10um: 0.00036352 kg
- Carbon disulfide: 3.196e-9 kg
- Radionuclides (Including Radon): 1.2856e-5 kg
- Benzo(ghi)perylene: 5.3334e-12 kg
- Hydrazine, methyl-: 4.1793e-9 kg
- Oils, unspecified: 1.5936e-5 kg
- Molybdenum: 9.217e-9 kg
- Arsenic, ion: 7.9972e-8 kg
- Hydrogen fluoride: 2.8517e-5 kg
- Phenanthrenes, alkylated, unspecified: 5.1248e-10 kg
- BOD5, Biological Oxygen Demand: 0.0011965 kg
- 4-Methyl-2-pentanone: 9.4631e-10 kg
- Dinitrogen monoxide: 6.8713e-5, 1e-7 kg (2 entries, compartments not in this file)
- Sulfuric acid, dimethyl ester: 1.18e-9 kg
- Benzo(a)anthracene: 1.5802e-11 kg
- Nitrate compounds: 0.001 kg
- Ethane, 1,2-dichloro-1,1,2-trifluoro-, HCFC-123: 9.5412e-8 kg

## Sampling procedure
Data are from both primary and secondary sources. Data for the production of polyether polyol were provided by five leading producers (5 plants) in North America. The polyether polyol producers who provided data for this module verified that the characteristics of their plants are representative of a majority of the North American production.

## Sources
- THE PLASTICS DIVISION OF THE ACC
