# Transport, single unit truck, diesel powered

Dataset: openLCA process, unit process
Category: General Freight Trucking
Geography: RNA
Time period: 2001-01-01 to 2001-01-01
Generated by: Franklin Associates
Published in: Franklin Associates
restrictionsDescription: All information can be accessed by everybody.
copyright: false

## General comment
Important note: although most of the data in the US LCI database has
undergone some sort of review, the database as a whole has not yet
undergone a formal validation process.
Please email comments to lci@nrel.gov.

## Technology
Combustion of diesel in a single-unit truck.

## Geography
United States

## Reference product
- Transport, single unit truck, diesel powered: 1 t*km

## Inputs from technosphere
- Diesel, at refinery: 0.058338 l

## Emissions to nature
- Methane, fossil: 4.1257e-6 kg
- Sulfur oxides: 3.7693e-5 kg
- Carbon dioxide, fossil: 0.17111 kg
- Nitrogen oxides: 0.0012188 kg
- Particulates, < 10 um: 2.3537e-5 kg
- VOC, volatile organic compounds: 8.4198e-5 kg
- Carbon monoxide, fossil: 0.00024568 kg
- Dinitrogen monoxide: 6.1875e-6 kg

## Sources
- unspecified
- Franklin Associates
- Center for Transportation Reasearch, Arg
