# Roundwood, hardwood, green, at logyard, SE

Dataset: openLCA process, unit process
Category: Forestry and Logging
Geography: RNA
Time period: 2005-01-01 to 2006-01-01
Generated by: Maureen Puettmann
Published in: Richard D. Bergman
restrictionsDescription: All information can be accessed by everybody.
copyright: false

## General comment
All weights given on an ovendry basis.
Important note: although most of the data in the US LCI database has
undergone some sort of review, the database as a whole has not yet
undergone a formal validation process.
Please email comments to lci@nrel.gov.

## Technology
Average for log yard activities in regions

## Geography
SE = Southeast United States. The 8 states are Arkansas, Louisiana, Mississippi, Alabama, Tennessee, North Carolina, South Carolina, Georgia.

## Reference product
- Roundwood, hardwood, green, at logyard, SE: 1 m3
  oven-dried weight. Wood specific gravity of 0.528 and 85% MC dry basis.

## By-products
- Bark, hardwood, green, at logyard, SE: 21.6 kg
  Oven-dried weight; specific gravity of 0.558 and 100% MC dry basis

## Inputs from technosphere
- Electricity, at grid, Eastern US, 2000: 3.41 kWh
  5% of total electricity is used for wetting logs and lumberyard
- Natural gas, combusted in industrial equipment: 0.0057 l
  40% of mill transporation on-site; proxy for propane
- Roundwood, hardwood, green, at mill, SE: 1 m3
  oven-dried weight. Wood specific gravity of 0.528 and 85% MC dry basis.
- Gasoline, combusted in equipment: 0.0721 l
  40% of mill transporation on-site
- Diesel, combusted in industrial equipment: 0.693 l
  40% of mill transporation on-site
- Bark, hardwood, green, at mill, SE: 21.6 kg
  Weight reported on an ovendry basis.
- Electricity, onsite boiler, hardwood mill, average, SE: 0.19 kWh
  5% of total electricity is used for wetting logs and lumberyard

## Inputs from nature
- Water, well, in ground: 88.09 l

## Sampling procedure
Questionnaires from 12 mills from the 8 states of southeast region. Hardwood sawmills were members of the Hardwood Manufacturer Association (HMA).

## Sources
- Richard D. Bergman
- Maureen Puettmann
