# Aluminum, primary, smelt, at plant

Dataset: openLCA process, unit process
Category: Primary Aluminum Production
Geography: RNA
Time period: 1998-01-01 to 1998-01-01
Generated by: James Littlefield, Franklin Associates
Published in: Franklin Associates, A Division of ERG
restrictionsDescription: All information can be accessed by everybody.
copyright: false

## General comment
Smelting is the reduction of refined alumina to metallic aluminum by the electrolytic separation of aluminum from its oxide. The process is carried out in a long series of electrolytic cells carrying direct current. The alumina is dissolved in a molten bath of cryolite (an electrolyte) and aluminum fluoride (which increases the conductivity of the electrolyte). These chemicals are assumed to be recovered with little or no loss, and therefore negligible inputs of these materials are assumed for this LCI. Carbon anodes carry the current to the solution, and on to the next cell. The anodes are consumed during the reaction at a rate of approximately 500 kg of material per 1,000 kg of aluminum produced. The principal products of the reaction are carbon dioxide, which is released as a gas, and elemental aluminum, which settles to the bottom of the cell and is periodically drained off.
Important note: although most of the data in the US LCI database has
undergone some sort of review, the database as a whole has not yet
undergone a formal validation process.
Please email comments to lci@nrel.gov.

## Technology
Series of electrolytic cells carrying direct current and immersed in cryolite and aluminum fluoride.

## Geography
North America

## Reference product
- Aluminum, primary, smelt, at plant: 1000 kg

## Inputs from technosphere
- Diesel, combusted in industrial boiler: 1.836 l
- Residual fuel oil, combusted in industrial boiler: 4.59 l
- Liquefied petroleum gas, combusted in industrial boiler: 5.007 l
- Natural gas, combusted in industrial boiler: 7.616 m3
- Gasoline, combusted in equipment: 0.28374 l
- CUTOFF Disposal, solid waste, unspecified, to unspecified treatment: 59.39 kg
- Anode, at plant: 455 kg
- Electricity, aluminum smelting and ingot casting regions: 15410 kWh
- Alumina, at plant: 1930 kg

## Emissions to nature
- Nitrogen oxides: 0.11 kg
- Hydrocarbons, unspecified: 4.8e-6 kg
- Carbon monoxide: 66.9 kg
- CFCs and HCFCs, unspecified: 0.12 kg
- BOD5, Biological Oxygen Demand: 0.0091 kg
- Particulates, unspecified: 4.75 kg
- Oils, unspecified: 0.0099 kg
- Suspended solids, unspecified: 0.06 kg
- Chloride: 0.00842 kg
- Carbon dioxide, fossil: 1520 kg
- Methane, tetrafluoro-, FC-14: 0.3572 kg
- Hydrogen cyanide: 0.037 kg
- Detergents, unspecified: 0.00059 kg
- COD, Chemical Oxygen Demand: 0.079 kg
- Carbonyl sulfide: 1.12 kg
- Dissolved solids: 0.076 kg
- Nitrogen, total: 0.00049 kg
- Mercury: 4e-7 kg
- Sulfur oxides: 17 kg
- Ethane, hexafluoro-, HFC-116: 0.0228 kg
- PAH, polycyclic aromatic hydrocarbons: 0.15 kg
- Cyanide: 0.0002 kg
- NMVOC, non-methane volatile organic compounds, unspecified origin: 0.91 kg
- Fluoride: 0.051 kg
- Ammonium, ion: 0.00057 kg
- Metallic ions, unspecified: 0.0082 kg
- Phenol: 0.00018 kg
- Sodium, ion: 0.0062 kg
- Dissolved organic matter: 0.013 kg
- Iron: 0.0022 kg
- Lead: 4.6e-6 kg
- Hydrogen fluoride: 0.62 kg

## Sources
- Franklin Associates, A Division of ERG
- The Aluminum Association
- Energy Information Administration (EIA)
- US Geological Survey
- IAI Statistical Report: Electrical Power
- US EPA
