# Pressed raw plywood, from lay-up, at plywood plant, US PNW

Dataset: openLCA process, unit process
Category: Softwood Veneer and Plywood Manufacturing
Geography: RNA
Time period: 2000-01-01 to 2000-01-01
Generated by: Jamie Meil
Published in: Eric T. Sackimoto
restrictionsDescription: All information can be accessed by everybody.
copyright: true

## General comment
Base process data presented with allocations to within process co-products noted. Refer to allocation worksheet for specifics. All allocations performed using mass or volume.,
Important note: although most of the data in the US LCI database has
undergone some sort of review, the database as a whole has not yet
undergone a formal validation process.
Please email comments to lci@nrel.gov.

## Technology
typical

## Geography
US Pacific Northwest

## Reference product
- Pressed raw plywood, from lay-up, at plywood plant, US PNW: 1 kg

## Inputs from technosphere
- Natural gas, combusted in industrial boiler: 0.00148 m3
- Electricity, at grid, Western US, 2000: 0.0283 kWh
- Dry veneer, at plywood plant, US PNW: 1 kg
- Liquefied petroleum gas, combusted in industrial boiler: 0.000476 l
- Phenol formaldehyde, at plant: 0.0133 kg
- Transport, combination truck, average fuel mix: 0.00237 t*km
- CUTOFF Hogfuel-Biomass (50% MC), combusted in industrial boiler: 0.0503 kg

## Emissions to nature
- Phenol: 1.17e-6 kg
- Acetaldehyde: 3.52e-6 kg
- alpha-Pinene: 8.22e-5 kg
- Methanol: 0.000117 kg
- Methyl ethyl ketone: 1.33e-6 kg
- Bicyclo[3.1.1]heptane, 6,6-dimethyl-2-methylene-: 3.19e-5 kg
- Formaldehyde: 1.59e-6 kg
- Acetone: 5.45e-6 kg
- Particulates, unspecified: 0.000101 kg
- D-limonene: 9.23e-6 kg
- VOC, volatile organic compounds: 0.00021 kg

## Sources
- Leonard R. Johnson
- Eric T. Sackimoto
- Maureen Puetmann
