# Urea formaldehyde resin, neat, 65% solids

Dataset: openLCA process, unit process
Category: Support for Agriculture and Forestry
Geography: RNA
Time period: 2005-01-01 to 2005-01-01
Generated by: Maureen Puettmann
Published in: James B. Wilson
restrictionsDescription: All information can be accessed by everybody.
copyright: false

## General comment
All weights given on an ovendry basis.

Important note: although most of the data in the US LCI database has
undergone some sort of review, the database as a whole has not yet
undergone a formal validation process.
Please email comments to lci@nrel.gov.

## Technology
Average Transport distance

## Geography
Average US, United States data

## Reference product
- Urea formaldehyde resin, neat, 65% solids: 1 kg
  UF resin neat at 65% solids--35% of weight is water; the molar ratio of F to U is 1.09 wt. average; formulated for use in production of particleboard and MDF panels

## Inputs from technosphere
- Methanol, at plant: 0.309 kg
  100% solids, methanol input used to make formaldehyde, to estimate the amount of formaldehyde produced multiply 1.2 times methanol kg
- Transport, train, diesel powered: 0.92 t*km
  chemical transport, wet weights. urea = 958 km ; methanol= 1986 km
- CUTOFF Disposal, solid waste, unspecified, to unspecified landfill: 0.000223 kg
- Natural gas, combusted in industrial boiler: 0.00734 m3
- CUTOFF Sodium hydroxide, 50% solids, at plant: 0.000444 kg
  liquid weight at 50% solids; used as catalyst
- Electricity, at grid, US, 2000: 0.0136389 kWh
  for emissions control equipment which includes use of RTO and RCOs by most plants
- Electricity, at grid, US, 2000: 0.0177222 kWh
- CUTOFF Formic acid, 10% solution, at plant: 0.000474 kg
  liquid weight at 10% solution; if from process database need to check % solution and if not 10% you would need to adjust accordingly
- CUTOFF Ammonium sulfate, 20% solids, at plant: 0.000158 kg
  liquid weight at 20% solids
- Liquefied petroleum gas, combusted in industrial boiler: 9.35e-6 l
  forklifts-surrogate for propane
- Transport, combination truck, diesel powered: 0.0293 t*km
  chemical transport, wet weights, urea = 314 km; methanol = 242 km , and other chemicals =347 km
- CUTOFF Urea, at regional storehouse: 0.473 kg
  100% solids

## Inputs from nature
- Water, process, unspecified natural origin: 0.42 kg
  municiple water for process and cooling taken as 84% of total water use
- Water, process, well, in ground: 0.08 kg
  well water for process and cooling taken as 16% of total water use

## Emissions to nature
- Ammonia, as N: 0.000121 kg
  NH3N in survey
- Formaldehyde: 7.79e-6 kg
- VOC, volatile organic compounds: 5.14e-5 kg
  a number of plants use an RTO and RCO which reduces VOC and HAP emissions to those given here
- Solids, inorganic: 0.000223 kg
  solids in survey
- Formaldehyde: 7.29e-5 kg
  HCHO in survey
- BOD5, Biological Oxygen Demand: 0.000616 kg
  BOD in survey
- Suspended solids, unspecified: 0.000366 kg
  TSS in survey
- Methanol: 6.08e-6 kg
- Dimethyl ether: 2.18e-5 kg
- Particulates: 2.31e-6 kg

## Sampling procedure
Survey

## Sources
- James B. Wilson
