# Rice, at field

Dataset: openLCA process, unit process
Category: Rice Farming
Geography: RNA
Time period: 1997-01-01 to 2001-01-01
Generated by: Olivier Muller
Published in: USDA/National Agricultural Statistics Se
restrictionsDescription: All information can be accessed by everybody.
copyright: false

## General comment
Agricultural Crop Production, Harvested acres are 99% of the planted acres (1998-2000 US average).
The impacts of producing 1 kg of seed are assumed equal to those of producing 1kg of grain.
For Water, only consumptive use is taken into account (i.e. 60.7% of the total water consumption).
Important note: although most of the data in the US LCI database has
undergone some sort of review, the database as a whole has not yet
undergone a formal validation process.
Please email comments to lci@nrel.gov.

## Technology
US average

## Geography
USA

## Reference product
- Rice straw, at field: 1.22 kg
  Residue to Crop Ratio (4), C N content of residues (4). Initially considered an output to nature (category Nature). Chaged to an unvalued coproduct by Pascal Lesage (12/07)

## By-products
- Rice grain, at field: 1 kg
  Planted surface (1), Production (1), Seeds (7)

## Inputs from technosphere
- Diesel, combusted in industrial equipment: 0.0486 l
  Farm tractor. Energy Consumption (7)
- Liquefied petroleum gas, combusted in industrial boiler: 0.00283 l
  Energy Consumption (7). Was initially reported as MJ. Converted using following factors: 50.3 MJ/kg, 1.85L/kg
- CUTOFF Phosphorous Fertilizer (TSP as P2O5), at plant: 0.00517 kg
  Fertilizers NPK (7)
- Transport, train, diesel powered: 0.0399 t*km
  Transportation of fertilizers (400km)
- Transport, single unit truck, diesel powered: 0.0163 t*km
  Transportation of fertilizers (200 km)
- Natural gas, combusted in industrial boiler: 0.00537 m3
  Energy Consumption (7). Initially reported as MJ. Converted using the following factor: 38.0 MJ/m3.
- CUTOFF Agrochemicals, at plant: 0.000921 kg
  Pesticides - consumption (19)
- CUTOFF Copper, at regional storage: 0.000161 kg
  Pesticides - consumption (19)
- CUTOFF Potash Fertilizer (K2O), at plant: 0.00448 kg
  Fertilizers NPK (7)
- Nitrogen fertilizer, production mix, at plant: 0.0238 kg
  Fertilizers NPK (7)
- Quicklime, at plant: 0.00689 kg
  Fertilizers Ca (9)
- Electricity, at grid, US, 2000: 0.0501 kWh
  Energy Consumption (7)

## Inputs from nature
- Occupation, arable, reduced tillage: 0.123 m2*a
  Planted surface (1), Tillage practices (7)
- Carbon dioxide: -1.27 kg
  Carbon fixation through plant growth
- Occupation, arable, conservation tillage: 0.0923 m2*a
  Planted surface (1), Tillage practices (7)
- Water, river: 422 l
  Water consumption - consumptive use for irrigation and percent of water from surface/ground (5), Water consumption - area irrigated and depth of irrigation water applied (17)
- Occupation, arable, conventional tillage: 1.32 m2*a
  Planted surface (1), Tillage practices (7)
- Water, well: 246 l
  (same comment as for Water, river)

## Emissions to nature
- Bentazone: 1.06e-7 kg
  Pesticides - consumption (19), Pesticides - application method similar to corn, soybean, wheat cotton (11), Runoff of pesticide (14)
- Carbaryl: 1.6e-6 kg
  Pesticides - consumption (19), Pesticides - application method similar to corn, soybean, wheat cotton (11), Pesticide - air emission factors (12), Pesticide - vapor pressure (13)
- Thiobencarb: 3.71e-5 kg
  (same comment as for Carbaryl)
- Ammonia: 0.00143 kg
  Air emissions of CH4 and N2O and NH3 and NOx (4)
- Dinitrogen monoxide: 0.000743 kg
  Air emissions of CH4 and N2O and NH3 and NOx (4)
- Propanil: 6.65e-6 kg
  (same comment as for Bentazone)
- Paraquat: 6.13e-9 kg
  (same comment as for Bentazone)
- Phosphorus compounds, unspecified: 3.05e-5 kg
  Runoff/leaching of fertilizers (15)
- Carbon monoxide: 0.00722 kg
  Residue combustion - percent of residue burning per state (4)
- Carbaryl: 6.88e-8 kg
  (same comment as for Bentazone)
- Malathion: 2.6e-6 kg
  (same comment as for Carbaryl)
- Parathion, methyl: 3.93e-6 kg
  (same comment as for Carbaryl)
- Nitrogen oxides: 0.00426 kg
  Air emissions of CH4 and N2O and NH3 and NOx (4)
- Molinate: 3.04e-6 kg
  (same comment as for Bentazone)
- Nitrogen, total: 0.0029 kg
  Runoff/leaching of fertilizers (15)
- Paraquat: 1.43e-7 kg
  (same comment as for Carbaryl)
- Glyphosate: 4.75e-6 kg
  (same comment as for Carbaryl)
- Suspended solids, unspecified: 1.07 kg
  Erosion (6)
- MCPA: 1.05e-7 kg
  (same comment as for Bentazone)
- Glyphosate: 2.03e-7 kg
  (same comment as for Bentazone)
- MCPA: 2.44e-6 kg
  (same comment as for Carbaryl)
- Carbofuran: 5.48e-6 kg
  (same comment as for Carbaryl)
- Parathion, methyl: 1.68e-7 kg
  (same comment as for Bentazone)
- 2,4-D: 4.08e-7 kg
  (same comment as for Bentazone)
- Copper, ion: 2.41e-6 kg
  (same comment as for Bentazone)
- Pendimethalin: 1.11e-5 kg
  (same comment as for Carbaryl)
- Methane: 0.0446 kg
  Air emissions of CH4 and N2O and NH3 and NOx (4)
- Hydrocarbons, unspecified: 0.000553 kg
  Pesticides - consumption (19), Pesticides - application method similar to corn, soybean, wheat cotton (11)
- Molinate: 7.08e-5 kg
  (same comment as for Carbaryl)
- Pendimethalin: 4.76e-7 kg
  (same comment as for Bentazone)
- Propanil: 0.000155 kg
  (same comment as for Carbaryl)
- Malathion: 1.11e-7 kg
  (same comment as for Bentazone)
- Carbofuran: 2.35e-7 kg
  (same comment as for Bentazone)
- Thiobencarb: 1.59e-6 kg
  (same comment as for Bentazone)
- Bentazone: 2.47e-6 kg
  (same comment as for Carbaryl)
- 2,4-D: 9.51e-6 kg
  (same comment as for Carbaryl)

## Sources
- USDA/National Agricultural Statistics Se
- USDA/ERS
- Conservation Technology Information Cent
- U.S. EPA
- USGS
- USDA/NRI
- USDA/ERS
- USDA/ERS
- USDA/NCRS
- USDA/ERS
- U.S. EPA
- U.S. EPA
- USDA/NCRS
- USGS
- U.S. EPA
- USDA/ERS
- USDA/ERS
- National Center for Food and Agricultura
- USDA/ERS
