# Corn stover, production, average, US, 2022

Dataset: openLCA process, unit process
Category: Corn Farming
Geography: RNA
Time period: 2010-01-01 to 2100-12-31
Generated by: Daniel Inman
Published in: Hsu, D.
restrictionsDescription: All information can be accessed by everybody.
copyright: false

## General comment
Corn stover based on US average corn yeilds and practices extrapolated from historic data to 2022. Includes all crop production processes from field preperation to harvest. Infrastructure, maintenance, and construction of faciilities and equipment is included. Loading/unloading,transport, and storage of material is not included. Grain and components are assumed to be at field-dry conditions of 15.5% moisture.

The stover process has been seperated from corn to allow for incremental allocation. Only processes directly attributed to stover collection are counted. These processes include additional harvesting energy for single pass harvest, additional nutrients, and hay substitition for loss of potential over-winter cattle feed.

Process has been reviewed by Dr. Dwayne Westfall, Dept Soil and Crop Sciences, Colorado State University. Date of review Sept 10 - 30 2008. Data from NASS where available. Extrapolation of existing data to 2022 estimates. Mass based between stover and grain.

## Technology
modern

## Geography
North America

## Time period
2010 and after

## Reference product
- Corn stover, production, average, US, 2022: 3290 kg

## Inputs from technosphere
- CUTOFF Hay grown for feed: 573 kg
  Hay is used to replace over-winter feed lost by harvesting stover
- Harvest, corn, single pass: 0.315 ha
  1 hectare of single pass harvest, scaled to 1.46 hectares because of the increase in material from stover harvest. The .46 is attributed to stover.
- Fertilizer, stover, 2022: 1 ha
  This accounts for fertilizer replacement of nutrients removed in stover.

## Inputs from nature
- Energy, from biomass: 50700 MJ
  LHV for corn stover, data from Phyllis database http://www.ecn.nl/phyllis/
  Verified 10/14/08
- Carbon dioxide: 4830 kg
  CO2=44g per mole, C = 12g, O=16

## Emissions to nature
- Nitrate: 0.00545 kg
  NO3-N leaching, assuming 30% of fertilizer N applied leaches below the root zone. IPCC 2006: Chapter 11: N2O Emissions from Managed Soils, and CO2 Emissions from Lime and Urea Application. Table 11.3

## Sources
- Hsu, D.
- Hess, J.
- Nemecek, T.
- USDA NASS
- Graham, R.L.
- Edwards, W.
- ECN, Phyllis
- USDA
