# Electricity, aluminum smelting and ingot casting regions

Dataset: openLCA process, unit process
Category: Electric Power Distribution
Geography: RNA
Time period: 2004-01-01 to 2004-01-01
Generated by: James Littlefield, Franklin Associates
Published in: Franklin Associates, A Division of ERG
restrictionsDescription: All information can be accessed by everybody.
copyright: false

## General comment
Aluminum smelting is based upon an electrolytic process; therefore, a relatively large quantity of electricity is used to produce primary aluminum. According to IPAI 2002 statistics, the electricity profile for North American (Canada and the U.S.) smelters consists of the following fuels: hydro, 63.9%; coal, 34.6%; oil, 0.1%; natural gas, 0.4%; and nuclear, 0.9%. Of this electricity, 35.2% is self-generated and 64.8% is purchased.
Important note: although most of the data in the US LCI database has
undergone some sort of review, the database as a whole has not yet
undergone a formal validation process.
Please email comments to lci@nrel.gov.

## Technology
hydropower (63.9%), coal (34.6%), oil (0.1%), natural gas (0.4%), nuclear (0.9%).

## Geography
North America (100%)

## Reference product
- Electricity, aluminum smelting and ingot casting regions: 1 kWh

## Inputs from technosphere
- Electricity, bituminous coal, at power plant: 0.34631 kWh
- Electricity, diesel, at power plant: 0.001182 kWh
- Electricity, natural gas, at power plant: 0.004461 kWh
- Electricity, nuclear, at power plant: 0.008617 kWh
- CUTOFF Electricity, hydropower, at power plant, unspecified: 0.63943 kWh

## Sources
- Franklin Associates, A Division of ERG
- The Aluminum Association
- Energy Information Administration (EIA)
- US Geological Survey
- IAI Statistical Report: Electrical Power
- US EPA
