# Continuous coal miner; Manufacture; At underground mine; 563 kW

Dataset: openLCA process, unit process
Category: Bit. Coal and Lignite Surface Mining
Geography: US
Time period: 2008-01-01 to 2008-12-31
Generated by: Timothy Skone
Owner: National Energy Technology Laboratory
Reviewer: Robert James
Published in: National Energy Technology Laboratory (NETL). 2010. Continuous coal miner; Manufacture; At underground mine; 563 kW
restrictionsDescription: Use of this dataset is not restricted, but a statement of attribution is required. Please use the following attribution statement:
National Energy Technology Laboratory's (NETL) Unit Process Library
626 Cochrans Mill Road, P.O. Box 10940
Pittsburgh, PA 15236-0940
http://www.netl.doe.gov/research/energy-analysis/life-cycle-analysis/unit-process-library
Neither the U.S. Department of Energy (DOE) National Energy Technology Laboratory (NETL) nor any person acting on behalf of these organizations:
A. Makes any warranty or representation, express or implied, with respect to the accuracy, completeness, or usefulness of the information contained in this document, or that the use of any information, apparatus, method, or process disclosed in this document may not infringe on privately owned rights; or
B. Assumes any liability with this report as to its use, or damages resulting from the use of any information, apparatus, method, or process disclosed in this document.
Reference herein to any specific commercial product, process, or service by trade name, trademark, manufacturer, or otherwise, does not necessarily constitute or imply its endorsement, recommendation, or favoring by NETL. The views and opinions of the authors expressed herein do not necessarily state or reflect those of NETL.
copyright: true

## General comment
This process is part of the NETL Unit Process Library. To access the library and the original dataset:
1) Navigate to the NETL LCA home page (http://www.netl.doe.gov/lca)
2) Then navigate to the “Unit Process Library”
3) From the library, the unit process of interest can be found either through the "Complete Listing of the Unit Process Library link" or through the link to the "Unit Process Database" spreadsheet
4) For each process, a Data Sheet (DS) and Data File (DF) are available

BRIEF DESCRIPTION
This unit process is based on manufacturer (Bucyrus) specifications for a 25M Series model, 755-horsepower (HP), underground continuous miner. It assumes the continuous miner constructed entirely of steel plate with negligible amounts of other materials.

GOAL AND SCOPE
The scope of this unit process encompasses the materials and weights of those materials necessary to construct a single, Bucyrus 25M Series, 563 kW (755 Horsepower (HP)), underground continuous miner to be used during extraction of Illinois No. 6 bituminous coal from an underground mine. The process is based on the reference flow of 1 piece of continuous miner, 563 kW (755 HP), as described below and shown in the Supporting Information (see Citation and Associated Documentation section below). The continuous miner is assumed to be constructed entirely of steel; other materials are assumed to be negligible. By default, all steel within this study was assumed to be steel plate, based on available GaBi profiles, unless other steel types were specified per available data, or a higher grade of steel would be required, per NETL engineering judgment. Therefore, all steel considered in this unit process was assumed to be steel plate.

This unit process is combined with other coal mine equipment construction unit processes in an assembly unit process for Illinois No. 6 bituminous coal, Coal mine equipment assembly; Production mix; Underground coal mine, Illinois No. 6 Coal, U.S. The assembly unit process quantifies the fraction of each piece of equipment needed under Life Cycle (LC) Stage #1 to produce 1 kg of Illinois No. 6 bituminous coal ready for transport (LC Stage#2).

BOUNDARY AND DESCRIPTION
Construction of the continuous miner is based on manufacturer specifications for a Bucyrus 25M Series model, 755 HP, underground continuous miner. Extraction of coal from the Illinois No. 6 bituminous underground coal mine requires continuous miners, which are used to cut into the coalbed and remove coal during the mining process. The continuous miner removes coal from the coal face using a large rotating steel drum equipped with tungsten carbide teeth, which scrape coal from the seam. The indicated model was chosen based on the coal mine seam thickness, which is assumed to be 2.13 - 2.74 m (84 - 108 in.) thick (Illinois Department of Natural Resources 2006). The 25M Series continuous miner is designed for seam heights ranging from 1.12 - 2.90 m (44 - 114 in.) with a load rate of 23 metric tonnes (25.4 short tons) per minute. From the continuous miner, coal is loaded onto a conveyor for transport to the surface, where it is cleaned, stored, and loaded onto a train under LC Stage #1, for transport under LC Stage #2.

A graphical overview of the boundary of this unit process is available in the associated documentation (see Citation and Associated Documentation section below). Emissions related to the physical assembly of the continuous miner (e.g., that are emitted while putting together the components of a continuous miner, including transport of those components) are not included in this study boundary. The continuous miner constructed in this unit process is incorporated into the underground coal mine construction assembly processes for LC Stage #1 for coal.

The total weight of a continuous miner was readily available, but reliable data for the material breakdown of continuous miner subcomponents were not. Therefore, the continuous miner was assumed to be composed entirely of steel plate. Upstream emissions from the production of raw materials used for the construction of the continuous miner (e.g., steel plate) are calculated outside the boundary of this unit process, based on proprietary profiles available within the LCI databases.

Relevant properties and assumptions used to calculate the amount of steel plate contained in a single continuous miner are available in the Supporting Information. Based on assumptions made, the total weight for one continuous miner is estimated to be approximately 56,700 kg (125,000 lbs) (Bucyrus 2008a and 2008b). Assuming that the continuous miner is constructed entirely of steel plate, the total weight is assigned to this material. Additional details regarding input and output flows, including calculation methods, are contained in the associated documentation.

CITATION AND ASSOCIATED DOCUMENTATION
This document should be cited as:
National Energy Technology Laboratory (NETL). 2015. NETL Life Cycle Inventory Data – Unit Process: Continuous coal miner; Manufacture; At underground mine; 563 kW. U.S. Department of Energy, National Energy Technology Laboratory. Last Updated: September 2015 (Version 01). Retrieved on [DATE] from [URL for this dataset].

This dataset is part of the NETL Unit Process Library. The Library offers additional information concerning this dataset in the form of a Detailed Spreadsheet Documentation (DS) file and a Process Documentation File (DF). The DS file is an Excel file that contains all of the parameters, inputs, and outputs for a given system as well as background data, calculations and quality scores. The DF file is a PDF document that contains major assumptions and data sources that are the basis for each unit process. The NETL Unit Process Library is located on the NETL website (netl.doe.gov) under Research / Energy Analysis / Energy Trends and Issues / Life Cycle Analysis / Unit Process Library.

This dataset was converted directly from the DS with additional supporting information provided by the DF. Full citations for the DS and DF are given below.

DS File
National Energy Technology Laboratory (NETL). 2010. NETL Life Cycle Inventory Data – Unit Process: Continuous Miner, 755 Horsepower, Construction. U.S. Department of Energy, National Energy Technology Laboratory. Last Updated: January 2010 (version 01). Retrieved on 6/30/2014 from: http://www.netl.doe.gov/File%20Library/Research/Energy%20Analysis/Life%20Cycle%20Analysis/UP_Library/DS_Stage1_C_Continuous_Miner_755_HP_2010-01.xls

DF File
National Energy Technology Laboratory (NETL). 2010. NETL Life Cycle Inventory Data – Unit Process: Continuous Miner, 755 Horsepower, Construction. U.S. Department of Energy, National Energy Technology Laboratory. Last Updated: January 2010 (version 01). Retrieved on 6/30/2014 from: http://www.netl.doe.gov/File%20Library/Research/Energy%20Analysis/Life%20Cycle%20Analysis/UP_Library/DF_Stage1_C_Continuous_Miner_755_HP_2010-01.pdf

## Technology
The scope of this unit process encompasses the materials and weights of those materials necessary to construct a single, Bucyrus 25M Series, 563 kW (755 Horsepower (HP)), underground continuous miner to be used during extraction of Illinois No. 6 bituminous coal from an underground mine. Construction of the continuous miner is based on manufacturer specifications for a Bucyrus 25M Series model, 755 HP, underground continuous miner. Extraction of coal from the Illinois No. 6 bituminous underground coal mine requires continuous miners, which are used to cut into the coalbed and remove coal during the mining process. The continuous miner removes coal from the coal face using a large rotating steel drum equipped with tungsten carbide teeth, which scrape coal from the seam. The indicated model was chosen based on the coal mine seam thickness, which is assumed to be 2.13 - 2.74 m (84 - 108 in.) thick (Illinois Department of Natural Resources 2006). The 25M Series continuous miner is designed for seam heights ranging from 1.12 - 2.90 m (44 - 114 in.) with a load rate of 23 metric tonnes (25.4 short tons) per minute. From the continuous miner, coal is loaded onto a conveyor for transport to the surface, where it is cleaned, stored, and loaded onto a train under LC Stage #1, for transport under LC Stage #2. Additional details regarding input and output flows, including calculation methods, are contained in the Supporting Information (see Description field).

## Time period
This data set is representative of best available public data from 01/01/2008 to 12/31/2008 and is not subject to limited usability within sub-time spans (e.g. summer, winter).

## Reference product
- Continuous coal miner; Manufacture; At underground mine; 563 kW: 1 Item(s); data quality (2,3,2,1,1)

## Inputs from technosphere
- Steel plate; Blast furnace route; Production mix; 85% recovery rate: 56700 kg; data quality (2,3,2,1,1)

## Inventory method
Attributional

## Modelling constants
All elementary and technosphere flows are calculated on a functional unit basis. Calculations involving combustion primarily to generate useful work are done using lower heating values (LHV) and calculations involving combustion primarily to generate useful heat are done using higher heating values (HHV). Unless explicitly stated in the associated reference documents applicable calculations assumed standard atmospheric temperature and pressure (SATP).

## Completeness
Individual relevant flows captured

## Data selection
Best publically available data

## Data treatment
No allocation applied

## Data collection
No primary data collected

## Intended application
This is a gate-to-gate manufacturing process and can be used for any type of LCA study.

## Project
National Energy Technology Laboratory (NETL) Unit Process Library

## Sources
- Illinois Department of Natural Resources. 2006. Annual Statistical Report, 2006
- Bucyrus International. 2008a. Continuous Miners: The Range.
- Bucyrus International. 2008b. Continuous Miner Specifications.
- National Energy Technology Laboratory (NETL). 2010. Continuous coal miner; Manufacture; At underground mine; 563 kW
