# Hydrogen, liquid, synthesis gas, at plant

Dataset: openLCA process, unit process
Category: All Other Basic Inorganic Chemical Manufacturing
Geography: RNA
Time period: 1993-01-01 to 2003-01-01
Generated by: Franklin Associates
Published in: THE PLASTICS DIVISION OF THE AMERICAN C
restrictionsDescription: All information can be accessed by everybody.
copyright: false

## General comment
Hydrogen and carbon dioxide are coproducts in the production of synthesis gas. The data for hydrogen production are estimates of the synthesis gas production. Raw material inputs for hydrogen are based on the conversion of methane to carbon monoxide and hydrogen. The carbon dioxide emissions include those from the shift reaction as well as from the combustion of the portion of processed natural gas used as feedstock that becomes PSA offgas that is burned and used as process energy. Complete inventory data and metadata are available in full in the final report and appendices, Cradle-to-Gate Life Cycle Inventory of Nine Plastic Resins and Four Polyurethane Precursors. This report has been extensively reviewed within Franklin Associates and has undergone partial critical review by ACC Plastics Division members and is available at: www.americanchemistry.com. Quantities may vary slightly between the reference to main source and and this module due to rounding. Important note: although most of the data in the US LCI database has undergone some sort of review, the database as a whole has not yet undergone a formal validation process. Please email comments to lci@nrel.gov.

## Technology
Typical

## Geography
North America (US and Canada)

## Reference product
- Hydrogen, liquid, synthesis gas, at plant: 1 kg

## Inputs from technosphere
- Transport, pipeline, natural gas: 0.0468 t*km
- Natural gas, combusted in industrial boiler: 0.0703 m3
- Natural gas, processed, for olefins production, at plant: 2.91 kg
  MATERIAL USE
- Electricity, at grid, US, 2008: 0.316 kWh
- Transport, combination truck, diesel powered: 0.0234 t*km
- Transport, train, diesel powered: 0.00819 t*km

## Inputs from nature
- Water, process, unspecified natural origin: 4.8 kg
  Mass of liquid water at room temperature.

## Emissions to nature
- Carbon monoxide: 0.0069 kg
- TOC, Total Organic Carbon: 0.0036 kg
- Carbon dioxide, fossil: 8 kg
  The carbon dioxide emissions include those from the shift reaction as well as from the combustion of the portion of processed natural gas used as feedstock that becomes PSA offgas that is burned and used as process energy.
- Sulfur oxides: 2.9e-5 kg

## Sampling procedure
Data are from secondary sources.

## Sources
- THE PLASTICS DIVISION OF THE AMERICAN C
