# Paper, freesheet, coated, average production, at mill

Dataset: openLCA process, unit process
Category: Pulp, Paper, and Paperboard Mills
Geography: RNA
Time period: 2006-01-01 to 2006-01-01
Generated by: Caroline Gaudreault
Reviewer: Martha Stevenson
Published in: AF&PA
restrictionsDescription: All information can be accessed by everybody.
copyright: false

## General comment
Coated Freesheet, average North American production, at mill. By-products were allocated 0% of the impacts to enable the user to choose and apply their own allocation method more easily. All flows are production-weighted means. Data were developed for a full LCA that was critically reviewed. Reviewers were: • Martha Stevenson, Chairperson – Private Consultant to the public interest with ten years of experience in sustainability, environmental management, packaging and materials recovery; led the development of the Design Guidelines for Sustainable Packaging and the COMPASS software used to compare the environmental impacts of package designs; • Pascal Lesage – Life cycle assessment consultant, Researcher at École Polytechnique de Montréal [at the Inter-University Research Centre for the Life Cycle of Products, Processes and Services (CIRAIG) in Montreal]; and • Dale Phenicie, Environmental Affairs Consulting – Consultant with 35 years of experience in environmental protection and process consulting for the forest products industry. Has served on several U.S. EPA Task Forces dealing with water quality issues and authored several AF&PA Environmental, Health and Safety/Sustainability reports.

## Technology
current technology mix for coated freesheet

## Time period
Primary data collected from participating companies and associations for their operational activities are representative for 2006 and 2007.

## Reference product
- Paper, freesheet, coated, average production, at mill: 861.83 kg
  861.83 dry kg is equal to 1 market-dried short ton (5% water).

## By-products
- Turpentine, at coated freesheet mill: 1.4969 kg
  Produced as byproduct of pulp production. Sold i.e., not used on site. Allocation set to 0%.
- Steam, at coated freesheet mill: 38.8 MJ
  (same comment as for Turpentine, at coated freesheet mill)
- Tall oil, at coated freesheet mill: 19.323 kg
  (same comment as for Turpentine, at coated freesheet mill)
- Electricity, at coated freesheet mill: 65 kWh
  (same comment as for Turpentine, at coated freesheet mill)

## Inputs from technosphere
- CUTOFF Disposal, unspecified ashes, to unspecified landfill: 54.975 kg
  Mix of wood and coal ashes. Based on typical ash contents can be assumed to be 78% from wood and 22% from coal. Typically company-owned, but some third party.
- CUTOFF Pulp, deinked market, bleached, at mill: 19.323 kg
- CUTOFF Disposal, wastewater treatment plant residuals, to uns. beneficial use: 0.071849 kg
  Typically off-site. (uns. = unspecified)
- CUTOFF Sodium chlorate: 20.003 kg
  ei: Sodium chlorate, powder, at plant
- Transport, train, diesel powered: 5.6647 t*km
  Transport of packaging. Containerboard: 1410 km. Core board: 1276 km. Polypropylene and Polyethylene: 1806 km. Steel: 1083 km.
- Transport, combination truck, average fuel mix: 364.99 t*km
  Transportation of pulpwood and chips to pulp mill. Pulpwood: 200 km (rounded trip distance), chips: 254 km (rounded trip distance).
- Electricity, at grid, Western US, 2000: 102.89 kWh
  Net purchased, National average grid, Medium voltage: <50 kV
- Transport, train, diesel powered: 331.3 t*km
  Transportation of chemicals. Kaolin: 1204 km. Sodium chlorate, sulfuric acid, Hydrochloric acid, Titanium dioxide, Ground calcium carbonate, Precipitated calcium carbonate and Quicklime: 1088 km. Latex: 985 km. Starch: 1788 km. Sizers: 2438 km. Transports of fuels. Coal: 653 km. Residual fuel oil, Distillate fuel oil: 1114 km. Liquefied petroleum gas: 1246 km. Tire derived fuel: 1156 km.
- CUTOFF Disposal, solid waste, unspecified, to unspecified beneficial use: 16.874 kg
  Typically off-site.
- CUTOFF Sorted office paper: 15.513 kg
- CUTOFF Pulp slurry, kraft market, bleached, average production, at mill: 79.56 kg
- Quicklime, at plant: 22.518 kg
  For on site PCC
- Transport, train, diesel powered: 57.523 t*km
  Transportation of pulpwood and chips to pulp mill. Pulpwood: 375 km, chips: 127 km.
- Hot rolled sheet, steel, at plant: 0.17962 kg
  Packaging material
- CUTOFF Disposal, unspecified ashes, to unspecified land application: 4.9442 kg
  Mix of wood and coal ashes. Based on typical ash contents can be assumed to be 78% from wood and 22% from coal. Typically off-site agricultural/silvicultural.
- Polypropylene resin, at plant: 1.016 kg
  Packaging material
- CUTOFF Disposal, solid waste, unspecified, to unspecified incinerator: 0.17327 kg
  Typically on-site with energy recovery.
- Transport, combination truck, average fuel mix: 1.9564 t*km
  Transport of packaging. Containerboard: 201 km. Core board: 369 km. Polypropylene and Polyethylene: 417 km. Steel: 257 km.
- Fuels, burned at coated freesheet, average production, at mill: 15145 MJ
  Includes all fuels burned on site
- CUTOFF Disposal, wastewater treatment plant residuals, to uns. land application: 14.878 kg
  Typically off-site agricultural/silvicultural. (uns. = unspecified)
- Transport, combination truck, average fuel mix: 51.559 t*km
  Transportation of chemicals. Kaolin: 295 km. Sodium chlorate, sulfuric acid, Hydrochloric acid, Titanium dioxide, Ground calcium carbonate, Precipitated calcium carbonate and Quicklime: 183 km. Latex: 312 km. Starch: 510 km. Sizers: 282 km. Transports of fuels. Coal: 153 km. Residual fuel oil, Distillate fuel oil: 50 km. Liquefied petroleum gas, Kerosene and gasoline, Other fossil assumed to be diesel: 80 km. Tire derived fuel: 98 km.
- Transport, combination truck, average fuel mix: 13.111 t*km
  Transport market pulp. Bleached kraft market pulp, Deinked bleached market pulp: 256 km.
- Polyethylene, low density, resin, at plant: 0.08709 kg
  Packaging material
- CUTOFF Disposal, solid waste, unspecified, to unspecified landfill: 12.428 kg
  Typically company-owned, but some third party.
- CUTOFF Clay, at mine: 104.78 kg
  ei: Kaolin
- Pulpwood, softwood, average, at forest road, NE-NC: 0.0932 m3
  Mass of incoming northern softwood logs (assumed 63.5% East/Central based on mill location) intended for pulping. Assumed density: 450 kg/m3. Wood usage in the process is distrubuted as follows: 35% ends up in pulp, 23% in self-generated hogged fuel and 42% in black liquor. All the hogged fuel is combusted onsite. Combustion of this fuel is important to the economic viability of all modern pulp mills. Substitution of other fuels for this fuel is not recommended. Need to be paired with "Self-generated hogged fuel, combusted in industrial boiler, at pulp and paper mill". Black liquor solides are combusted onsite as part of the pulping chemical recovery process that is integral to and is essential to the economic viability of all modern pulp mills. Substitution of other fuels for this fuel is not recommended.
- CUTOFF Precipitated calcium carbonate, at plant: 4.4679 kg
- Transport, ocean freighter, average fuel mix: 5.4541 t*km
  Transportation of chemicals. Kaolin, Starch, Sizer and Latex: 0 km. Sodium chlorate, sulfuric acid, Hydrochloric acid, Titanium dioxide, Ground calcium carbonate, Precipitated calcium carbonate and Quicklime: 517 km. Transports of fuels. Residual fuel oil , Distillate fuel oil: 682 km. Kerosene and gasoline, Other fossil assumed to be diesel: 1183 km.
- Hydrochloric acid, at plant: 0.54885 kg
- CUTOFF Pulpwood, hardwood, average, at forest road, US S: 0.2219 m3
  Mass of incoming southern hardwood logs intended for pulping. Assumed density: 650 kg/m3. US LCI: "Roundwood, hardwood, green, at mill, SE/US" can be used but transportation needs to be removed as it is already included here. Wood usage in the process is distrubuted as follows: 35% ends up in pulp, 23% in self-generated hogged fuel and 42% in black liquor. All the hogged fuel is combusted onsite. Combustion of this fuel is important to the economic viability of all modern pulp mills. Substitution of other fuels for this fuel is not recommended. Need to be paired with "Self-generated hogged fuel, combusted in industrial boiler, at pulp and paper mill". Black liquor solides are combusted onsite as part of the pulping chemical recovery process that is integral to and is essential to the economic viability of all modern pulp mills. Substitution of other fuels for this fuel is not recommended.
- Electricity, at grid, Eastern US, 2000: 190.25 kWh
  Net purchased, National average grid, Medium voltage: <50 kV
- CUTOFF Pulp chips, at sawmill, US: 435.09 kg
  Mass of incoming pulp chips intended for pulping. US LCI: "Pulp chips, at sawmill,US SE/kg" can be used as a proxy. The actual mix of chips is: northern softwood chips: 66%, northern hardwood chips: 18%, southern softwood chips: 11% and southern hardwood chips: 6%. Pulp chips usage in the process is distrubuted as follows: 45% ends up in pulp and 55% in black liquor. Combusted onsite as part of the pulping chemical recovery process that is integral to and is essential to the economic viability of all modern pulp mills. Substitution of other fuels for this fuel is not recommended.
- CUTOFF Disposal, wastewater treatment plant residuals, to uns. landfill: 15.876 kg
  Typically company-owned, but some third party. (uns. = unspecified)
- Sulfuric acid, at plant: 2.3042 kg
- Pulp, kraft market, bleached, average production, at mill: 73.301 kg
- CUTOFF Latex, at plant: 25.945 kg
  ei: Latex, at plant
- CUTOFF Core board, at plant: 3.3475 kg
  Packaging material
- CUTOFF Ground calcium carbonate, at plant: 94.347 kg
  ei: Limestone, milled, loose, at plant
- Transport, train, diesel powered: 75.042 t*km
  Transport market pulp. Bleached kraft market pulp, Deinked bleached market pulp: 1452 km.
- Pulpwood, softwood, average, at forest road, INW: 0.0811 m3
  Mass of incoming northern softwood logs (assumed 36.5% West based on mill location) intended for pulping. Assumed density: 450 kg/m3. Wood usage in the process is distrubuted as follows: 35% ends up in pulp, 23% in self-generated hogged fuel and 42% in black liquor. All the hogged fuel is combusted onsite. Combustion of this fuel is important to the economic viability of all modern pulp mills. Substitution of other fuels for this fuel is not recommended. Need to be paired with "Self-generated hogged fuel, combusted in industrial boiler, at pulp and paper mill". Black liquor solides are combusted onsite as part of the pulping chemical recovery process that is integral to and is essential to the economic viability of all modern pulp mills. Substitution of other fuels for this fuel is not recommended.
- CUTOFF Sizer, at plant: 3.2885 kg
  ei: AKD sizer, in paper production, at plant
- CUTOFF Starch: 17.554 kg
  ei: Maize starch, at plant and/or Potato starch, at plant
- Pulpwood, hardwood, average, at forest road, NE-NC: 0.379 m3
  Mass of incoming northern hardwood logs intended for pulping. Assumed density: 650 kg/m3. Wood usage in the process is distrubuted as follows: 35% ends up in pulp, 23% in self-generated hogged fuel and 42% in black liquor. All the hogged fuel is combusted onsite. Combustion of this fuel is important to the economic viability of all modern pulp mills. Substitution of other fuels for this fuel is not recommended. Need to be paired with "Self-generated hogged fuel, combusted in industrial boiler, at pulp and paper mill". Black liquor solides are combusted onsite as part of the pulping chemical recovery process that is integral to and is essential to the economic viability of all modern pulp mills. Substitution of other fuels for this fuel is not recommended.
- Transport, pipeline, natural gas: 71.8 t*km
  Transports of fuels. Natural gas: 33584 tkm/MMcf, Average transportation for natural gas in North America according to the US LCI database
- CUTOFF Disposal, solid waste, unspecified, to unspecified land application: 5.3615 kg
  Typically off-site agricultural/silvicultural
- Containerboard, average production, at mill: 8.0286 kg
  Packaging material
- CUTOFF Pulpwood, softwood, average, at forest road, US S: 0.1166 m3
  Mass of incoming southern softwood logs intended for pulping. Assumed density: 450 kg/m3. US LCI: "Softwood logs with bark, harvested at average intensity site, at mill, US SE/US" can be used but transportation needs to be removed as it is already included here. Wood usage in the process is distrubuted as follows: 35% ends up in pulp, 23% in self-generated hogged fuel and 42% in black liquor. All the hogged fuel is combusted onsite. Combustion of this fuel is important to the economic viability of all modern pulp mills. Substitution of other fuels for this fuel is not recommended. Need to be paired with "Self-generated hogged fuel, combusted in industrial boiler, at pulp and paper mill". Black liquor solides are combusted onsite as part of the pulping chemical recovery process that is integral to and is essential to the economic viability of all modern pulp mills. Substitution of other fuels for this fuel is not recommended.
- CUTOFF Disposal, wastewater treatment plant residuals, to uns. Incinerator: 16.239 kg
  Typically on-site with energy recovery. (uns. = unspecified)
- CUTOFF Titanium dioxide: 14.424 kg
  ei: titanium dioxide, production mix, at plant
- Transport, barge, average fuel mix: 121.93 t*km
  Transportation of chemicals. Kaolin, Starch, Sizer and Latex: 0 km. Sodium chlorate, sulfuric acid, Hydrochloric acid, Titanium dioxide, Ground calcium carbonate, Precipitated calcium carbonate and Quicklime: 489 km. Transports of fuels. Coal: 515 km. Residual fuel oil, Distillate fuel oil: 163 km. Kerosene and gasoline, Other fossil assumed to be diesel : 163 km. Tire derived fuel: 315 km.
- CUTOFF Electricity from hydro: 14.694 kWh
  Generation at company facilities. Ei: Electricity, hydropower, at run-of-river power plant
- CUTOFF Disposal, unspecified ashes, to unspecified beneficial use: 3.0572 kg
  Mix of wood and coal ashes. Based on typical ash contents can be assumed to be 78% from wood and 22% from coal. Typically off-site.

## Inputs from nature
- Cooling water, non-contact: 16341 kg
  Estimated based on individual mill process effluent and cooling water flows and process characteristics. Share between process and cooling estimated.
- Process water: 49987 kg
  (same comment as for Cooling water, non-contact)

## Emissions to nature
- AOX, Adsorbable Organic Halogen as Cl: 0.1154 kg
  In effluent.
- Suspended solids, unspecified: 1.4197 kg
  In effluent.
- Phenol: 1.93e-5 kg
  From onsite management of solid waste. All metals reported as elemental althought in most cases they are releases into metal compounds.
- Nitrogen, total: 0.21216 kg
  In effluent.
- Ammonia: 0.080293 kg
  From process
- Zinc: 0.055 kg
  (same comment as for Phenol)
- Manganese: 0.0964 kg
  (same comment as for Phenol)
- PAH, polycyclic aromatic hydrocarbons: 2.66e-6 kg
  (same comment as for Phenol)
- Copper: 0.00010791 kg
  In effluent.
- PAH, polycyclic aromatic hydrocarbons: 4.5178e-6 kg
  In effluent.
- Lead: 0.00829 kg
  (same comment as for Phenol)
- Ammonia_toxic: 0.0029063 kg
  In effluent.
- Nickel: 0.00166 kg
  (same comment as for Phenol)
- Methanol: 0.37447 kg
  From process
- Methane, monochloro-, R-40: 4.3908e-9 kg
  In effluent.
- Barium: 0.0023894 kg
  In effluent.
- Phenol: 5.6245e-5 kg
  In effluent.
- Carbon dioxide, biogenic: -11.782 kg
  From process (Precipitated Calcium Carbonate (PCC) production on site). Some emissions reported under "Fuels burned at coated freesheet, average producion, at mill" are capture to produce PCC
- Acetaldehyde: 0.017 kg
  From process
- Arsenic: 0.0038 kg
  (same comment as for Phenol)
- Nickel: 0.00011917 kg
  In effluent.
- BOD5, Biological Oxygen Demand: 0.84257 kg
  In effluent.
- Arsenic: 0.00012392 kg
  In effluent.
- Zinc: 0.00087158 kg
  In effluent.
- Mercury: 1.838e-7 kg
  In effluent.
- Phosphorus, total: 0.028996 kg
  In effluent.
- Lead: 3.4626e-5 kg
  In effluent.
- Ammonia: 0.000114 kg
  (same comment as for Phenol)
- Acetaldehyde: 0.00115 kg
  In effluent.
- Carbon dioxide, fossil: -5.911 kg
  (same comment as for Carbon dioxide, biogenic)
- Chromium: 0.00014586 kg
  In effluent.
- Cooling water, non-contact: 16341 kg
  Estimated based on individual mill process effluent and cooling water flows and process characteristics. Share between process and cooling estimated. Includes evaporation and other losses (e.g., water in solid waste).
- Mercury: 1.31e-5 kg
  (same comment as for Phenol)
- Vanadium: 0.00053718 kg
  In effluent.
- Formaldehyde: 1.55e-6 kg
  (same comment as for Phenol)
- Methanol: 0.0171 kg
  In effluent.
- Chromium: 0.00955 kg
  (same comment as for Phenol)
- Formaldehyde: 0.00041794 kg
  In effluent.
- Vanadium: 0.00272 kg
  (same comment as for Phenol)
- Manganese: 0.016779 kg
  In effluent.
- Barium: 0.0596 kg
  (same comment as for Phenol)
- Water, evaporated: 1695 kg
  (same comment as for Cooling water, non-contact)
- Acetaldehyde: 5.63e-6 kg
  (same comment as for Phenol)
- Copper: 0.00918 kg
  (same comment as for Phenol)
- Process effluent: 49479 kg
  (same comment as for Cooling water, non-contact)

## Sampling procedure
The survey included results from 15 paper mills representing 5 million short tons per year (TPY), nearly 76% of 2006/2007 North American production volume.

## Sources
- AF&PA
