# Polyol ether, for flexible foam polyurethane production, at plant

Dataset: openLCA process, unit process
Category: Petrochemical Manufacturing
Geography: RNA
Time period: 2003-01-01 to 2005-01-01
Generated by: Franklin Associates
Published in: THE PLASTICS DIVISION OF THE AMERICAN C
restrictionsDescription: All information can be accessed by everybody.
copyright: false

## General comment
Heat is a coproduct for the production of polyether polyol for use in flexible foam polyurethane. The energy for exported heat was reported separately as recovered energy. Complete inventory data and metadata are available in full in the final report and appendices, Cradle-to-Gate Life Cycle Inventory of Nine Plastic Resins and Four Polyurethane Precursors. This report has been extensively reviewed within Franklin Associates and has undergone partial critical review by ACC Plastics Division members and is available at: www.americanchemistry.com. Quantities may vary slightly between the reference to main source and and this module due to rounding. Important note: although most of the data in the US LCI database has undergone some sort of review, the database as a whole has not yet undergone a formal validation process. Please email comments to lci@nrel.gov.

## Technology
Reaction of polyol initiator with hydroxide catalyst and propylene oxide and ethylene oxide, followed by separation and purification by distillation

## Geography
US

## Reference product
- Polyol ether, for flexible foam polyurethane production, at plant: 1 kg

## By-products
- Recovered energy: 0.183751 MJ
  Credit for steam or heat co-product sold externally.

## Inputs from technosphere
- Electricity, at grid, US, 2008: 0.02403 kWh
- Transport, train, diesel powered: 0.0348521 t*km
  Transport is specific to chlorine/caustic soda/potash transported to rigid and flexible polyol producers; it is also specific to propylene oxide and ethylene oxide delivered to producers of polyether polyol for flexible foam PUR.
- Propylene oxide, at plant: 0.856 kg
- CUTOFF Disposal, solid waste, unspecified, to sanitary landfill: 0.00087 kg
- Glycerine, at plant: 0.0263 kg
- Natural gas, combusted in industrial boiler: 0.0614906 m3
- Sodium hydroxide, production mix, at plant: 0.00396 kg
  Data for the production of sodium hydroxide are used as a surrogate for the production of the potassium hydroxide required for the resin.
- Electricity, at cogen, for natural gas turbine: 0.107363 kWh
- Ethylene oxide, at plant: 0.113 kg
- Transport, pipeline, unspecified petroleum products: 0.00121457 t*km
  Transport is specific to propylene oxide and ethylene oxide delivered to producers of polyether polyol for flexible foam PUR.
- Transport, combination truck, diesel powered: 0.015741 t*km
  Transport is specific to chlorine/caustic soda/potash transported to rigid and flexible polyol producers; it is also specific to propylene oxide delivered to producers of polyether polyol for flexible foam PUR.

## Emissions to nature
- NMVOC, non-methane volatile organic compounds, unspecified: 0.00011 kg
- Particulates, < 2.5 um: 1e-5 kg
  This emission was reported by fewer than three companies. To indicate known emissions while protecting the confidentiality of individual company responses, the emission is reported only by order of magnitude.
- Particulates, unspecified: 1e-6 kg
  (same comment as for Particulates, < 2.5 um)
- Organic substances, unspecified: 2.3e-5 kg
- TOC, Total Organic Carbon: 1e-5 kg
  (same comment as for Particulates, < 2.5 um)
- BOD5, Biological Oxygen Demand: 0.00028 kg
- Ammonia: 1e-5 kg
  (same comment as for Particulates, < 2.5 um)
- Sulfur oxides: 2.1e-7 kg
- Lead: 1e-10 kg
  (same comment as for Particulates, < 2.5 um)
- COD, Chemical Oxygen Demand: 0.00296 kg
- Methane: 1e-6 kg
  (same comment as for Particulates, < 2.5 um)
- Carbon monoxide: 2.7e-5 kg
- Particulates, > 2.5 um, and < 10um: 5.68e-5 kg
- Nitrogen oxides: 6.3e-5 kg
- Metallic ions, unspecified: 0.001 kg
  (same comment as for Particulates, < 2.5 um)
- Suspended solids, unspecified: 3.6e-7 kg
- Carbon dioxide, fossil: 0.0261 kg
- Dinitrogen monoxide: 1e-7 kg
  (same comment as for Particulates, < 2.5 um)
- Dissolved solids: 0.001 kg
  (same comment as for Particulates, < 2.5 um)
- Hydrocarbons, unspecified: 0.0001 kg
  (same comment as for Particulates, < 2.5 um)
- Chlorine: 1e-8 kg
  (same comment as for Particulates, < 2.5 um)
- Nitrates: 0.001 kg
  (same comment as for Particulates, < 2.5 um)
- Mercury: 1e-10 kg
  (same comment as for Particulates, < 2.5 um)

## Sampling procedure
Data are from primary sources.

## Sources
- THE PLASTICS DIVISION OF THE AMERICAN C
