# Planed dried lumber processing, at planer mill, US PNW

Dataset: openLCA process, unit process
Category: Cut Stock, Resawing Lumber, and Planing
Geography: RNA
Time period: 1999-01-01 to 2000-01-01
Generated by: Jamie Meil
Published in: Michael Milota
restrictionsDescription: All information can be accessed by everybody.
copyright: true

## General comment
Base process data presented with allocations to within process co-products noted. Refer to allocation worksheet for specifics. All allocations performed using mass or volume., This sheet sets out each unit process in the production of 1000 board feet of surfaced, kiln-dried softwood lumber as produced in the US Southeast. The sheet is structured as a system using both mass or volume allocation among primary and co-products.
Important note: although most of the data in the US LCI database has
undergone some sort of review, the database as a whole has not yet
undergone a formal validation process.
Please email comments to lci@nrel.gov.

## Technology
typical

## Geography
US Pacific Northwest

## Reference product
- Surfaced dried lumber, at planer mill, US PNW: 1 kg
  Represents 1.175 board feet of surfaced, kiln-dried softwood lumber

## By-products
- Planer shavings, from dried lumber, at planer mill, US PNW: 0.0817 kg
- Sawdust, from dried lumber, at planer mill, US PNW: 0.0155 kg
- Pulp chips, from dried lumber, at planer mill, US PNW: 0.0631 kg

## Inputs from technosphere
- Electricity, at grid, Western US, 2000: 0.0386 kWh
- Dry rough lumber, at kiln, US PNW: 1.16 kg
- CUTOFF Disposal, inert solid waste, to inert material landfill: 5.73e-6 kg
- Diesel, combusted in industrial boiler: 0.00078 l
- Liquefied petroleum gas, combusted in industrial boiler: 2.64e-7 l

## Emissions to nature
- Dust, unspecified: 5.23e-5 kg
- VOC, volatile organic compounds: 2.28e-5 kg

## Sampling procedure
survey method

## Sources
- Leonard R. Johnson
- Michael Milota
- Maureen Puetmann
