# Transport, passenger car, gasoline powered

Dataset: openLCA process, unit process
Category: Other Transit and Ground Passenger Transportation
Geography: RNA
Time period: 2010-01-01 to 2010-01-01
Generated by: Nathan Hardesty
Published in: U.S. Environmental Protection Agency (EP
restrictionsDescription: All information can be accessed by everybody.
copyright: false

## General comment
This dataset represents the U.S. average airborne emissions for operating a gasoline powered passenger car. The inventory includes all vehicle operation processes, including off-network and refueling activities.
The refinery-to-pump transportation and distribution data are calculated from Argonne National Laboratory's GREET 1.8d.1 model.
The vehicle operation data are calculated from EPA's MOVES2010a model, using the assumptions described in the corresponding detailed spreadsheet. Emissions factors in MOVES2010a are largely based on EPA's Mobile Source Observation Database, which in turn includes data from a variety of vehicle studies (References 6-8).
MOVES2010a acknowledges sources of uncertainty in the model structure, the population and acitivty data, and other model parameters. As of July 2011, the uncertainty calculation function of the model has not been activated.

## Technology
Combustion of gasoline in a passenger car.

## Geography
US

## Reference product
- Transport, passenger car, gasoline powered: 1 p*km

## Inputs from technosphere
- Gasoline, at refinery: 0.0630016 l
- Transport, barge, average fuel mix: 0.0196436 t*km
- Transport, combination truck, average fuel mix: 0.0203091 t*km
- Transport, pipeline, unspecified petroleum products: 0.204708 t*km
- Transport, ocean freighter, average fuel mix: 0.138841 t*km
- Transport, train, diesel powered: 0.0378992 t*km

## Emissions to nature
- Ammonia: 1.55062e-5 kg
- Particulates, < 2.5 um: 1.25981e-6 kg
  PM2.5 from brakewear.
- Nitrogen oxide: 0.000274987 kg
- Dinitrogen monoxide: 5.44265e-6 kg
- Particulates, < 2.5 um: 5.32583e-6 kg
  PM2.5 from organic carbon, elemental carbon, and sulfate particulates.
- Particulates, < 2.5 um: 5.41024e-7 kg
  PM2.5 from tirewear.
- Nitrogen oxides: 0.000306911 kg
- Particulates, < 10 um: 2.25607e-6 kg
  PM10 from tirewear.
- VOC, volatile organic compounds: 0.000221818 kg
- Particulates, < 10 um: 4.81248e-6 kg
  PM10 from brakewear.
- Methane: 8.38482e-6 kg
- Hydrocarbons (other than methane): 0.000216378 kg
- Nitrogen dioxide: 3.19237e-5 kg
- Particulates, < 10 um: 5.78384e-6 kg
  PM10 from organic carbon, elemental carbon, and sulfate particulates.
- Carbon monoxide, fossil: 0.00252024 kg
- Carbon dioxide, fossil: 0.14748 kg
- Sulfur dioxide: 2.74286e-6 kg

## Sources
- U.S. Environmental Protection Agency (EP
- National Institute of Standards and Tech
- EPA
- U.S. Alternative Fuels and Advanced Vehi
- Eastern Research Group
- Assessment and Standards Division, Offic
- Assessment and Standards Division, Offic
- Wang, M.
- Oak Ridge National Laboratory
