# Scanner, department, i4200, i4600

Dataset: openLCA process, unit process
Category: Other material
Geography: GLO
Time period: 2003-06-10 to 2012-09-15
Generated by: Roy Wood
Reviewer: Jay Mathewson
Published in: Roy Wood
restrictionsDescription: All information can be accessed by everybody.
copyright: false

## General comment
Cradle to Gate data for a single 51.32 kg line of scanners for a single company. Scanner scans at 75-120 A4 images per minute. Use can exceed 100,000 images per day. This cradle to gate data was extracted from a full cradle to end of life LCA. Internal company validation via business and peer review and internal assessment. This dataset was consistent with LCA conducted using same approach as the office scanner LCA, which was peer reviewed by Kate Winnebeck, LCACP, New York State Pollution Prevention Institute , Rochester Institute of Technology. Data is only directly representative for the scanner models i4200 and i4600. However components and manufacturing process is similar for many scanners, so extrapolation to other similar scanners may be done using judement. Component proxy data for original LCA was from Ecoinvent. Each flow represents one or more parts made with the same materials and processes, which were aggregated. The scanner was manufactured in China with the subcomponents mostly from China. However the best available datasets were used as proxy data and the best data often came from different geographic locations. Some data was replaced in this cradle to gate dataset by USLCI data where appropriate data was available. Unless otherwise noted in a General Comment for individual flows, data described as dummy_ was from Ecoinvent. Waste scrap was 0.5% of input flows. Although these were included in the full LCA, they were not shown to be significant in the modeling and according to a 1% cutoff criteria, have not been included in this cradle to gate data.

## Technology
Best available technology

## Geography
Global

## Time period
start date was based on earliest date of secondary data. Start date of primary data was 2011-07-01

## Reference product
- Scanner, department, i4200, i4600: 1 Item(s)

## Inputs from technosphere
- CUTOFF Electronic component, unspecified, at plant: 0.002 kg; triangle minimum 0.0018, mode 0.002, maximum 0.0022
- Polyvinyl chloride, resin, at plant: 0.015 kg; triangle minimum 0.014, mode 0.015, maximum 0.016
  original data - polyvinyl chloride ar regional storage, RER/U from Ecoinvent
- CUTOFF Tap water, at user: 135 kg; triangle minimum 122, mode 135, maximum 148
- CUTOFF Power adapter, for laptop, at plant: 0.507 kg; triangle minimum 0.5, mode 0.507, maximum 0.514
- CUTOFF LCD glass, at plant: 0.353 kg; triangle minimum 0.35, mode 0.353, maximum 0.356
  About half this quantity was LCD glass and half was lens glass and other highly processed glass. LCD glass was the best available data for lens and other highly processed glass based on cost and manufacturing complexity.
- CUTOFF Electricity, low voltage, at grid: 24 kWh; triangle minimum 22, mode 24, maximum 26
- CUTOFF Flat glass, uncoated, at plant: 0.2 kg; triangle minimum 0.195, mode 0.2, maximum 0.205
- CUTOFF Injection moulding: 10.731 kg; triangle minimum 10.6, mode 10.733, maximum 10.86
- Transport, combination truck, diesel powered: 50 t*km; triangle minimum 25, mode 40, maximum 85
  original data - transport, lorry &amp;gt;32t, EURO5/ RER U
- CUTOFF Polyphenylene sulfide, at plant: 0.485 kg; triangle minimum 0.48, mode 0.485, maximum 0.49
- Acrylonitrile-butadiene-styrene copolymer, resin, at plant: 6.89 kg; triangle minimum 6.8, mode 6.87, maximum 7
  original data - acrylonitrile-butadiene-styrene (ABS), at plant RER/U from Ecoinvent
- CUTOFF Cold impact extrusion, aluminium, 1 stroke: 1.126 kg; triangle minimum 1.11, mode 1.128, maximum 1.14
- CUTOFF Treatment, sewage, to wastewater treatment, class 1: 135 kg; triangle minimum 121, mode 135, maximum 149
- CUTOFF Steel, low-alloyed, at plant: 22.341 kg; triangle minimum 22, mode 22.343, maximum 22.68
- CUTOFF Copper product manufacturing, average metal working: 0.894 kg; triangle minimum 0.884, mode 0.894, maximum 0.904
- CUTOFF Cable, connector for computer, without plugs, at plant: 2.597 kg; triangle minimum 2.55, mode 2.591, maximum 2.65
- Polyethylene, low density, resin, at plant: 0.828 kg; triangle minimum 0.82, mode 0.828, maximum 0.836
  original data - LDPE granulate, at plant, RER/U from Ecoinvent
- Polypropylene resin, at plant: 0.648 kg; triangle minimum 0.638, mode 0.648, maximum 0.658
  original data - polypropylene granulate, at plant, RER/U from Ecoinvent
- Polystyrene, high impact, resin, at plant: 0.077 kg; triangle minimum 0.07, mode 0.077, maximum 0.084
  original data - Polystyrene, high impact, HIPS, at plant, RER/U from Ecoinvent
- CUTOFF Silver, at regional storage: 0.006 kg; triangle minimum 0.0055, mode 0.006, maximum 0.0065
  silver data was used for neodymium, because there was no neodymium data and silver was the best substitute based on price and cost of production.
- CUTOFF Carbon black, at plant: 0.031 kg; triangle minimum 0.0305, mode 0.031, maximum 0.0315
- CUTOFF Flat glass, coated, at plant: 0.2 kg; triangle minimum 0.195, mode 0.2, maximum 0.205
- CUTOFF Synthetic rubber, at plant: 0.404 kg; triangle minimum 0.4, mode -407.188, maximum 408
- CUTOFF Polyethylene terephthalate, granulate, amorphous, at plant: 0.126 kg; triangle minimum 0.12, mode 0.126, maximum 0.132
- CUTOFF Tetrafluoroethylene, at plant: 0.03 kg; triangle minimum 0.029, mode 0.03, maximum 0.031
- CUTOFF Nylon 6, at plant: 0.652 kg; triangle minimum 0.644, mode 0.652, maximum 0.66
- CUTOFF Printed wiring board, surface mounted, unspec., Pb free, at plant: 0.537 kg; triangle minimum 0.53, mode 0.537, maximum 0.544
- CUTOFF Polycarbonate, at plant: 0.543 kg; triangle minimum 0.535, mode 0.544, maximum 0.55
- CUTOFF Steel product manufacturing, average metal working: 22.341 kg; triangle minimum 22, mode 22.343, maximum 22.68
- CUTOFF Copper, primary, at refinery: 0.894 kg; triangle minimum 0.884, mode 0.894, maximum 0.904
- Aluminum ingot, production mix, at plant: 0.001126 t; triangle minimum 0.00111, mode 0.001128, maximum 0.00114
  original data - aluminum, production mix at plant RER/U from Ecoinvent
- Packaging, production scanners: 11.815 kg; triangle minimum 11.7, mode 11.845, maximum 11.9
- CUTOFF Light emitting diode, LED, at plant: 0.008 kg; triangle minimum 0.0075, mode 0.008, maximum 0.0085
- CUTOFF Polyurethane, flexible foam, at plant: 0.002 kg; triangle minimum 0.0018, mode 0.002, maximum 0.0022

## Sampling procedure
engineering specifications, variability less than 1% for this model

## Review details
Data was reviewed to ensure in was consistent with the manufacturing process and components, was based on quality sources - primary data from design and manufacturing specifications, and secondary data was from reliable sources (largely from Ecoinvent) and data was properly documented in final report and associated appendices. Initial review was by Roy Wood, followed by an independent internal review by Jay Mathewson.

## Sources
- Roy Wood
