# Dry veneer processing, at plywood plant, US PNW

Dataset: openLCA process, unit process
Category: Softwood Veneer and Plywood Manufacturing
Geography: RNA
Time period: 2000-01-01 to 2000-01-01
Generated by: Jamie Meil
Published in: Eric T. Sackimoto
restrictionsDescription: All information can be accessed by everybody.
copyright: true

## General comment
Base process data presented with allocations to within process co-products noted. Refer to allocation worksheet for specifics. All allocations performed using mass or volume.,
Important note: although most of the data in the US LCI database has
undergone some sort of review, the database as a whole has not yet
undergone a formal validation process.
Please email comments to lci@nrel.gov.

## Technology
typical

## Geography
US Pacific North West

## Reference product
- Dry veneer, at plywood plant, US PNW: 1 kg

## By-products
- Dry veneer, sold, at plywood plant, US PNW: 0.0503 kg

## Inputs from technosphere
- Liquefied petroleum gas, combusted in industrial boiler: 0.000483 l
- Green veneer, at plywood plant, US PNW: 1.05 kg
- Natural gas, combusted in industrial boiler: 0.00674 m3
- Electricity, at grid, Western US, 2000: 0.0943 kWh
- CUTOFF Hogfuel-Biomass (50% MC), combusted in industrial boiler: 0.257 kg

## Emissions to nature
- Formaldehyde: 2.47e-5 kg
- Acetaldehyde: 9.23e-6 kg
- Phenol: 2.32e-6 kg
- Methanol: 2.89e-5 kg
- Acrolein: 0.000527 kg
- Particulates, unspecified: 0.000265 kg
- VOC, volatile organic compounds: 0.000527 kg

## Sources
- Leonard R. Johnson
- Eric T. Sackimoto
- Maureen Puetmann
