# Electricity, at eGrid, HIMS, 2008

Dataset: openLCA process, unit process
Category: Utilities
Geography: RNA
Time period: 2008-01-01 to 2008-01-01
Generated by: Alberta Carpenter
Published in: Chris Goemans, Athena Institute
restrictionsDescription: All information can be accessed by everybody.
copyright: false

## General comment
The methodology used to put together the grid information is outlined in reference 1.

## Technology
Typical

## Geography
Misc Hawaii electricity grid that includes all of Hawaii except for Oahu (HIOA).

## Reference product
- Electricity, at eGrid, HIMS, 2008: 1 kWh

## Inputs from technosphere
- CUTOFF Electricity, biomass, solid, agriculture by-products, at power plant: 0.0019503 kWh
  Solid Renewable Fuels (Biomass) AB - Agriculture Crop By-products/ Straw/ Energy Crops
- Electricity, residual fuel oil, at power plant: 0.169547 kWh
  Petroleum (RFO) - Residual Fuel Oil (includes No. 5 and No. 6 Fuel Oils and Bunker C Fuel Oil)
- CUTOFF Electricity, petroleum, waste oil, at power plant: 0.196487 kWh
  Petroleum (Other Fossil) WO - Waste/Other Oil (including Crude Oil, Liquid Butane, Liquid Propane, Oil Waste, Re-Refined Motor Oil, Sludge Oil, Tar Oil, or other petroleum-based liquid wastes)
- CUTOFF Electricity, at wind power plant, unspecified: 0.0761717 kWh
  Wind
- Electricity, diesel, at power plant: 0.396351 kWh
  Petroleum (DFO) - Distillate Fuel Oil (includes all Diesel and No. 1, No. 2, and No. 4 Fuel Oils)
- CUTOFF Electricity, hydropower, at power plant, unspecified: 0.0267665 kWh
  Hydroelectric
- Electricity, bituminous coal, at power plant: 0.0227242 kWh
  Bituminous Coal
- CUTOFF Electricity, solar, unspecified, at power plant: 5.71233e-6 kWh
  Solar (Photovoltaic, Thermal)
- CUTOFF Electricity, geothermal, unspecified: 0.0743659 kWh
  Geothermal
- CUTOFF Electricity, biomass,solid, unspecified, at power plant: 0.0356299 kWh
  Solid Renewable Fuels (Biomass) OBS - Other Biomass Solid (Animal Manure and Waste, Solid By-products, and other solid biomass not specified)

## Sampling procedure
based on EIA electricity reports for all power plants in the US.

## Sources
- Chris Goemans, Athena Institute
- unspecified
- USEPA
- Statistics Canada
- Statistics Canada
- Statistics Canada
- Statistics Canada
- Statistics Canada
- Statistics Canada
- USEPA
- EIA
- EIA
- EIA
- EIA
- EIA
- EIA
- EIA
- EIA
- EIA
- EIA
- EIA
- US DOE
- International Energy Agency
- US DOE
