# Electricity, at eGrid, SPSO, 2010

Dataset: openLCA process, unit process
Category: Utilities
Geography: RNA
Time period: 2010-01-01 to 2010-01-01
Generated by: Samantha Wascavage
Published in: Chris Goemans, Athena Institute
restrictionsDescription: All information can be accessed by everybody.
copyright: false

## General comment
The methodology used to put together the grid information is outlined in reference 1.

## Technology
Typical

## Geography
SPSO South electricity grid to include Oklahoma, and portions of Arkansas, Louisiana, Texas and New Mexico.

## Reference product
- Electricity, at eGrid, SPSO, 2010: 1 kWh

## Inputs from technosphere
- CUTOFF Electricity, other gases, unspecified, at power plant: 0.003167 kWh
  Other Gases OG, BFG, PG – Other Gas (Butane, Coal Processes, Coke-Oven, Refinery, and other processes)
- Electricity, bituminous coal, at power plant: 0.387316 kWh
  Subbituminous Coal
- Electricity, bituminous coal, at power plant: 0.009099 kWh
  Bituminous Coal BIT, SC, SGC, WC - Anthracite Coal, and Bituminous Coal.
- CUTOFF Electricity, at wind power plant, unspecified: 0.032648 kWh
  Wind
- CUTOFF Electricity, petroleum, waste oil, at power plant: 0.010009 kWh
  Petroleum (Other Fossil) WO, PC, SG – Waste/Other Oil (including Crude Oil, Liquid Butane, Liquid Propane, Oil Waste, Re-Refined Motor Oil, Sludge Oil, Tar Oil, or other petroleum-based liquid wastes)
- Electricity, diesel, at power plant: 0.000352 kWh
  Petroleum (DFO, JF, KER) – Distillate Fuel Oil (includes all Diesel and No. 1, No. 2, and No. 4 Fuel Oils)
- CUTOFF Electricity, solar, unspecified, at power plant: 1.3e-5 kWh
  SUN – Solar (Photovoltaic, Thermal)
- Electricity, lignite coal, at power plant: 0.150498 kWh
  Lignite Coal
- CUTOFF Electricity, biomass,liquid, unspecified, at power plant: 0.004567 kWh
  Liquid Renewable Fuels (Biomass) BLQ, OBL, SLW, WDL - black liquor
- Electricity, residual fuel oil, at power plant: 2.6e-5 kWh
  Petroleum (RFO) – Residual Fuel Oil (includes No. 5 and No. 6 Fuel Oils and Bunker C Fuel Oil)
- CUTOFF Electricity, biomass, solid, agriculture by-products, at power plant: 0.002421 kWh
  Solid Renewable Fuels (Biomass) AB, MSB, MSW, OBS, TDF, WDS – Agriculture Crop By-products / Straw / Energy Crops
- CUTOFF Electricity, other fuels, unspecified, at power plant: 5.8e-5 kWh
  Other Fuels OTH, MSN, PUR, WH – Other (Batteries, Chemicals, Coke Breeze, Hydrogen, Pitch, Sulfur, Tar Coal, and miscellaneous technologies)
- CUTOFF Electricity, hydropower, at power plant, unspecified: 0.016731 kWh
  Hydroelectric WAT – Water (Conventional, Pumped Storage)
- Electricity, natural gas, at power plant: 0.383095 kWh
  Natural Gas

## Sampling procedure
based on EIA electricity reports for all power plants in the US.

## Sources
- Chris Goemans, Athena Institute
- Statistics Canada
- unspecified
- USEPA
- Statistics Canada
- Statistics Canada
- Statistics Canada
- Statistics Canada
- USEPA
- EIA
- EIA
- EIA
- EIA
- EIA
- EIA
- EIA
- EIA
- EIA
- US DOE
- International Energy Agency
- EIA
