# Transport, school bus, gasoline powered

Dataset: openLCA process, unit process
Category: School and Employee Bus Transportation
Geography: RNA
Time period: 2010-01-01 to 2010-01-01
Generated by: Nathan Hardesty
Published in: U.S. Environmental Protection Agency (EP
restrictionsDescription: All information can be accessed by everybody.
copyright: false

## General comment
This dataset represents the U.S. average airborne emissions for operating a gasoline powered school bus. The inventory includes all vehicle operation processes, including off-network and refueling activities.
The refinery-to-pump transportation and distribution data are calculated from Argonne National Laboratory's GREET 1.8d.1 model.
The vehicle operation data are calculated from EPA's MOVES2010a model, using the assumptions described in the corresponding detailed spreadsheet. Emissions factors in MOVES2010a are largely based on EPA's Mobile Source Observation Database, which in turn includes data from a variety of vehicle studies (References 6-8).
MOVES2010a acknowledges sources of uncertainty in the model structure, the population and acitivty data, and other model parameters. As of July 2011, the uncertainty calculation function of the model has not been activated.

## Technology
Combustion of gasoline in a school bus.

## Geography
US

## Reference product
- Transport, school bus, gasoline powered: 1 p*km

## Inputs from technosphere
- Transport, combination truck, average fuel mix: 0.00138084 t*km
- Transport, pipeline, unspecified petroleum products: 0.0135539 t*km
- Transport, train, diesel powered: 0.00257808 t*km
- Transport, ocean freighter, average fuel mix: 0.0118058 t*km
- Transport, barge, average fuel mix: 0.000894613 t*km
- Gasoline, at refinery: 0.00474195 l

## Emissions to nature
- Nitrogen oxide: 7.77567e-5 kg
- Dinitrogen monoxide: 1.49352e-6 kg
- Nitrogen oxides: 8.13025e-5 kg
- Particulates, < 2.5 um: 1.40381e-6 kg
  PM2.5 from organic carbon, elemental carbon, and sulfate particulates.
- Particulates, < 10 um: 1.52454e-6 kg
  PM10 from organic carbon, elemental carbon, and sulfate particulates.
- Methane: 6.23387e-6 kg
- Sulfur dioxide: 2.02056e-7 kg
- Nitrogen dioxide: 3.54583e-6 kg
- Ammonia: 3.64495e-7 kg
- Carbon dioxide, fossil: 0.0108681 kg
- Particulates, < 2.5 um: 1.18396e-7 kg
  PM2.5 from brakewear.
- Particulates, < 10 um: 1.10343e-7 kg
  PM10 from tirewear.
- Particulates, < 2.5 um: 2.64611e-8 kg
  PM2.5 from tirewear.
- Hydrocarbons (other than methane): 7.08473e-5 kg
- VOC, volatile organic compounds: 7.23896e-5 kg
- Carbon monoxide, fossil: 0.00148994 kg
- Particulates, < 10 um: 4.52274e-7 kg
  PM10 from brakewear.

## Sources
- U.S. Environmental Protection Agency (EP
- National Institute of Standards and Tech
- EPA
- U.S. Alternative Fuels and Advanced Vehi
- Eastern Research Group
- Assessment and Standards Division, Offic
- Assessment and Standards Division, Offic
- Wang, M.
- National Climatic Data Center, National
- American School Bus Council
