# Debarking, at plywood plant, US SE

Dataset: openLCA process, unit process
Category: Sawmills
Geography: RNA
Time period: 2000-01-01 to 2000-01-01
Generated by: Jamie Meil
Published in: Eric T. Sackimoto
restrictionsDescription: All information can be accessed by everybody.
copyright: true

## General comment
Base process data presented with allocations to within process co-products noted. Refer to allocation worksheet for specifics. All allocations performed using mass or volume., processing 65.5 cu ft of logs
Important note: although most of the data in the US LCI database has
undergone some sort of review, the database as a whole has not yet
undergone a formal validation process.
Please email comments to lci@nrel.gov.

## Technology
typical

## Geography
US Southeast

## Reference product
- Bark, at plywood plant, US SE: 0.134 kg

## By-products
- Debarked wood, at plywood plant, US SE: 1 kg

## Inputs from technosphere
- Softwood logs with bark, harvested at average intensity site, at mill, US SE: 0.0021 m3
- Electricity, at grid, Eastern US, 2000: 0.016 kWh
- Diesel, combusted in industrial boiler: 0.00108 l

## Emissions to nature
- Bark: 0.0221 kg
  Bark lost to soil during log manipulation

## Sources
- Leonard R. Johnson
- Eric T. Sackimoto
- Maureen Puetmann
