# Enzyme, Glucoamylase, Novozyme Spirizyme

Dataset: openLCA process, unit process
Category: All Other Basic Organic Chemical Manufacturing
Geography: RER
Time period: 2004-01-01 to 2004-01-01
Generated by: Daniel Inman
Published in: P.H. Nielsen
restrictionsDescription: All information can be accessed by everybody.
copyright: false

## General comment
based on Figure 3 "B" of reference document. Inventory in terms of equivalents.

## Technology
current

## Time period
2004

## Reference product
- Enzyme, Glucoamylase, Novozyme Spirizyme: 1 kg

## Inputs from nature
- Water, unspecified natural origin/m3: 0.029 m3
- Transformation, to industrial area: 1 m2
- Transformation, from pasture and meadow: 1 m2
- Energy, from coal: 65.7 MJ
  Data is fossil energy. Assumed it was all coal. This number does not affect the GHG emissions. This number is just for energy.

## Emissions to nature
- Carbon dioxide, fossil: 4.4 kg
  CO2 eq
- Ethene: 0.0016 kg
  C2H4 eq
- Phosphate: 0.026 kg
  Phosphate equiv.
- Sulfur dioxide: 0.009 kg
  SO2 eq

## Sources
- Hsu, D.
- P.H. Nielsen
