# Coal mine water use and quality; Surface mine

Dataset: openLCA process, unit process
Category: Bit. Coal and Lignite Surface Mining
Geography: US
Time period: 2008-01-01 to 2008-12-31
Generated by: Timothy Skone
Owner: National Energy Technology Laboratory
Reviewer: Robert James
Published in: National Energy Technology Laboratory (NETL). 2013. Coal mine water use and quality; Surface mine
restrictionsDescription: Use of this dataset is not restricted, but a statement of attribution is required. Please use the following attribution statement:
National Energy Technology Laboratory's (NETL) Unit Process Library
626 Cochrans Mill Road, P.O. Box 10940
Pittsburgh, PA 15236-0940
http://www.netl.doe.gov/research/energy-analysis/life-cycle-analysis/unit-process-library
Neither the U.S. Department of Energy (DOE) National Energy Technology Laboratory (NETL) nor any person acting on behalf of these organizations:
A. Makes any warranty or representation, express or implied, with respect to the accuracy, completeness, or usefulness of the information contained in this document, or that the use of any information, apparatus, method, or process disclosed in this document may not infringe on privately owned rights; or
B. Assumes any liability with this report as to its use, or damages resulting from the use of any information, apparatus, method, or process disclosed in this document.
Reference herein to any specific commercial product, process, or service by trade name, trademark, manufacturer, or otherwise, does not necessarily constitute or imply its endorsement, recommendation, or favoring by NETL. The views and opinions of the authors expressed herein do not necessarily state or reflect those of NETL.
copyright: true

## General comment
This process is part of the NETL Unit Process Library. To access the library and the original dataset:
1) Navigate to the NETL LCA home page (http://www.netl.doe.gov/lca)
2) Then navigate to the “Unit Process Library”
3) From the library, the unit process of interest can be found either through the "Complete Listing of the Unit Process Library link" or through the link to the "Unit Process Database" spreadsheet
4) For each process, a Data Sheet (DS) and Data File (DF) are available

BRIEF DESCRIPTION
This unit process considers water use and quality from surface mining of coal based on data for Powder River Basin mines.
Inputs and outputs are reported on the basis of 1 Item of "Water use and quality; Production mix, from surface coal mine".

GOAL AND SCOPE
This parameterized unit process provides a summary of water consumption and quality associated with surface mining of coal. The data are representative of subbituminous coal from the Powder River Basin (PRB). Water flows include water required for mining and cleaning operations and wastewater flows. Storm water is included in the inventory for wastewater flows. This process is based on the reference flow of 1 Item of "Water use and quality; Production mix, from surface coal mine".

This process differs slightly from the Detailed Spreadsheet Documentation (DS) file referenced in the Citation and Associated Documentation section below. Differences between this process and the DS are as follows:
1) Different reference flows. This is because, in the openLCA model, coal is produced in a separate process.
2) Different units for input flows. Units for inputs In the openLCA model have been converted from liters (L) to kilograms (kg) based on the densities of fresh and salt water.

BOUNDARY AND DESCRIPTION
A visual representation of the boundary of this unit process is available in the associated documentation (referenced in the Citation and Associated Documentation section below). This unit process is based on water data for the surface mining of coal in the Powder River Basin. It is assumed that all surface mines have similar water use and quality profiles.

Water use was estimated based on an environmental impact study completed on West Antelope II mine located in the Powder River Basin of Wyoming (BLM 2008). Water emissions, including flows and concentrations of relevant inorganic constituents and solids entering the waterstream, were taken from available National Pollutant Discharge Elimination System permit reporting documentation (NPDES 2009).

Additional details regarding input and output flows, including calculation methods, are contained in the associated documentation (referenced in the Citation and Associated Documentation section below).

CITATIONS AND ASSOCIATED DOCUMENTATION
This dataset should be cited as:
National Energy Technology Laboratory (NETL). 2015. NETL Life Cycle Inventory Data - Unit Process: Coal mine water use and quality; Surface mine. U.S. Department of Energy, National Energy Technology Laboratory. Last Updated: September 2015 (Version 01). Retrieved on [DATE] from [URL for this dataset].

This dataset is part of the NETL Unit Process Library. The Library offers additional information concerning this dataset in the form ofa Detailed Spreadsheet Documentation (DS) file and a Process Documentation File (DF). The DS file is an Excel file that contains all ofthe parameters, inputs, and outputs for a given system as well as background data, calculations and quality scores. The DF file is a PDFdocument that contains major assumptions and data sources that are the basis for each unit process. The NETL Unit Process Library islocated on the NETL website (netl.doe.gov) under Research / Energy Analysis / Energy Trends and Issues / Life Cycle Analysis / Unit Process Library.

This dataset was converted directly from the DS with additional supporting information provided by the DF. Full citations for the DS and DF are given below.

DS File
National Energy Technology Laboratory (NETL). 2013. NETL Life Cycle Inventory Data - Unit Process: Water use and quality from surface mining of coal, based on data for PRB mines. Version 02. Retrieved on DATE from: http://www.netl.doe.gov/File%20Library/Research/Energy%20Analysis/Life%20Cycle%20Analysis/UP_Library/DS_Stage1_O_Surface_Coal_Mine_Water_2013-02.xlsx.

DF File
National Energy Technology Laboratory (NETL). 2013. NETL Life Cycle Inventory Data - Unit Process: Water use and quality from surface mining of coal, based on data for PRB mines. Version 02. Retrieved on DATE from: http://www.netl.doe.gov/File%20Library/Research/Energy%20Analysis/Life%20Cycle%20Analysis/UP_Library/DF_Stage1_O_Surface_Coal_Mine_Water_2013-02.pdf.

## Technology
This process provides a summary of water consumption and quality associated with surface mining of coal. The data are representative of subbituminous coal from the Powder River Basin (PRB). Water flows include water required for mining and cleaning operations and wastewater flows. Storm water is included in the inventory for wastewater flows. It is assumed that all surface mines have similar water use and quality profiles similar to the Powder River Basin.

Additional details are contained in the associated documentation (referenced in the Citation and Associated Documentation section in the Description field).

## Geography
US

## Parameters
- EF_w_Selenium: 1.84149e-9
  [kg/L water] kg of water quality constituent per L of water produced
- E_w_Iron: 1.61435e-9; = EF_w_Iron*Water_Produced
  [kg/kg coal] kg of water quality constituent per kg coal produced
- usr_fresh_gnd: 0.474455
  [dimensionless] Fraction of water consumption that is from fresh ground water
- E_w_nitrxte: 9.19678e-9; = EF_w_nitrxte*Water_Produced
  [kg/kg coal] kg of water quality constituent per kg coal produced
- Water_Consumed: 0.0303469
  [L/kg coal] L of water consumed during mining per kg coal produced
- EF_w_F: 8.54392e-7
  [kg/L water] kg of water quality constituent per L of water produced
- E_w_COD: 2.6855e-7; = EF_w_COD*Water_Produced
  [kg/kg coal] kg of water quality constituent per kg coal produced
- E_w_Hg: 1.59341e-13; = EF_w_Hg*Water_Produced
  [kg/kg coal] kg of water quality constituent per kg coal produced
- EF_w_Na: 0.000217255
  [kg/L water] kg of water quality constituent per L of water produced
- E_w_Zinc: 1.59341e-10; = EF_w_Zinc*Water_Produced
  [kg/kg coal] kg of water quality constituent per kg coal produced
- E_w_F: 1.3614e-8; = EF_w_F*Water_Produced
  [kg/kg coal] kg of water quality constituent per kg coal produced
- E_w_TDS: 2.38108e-5; = EF_w_TDS*Water_Produced
  [kg/kg coal] kg of water quality constituent per kg coal produced
- EF_w_Calcium: 7.14329e-5
  [kg/L water] kg of water quality constituent per L of water produced
- E_w_BOD: 7.96705e-8; = EF_w_BOD*Water_Produced
  [kg/kg coal] kg of water quality constituent per kg coal produced
- E_w_arsenic: 3.53457e-11; = EF_w_arsenic*Water_Produced
  [kg/kg coal] kg of water quality constituent per kg coal produced
- E_w_Cr: 1.59341e-10; = EF_w_Cr*Water_Produced
  [kg/kg coal] kg of water quality constituent per kg coal produced
- Water_SDensity: 1024.79
  [kg/m^3] Density of salt water (salinity = 35,000 PPM Total Dissolved Solids) at 20° C and 1 atm. Source: CSGNetwork.com (http://www.csgnetwork.com/h2odenscalc.html)
- EF_w_nitrxte: 5.77176e-7
  [kg/L water] kg of water quality constituent per L of water produced
- E_w_C_TOC: 9.65385e-8; = EF_w_C_TOC*Water_Produced
  [kg/kg coal] kg of water quality constituent per kg coal produced
- EF_w_Ni: 1e-8
  [kg/L water] kg of water quality constituent per L of water produced
- E_w_sulfate: 1.08443e-5; = EF_w_sulfate*Water_Produced
  [kg/kg coal] kg of water quality constituent per kg coal produced
- EF_w_P: 1.85485e-8
  [kg/L water] kg of water quality constituent per L of water produced
- EF_w_Cn: 1.1243e-8
  [kg/L water] kg of water quality constituent per L of water produced
- E_w_TSS: 1.62198e-7; = EF_w_TSS*Water_Produced
  [kg/kg coal] kg of water quality constituent per kg coal produced
- fresh_gnd: 0.0143982; = Water_Consumed*pct_fresh_gnd
  [L/kg coal] L of water consumption that is from fresh ground water per kg coal produced
- pct_fresh_srf: 0.167302
  [dimensionless] Fraction of water consumption that is from fresh surface water
- EF_w_Al: 1.57442e-8
  [kg/L water] kg of water quality constituent per L of water produced
- EF_w_N_total: 1.5021e-6
  [kg/L water] kg of water quality constituent per L of water produced
- E_w_Stront: 4.97322e-8; = EF_w_Stront*Water_Produced
  [kg/kg coal] kg of water quality constituent per kg coal produced
- E_w_Al: 2.5087e-10; = EF_w_Al*Water_Produced
  [kg/kg coal] kg of water quality constituent per kg coal produced
- water_pct_total: 1
  [dimensionless] Sum of water fractions (for user verification of water fractions)
- EF_w_Cadmium: 1e-10
  [kg/L water] kg of water quality constituent per L of water produced
- EF_w_arsenic: 2.21824e-9
  [kg/L water] kg of water quality constituent per L of water produced
- EF_w_BOD: 5e-6
  [kg/L water] kg of water quality constituent per L of water produced
- E_w_Calcium: 1.13822e-6; = EF_w_Calcium*Water_Produced
  [kg/kg coal] kg of water quality constituent per kg coal produced
- EF_w_Stront: 3.12112e-6
  [kg/L water] kg of water quality constituent per L of water produced
- pct_sal_gnd: 0.358243; = IF(auto_calc_wtr=1;1-pct_fresh_srf-pct_fresh_gnd;usr_sal_gnd)
  [dimensionless] Fraction of water consumption that is from saline ground water
- EF_w_Mg: 8.81563e-5
  [kg/L water] kg of water quality constituent per L of water produced
- E_w_Cu: 1.12976e-10; = EF_w_Cu*Water_Produced
  [kg/kg coal] kg of water quality constituent per kg coal produced
- Water_FDensity: 998.23
  [kg/m^3] Density of pure water at 20° C and 1 atm. Source: CSGNetwork.com (http://www.csgnetwork.com/h2odenscalc.html)
- E_w_Boron: 4.86486e-9; = EF_w_Boron*Water_Produced
  [kg/kg coal] kg of water quality constituent per kg coal produced
- sal_gnd: 0.0108716; = Water_Consumed*pct_sal_gnd
  [L/kg coal] L of water consumption that is from saline ground water per kg coal produced
- EF_w_Lead: 1.01651e-9
  [kg/L water] kg of water quality constituent per L of water produced
- EF_w_TSS: 1.01793e-5
  [kg/L water] kg of water quality constituent per L of water produced
- EF_w_barium: 5.57433e-8
  [kg/L water] kg of water quality constituent per L of water produced
- E_w_Selenium: 2.93425e-11; = EF_w_Selenium*Water_Produced
  [kg/kg coal] kg of water quality constituent per kg coal produced
- usr_sal_gnd: 0.358243
  [dimensionless] Fraction of water consumption that is from saline ground water
- EF_w_TDS: 0.00149433
  [kg/L water] kg of water quality constituent per L of water produced
- E_w_P: 2.95554e-10; = EF_w_P*Water_Produced
  [kg/kg coal] kg of water quality constituent per kg coal produced
- E_w_Mn: 2.50846e-9; = EF_w_Mn*Water_Produced
  [kg/kg coal] kg of water quality constituent per kg coal produced
- E_w_Cn: 1.79147e-10; = EF_w_Cn*Water_Produced
  [kg/kg coal] kg of water quality constituent per kg coal produced
- EF_w_Zinc: 1e-8
  [kg/L water] kg of water quality constituent per L of water produced
- E_w_Mg: 1.40469e-6; = EF_w_Mg*Water_Produced
  [kg/kg coal] kg of water quality constituent per kg coal produced
- E_w_Cadmium: 1.59341e-12; = EF_w_Cadmium*Water_Produced
  [kg/kg coal] kg of water quality constituent per kg coal produced
- E_w_barium: 8.88219e-10; = EF_w_barium*Water_Produced
  [kg/kg coal] kg of water quality constituent per kg coal produced
- EF_w_N_amm: 2.99484e-7
  [kg/L water] kg of water quality constituent per L of water produced
- EF_w_Iron: 1.01314e-7
  [kg/L water] kg of water quality constituent per L of water produced
- E_w_N_total: 2.39346e-8; = EF_w_N_total*Water_Produced
  [kg/kg coal] kg of water quality constituent per kg coal produced
- E_w_Na: 3.46176e-6; = EF_w_Na*Water_Produced
  [kg/kg coal] kg of water quality constituent per kg coal produced
- EF_w_sulfate: 0.000680572
  [kg/L water] kg of water quality constituent per L of water produced
- fresh_srf: 0.0050771; = Water_Consumed*pct_fresh_srf
  [L/kg coal] L of water consumption that is from fresh surface water per kg coal produced
- EF_w_Mn: 1.57427e-7
  [kg/L water] kg of water quality constituent per L of water produced
- EF_w_COD: 1.68538e-5
  [kg/L water] kg of water quality constituent per L of water produced
- E_w_Lead: 1.61972e-11; = EF_w_Lead*Water_Produced
  [kg/kg coal] kg of water quality constituent per kg coal produced
- auto_calc_wtr: 1
  [dimensionless] Variable to determine if fresh and saline ground water are automatically calculated. If 0, user is responsible for ensuring fractions add up to 1.
- EF_w_Hg: 1e-11
  [kg/L water] kg of water quality constituent per L of water produced
- EF_w_Cr: 1e-8
  [kg/L water] kg of water quality constituent per L of water produced
- EF_w_Boron: 3.05311e-7
  [kg/L water] kg of water quality constituent per L of water produced
- Water_Produced: 0.0159341
  [L/kg coal] L of water produced during mining per kg coal produced
- E_w_N_amm: 4.77201e-9; = EF_w_N_amm*Water_Produced
  [kg/kg coal] kg of water quality constituent per kg coal produced
- EF_w_Cu: 7.09023e-9
  [kg/L water] kg of water quality constituent per L of water produced
- EF_w_C_TOC: 6.05861e-6
  [kg/L water] kg of water quality constituent per L of water produced
- pct_fresh_gnd: 0.474455; = IF(auto_calc_wtr=1;IF(0.474454781149916-(pct_fresh_srf-0.167302119871893)*(0.474454781149916*1/(0.358243098978191+0.474454781149916))>0.0424528301886793;0.474454781149916-(pct_fresh_srf-0.167302119871893)*(0.474454781149916*1/(0.358243098978191+0.474454781149916));0.0424528301886793);usr_fresh_gnd)
  [dimensionless] Fraction of water consumption that is from fresh ground water
- E_w_Ni: 1.59341e-10; = EF_w_Ni*Water_Produced
  [kg/kg coal] kg of water quality constituent per kg coal produced

## Reference product
- Water use and quality; Production mix, from surface coal mine: 1 Item(s); data quality (2,3,2,1,2)

## Inputs from nature
- Water (surface water, fresh) [Water]: 0.00506811 kg; = fresh_srf*(1/1000)*(Water_FDensity); data quality (2,3,2,1,2)
- Water (ground water, fresh) [Water]: 0.0143727 kg; = fresh_gnd*(1/1000)*(Water_FDensity); data quality (2,3,2,1,2)
- Water (ground water, saline) [Water]: 0.0111411 kg; = sal_gnd*(1/1000)*(Water_SDensity); data quality (2,3,2,1,2)

## Emissions to nature
All rows: data quality (2,3,2,1,2)
- Selenium [Heavy metals to fresh water]: 2.93425e-11 kg; = E_w_Selenium
- Aluminium [Heavy metals to fresh water]: 2.5087e-10 kg; = E_w_Al
- Barium [Inorganic emissions to fresh water]: 8.88219e-10 kg; = E_w_barium
- Chromium (unspecified) [Heavy metals to fresh water]: 1.59341e-10 kg; = E_w_Cr
- Chemical oxygen demand (COD) [Analytical measures to fresh water]: 2.6855e-7 kg; = E_w_COD
- Nitrogen (as total N) [Inorganic emissions to fresh water]: 2.39346e-8 kg; = E_w_N_total
- Water (wastewater) [Water]: 0.0159341 kg; = Water_Produced
- Nickel (+II) [Heavy metals to fresh water]: 1.59341e-10 kg; = E_w_Ni
- Sulfates [Inorganic emissions to fresh water]: 1.08443e-5 kg; = E_w_sulfate
- Arsenic (+V) [Heavy metals to fresh water]: 3.53457e-11 kg; = E_w_arsenic
- Phosphorus [Inorganic emissions to fresh water]: 2.95554e-10 kg; = E_w_P
- Lead (+II) [Heavy metals to fresh water]: 1.61972e-11 kg; = E_w_Lead
- Copper (+II) [Heavy metals to fresh water]: 1.12976e-10 kg; = E_w_Cu
- Nitrate (as total N) [Inorganic emissions to fresh water]: 9.19678e-9 kg; = E_w_nitrxte
- Ammonia, as N [Inorganic emissions to fresh water]: 4.77201e-9 kg; = E_w_N_amm
- Biological oxygen demand (BOD) [Analytical measures to fresh water]: 7.96705e-8 kg; = E_w_BOD
- Calcium (+II) [Inorganic emissions to fresh water]: 1.13822e-6 kg; = E_w_Calcium
- Magnesium (+III) [Inorganic emissions to fresh water]: 1.40469e-6 kg; = E_w_Mg
- Cadmium (+II) [Heavy metals to fresh water]: 1.59341e-12 kg; = E_w_Cadmium
- Total Suspended Solids [Analytical measures to fresh water]: 1.62198e-7 kg; = E_w_TSS
- Strontium [Heavy metals to fresh water]: 4.97322e-8 kg; = E_w_Stront
- Fluoride [Inorganic emissions to fresh water]: 1.3614e-8 kg; = E_w_F
- Manganese (+II) [Heavy metals to fresh water]: 2.50846e-9 kg; = E_w_Mn
- Total organic carbon, TOC (Ecoinvent) [ecoinvent long-term to fresh water]: 9.65385e-8 kg; = E_w_C_TOC
- Zinc (+II) [Heavy metals to fresh water]: 1.59341e-10 kg; = E_w_Zinc
- Sodium (+I) [Inorganic emissions to fresh water]: 3.46176e-6 kg; = E_w_Na
- Mercury (+II) [Heavy metals to fresh water]: 1.59341e-13 kg; = E_w_Hg
- Boron [Inorganic emissions to fresh water]: 4.86486e-9 kg; = E_w_Boron
- Cyanide [Inorganic emissions to fresh water]: 1.79147e-10 kg; = E_w_Cn
- Iron [Heavy metals to fresh water]: 1.61435e-9 kg; = E_w_Iron
- Total Dissolved Solids [Analytical measures to fresh water]: 2.38108e-5 kg; = E_w_TDS

## Inventory method
Attributional

## Modelling constants
All elementary and technosphere flows are calculated on a functional unit basis. Calculations involving combustion primarily to generate useful work are done using lower heating values (LHV) and calculations involving combustion primarily to generate useful heat are done using higher heating values (HHV). Unless explicitly stated in the associated reference documents applicable calculations assumed standard atmospheric temperature and pressure (SATP).

## Completeness
All Relevant Flows Captured

## Data selection
Best publically available data

## Data treatment
No allocation applied

## Data collection
No primary data collected

## Intended application
This is a cradle-to-gate extraction process and can be used for any type of LCA study.

## Project
National Energy Technology Laboratory (NETL) Unit Process Library

## Sources
- U.S. Bureau of Land Management (BLM). 2008. Draft Environmental Impact Study, West Antelope II Coal Lease Application, Chapter 4: Cumulative Environmental Consequences.
- U.S. Geological Survey (USGS). 2005. Estimated Use of Water in the United States: Montana County-Level Data for 2005
- National Energy Technology Laboratory (NETL). 2013. Coal mine water use and quality; Surface mine
- U.S. Environmental Protection Agency (EPA). 2009b. National Pollutant Discharge Elimination System Permit, Water Quality Reporting Documentation
- U.S. Energy Information Administration (EIA). 2013. Historical Detailed Coal Production Data (1983-2011)
- HKM Engineering Inc. 2002. Northeast Wyoming River Basins Water Plant Technical Memoranda, Appendix G, Industrial Water Use.
- U.S. Geological Survey (USGS). 2005. Estimated Use of Water in the United States: Wyoming County-Level Data for 2005
- U.S. Geological Survey (USGS). 2009. Methods for Estimating Water Withdrawals for Mining in the United States, 2005
