# Natural gas, combusted in industrial boiler

Dataset: openLCA process, unit process
Category: Steam and Air-Conditioning Supply
Geography: RNA
Time period: 1998-01-01 to 2001-01-01
Generated by: Franklin Associates
Published in: Franklin Associates
restrictionsDescription: All information can be accessed by everybody.
copyright: false

## General comment
Important note: although most of the data in the US LCI database has
undergone some sort of review, the database as a whole has not yet
undergone a formal validation process.
Please email comments to lci@nrel.gov.

## Technology
Natural gas combustion in average industrial boiler.

## Geography
United States

## Reference product
- Natural gas, combusted in industrial boiler: 1 m3

## Inputs from technosphere
- Transport, combination truck, average fuel mix: 0.1985 t*km
  Represents transportation from natural gas plant to combustion.
- Natural gas, processed, at plant: 1 m3
- Transport, train, diesel powered: 0.011858 t*km
  Represents transportation from natural gas plant to combustion.
- Transport, pipeline, natural gas: 1.186 t*km
  Represents transportation from natural gas plant to combustion.

## Emissions to nature
- Benzene: 3.3639e-8 kg
- Mercury: 4.1648e-9 kg
- Naphthalene: 9.7713e-9 kg
- Methane, fossil: 3.6017e-5 kg
- Lead: 8.0092e-9 kg
- Dinitrogen monoxide: 3.6017e-5 kg
- Selenium: 3.8444e-10 kg
- Nitrogen oxides: 0.0016011 kg
- VOC, volatile organic compounds: 8.8405e-5 kg
- Arsenic: 3.2037e-9 kg
- Cobalt: 1.3456e-9 kg
- Sulfur oxides: 1.0126e-5 kg
- Formaldehyde: 1.2014e-6 kg
- Cadmium: 1.762e-8 kg
- Beryllium: 1.9222e-10 kg
- Carbon dioxide, fossil: 1.96 kg
- Chromium: 2.2426e-8 kg
- Radioactive species, unspecified: 0.0034247 kBq
- Carbon monoxide, fossil: 0.0013457 kg
- Nickel: 3.3639e-8 kg
- Manganese: 6.087e-9 kg
- Particulates, < 10 um: 0.00012115 kg

## Sources
- U.S. EPA
- Franklin Associates
- Center for Transportation Research, Argo
- EPA
- U.S. EPA Office of Solid Waste and Emerg
- unspecified
