# Electricity, at Grid, FRCC, 2010

Dataset: openLCA process, unit process
Category: Utilities
Geography: RNA
Time period: 2010-01-01 to 2010-01-01
Generated by: Samantha Wascavage
Published in: Chris Goemans, Athena Institute
restrictionsDescription: All information can be accessed by everybody.
copyright: false

## General comment
The methodology used to put together the grid information is outlined in reference 1.

## Technology
Typical

## Geography
Florida

## Reference product
- Electricity, at Grid, FRCC, 2010: 1 kWh

## Inputs from technosphere
- CUTOFF Electricity, biomass,liquid, unspecified, at power plant: 0.003532 kWh
  BLQ, OBL, SLW, WDL – Black Liquor
- CUTOFF Electricity, biomass, gas, landfill, at power plant: 0.000991 kWh
  LFG, OBG – Landfill Gas
- CUTOFF Electricity, other fuels, unspecified, at power plant: 0.01285 kWh
  OTH, MSN, PUR, WH – Other (Batteries, Chemicals, Coke Breeze, Hydrogen, Pitch, Sulfur, Tar Coal, and miscellaneous technologies)
- CUTOFF Electricity, petroleum coke, at power plant: 0.014773 kWh
  PC, SG, WO – Petroleum Coke
- Electricity, diesel, at power plant: 0.005056 kWh
  DFO, JF, KER – Distillate Fuel Oil (includes all Diesel and No. 1, No. 2, and No. 4 Fuel Oils)
- Electricity, bituminous coal, at power plant: 0.245236 kWh
  BIT, SC, SGC, WC - Anthracite Coal, and Bituminous Coal.
- Electricity, natural gas, at power plant: 0.570634 kWh
  NG – Natural Gas
- CUTOFF Electricity, hydropower, at power plant, unspecified: 0.000819 kWh
  WAT – Water (Conventional, Pumped Storage)
- Electricity, nuclear, at power plant: 0.110455 kWh
  NUC – Nuclear (Uranium, Plutonium, Thorium)
- Electricity, residual fuel oil, at power plant: 0.022225 kWh
  RFO – Residual Fuel Oil (includes No. 5 and No. 6 Fuel Oils and Bunker C Fuel Oil)
- CUTOFF Electricity, biomass, solid, agriculture by-products, at power plant: 0.013429 kWh
  AB, MSB, MSW, OBS, TDF, WDS – Agriculture Crop By-products / Straw / Energy Crops

## Sampling procedure
based on EIA electricity reports for all power plants in the US.

## Sources
- Chris Goemans, Athena Institute
- Statistics Canada
- unspecified
- USEPA
- Statistics Canada
- Statistics Canada
- Statistics Canada
- Statistics Canada
- USEPA
- EIA
- EIA
- EIA
- EIA
- EIA
- EIA
- EIA
- EIA
- EIA
- US DOE
- International Energy Agency
- EIA
