# Coal shuttle car; Manufacture; For underground mine, at plant; 28.6 metric tonnes

Dataset: openLCA process, unit process
Category: Bit. Coal and Lignite Surface Mining
Geography: US
Time period: 2007-01-01 to 2007-12-31
Generated by: Timothy Skone
Owner: National Energy Technology Laboratory
Reviewer: Robert James
Published in: National Energy Technology Laboratory (NETL). 2013. Coal shuttle car; Manufacture; For underground mine, at plant; 28.6 metric tonnes
restrictionsDescription: Use of this dataset is not restricted, but a statement of attribution is required. Please use the following attribution statement:
National Energy Technology Laboratory's (NETL) Unit Process Library
626 Cochrans Mill Road, P.O. Box 10940
Pittsburgh, PA 15236-0940
http://www.netl.doe.gov/research/energy-analysis/life-cycle-analysis/unit-process-library
Neither the U.S. Department of Energy (DOE) National Energy Technology Laboratory (NETL) nor any person acting on behalf of these organizations:
A. Makes any warranty or representation, express or implied, with respect to the accuracy, completeness, or usefulness of the information contained in this document, or that the use of any information, apparatus, method, or process disclosed in this document may not infringe on privately owned rights; or
B. Assumes any liability with this report as to its use, or damages resulting from the use of any information, apparatus, method, or process disclosed in this document.
Reference herein to any specific commercial product, process, or service by trade name, trademark, manufacturer, or otherwise, does not necessarily constitute or imply its endorsement, recommendation, or favoring by NETL. The views and opinions of the authors expressed herein do not necessarily state or reflect those of NETL.
copyright: true

## General comment
This process is part of the NETL Unit Process Library. To access the library and the original dataset:
1) Navigate to the NETL LCA home page (http://www.netl.doe.gov/lca)
2) Then navigate to the “Unit Process Library”
3) From the library, the unit process of interest can be found either through the "Complete Listing of the Unit Process Library link" or through the link to the "Unit Process Database" spreadsheet
4) For each process, a Data Sheet (DS) and Data File (DF) are available

BRIEF DESCRIPTION
This unit process considers the amount of steel used in the construction of one shuttle car to be used to haul coal from the working mine face to the conveyor belt.

GOAL AND SCOPE
The scope of this unit process encompasses the materials and weights of those materials necessary to construct a single shuttle car, to be used for the preparation of underground Illinois No. 6 coal. The unit process is based on the reference flow of 1 shuttle car constructed, as described below, and as shown in the associated documentation (referenced in the Citation and Associated Documentation section below). The crusher is assumed to be constructed entirely of cold rolled steel; therefore cold rolled steel is assumed to be the only material required for scuttle car construction. Other materials are assumed to be negligible. This unit process is used during LC Stage #1 to assist in the preparation of underground coal. It is combined with other mine equipment construction unit processes in the assembly unit process for underground coal, Coal mine equipment assembly; Production mix; Underground coal mine, Illinois No. 6 Coal. This assembly unit process quantifies the fraction of each piece of equipment needed under LC Stage #1 to produce 1 kg of coal ready for transport (LC Stage #2) to the energy conversion facility (LC Stage #3).

BOUNDARY AND DESCRIPTION
This process encompasses the materials that are used in the construction of one shuttle car to be used to haul coal from the working mine face to the conveyor belt. The shuttle car is assumed to consist of steel, with only negligible amounts of rubber for the four tires. These cars are powered by batteries that run motors for the pump, conveyor system, and traction systems. They can handle payloads up to 19 metric tonnes (Phillips 2007a, b, c, d). Batteries for the car were not separated from the overall weight of the car and, as a result, battery weight is included in the total weight of steel required for the shuttle car. This is a data limitation. The weights of four different sizes of shuttle cars from Phillips Machine Service were obtained and averaged. The cars ranged in capacity from 7.2 cubic meters to 16.1 cubic meters. Each car has an empty weight between 24.5 and 32.7 metric tonnes (Phillips 2007a, b, c, d). These minimum and maximum values were averaged to calculate an average of 28.6 metric tonnes, the empty weight of a single shuttle car.

This process contains one or more surrogate product flows as replacements for proprietary product flows used in the NETL Unit Process Library. All surrogate flow were taken from the U.S. Life Cycle Inventory Database; a list of surrogate flows used in this process is provided below:
1) Cold rolled sheet, steel, at plant

CITATION AND ASSOCIATED DOCUMENTATION
This document should be cited as:
National Energy Technology Laboratory (NETL). 2015. NETL Life Cycle Inventory Data – Unit Process: Coal shuttle car; Manufacture; For underground mine, at plant; 28.6 metric tonnes. U.S. Department of Energy, National Energy Technology Laboratory. Last Updated: September 2015 (Version 01). Retrieved on [DATE] from [URL for this dataset].

This dataset is part of the NETL Unit Process Library. The Library offers additional information concerning this dataset in the form of a Detailed Spreadsheet Documentation (DS) file and a Process Documentation File (DF). The DS file is an Excel file that contains all of the parameters, inputs, and outputs for a given system as well as background data, calculations and quality scores. The DF file is a PDF document that contains major assumptions and data sources that are the basis for each unit process. The NETL Unit Process Library is located on the NETL website (netl.doe.gov) under Research / Energy Analysis / Energy Trends and Issues / Life Cycle Analysis / Unit Process Library.

This dataset was converted directly from the DS with additional supporting information provided by the DF. Full citations for the DS and DF are given below.

DS File
National Energy Technology Laboratory (NETL). 2013. NETL Life Cycle Inventory Data – Unit Process: Shuttle Car Construction. U.S. Department of Energy, National Energy Technology Laboratory. Last Updated: September 2008 (version 01). Retrieved on 09/29/2015 from: URL

DF File
National Energy Technology Laboratory (NETL). 2013. NETL Life Cycle Inventory Data – Unit Process: Shuttle Car Construction. U.S. Department of Energy, National Energy Technology Laboratory. Last Updated: September 2008 (version 01). Retrieved on 09/29/2015 from: URL

## Technology
This unit process considers the amount of steel used in the construction of one shuttle car to be used to haul coal from the working mine face to the conveyor belt. This process encompasses the materials that are used in the construction of one shuttle car to be used to haul coal from the working mine face to the conveyor belt. The shuttle car is assumed to consist of steel, with only negligible amounts of rubber for the four tires. These cars are powered by batteries that run motors for the pump, conveyor system, and traction systems. They can handle payloads up to 19 metric tonnes (Phillips 2007a, b, c, d).

## Time period
This data set is representative of best available public data from 01/01/2007 to 12/31/2007 and is not subject to limited usability within sub-time spans (e.g. summer, winter).

## Reference product
- Coal shuttle car; Manufacture; For underground mine, at plant; 28.6 metric tonnes: 1 Item(s); data quality (2,3,3,3,1)

## Inputs from technosphere
- Cold rolled sheet, steel, at plant: 28600 kg; data quality (2,3,3,3,1)

## Inventory method
Attributional

## Modelling constants
All elementary and technosphere flows are calculated on a functional unit basis. Calculations involving combustion primarily to generate useful work are done using lower heating values (LHV) and calculations involving combustion primarily to generate useful heat are done using higher heating values (HHV). Unless explicitly stated in the associated reference documents applicable calculations assumed standard atmospheric temperature and pressure (SATP).

## Completeness
Individual relevant flows captured

## Data selection
Best publically available data

## Data treatment
No allocation applied

## Data collection
No primary data collected

## Intended application
This is a gate-to-gate basic process and can be used for any type of LCA study.

## Project
National Energy Technology Laboratory (NETL) Unit Process Library

## Sources
- National Energy Technology Laboratory (NETL). 2013. Coal shuttle car; Manufacture; For underground mine, at plant; 28.6 metric tonnes
- Phillips Machine Service. 2007a. The Freedom Car Family: FC12 Shuttle Coal Hauler
- Phillips Machine Service. 2007c. The Freedom Car Family: FC20 Shuttle Coal Hauler
- Phillips Machine Service. 2007d. The Freedom Car Family: FC25 Shuttle Coal Hauler
- Phillips Machine Service. 2007b. The Freedom Car Family: FC16 Shuttle Coal Hauler
