# Butadiene, at plant

Dataset: openLCA process, unit process
Category: Petrochemical Manufacturing
Geography: RNA
Time period: 2003-01-01 to 2003-01-01
Generated by: Franklin Associates
Published in: THE PLASTICS DIVISION OF THE AMERICAN C
restrictionsDescription: All information can be accessed by everybody.
copyright: false

## General comment
Numerous coproduct streams are produced during this process. Butadiene is produced as a coproduct in ethylene production. Fuel gas and off-gas are two other coproducts produced that are exported to another process for fuel use. When the fuel coproducts are exported from the hydrocracker, they carry with them the allocated share of the inputs and outputs for their production. The ratio of the mass of the exported fuel over the total mass output is removed from the total inputs and outputs of the hydrocracker, and the remaining inputs and outputs are allocated over the material hydrocracker products. No energy credit is applied for the exported fuels, since both the inputs and outputs for the exported fuels have been removed from the data set. Complete inventory data and metadata are available in full in the final report and appendices, Cradle-to-Gate Life Cycle Inventory of Nine Plastic Resins and Four Polyurethane Precursors. This report has been extensively reviewed within Franklin Associates and has undergone partial critical review by ACC Plastics Division members and is available at: www.americanchemistry.com. Quantities may vary slightly between the reference to main source and and this module due to rounding. Important note: although most of the data in the US LCI database has undergone some sort of review, the database as a whole has not yet undergone a formal validation process. Please email comments to lci@nrel.gov.

## Technology
Steam cracking of hydrocarbons (including natural gas liquids and petroleum liquids)

## Geography
North America (US and Canada)

## Reference product
- Butadiene, at plant: 1 kg

## Inputs from technosphere
- CUTOFF Natural gas, processed, for olefins production, at plant, internal offgas use: 0.14784 kg
  A portion of the material feed combusts within the hydrocracker and produces an offgas, which provides an internal energy source.
- Transport, barge, residual fuel oil powered: 0.0807446 t*km
- Diesel, combusted in industrial equipment: 2.3111e-5 l
  Includes diesel fuel and distillate oil amounts.
- Transport, barge, diesel powered: 0.0242841 t*km
- CUTOFF Disposal, solid waste, unspecified, to municipal incineration: 0.00750419 kg
- Transport, train, diesel powered: 0.0251968 t*km
- Electricity, at grid, US, 2008: 0.271397 kWh
- CUTOFF Petroleum refining, for olefins production, at plant, material use: 0.359688 kg
  Specific raw materials from oil refining and natural gas processing include ethane, propane, liquid feed, heavy raffinate, and DNG.
- CUTOFF Natural gas, processed, for olefins production, at plant, material use: 0.647516 kg
  (same comment as for CUTOFF Petroleum refining, for olefins production, at plant, material )
- Transport, pipeline, natural gas: 1.27924 t*km
- Electricity, at cogen, for natural gas turbine: 0.0309436 kWh
- Natural gas, combusted in industrial boiler, at hydrocracker, for butadiene: 0.0756399 m3
- CUTOFF Disposal, solid waste, unspecified, to sanitary landfill: 4.21306e-5 kg
- Gasoline, combusted in equipment: 2.66126e-5 l
- CUTOFF Disposal, solid waste, unspecified, to waste-to-energy: 6.79853e-6 kg
- CUTOFF Petroleum refining, for olefins production, at plant, internal offgas use: 0.08316 kg
  (same comment as for CUTOFF Natural gas, processed, for olefins production, at plant, inter)
- Transport, pipeline, unspecified petroleum products: 0.105029 t*km
- Transport, combination truck, diesel powered: 0.0322447 t*km

## Inputs from nature
- Water, process, unspecified natural origin/m3: 0.000817564 m3
  Consumptive use includes: water incorporated into the product, water evaporated during the process, and/or water used and released to a body other than that from which it was drawn.

## Emissions to nature
- Sulfur oxides: 1e-6 kg
  This emission was reported by fewer than three companies. To indicate known emissions while protecting the confidentiality of individual company responses, the emission is reported only by order of magnitude.
- NMVOC, non-methane volatile organic compounds, unspecified: 1e-5 kg
  (same comment as for Sulfur oxides)
- Organic substances, unspecified: 1e-6 kg
  (same comment as for Sulfur oxides)
- TOC, Total Organic Carbon: 1e-6 kg
  (same comment as for Sulfur oxides)
- Particulates, unspecified: 1e-7 kg
  (same comment as for Sulfur oxides)
- Acetone: 1e-11 kg
  (same comment as for Sulfur oxides)
- Styrene: 1e-9 kg
  (same comment as for Sulfur oxides)
- Hydrogen: 1e-7 kg
  (same comment as for Sulfur oxides)
- VOC, volatile organic compounds: 1e-5 kg
  (same comment as for Sulfur oxides)
- Phenol compounds, unspecified: 1e-6 kg
  (same comment as for Sulfur oxides)
- BOD5, Biological Oxygen Demand: 1e-5 kg
  (same comment as for Sulfur oxides)
- COD, Chemical Oxygen Demand: 1e-5 kg
  (same comment as for Sulfur oxides)
- Xylene: 1e-9 kg
  (same comment as for Sulfur oxides)
- Particulates, > 2.5 um, and < 10um: 0.0001 kg
  (same comment as for Sulfur oxides)
- Benzene, ethyl-: 1e-8 kg
  (same comment as for Sulfur oxides)
- Benzene: 1e-8 kg
  (same comment as for Sulfur oxides)
- Naphthalene: 1e-11 kg
  (same comment as for Sulfur oxides)
- Methane, difluromonochloro-, HCFC-22: 1e-9 kg
  (same comment as for Sulfur oxides)
- Methane: 1e-6 kg
  (same comment as for Sulfur oxides)
- Carbon monoxide: 1e-6 kg
  (same comment as for Sulfur oxides)
- Suspended solids, unspecified: 1e-5 kg
  (same comment as for Sulfur oxides)
- Toluene: 1e-7 kg
  (same comment as for Sulfur oxides)

## Sampling procedure
Data collected from primary sources.

## Sources
- THE PLASTICS DIVISION OF THE AMERICAN C
