# Dry veneer, at plywood plant, US SE

Dataset: openLCA process, unit process
Category: Softwood Veneer and Plywood Manufacturing
Geography: RNA
Time period: 2000-01-01 to 2000-01-01
Generated by: Jamie Meil
Published in: Eric T. Sackimoto
restrictionsDescription: All information can be accessed by everybody.
copyright: true

## General comment
Base process data presented with allocations to within process co-products noted. Refer to allocation worksheet for specifics. All allocations performed using mass or volume.,
Important note: although most of the data in the US LCI database has
undergone some sort of review, the database as a whole has not yet
undergone a formal validation process.
Please email comments to lci@nrel.gov.

## Technology
typical

## Geography
US Southeast

## Reference product
- Dry veneer, at plywood plant, US SE: 1 kg

## Inputs from technosphere
- Green veneer, at plywood plant, US SE: 1 kg
- CUTOFF Hogfuel-Biomass (50% MC), combusted in industrial boiler: 0.354 kg
- Natural gas, combusted in industrial boiler: 0.0129 m3
- Liquefied petroleum gas, combusted in industrial boiler: 0.000579 l
- Electricity, at grid, Eastern US, 2000: 0.0846 kWh

## Emissions to nature
- Formaldehyde: 2.32e-7 kg
- Methanol: 6.17e-7 kg
- Phenol: 2.7e-7 kg
- Acetaldehyde: 2.9e-7 kg
- Particulates, unspecified: 6.29e-5 kg

## Sources
- Leonard R. Johnson
- Eric T. Sackimoto
- Maureen Puetmann
