# Roundwood, hardwood, average, Med Intensity Management, NE-NC

Dataset: openLCA process, unit process
Category: Logging
Geography: RNA
Time period: 1993-01-01 to 2003-01-01
Generated by: Maureen Puetmann
Published in: Elaine Oneil
restrictionsDescription: All information can be accessed by everybody.
copyright: true

## General comment
1. Allocation on a mass basis.
2. Important note: although most of the data in the US LCI database has
undergone some sort of review, the database as a whole has not yet
undergone a formal validation process.
Please email comments to lci@nrel.gov.

## Technology
Average technology. Some data extrapolated from similar processes.

## Geography
Northeast/North Central (NE/NC) region of the US : Connecticut, Delaware, Illinois, Indiana, Iowa, Maine, Maryland, Massachusetts, Michigan, Minnesota, Missouri, New Hampshire, New Jersey, New York, Ohio, Pennsylvania, Rhode Island, Vermont, West Virginia, and Wisconsin.

## Reference product
- Roundwood, hardwood, average, Med Intensity Management, NE-NC: 138.09 m3
  Ovendry density = 580 kg/m3

## By-products
- Pulpwood, hardwood, average, Med Intensity Management, NE-NC: 172.93 m3
  Ovendry density = 580 kg/m3
- Bark, hardwood, average, Med Intensity Management, NE-NC: 19122 kg
  Ovendry density = 580 kg/m3

## Inputs from technosphere
- Chainsawing, hand felling, NE-NC: 60.392 h
  Based on a rate of 0.19 standard machine hours per m3
- Loader operation, large, NE-NC: 23.616 h
  Based on a rate of 0.08 standard machine hours per m3
- Chainsawing, delimbing, NE-NC: 30.255 h
  Based on a rate of 0.10 standard machine hours per m3
- Skidding, wheeled cable skidder, 120-160 HP: 56.652 h
  Based on a rate of 0.18 standard machine hours per m3

## Inputs from nature
- Carbon dioxide, in air: 146740 kg
  Based on carbon content of roundwood
- Wood, hard, NE-NC, standing: 343.99 m3
- Carbon dioxide, in air: 35032 kg
  Based on carbon content of bark
- Carbon dioxide, in air: 183750 kg
  Based on carbon content of pulpwood

## Sampling procedure
Harvesting production, cost and fuel consumption rates were assimilated from existing studies of harvesting equipment typical of the systems used to harvest sites in the region. These studies included both personal interviews with timber harvesting contractors and published information. The costs, production and consumption rates were
developed for equipment options within each component of the system. Harvesting systems were developed as combinations of these harvesting components. Although there are many combinations of harvesting equipment and systems that can be used for harvesting timber, this analysis assumes the use of the most common systems.

## Sources
- Elaine Oneil
- Maureen Puettmann
