# Roundwood, softwood, green, at mill, NE-NC

Dataset: openLCA process, unit process
Category: Logging
Geography: RNA
Time period: 2006-01-01 to 2007-01-01
Generated by: Maureen Puetmann
Published in: Richard D. Bergman
restrictionsDescription: All information can be accessed by everybody.
copyright: false

## General comment
All weights given on an ovendry basis.
Important note: although most of the data in the US LCI database has
undergone some sort of review, the database as a whole has not yet
undergone a formal validation process.
Please email comments to lci@nrel.gov.

## Technology
Average transport distance.

## Geography
NE/NC = Northeast (NE) and Northcentral (NC) United States. Some states are however omitted: Connecticut, Delaware, Illinois, Iowa, New Jersey, and Ohio.

## Reference product
- Roundwood, softwood, green, at mill, NE-NC: 1 m3
  Weight reported on an ovendry basis. Moisture content = 96.5%, Green volume specific density = 0.36.

## By-products
- Bark, softwood, green, at mill, NE-NC: 49.11 kg
  (same comment as for Roundwood, softwood, green, at mill, NE-NC)

## Inputs from technosphere
- Transport, combination truck, diesel powered: 77.11 t*km
  Transport of roundwood logs over 109 km. Note: mass of 1 kg ovendry basis = 1.965 kg at 96.5% moisture content.
- Transport, combination truck, diesel powered: 10.52 t*km
  Transport of bark over 109 km. Note: mass of 1 kg ovendry basis = 1.965 kg at 96.5% moisture content.
- Roundwood, softwood, average, at forest road, NE-NC: 1 m3
  Green volume specific gravity = 0.36.
- Bark, softwood, average, at forest road, NE-NC: 49.11 kg
  Weight reported on an ovendry basis.

## Sampling procedure
Questionnaires from 6 mills member of the Northeastern Lumber Manufacturer’s Association (NeLMA). Mills of the NeLMA are assumed to be representative of the softwood industry in the NE/NC region.

## Sources
- Richard D. Bergman
- Maureen Puettmann
