# Laminated veneer lumber processing, at plant, US SE

Dataset: openLCA process, unit process
Category: Softwood Veneer and Plywood Manufacturing
Geography: RNA
Time period: 2000-01-01 to 2000-01-01
Generated by: Jamie Meil
Published in: Dr. Jim Wilson
restrictionsDescription: All information can be accessed by everybody.
copyright: true

## General comment
Base process data presented with allocations to within process co-products noted. Refer to allocation worksheet for specifics. All allocations performed using mass or volume., See USSE plywood LCI module for dry veneer and PF resin inputs
Important note: although most of the data in the US LCI database has
undergone some sort of review, the database as a whole has not yet
undergone a formal validation process.
Please email comments to lci@nrel.gov.

## Technology
typical

## Geography
US Southeast

## Reference product
- Laminated veneer lumber, at plant, US SE: 1 kg

## By-products
- Coproducts of laminated veneer lumber production, unspecified, US SE: 0.095 kg

## Inputs from technosphere
- Diesel, combusted in industrial boiler: 0.000609 l
- Transport, combination truck, average fuel mix: 0.177 t*km
- Natural gas, combusted in industrial boiler: 0.0181 m3
- Electricity, at grid, Eastern US, 2000: 0.114 kWh
- Phenol formaldehyde, at plant: 0.0177 kg
- Liquefied petroleum gas, combusted in industrial boiler: 0.00076 l
- Dry veneer, at plywood plant, US SE: 1.04 kg

## Inputs from nature
- Water: 0.0574 l

## Emissions to nature
- Particulates, unspecified: 0.000895 kg
- Formaldehyde: 2.46e-6 kg
- Methanol: 8.92e-5 kg
- Acetone: 2.43e-5 kg

## Sources
- Dr. Jim Wilson
