# EPS insulation board, at plant

Dataset: openLCA process, unit process
Geography: RNA
Time period: 2005-01-01 to 2008-01-01
Generated by: Franklin Associates
Published in: Franklin Associates
restrictionsDescription: All information can be accessed by everybody.
copyright: false

## General comment
EPS board manufacturing data from 2008, EPS resin production data from 2005

## Technology
EPS block molding

## Geography
10 EPS insulation board manufacturers in the US and Canada; 2 US EPS resin producers

## Reference product
- EPS insulation board, at plant: 1 kg

## Inputs from technosphere
- CUTOFF Disposal, solid waste to incineration with energy recovery: 0.0017 kg
- Ethylbenzene styrene, at plant: 1.01 kg
- CUTOFF Disposal, solid waste to incineration without energy recovery: 1.8e-5 kg
- Liquefied petroleum gas, combusted in industrial boiler: 0.002 l
- Electricity, at grid, US, 2000: 0.79 kWh
- Natural gas, combusted in industrial boiler: 0.28 m3
- Transport, barge, average fuel mix: 2.38 t*km
- Natural gas, processed, for olefins production, at plant: 0.043 kg
- Transport, train, diesel powered: 1.81 t*km
- Petroleum refining coproduct, at refinery: 0.029 kg
- Transport, combination truck, diesel powered: 0.55 t*km
- Transport, ocean freighter, average fuel mix: 1.06 t*km
- CUTOFF Disposal, solid waste to sanitary landfill: 0.021 kg

## Emissions to nature
- HFCs and HCFCs, unspecified: 1.1e-6 kg
- Pentane: 0.041 kg
- Sulfur oxides: 3.6e-7 kg
- Organic substances, unspecified: 1.1e-5 kg
- Particulates, unspecified: 3.2e-5 kg
- Carbon monoxide, fossil: 2.1e-5 kg
- Carbon dioxide, fossil: 0.0039 kg
- Styrene: 0.00022 kg
- Nitrogen oxides: 4.6e-5 kg
- NMVOC, non-methane volatile organic compounds: 0.00013 kg

## Sampling procedure
questionaires to ……

## Sources
- Franklin Associates
- Franklin Associates
