# Electricity, at eGrid, RFCE, 2010

Dataset: openLCA process, unit process
Category: Utilities
Geography: RNA
Time period: 2010-01-01 to 2010-01-01
Generated by: Samantha Wascavage
Published in: Chris Goemans, Athena Institute
restrictionsDescription: All information can be accessed by everybody.
copyright: false

## General comment
The methodology used to put together the grid information is outlined in reference 1.

## Technology
Typical

## Geography
Eastern electricity grid to include New Jersey and Delaware and most of Pennsylvania and Maryland (less RFCW)

## Reference product
- Electricity, at eGrid, RFCE, 2010: 1 kWh

## Inputs from technosphere
- CUTOFF Electricity, other gases, unspecified, at power plant: 0.001697 kWh
  Other Gases OG, BFG, PG – Other Gas (Butane, Coal Processes, Coke-Oven, Refinery, and other processes)
- Electricity, natural gas, at power plant: 0.257147 kWh
  Natural Gas
- Electricity, residual fuel oil, at power plant: 0.00114 kWh
  Petroleum (RFO) – Residual Fuel Oil (includes No. 5 and No. 6 Fuel Oils and Bunker C Fuel Oil)
- CUTOFF Electricity, biomass,liquid, unspecified, at power plant: 0.001018 kWh
  Liquid Renewable Fuels (Biomass) BLQ, OBL, SLW, WDL - black liquor
- Electricity, bituminous coal, at power plant: 0.00869 kWh
  Subbituminous Coal
- CUTOFF Electricity, solar, unspecified, at power plant: 1e-6 kWh
  Solar (Photovoltaic, Thermal)
- Electricity, bituminous coal, at power plant: 0.274749 kWh
  Bituminous Coal BIT, SC, SGC, WC - Anthracite Coal, and Bituminous Coal.
- Electricity, nuclear, at power plant: 0.419133 kWh
  Nuclear Fission NUC – Nuclear (Uranium, Plutonium, Thorium)
- CUTOFF Electricity, petroleum coke, at power plant: 0.000163 kWh
  Petroleum (Other Fossil) PC, SG, WO – Petroleum Coke
- CUTOFF Electricity, biomass, solid, biogenic MSW, at power plant: 0.007442 kWh
  Solid Renewable Fuels (Biomass) MSB, AB, MSW, OBS, TDF, WDS – Municipal Solid Waste – Biogenic Component
- Electricity, diesel, at power plant: 0.00645 kWh
  Petroleum (DFO, JF, KER) – Distillate Fuel Oil (includes all Diesel and No. 1, No. 2, and No. 4 Fuel Oils)
- CUTOFF Electricity, MSW, non-biogenic, at power plant: 0.005296 kWh
  Other Fuels MSN, OTH, PUR, WH – Municipal Solid Waste – Non-biogenic components
- CUTOFF Electricity, biomass, gas, landfill, at power plant: 0.003114 kWh
  Gaseous Renewable Fuels (Biomass) LFG, OBG - landfill gas
- CUTOFF Electricity, at wind power plant, unspecified: 0.004388 kWh
  Wind
- CUTOFF Electricity, hydropower, at power plant, unspecified: 0.010021 kWh
  Hydroelectric WAT – Water (Conventional, Pumped Storage)

## Sampling procedure
based on EIA electricity reports for all power plants in the US.

## Sources
- Chris Goemans, Athena Institute
- Statistics Canada
- unspecified
- USEPA
- Statistics Canada
- Statistics Canada
- Statistics Canada
- Statistics Canada
- USEPA
- EIA
- EIA
- EIA
- EIA
- EIA
- EIA
- EIA
- EIA
- EIA
- US DOE
- International Energy Agency
- EIA
