# Dry rough lumber, at kiln, US PNW

Dataset: openLCA process, unit process
Category: Sawmills
Geography: RNA
Time period: 1999-01-01 to 2000-01-01
Generated by: Jamie Meil
Published in: Michael Milota
restrictionsDescription: All information can be accessed by everybody.
copyright: true

## General comment
Base process data presented with allocations to within process co-products noted. Refer to allocation worksheet for specifics. All allocations performed using mass or volume.,
Important note: although most of the data in the US LCI database has
undergone some sort of review, the database as a whole has not yet
undergone a formal validation process.
Please email comments to lci@nrel.gov.

## Technology
typical

## Geography
US Pacific North West

## Reference product
- Dry rough lumber, at kiln, US PNW: 1 kg

## Inputs from technosphere
- Diesel, combusted in industrial boiler: 0.000116 l
- Electricity, at grid, Western US, 2000: 0.0625 kWh
- CUTOFF Disposal, inert solid waste, to inert material landfill: 1.25e-5 kg
- CUTOFF Hogfuel-Biomass (50% MC), combusted in industrial boiler: 0.339 kg
- Rough green lumber, softwood, at sawmill, US PNW: 1 kg
- Transport, combination truck, average fuel mix: 0.045 t*km
- Natural gas, combusted in industrial boiler: 0.0439 m3

## Emissions to nature
- VOC, volatile organic compounds: 0.000109 kg
- Particulates, unspecified: 1.07e-5 kg

## Sampling procedure
survey method

## Sources
- Leonard R. Johnson
- Michael Milota
- Maureen Puetmann
