# Heat, onsite boiler, hardwood mill average, NE-NC

Dataset: openLCA process, unit process
Category: Steam and Air-Conditioning Supply
Geography: RNA
Time period: 2005-01-01 to 2006-01-01
Generated by: Maureen Puetmann
Published in: Richard D. Bergman
restrictionsDescription: All information can be accessed by everybody.
copyright: false

## General comment
Allocation on an energy basis (HHV).
Important note: although most of the data in the US LCI database has
undergone some sort of review, the database as a whole has not yet
undergone a formal validation process.
Please email comments to lci@nrel.gov.

## Technology
Average technology.

## Geography
NE/NC = Northeast (NE) and Northcentral (NC) United States. The 20 states are Connecticut, Delaware, Illinois, Indiana, Iowa, Maine, Maryland, Massachusetts, Michigan, Minnesota, Missouri, New Hampshire, New Jersey, New York, Ohio, Pennsylvania, Rhode Island, Vermont, West Virginia, Wisconsin.

## Reference product
- Electricity, onsite boiler, hardwood mill, average, NE-NC: 0.000497 kWh
  Net electricity output.

## By-products
- Heat, onsite boiler, hardwood mill, average, NE-NC: 1 MJ

## Inputs from technosphere
- Natural gas, combusted in industrial boiler: 0.00288 m3
- Wood fuel, hardwood, gen at lumber mill, combusted in industrial boiler, NE-NC: 0.0361 kg
  Weight reported on an ovendry basis.
- Liquefied petroleum gas, combusted in industrial boiler: 0.000212 l
- Diesel, combusted in industrial boiler: 0.000368 l
  Proxy for distillate fuel oil, combusted in industrial boiler
- Residual fuel oil, combusted in industrial boiler: 1.75e-6 l
- Wood fuel, hardwood, purchased, combusted in industrial boiler, NE-NC: 0.00621 kg
  Weight reported on an ovendry basis.

## Sampling procedure
Questionnaires from 20 mills (17 companies) from the 20 states of Forest Service (FS) Northeastern (NE) Region. Hardwood sawmills were members of the Hardwood Manufacturer Association (HMA).

## Sources
- Richard D. Bergman
- Maureen Puettmann
