# Combustion, dry wood residue, AP-42

Dataset: openLCA process, unit process
Category: Other Electric Power Generation
Geography: RNA
Time period: 1995-01-01 to 1995-01-01
Generated by: Daniel Inman
Published in: Hsu, D.
restrictionsDescription: All information can be accessed by everybody.
copyright: false

## Technology
current

## Geography
North America

## Reference product
- Combustion, dry wood residue, AP-42: 1055.87 MJ
  based on heat input (HHV)

## Emissions to nature
- Particulates, < 10 um: 0.0335658 kg
  for fabric filter
- Carbon monoxide, biogenic: 0.272155 kg
  dry wood-fired boiler
- Sulfur dioxide: 0.0113398 kg
  dry wood-fired boiler
- Dinitrogen monoxide: 0.0058967 kg
- Organic substances, unspecified: 0.0176901 kg
- Carbon dioxide, biogenic: 0 kg
  this is calculated from Aspen. Including this would be double calculating CO2.
- Hydrogen chloride: 0.00861826 kg
- Methane, biogenic: 0.00952544 kg
- Particulates, unspecified: 0.0453592 kg
  for fabric filter
- Nitrogen oxides: 0.22226 kg
  dry wood-fired boiler
- VOC, volatile organic compounds: 0.00771107 kg
- Particulates, < 2.5 um: 0.0294835 kg
  for fabric filter

## Sources
- USEPA
- Hsu, D.
