# Melamine urea formaldehyde resin, neat, 60% solids

Dataset: openLCA process, unit process
Category: Chemical Manufacturing
Geography: RNA
Time period: 2005-01-01 to 2005-01-01
Generated by: Maureen Puettmann
Published in: James B. Wilson
restrictionsDescription: All information can be accessed by everybody.
copyright: true

## General comment
MUF resin weight given on a liquid basis at 60% solids.

Important note: although most of the data in the US LCI database has
undergone some sort of review, the database as a whole has not yet
undergone a formal validation process.
Please email comments to lci@nrel.gov. This MUF process has been reviewed by 6 industry representatives and 2 reviewers from a peer review journal

## Technology
The resin manufacturing processes begin with the conversion of methanol by catalytic oxidation in a reactor vessel to produce an aqueous form of formaldehyde The methanol is first vaporized by warming, mixed with air, and then introduced into a reactor containing a metal catalyst of either silver or molybdenum/iron oxide in very small quantities. Upon exiting the reactor the formaldehyde is cooled and then sent to the absorber where it is absorbed into water to produce an aqueous solution. Heat is recovered during this process, excess steam is captured and used elsewhere in the manufacturing process. Various formaldehyde resins are then produced in a batch reactor by reacting formaldehyde with either urea, melamine, phenol, resorcinol or some combination of these. The process involves heating the mix and controlling the reaction by controlling the temperature, pH, ratio of formaldehyde to urea, phenol, melamine, resorcinol or some combination of these chemicals, and the rate of charging until the desired degree of polymerization is achieved. The reaction is quenched and then cooled. If needed, water is stripped off to provide the desired percentage of resin solids. Most of the process water is recycled and used within the production process. Very little waste is generated by resin production. Some production facilities used regenerative thermal oxidizers (RTOs), regenerative catalytic oxidizers (RCOs) and/or wet scrubbers as emission controllers to reduce the type and percentage of some emissions. RTOs and RCOs require the additional use of electricity and natural gas for their operation. It is noteworthy that essentially all production facilities started with methanol, only a very small amount (<1%) of formaldehyde was purchased for these operations, as such it was not included in the analysis.

## Geography
Average US, United States data

## Reference product
- Melamine urea formaldehyde resin, neat, 60% solids: 1 kg
  MUF resin neat at 60% solids, the other 40% of weight is water, the molar ratio of F to U+M is typically 1.15-1.30 wt. average for moisture resistant resin, the molar ratio for this average resin is 1.16.

## Inputs from technosphere
- Electricity, at grid, US, 2000: 0.0209167 kWh
  for processing
- Methanol, at plant: 0.304 kg
  100% solids
- CUTOFF Disposal, solid waste, unspecified, to unspecified landfill: 5.09e-5 kg
- CUTOFF Sodium hydroxide, at plant: 0.000209 kg
  neat liquid, 100% solids
- Natural gas, combusted in industrial boiler: 0.0135 m3
- Liquefied petroleum gas, combusted in industrial boiler: 1.55e-5 l
  forklifts
- CUTOFF Melamine, at plant: 0.081 kg
  100% solids
- Transport, combination truck, diesel powered: 0.181 t*km
  Chemical tranport, wet weights. Urea = 123 km; methanol = 260 km ; melamine = 1,989 km; other chemicals = 347 km
- CUTOFF Urea, at regional storehouse: 0.397 kg
  100% solids
- CUTOFF Ammonium sulfate, at plant: 2.94e-5 kg
  neat liquid, 100% solids
- Electricity, at grid, US, 2000: 0.0141944 kWh
  for emissions control equipment (RTOs and RCOs)
- Transport, train, diesel powered: 0.779 t*km
  Chemical transport, wet weights. Urea = 792 km ; methanol =1990 km;
- CUTOFF Formic acid, at plant: 0.000509 kg
  neat liquid, 100% solids

## Inputs from nature
- Water, process, well: 0.103 kg
  well water for process and cooling taken as 16% of total water use
- Water, process, unspecified natural origin/kg: 0.688 kg
  municiple water for process and cooling taken as 84% of total water use

## Emissions to nature
- Formaldehyde: 7.84e-5 kg
  HCHO in survey
- Suspended solids, inorganic: 0.000394 kg
  TSS in survey
- Methanol: 5.49e-6 kg
- Ammonia, as N: 0.00013 kg
  NH3N in survey
- Solids, inorganic: 0.000239 kg
  solids in survey
- BOD5, Biological Oxygen Demand: 0.000662 kg
  BOD in survey
- Formaldehyde: 7.85e-6 kg
- Particulates: 1.65e-6 kg
- Dimethyl ether: 2.26e-6 kg
- VOC, volatile organic compounds: 4.94e-5 kg
  a number of plants use an RTO and RCO which reduces VOC and HAP emissions to those given here

## Sampling procedure
The survey represent 60% of total U.S. production for MUF resin; the production facilities were representative of U.S. production practices.

## Sources
- James B. Wilson
- James B. Wilson
