# Toluene diisocyanate, at plant, CTR

Dataset: openLCA process, unit process
Category: All Other Basic Organic Chemical Manufacturing
Geography: RNA
Time period: 2003-01-01 to 2004-01-01
Generated by: Franklin Associates
Published in: THE PLASTICS DIVISION OF THE ACC
restrictionsDescription: All information can be accessed by everybody.
copyright: false

## General comment
The toluene diisocyanate data for this module includes data for the production of carbon monoxide, dinitrotoluene (DNT), phosgene, and toluene diamine (TDA). Heat was exported as a coproduct for some producers. The energy amount for the exported heat was reported separately as recovered energy. A large amount of hydrogen chloride is produced as a coproduct during this process. A mass basis was used to partition the credit for each product. The coproduct amount for hydrogen chloride is not shown due to confidentiality issues. Complete inventory data and metadata are available in full in the final report and appendices, Cradle-to-Gate Life Cycle Inventory of Nine Plastic Resins and Four Polyurethane Precursors. This report has been extensively reviewed within Franklin Associates and has undergone partial critical review by ACC Plastics Division members and is available at: www.americanchemistry.com. Quantities may vary slightly between the reference to main source and and this module due to rounding. Important note: although most of the data in the US LCI database has undergone some sort of review, the database as a whole has not yet undergone a formal validation process. Please email comments to lci@nrel.gov.

## Technology
Phosgenation of toluene diamine (TDA)

## Geography
US

## Reference product
- Toluene diisocyanate, at plant, CTR: 1 kg

## By-products
- Recovered energy, for Toluene diisocyanate, CTR: 0.81668 MJ

## Inputs from technosphere
- CUTOFF Disposal, solid waste, process, to sanitary landfill: 0.014595 kg
- CUTOFF Disposal, solid waste,process, to municipal incineration: 0.0013784 kg
- CUTOFF Disposal, solid waste, process, to waste-to-energy: 0.034 kg
- CUTOFF Disposal, solid waste, fuel, to municipal incineration: 0.072837 kg

## Inputs from nature
- Salt, unspecified: 0.43129 kg
- Energy, unspecified: 0.0099655 MJ
  Energy unspecified reflects "other fossil" fuels
- Coal, lignite, in ground: 0.014468 kg
- Energy, geothermal: 0.0074407 MJ
- Gas, natural, in ground: 0.17178 kg
  This flow represents the amount of natural gas that is a material input for producing the resin output. The energy content of the natural gas used as EMR/feedstock is 49.8 MJ per kg. The energy content multiplied by the mass should be considered an Energy of Material Resource (EMR)/feedstock energy.
- Coal, unprocessed bituminous, in ground: 0.17094 kg
- Gas, natural, in ground: 0.61115 m3
  This flow represents the amount of natural gas that is used for fuel. The energy content of the natural gas used for fuel is 36.7 MJ per m3.
- Water, consumptive use, unspecified origin/m3: 0.0083145 m3
  Franklin Associates uses a default as opposed to Egalitarian approach in collecting data for water use. During data collection, water use data were only requested and compiled in terms of 'evaporative' or consumptive use (i.e., ultimate withdraws, evaporation, or incorporation into the product). Data were not collected to determine reliable averages for non-evaporative water use. In other words, averages for water inputs and outputs are not available for this unit process. Consumptive use includes: water incorporated into the product, water evaporated during the process, and/or water used and released to a body other than that from which it was drawn.
- Energy, from biomass: 0.0030661 MJ
- Oil, crude, in ground: 0.063357 kg
  This flow represents the amount of crude oil that is used for fuel. The energy content of the crude oil used for fuel is 43.7 MJ per kg.
- Energy, solar: 0.00031247 MJ
- Oil, crude, in ground: 0.32452 kg
  This flow represents the amount of crude oils that is a material input for producing the resin output. The energy content of the crude oil used as EMR/feedstock is 43.7 MJ per kg. The energy content multiplied by the mass should be considered an Energy of Material Resource (EMR)/feedstock energy.
- Energy, from hydro power: 0.14139 MJ
- Uranium oxide, 332 GJ per kg, in ore: 3.6883e-6 kg
- Trona: 0.00403 kg
- Energy, kinetic (in wind), converted: 0.0073626 MJ
- Nitrogen, in air: 0.052878 kg

## Emissions to nature
- Arsenic, ion: 4.7018e-8 kg
- Toluene, 2,4-diamine: 1e-8 kg
- Lead-210/kg: 2.4569e-17 kg
- Titanium, ion: 2.0992e-7 kg
- Methane: 0.00058821 kg
- Oils, unspecified: 2.0515e-5 kg
- Fluoride: 3.9851e-7, 6.8075e-7 kg (2 entries, compartments not in this file)
- Benzene, 1,2-dichloro-: 1e-6, 1e-7 kg (2 entries, compartments not in this file)
- Sodium hydroxide: 0.001 kg
- Bromoform: 3.4478e-10 kg
- Manganese: 5.3423e-8, 1.4625e-6 kg (2 entries, compartments not in this file)
- p-Cresol: 7.3392e-9 kg
- Methyl ethyl ketone: 9.853e-12, 3.4478e-9 kg (2 entries, compartments not in this file)
- 2-Hexanone: 1.5663e-9 kg
- Nitrate compounds: 1e-5 kg
- Ammonium chloride: 1.9576e-7 kg
- Carbon monoxide, fossil: 0.001119 kg
- Acetophenone: 1.3261e-10 kg
- Benzo(b,j,k)fluoranthene: 8.7305e-12 kg
- Naphthalene, 2-methyl-: 3.616e-9 kg
- Mercaptans, unspecified: 1.9178e-6 kg
- Xylene: 5.1901e-5, 1.1108e-7 kg (2 entries, compartments not in this file)
- Phenols, unspecified: 1.8012e-8, 4.4434e-8 kg (2 entries, compartments not in this file)
- Magnesium: 8.7305e-7, 9.8162e-5 kg (2 entries, compartments not in this file)
- Hexane: 5.9231e-10 kg
- VOC, volatile organic compounds: 0.00060462 kg
- Methane, monochloro-, R-40: 4.9267e-12, 4.6854e-9 kg (2 entries, compartments not in this file)
- Naphthalene: 4.2784e-9, 1.0984e-8 kg (2 entries, compartments not in this file)
- Phenol, 2,4-dimethyl-: 6.6234e-9 kg
- Acetone: 1.2522e-9 kg
- Chromium VI: 6.27e-9 kg
- Mercury: 5.2206e-8, 3.8861e-10 kg (2 entries, compartments not in this file)
- Fluorene, 1-methyl-: 1.3931e-11 kg
- TOC, Total Organic Carbon: 1e-5, 0.00081 kg (2 entries, compartments not in this file)
- Methane, chlorodifluoro-, HCFC-22: 1e-5 kg
- Methane, fossil: 0.0099647 kg
- Dibenzofuran: 2.3274e-11 kg
- Cyanide: 3.0009e-8, 2.2101e-8 kg (2 entries, compartments not in this file)
- Benzyl chloride: 6.1883e-9 kg
- 2-Chloroacetophenone: 6.1883e-11 kg
- Acenaphthylene: 1.9842e-11 kg
- Toluene diisocyanate: 1e-7 kg
- Dioxins, measured as 2,3,7,8-tetrachlorodibenzo-p-dioxin: 1.1873e-13 kg
- Formaldehyde: 9.3988e-7 kg
- Nitrogen, total: 1.0419e-7 kg
- Nickel: 5.6335e-8, 3.6814e-7 kg (2 entries, compartments not in this file)
- Yttrium: 1.5868e-9 kg
- Selenium: 1.7884e-8, 1.0781e-7 kg (2 entries, compartments not in this file)
- Aluminum: 2.3279e-5 kg
- Benzene: 2.5468e-7, 5.8663e-5 kg (2 entries, compartments not in this file)
- Phthalate, dioctyl-: 6.4535e-10 kg
- Phosphate: 1e-6 kg
- Phenanthrenes, alkylated, unspecified: 3.0285e-10 kg
- Biphenyl: 2.8861e-9, 1.3493e-10 kg (2 entries, compartments not in this file)
- Chrysene: 7.9369e-12 kg
- Radium-226/kg: 8.5476e-15 kg
- Dodecane: 1.2988e-8 kg
- Benzene, 1-methyl-4-(1-methylethyl)-: 1.2231e-11 kg
- Zinc: 5.6178e-7, 4.7711e-10 kg (2 entries, compartments not in this file)
- Naphthalenes, alkylated, unspecified: 7.3039e-10 kg
- PAH, polycyclic aromatic hydrocarbons: 6.4114e-9 kg
- Radium-228/kg: 4.3724e-17 kg
- Methane, dichloro-, HCC-30: 4.5236e-8 kg
- Copper: 4.14e-8, 7.1566e-10 kg (2 entries, compartments not in this file)
- Surfactants, unspecified: 7.4317e-8 kg
- Thallium: 2.8782e-9 kg
- Benzene, ethyl-: 7.158e-6, 1.4222e-8 kg (2 entries, compartments not in this file)
- Propene: 9.846e-8 kg
- Benzene, pentamethyl-: 9.1739e-12 kg
- Dissolved solids: 0.028055 kg
- Benzo(a)anthracene: 6.3494e-12 kg
- Ethane, 1,1,1,2-tetrafluoro-, HFC-134a: 4.2645e-8 kg
- Ammonium, ion: 4.1854e-8 kg
- Benzoic acid: 2.3985e-7 kg
- Chloroform: 5.2159e-10, 1e-9 kg (2 entries, compartments not in this file)
- Carbon monoxide: 0.0017197 kg
- Cadmium: 1.6407e-8 kg
- Chlorine: 8.1306e-7 kg
- Methane, chlorotrifluoro-, CFC-13: 8.0989e-9 kg
- Sulfur dioxide: 0.0035797 kg
- NMVOC, non-methane volatile organic compounds, unspecified origin: 0.00028202 kg
- Dinitrogen monoxide: 3.8575e-5 kg
- Anthracene: 1.6667e-11 kg
- Hydrogen fluoride: 1.1505e-5 kg
- Ethene, tetrachloro-: 3.7538e-9 kg
- Fluorene: 1.2043e-9, 7.2224e-11 kg (2 entries, compartments not in this file)
- Antimony: 1.3372e-8, 2.1796e-9 kg (2 entries, compartments not in this file)
- Cobalt: 5.2373e-9, 3.1757e-8 kg (2 entries, compartments not in this file)
- Beryllium: 2.8767e-9, 2.1932e-9 kg (2 entries, compartments not in this file)
- 4-Methyl-2-pentanone: 5.1637e-10 kg
- Nitrogen oxides: 0.0043437 kg
- Carbon dioxide, fossil: 1.8026 kg
- Suspended solids, unspecified: 0.0025235 kg
- Ethane, 1,2-dichloro-: 3.5362e-10 kg
- 5-methyl Chrysene: 1.7461e-12 kg
- o-Cresol: 6.8135e-9 kg
- Particulates, unspecified: 0.00067953 kg
- Eicosane: 3.5649e-9 kg
- Propanal: 3.3594e-9 kg
- Ethylene dibromide: 1.583e-9 kg
- Dibenzothiophene: 2.4248e-11 kg
- Copper, ion: 6.3494e-8 kg
- Particulates, < 10 um: 0.00021851 kg
- Iron: 4.4344e-5 kg
- Boron: 7.3974e-7 kg
- Phenanthrene: 2.143e-10, 1.89e-10 kg (2 entries, compartments not in this file)
- Cadmium, ion: 7.7123e-9 kg
- Radioactive species, unspecified: 3996.6 Bq
- Ethane, 1,2-dibromo-: 1.0609e-11 kg
- Sulfur oxides: 0.0015409 kg
- Sulfide: 1.0951e-6 kg
- Hexanoic acid: 4.9674e-8 kg
- Toluene: 2.3527e-7, 8.9482e-5 kg (2 entries, compartments not in this file)
- Molybdenum: 5.4256e-9 kg
- Benzo(a)pyrene: 3.016e-12 kg
- Radionuclides (Including Radon): 5.2428e-6 kg
- Pyrene: 2.6192e-11 kg
- Particulates, < 2.5 um: 0.00017955 kg
- BOD5, Biological Oxygen Demand: 0.0004354 kg
- Sodium, ion: 0.0014132 kg
- Tin: 5.4235e-8 kg
- Vanadium: 2.6117e-8 kg
- Hydrogen chloride: 9.4483e-5 kg
- Acidity, unspecified: 2.478e-6 kg
- Chloride: 0.0060739 kg
- Chromium: 3.6843e-8, 5.8443e-7 kg (2 entries, compartments not in this file)
- Tetradecane: 5.5354e-9 kg
- Fluoranthene: 5.6352e-11 kg
- Octadecane: 3.5262e-9 kg
- Acenaphthene: 4.0477e-11 kg
- Cumene: 4.6854e-11 kg
- Lithium, ion: 9.0141e-5 kg
- Ethane, chloro-: 3.713e-10 kg
- Particulates, > 2.5 um, and < 10um: 6.8542e-5 kg
- Sulfate: 9.4953e-5 kg
- Methane, tetrachloro-, CFC-10: 9.2589e-8 kg
- Decane: 6.8491e-9 kg
- COD, Chemical Oxygen Demand: 0.00066236 kg
- p-Xylene: 2.5368e-9 kg
- Ethane, 1,1,1-trichloro-, HCFC-140: 1.7681e-10 kg
- Methacrylic acid, methyl ester: 1.7681e-10 kg
- Docosane: 1.3098e-10 kg
- Bromide: 2.9738e-5 kg
- Ethane, 1,2-dichloro-1,1,2-trifluoro-, HCFC-123: 4.2645e-8 kg
- Kerosene: 9.3754e-8 kg
- n-Hexacosane: 8.1712e-11 kg
- o-Xylene: 2.5368e-9 kg
- Lead: 1.2634e-7, 7.3125e-8 kg (2 entries, compartments not in this file)
- Phenol: 1.1202e-7, 1.4145e-10 kg (2 entries, compartments not in this file)
- Silver: 2.9892e-7 kg
- Hexadecane: 1.421e-8 kg
- Ammonia: 0.00038728, 3.5662e-5 kg (2 entries, compartments not in this file)
- Hydrazine, methyl-: 1.5029e-9 kg
- Organic acids: 7.1936e-10 kg
- Calcium, ion: 0.00049173 kg
- Radioactive species, Nuclides, unspecified: 6.0794 Bq
- Methane, bromo-, Halon 1001: 1.4145e-9 kg
- Phosgene: 1e-8 kg
- Sulfuric acid, dimethyl ester: 4.2434e-10 kg
- t-Butyl methyl ether: 3.0942e-10 kg
- m-Xylene: 6.8815e-9 kg
- Furan: 3.1573e-13 kg
- Toluene, 2,4-dinitro-: 2.4753e-12 kg
- Barium: 0.00029352 kg
- Polycyclic organic matter, unspecified: 2.0615e-8 kg
- Fluorenes, alkylated, unspecified: 2.5831e-9 kg
- Sulfur: 5.8764e-7 kg
- Aldehydes, unspecified: 3.1032e-7 kg
- Arsenic: 3.9172e-8 kg
- Benzenes, alkylated, unspecified: 4.4571e-8 kg
- Strontium: 1.2869e-5 kg
- Vinyl acetate: 6.7187e-11 kg
- Organic substances, unspecified: 0.00012649 kg
- Acetaldehyde: 3.4309e-8 kg
- Carbon disulfide: 1.1493e-9 kg
- Hydrocarbons, unspecified: 1.1298e-6 kg
- Benzene, chloro-: 1.9449e-10 kg
- Benzo(ghi)perylene: 2.143e-12 kg
- Surfactants: 4.57e-8 kg
- Indeno(1,2,3-cd)pyrene: 4.8416e-12 kg
- Styrene: 2.2101e-10 kg
- Butadiene: 1.4922e-9 kg
- Isophorone: 5.1275e-9 kg

## Sampling procedure
Data are from both primary and secondary sources. The TDI data collected represents approximately half of the total North American TDI production amount. The TDI producers who provided data for this module verified that the characteristics of their plants are representative of a majority of North American TDI production.

## Sources
- THE PLASTICS DIVISION OF THE ACC
