# Blasthole drill; Manufacture; For surface coal mine, at plant

Dataset: openLCA process, unit process
Category: Bit. Coal and Lignite Surface Mining
Geography: US
Time period: 2009-01-01 to 2009-12-31
Generated by: Timothy Skone
Owner: National Energy Technology Laboratory
Reviewer: Robert James
Published in: National Energy Technology Laboratory (NETL). 2010. Blasthole drill; Manufacture; For surface coal mine, at plant
restrictionsDescription: This data may be used free of charge by anyone to perform LCA studies.  Any modifications or additions to the data in this data set invalidate the official approval of the data set owner.  In such circumstances, the data set user must clearly communicate that this data set's original contents have been modified.
Neither the U.S. Department of Energy (DOE) National Energy Technology Laboratory (NETL) nor any person acting on behalf of these organizations:
A. Makes any warranty or representation, express or implied, with respect to the accuracy, completeness, or usefulness of the information contained in this document, or that the use of any information, apparatus, method, or process disclosed in this document may not infringe on privately owned rights; or
B. Assumes any liability with this report as to its use, or damages resulting from the use of any information, apparatus, method, or process disclosed in this document.
Reference herein to any specific commercial product, process, or service by trade name, trademark, manufacturer, or otherwise, does not necessarily constitute or imply its endorsement, recommendation, or favoring by NETL. The views and opinions of the authors expressed herein do not necessarily state or reflect those of NETL.
copyright: true

## General comment
This process is part of the NETL Unit Process Library. To access the library and the original dataset:
1) Navigate to the NETL LCA home page (http://www.netl.doe.gov/lca)
2) Then navigate to the “Unit Process Library”
3) From the library, the unit process of interest can be found either through the "Complete Listing of the Unit Process Library link" or through the link to the "Unit Process Database" spreadsheet
4) For each process, a Data Sheet (DS) and Data File (DF) are available

BRIEF DESCRIPTION
This unit process encompasses the materials necessary to construct a single blasthole drill to drill holes for blasting at a large surface coal mine with dragline based on a P&H 250XP-DL Dragline Application Drill. Quantifies the amount of steel needed.

GOAL AND SCOPE
The scope of this process encompasses the materials and weights of those materials necessary to construct a single 250,000 lb blasthole drill, to be used for mining in a large scale surface mine. The process is based on the reference flow of 1 piece of blasthole drill, 250,000 lbs, as described below. The blasthole drill is assumed to be constructed entirely of steel; other materials are assumed to be negligible. By default, all steel within this study was assumed to be steel plate, based on available GaBi profiles, unless other steel types were specified per available data, or a higher grade of steel would be required, per NETL engineering judgment. Therefore, all steel considered in this unit process was assumed to be steel plate.

This process is used during LC Stage #1 to assist in the mining of coal from surface mines (such as Powder River Basin sub-bituminous coal). It is combined with other mining equipment construction unit processes in the assembly unit process, Coal mine equipment assembly; Production mix; Surface coal mine, Powder river basin, U.S. This assembly unit process quantifies the fraction of each piece of equipment needed under LC Stage #1 to produce 1 kg of coal ready for transport (LC Stage #2) to the energy conversion facility (LC Stage #3).

BOUNDARY AND DESCRIPTION
Construction of the blasthole drill is based on manufacturer specifications for a P&H 250XP-DL Dragline Application Drill, Rotary Blasthole Drill which weighs 250,000 lbs. The blasthole drill is used to facilitate removal of overburden and coal at the surface mine. The blasthole drill produces a series of holes, into which blasting powder is inserted and exploded, in order to loosen and facilitate overburden removal and coal extraction. This unit process considers only the construction materials required for the blasthole drill. Use of explosives is considered in a separate unit process.

An overview of the boundary of this unit process can be found in the Associated Documentation (referenced below). Emissions related to the physical assembly of the blasthole drill (e.g., that are emitted while putting together the components of a blasthole drill, including transport of those components) are not considered in this study. Upstream emissions from the production of raw materials used for the construction of the blasthole drill (e.g., steel plate) are calculated outside the boundary of this unit process, based on proprietary profiles available within the GaBi model. As discussed above, the blasthole drill constructed in this unit process is incorporated into the surface mine assembly processes for LC Stage #1 for surface mined Powder River Basin sub-bituminous coal.

The total weight of a blasthole drill was readily available but reliable data for the material breakdown of blasthole drill subcomponents were not. Therefore, the blasthole drill was assumed to be composed entirely of steel plate (Steel plate, BF (85% Recovery Rate) [Metals]). Total weight for one blasthole drill is estimated to be approximately 113,400 kg (250,000 lbs) (P&H 2009). Based on the assumption that the blasthole drill is constructed entirely out of steel plate, the total weight is assigned to this material. The associated documentation (referenced below) discusses: 1) relevant properties and assumptions used to calculate the amount of steel plate contained in a single blasthole drill; 2) a summary of modeled input and output flows; and 3) additional details regarding input and output flows, including calculation methods.

CITATION AND ASSOCIATED DOCUMENTATION
This dataset should be cited as:
National Energy Technology Laboratory (NETL). 2015. NETL Life Cycle Inventory Data – Unit Process: Blasthole drill; Manufacture; For surface coal mine, at plant. U.S. Department of Energy, National Energy Technology Laboratory. Last Updated: September 2015 (version 01). Retrieved on [DATE] from [URL for this dataset].

This dataset is part of the NETL Unit Process Library. The Library offers additional information concerning this dataset in the form of a Detailed Spreadsheet Documentation (DS) file and a Process Documentation File (DF). The DS file is an Excel file that contains all of the parameters, inputs, and outputs for a given system as well as background data, calculations and quality scores. The DF file is a PDF document that contains major assumptions and data sources that are the basis for each unit process. The NETL Unit Process Library is located on the NETL website (netl.doe.gov) under Research / Energy Analysis / Energy Trends and Issues / Life Cycle Analysis / Unit Process Library.

This dataset was converted directly from the DS with additional supporting information provided by the DF. Full citations for the DS and DF are given below.

DS File
National Energy Technology Laboratory (NETL). 2010. NETL Life Cycle Inventory Data – Unit Process: Blasthole Drill, 250,000 lbs, Construction. U.S. Department of Energy, National Energy Technology Laboratory. Last Updated: February 2010 (version 01). Retrieved on 6/30/2014 from: http://netl.doe.gov/File%20Library/Research/Energy%20Analysis/Life%20Cycle%20Analysis/UP_Library/DS_Stage1_C_Blasthole_Drill_250000lb_2010-01.xls

DF File
National Energy Technology Laboratory (NETL). 2010. NETL Life Cycle Inventory Data – Unit Process:Blasthole Drill, 250,000 lbs, Construction. U.S. Department of Energy, National Energy Technology Laboratory. Last Updated: December 2009 (version 01). Retrieved on 6/30/2014 from: http://netl.doe.gov/File%20Library/Research/Energy%20Analysis/Life%20Cycle%20Analysis/UP_Library/DF_Stage1_C_Blasthole_Drill_250000lb_2010-01.pdf

## Technology
This blasthole drill is used for mining in a large scale surface mine. Construction of the blasthole drill is based on manufacturer specifications for a P&H 250XP-DL Dragline Application Drill, Rotary Blasthole Drill which weighs 250,000 lbs. The blasthole drill is used to facilitate removal of overburden and coal at the surface mine. The blasthole drill produces a series of holes, into which blasting powder is inserted and exploded, in order to loosen and facilitate overburden removal and coal extraction.

## Time period
This data set is representative of best available public data from 01/01/2009 to 12/31/2009 and is not subject to limited usability within sub-time spans (e.g. summer, winter).

## Reference product
- Blasthole drill; Manufacture; For surface coal mine, at plant: 1 Item(s); data quality (2,3,1,1,1)

## Inputs from technosphere
- Steel plate; Blast furnace route; Production mix; 85% recovery rate: 113400 kg; data quality (2,3,1,1,1)

## Inventory method
Attributional

## Modelling constants
All elementary and technosphere flows are calculated on a functional unit basis. Calculations involving combustion primarily to generate useful work are done using lower heating values (LHV) and calculations involving combustion primarily to generate useful heat are done using higher heating values (HHV). Unless explicitly stated in the associated reference documents applicable calculations assumed standard atmospheric temperature and pressure (SATP).

## Completeness
Individual relevant flows captured

## Data selection
Best publically available data

## Data treatment
No allocation applied

## Data collection
No primary data collected

## Intended application
This is a gate-to-gate manufacturing process and can be used for any type of LCA study.

## Project
National Energy Technology Laboratory (NETL) Unit Process Library

## Sources
- P&H Mining Equipment. 2009. P&H 250XP-DL Dragline Application Drill, Rotary Blasthole Drill: Operating Specifications.
- National Energy Technology Laboratory (NETL). 2010. Blasthole drill; Manufacture; For surface coal mine, at plant
