# Polyol ether, for rigid foam polyurethane production, at plant, CTR

Dataset: openLCA process, unit process
Category: All Other Basic Organic Chemical Manufacturing
Geography: RNA
Time period: 2003-01-01 to 2004-01-01
Generated by: Franklin Associates
Published in: THE PLASTICS DIVISION OF THE ACC
restrictionsDescription: All information can be accessed by everybody.
copyright: false

## General comment
Heat was a coproduct for one producer of polyether polyol for use in rigid foam polyurethane. The energy for exported heat was reported separately as recovered energy. Complete inventory data and metadata are available in full in the final report and appendices, Cradle-to-Gate Life Cycle Inventory of Nine Plastic Resins and Four Polyurethane Precursors. This report has been extensively reviewed within Franklin Associates and has undergone partial critical review by ACC Plastics Division members and is available at: www.americanchemistry.com. Quantities may vary slightly between the reference to main source and and this module due to rounding. Important note: although most of the data in the US LCI database has undergone some sort of review, the database as a whole has not yet undergone a formal validation process. Please email comments to lci@nrel.gov.

## Technology
Reaction of sucrose initiator with hydroxide catalyst and propylene oxide, followed by separation and purification by distillation

## Geography
US

## Reference product
- Recovered energy, for Polyol ether, for rigid foam polyurethane production, at plant, CTR: 0.23311 MJ

## By-products
- Polyol ether, for rigid foam polyurethane production, at plant, CTR: 1 kg

## Inputs from technosphere
- CUTOFF Disposal, solid waste, fuel, to municipal incineration: 0.18922 kg
- CUTOFF Disposal, solid waste,process, to municipal incineration: 0.0048147 kg
- CUTOFF Disposal, solid waste, process, to waste-to-energy: 2.5849e-6 kg
- CUTOFF Disposal, solid waste, process, to sanitary landfill: 0.018234 kg

## Inputs from nature
- Salt, unspecified: 1.6746 kg
- Energy, from biomass: 0.0073952 MJ
- Energy, geothermal: 0.017946 MJ
- Energy, unspecified: 0.024036 MJ
- Uranium oxide, 332 GJ per kg, in ore: 8.8957e-6 kg
- Coal, unprocessed bituminous, in ground: 0.48003 kg
- Energy, kinetic (in wind), converted: 0.017758 MJ
- Limestone, in ground: 0.0725 kg
- Gas, natural, in ground: 0.82371 m3
- Coal, lignite, in ground: 0.034896 kg
- Oxygen, in air: 0.074936 kg
- Energy, solar: 0.00075365 MJ
- Oil, crude, in ground: 0.2489 kg
- Sugar beets, in ground: 1.215 kg
- Gas, natural, in ground: 0.39234 kg
- Energy, from hydro power: 0.34103 MJ
- Water, consumptive use, unspecified origin/m3: 0.016789 m3

## Emissions to nature
- Methane: 0.0016528 kg
- Particulates, < 2.5 um: 0.00037188 kg
- m-Xylene: 1.0101e-8 kg
- Isophorone: 2.93e-8 kg
- Nitrogen, total: 2.513e-7 kg
- Phenanthrene: 5.9569e-10, 2.7691e-10 kg (2 entries, compartments not in this file)
- Particulates, < 10 um: 0.0004652 kg
- Zinc: 1.5308e-9, 8.8234e-7 kg (2 entries, compartments not in this file)
- Pyrene: 7.2806e-11 kg
- Mercury: 6.7081e-10, 1.568e-7 kg (2 entries, compartments not in this file)
- Dinitrogen monoxide: 1e-7, 8.8012e-5 kg (2 entries, compartments not in this file)
- Yttrium: 2.3238e-9 kg
- Biphenyl: 4.2137e-9, 3.7506e-10 kg (2 entries, compartments not in this file)
- Radium-228/kg: 6.4012e-17 kg
- Titanium, ion: 3.0648e-7 kg
- Acetophenone: 7.5775e-10 kg
- Benzo(b,j,k)fluoranthene: 2.4269e-11 kg
- Toluene: 3.9991e-7, 0.00014397 kg (2 entries, compartments not in this file)
- Benzene, pentamethyl-: 1.4209e-11 kg
- Acetaldehyde: 5.2364e-7 kg
- Dibenzothiophene: 3.7861e-11 kg
- Naphthalene, 2-methyl-: 5.3057e-9 kg
- Cadmium: 3.2366e-8 kg
- Sulfuric acid, dimethyl ester: 2.4248e-9 kg
- o-Cresol: 9.9722e-9 kg
- Anthracene: 4.6331e-11 kg
- Suspended solids, unspecified: 0.0036709 kg
- Cyanide: 1.3682e-11, 1.2629e-7 kg (2 entries, compartments not in this file)
- Kerosene: 2.2613e-7 kg
- Methane, monochloro-, R-40: 2.6774e-8, 7.6308e-12 kg (2 entries, compartments not in this file)
- p-Cresol: 1.0745e-8 kg
- Aldehydes, unspecified: 1.6334e-7 kg
- Methane, tetrachloro-, CFC-10: 2.0756e-7 kg
- Nitrate compounds: 0.001 kg
- Chromium VI: 1.7429e-8 kg
- Propanal: 1.9196e-8 kg
- Chloroform: 2.9805e-9 kg
- Cumene: 2.6774e-10 kg
- Phenols, unspecified: 0.00098807, 6.8185e-8 kg (2 entries, compartments not in this file)
- Mercaptans, unspecified: 1.0961e-5 kg
- Carbon monoxide, fossil: 0.002287 kg
- Vanadium: 3.3326e-8 kg
- Toluene, 2,4-dinitro-: 1.4145e-11 kg
- BOD5, Biological Oxygen Demand: 0.00061375 kg
- Ethane, 1,1,1-trichloro-, HCFC-140: 1.0103e-9 kg
- Antimony: 1.9481e-8, 4.8846e-9 kg (2 entries, compartments not in this file)
- Manganese: 1.5369e-7, 3.7284e-6 kg (2 entries, compartments not in this file)
- Benzo(a)pyrene: 8.3837e-12 kg
- Nickel: 8.0863e-8, 1.3829e-6 kg (2 entries, compartments not in this file)
- Ammonium, ion: 1.0095e-7 kg
- Copper: 6.4872e-8, 2.2962e-9 kg (2 entries, compartments not in this file)
- Decane: 1.0031e-8 kg
- Sulfur dioxide: 0.0085791 kg
- Lead: 2.8483e-7, 1.888e-7 kg (2 entries, compartments not in this file)
- Phenol: 8.0826e-10, 7.2346e-7 kg (2 entries, compartments not in this file)
- TOC, Total Organic Carbon: 1.0587e-5 kg
- Phthalate, dioctyl-: 3.6877e-9 kg
- Benzenes, alkylated, unspecified: 6.5074e-8 kg
- Formaldehyde: 2.4656e-6 kg
- Copper, ion: 1.2745e-7 kg
- Chromium: 8.3853e-8, 8.5304e-7 kg (2 entries, compartments not in this file)
- Beryllium: 4.1852e-9, 6.0599e-9 kg (2 entries, compartments not in this file)
- Cobalt: 7.6677e-9, 1.1496e-7 kg (2 entries, compartments not in this file)
- Ethane, 1,2-dichloro-: 2.0207e-9 kg
- Molybdenum: 7.9441e-9 kg
- Fluoride: 2.2631e-6, 1.6419e-6 kg (2 entries, compartments not in this file)
- t-Butyl methyl ether: 1.7681e-9 kg
- 2-Hexanone: 2.2963e-9 kg
- Eicosane: 5.2223e-9 kg
- Hydrazine, methyl-: 8.5878e-9 kg
- Hexanoic acid: 7.2724e-8 kg
- Benzo(ghi)perylene: 5.9569e-12 kg
- Surfactants: 5.515e-8 kg
- Chrysene: 2.2062e-11 kg
- o-Xylene: 3.7204e-9 kg
- Butadiene: 2.5227e-8 kg
- Methane, dichloro-, HCC-30: 1.4979e-7 kg
- Octadecane: 5.1625e-9 kg
- Sulfur: 8.6385e-7 kg
- Phenanthrenes, alkylated, unspecified: 4.4216e-10 kg
- Ethane, 1,1,1,2-tetrafluoro-, HFC-134a: 9.5843e-8 kg
- 4-Methyl-2-pentanone: 7.9991e-10 kg
- Sulfide: 1.0467e-7 kg
- Dodecane: 1.9023e-8 kg
- Tetradecane: 8.1219e-9 kg
- Chloride: 0.0088346 kg
- Ethane, chloro-: 2.1217e-9 kg
- Methacrylic acid, methyl ester: 1.0103e-9 kg
- Carbon dioxide, fossil: 3.3965 kg
- Fluoranthene: 1.5664e-10 kg
- Ethylene dibromide: 1.9252e-9 kg
- Surfactants, unspecified: 1.1927e-7 kg
- Radioactive species, Nuclides, unspecified: 14.663 Bq
- Methane, chlorodifluoro-, HCFC-22: 5.8748e-10 kg
- Benzoic acid: 3.5116e-7 kg
- Hexane: 3.3846e-9 kg
- Benzene, ethyl-: 2.6525e-8, 0.0007411 kg (2 entries, compartments not in this file)
- Lead-210/kg: 3.597e-17 kg
- Chlorine: 2.2548e-6 kg
- Lithium, ion: 0.00014464 kg
- Radionuclides (Including Radon): 1.2645e-5 kg
- Methane, fossil: 0.015102 kg
- Vinyl acetate: 3.8393e-10 kg
- Dissolved solids: 0.056782 kg
- COD, Chemical Oxygen Demand: 0.0031666 kg
- Metallic ions, unspecified: 0.001 kg
- Hydrocarbons, unspecified: 2.7251e-6, 0.0007992 kg (2 entries, compartments not in this file)
- Particulates, unspecified: 0.00075714 kg
- PAH, polycyclic aromatic hydrocarbons: 1.0839e-7 kg
- Oils, unspecified: 1.2057e-5 kg
- Selenium: 3.9913e-8, 3.0325e-7 kg (2 entries, compartments not in this file)
- Ethane, 1,2-dibromo-: 6.062e-11 kg
- Fluorene: 2.0076e-10, 1.7592e-9 kg (2 entries, compartments not in this file)
- Furan: 7.6151e-13 kg
- Benzene: 3.7532e-7, 9.8149e-5 kg (2 entries, compartments not in this file)
- Thallium: 4.2023e-9 kg
- Docosane: 2.0287e-10 kg
- Arsenic: 1.0966e-7 kg
- p-Xylene: 3.7204e-9 kg
- Acid gases: 3.344e-5 kg
- Propylene oxide: 0.0003572 kg
- Tin: 7.9261e-8 kg
- Styrene: 5.8748e-10, 1.2629e-9 kg (2 entries, compartments not in this file)
- Polycyclic organic matter, unspecified: 2.5072e-8 kg
- Acidity, unspecified: 0.0076 kg
- Phenol, 2,4-dimethyl-: 9.6968e-9 kg
- Carbon monoxide: 0.00036892 kg
- Ethane, 1,2-dichloro-1,1,2-trifluoro-, HCFC-123: 9.5843e-8 kg
- Hexadecane: 2.081e-8 kg
- Hydrogen: 3.0549e-6 kg
- Methane, chlorotrifluoro-, CFC-13: 9.8499e-9 kg
- Nitrogen oxides: 0.0071458 kg
- Benzene, chloro-: 1.1114e-9 kg
- Xylene: 1.6136e-7, 8.3531e-5 kg (2 entries, compartments not in this file)
- Acenaphthylene: 5.5156e-11 kg
- Dibenzofuran: 3.6049e-11 kg
- Ammonia: 3.8988e-5, 2.0478e-5 kg (2 entries, compartments not in this file)
- Methyl ethyl ketone: 1.5261e-11, 1.9701e-8 kg (2 entries, compartments not in this file)
- NMVOC, non-methane volatile organic compounds, unspecified origin: 0.0049056 kg
- Naphthalenes, alkylated, unspecified: 1.0664e-9 kg
- Calcium, ion: 0.00071381 kg
- Magnesium: 2.4269e-6, 0.00014262 kg (2 entries, compartments not in this file)
- Bromoform: 1.9701e-9 kg
- Carbon disulfide: 6.5671e-9 kg
- Benzo(a)anthracene: 1.765e-11 kg
- Dioxins, measured as 2,3,7,8-tetrachlorodibenzo-p-dioxin: 3.8626e-13 kg
- Methane, bromo-, Halon 1001: 8.0826e-9 kg
- Sulfate: 0.00021927 kg
- Strontium: 1.8842e-5 kg
- 5-methyl Chrysene: 4.8537e-12 kg
- Benzyl chloride: 3.5362e-8 kg
- Organic acids: 1.735e-9 kg
- Sodium, ion: 0.002046 kg
- Cadmium, ion: 1.1826e-8 kg
- Benzene, 1-methyl-4-(1-methylethyl)-: 1.8945e-11 kg
- Acenaphthene: 1.1252e-10 kg
- Particulates, > 2.5 um, and < 10um: 0.00036981 kg
- Sulfur oxides: 0.0018234 kg
- Barium: 0.00042827 kg
- Naphthalene: 6.2768e-9, 2.6782e-8 kg (2 entries, compartments not in this file)
- Hydrogen chloride: 0.00024805 kg
- Arsenic, ion: 6.9506e-8 kg
- Iron: 6.8799e-5 kg
- Ethene, tetrachloro-: 1.0785e-8 kg
- Radium-226/kg: 1.2514e-14 kg
- VOC, volatile organic compounds: 0.0010679 kg
- Hydrogen fluoride: 3.0806e-5 kg
- Ammonium chloride: 4.7215e-7 kg
- Indeno(1,2,3-cd)pyrene: 1.3458e-11 kg
- Acetone: 1.9469e-9 kg
- Silver: 4.3296e-7 kg
- Aluminum: 3.544e-5 kg
- Sodium hydroxide: 0.001064 kg
- Fluorene, 1-methyl-: 2.1577e-11 kg
- Boron: 1.0832e-6 kg
- Propene: 1.6646e-6 kg
- Bromide: 4.3044e-5 kg
- Fluorenes, alkylated, unspecified: 3.7713e-9 kg
- Radioactive species, unspecified: 9642.5 Bq
- Organic substances, unspecified: 2.4939e-5 kg
- n-Hexacosane: 1.2656e-10 kg
- 2-Chloroacetophenone: 3.5362e-10 kg

## Sampling procedure
Data are from both primary and secondary sources. Data for the production of polyether polyol for use in rigid foam polyurethane were provided by two leading producers (2 plants) in North America. The polyether polyol producers who provided data for this module verified that the characteristics of their plants are representative of a majority of the North American production.

## Sources
- THE PLASTICS DIVISION OF THE ACC
