# Containerboard, average production, at mill, 2010

Dataset: openLCA process, unit process
Category: Pulp, Paper, and Paperboard Mills
Geography: US
Time period: 2010-01-01 to 2010-01-01
Generated by: Caroline Gaudreault
Reviewer: Jamie Meil
Published in: Corrugated Packaging Alliance (CPA)
restrictionsDescription: All information can be accessed by everybody.
copyright: true

## General comment
Containerboard (linerboard and corrugating medium), average U.S. production, at mill. By-products were allocated 0% of the impacts to enable the user to choose and apply their own allocation method more easily. All flows are production-weighted means. Data were developed for a full LCA that was critically reviewed. Reviewers were: Mr. Jamie Meil, Athena Institute - review panel Chairman; Ms. Lindita Bushi, Athena Institute; Ms Melissa Hamilton, Earthshift.

The unit process includes pulp production from wood and recovered paper, papermaking, and preparation for shipping to customers. Net purchased energy is included, but upstream flows associated with its generation are excluded. Flows associated with transportation of inputs from the technosphere are included. Product transportation is excluded.

## Technology
current technology mix for containerboard

## Geography
United States

## Time period
Primary data was collected from participating companies and associations for their operational activities representative of 2010.

## Reference product
- Containerboard, average production, at mill, 2010: 1.1052 kg

## By-products
- Sold steam, from industry-average containerboard (2010): 0.023259 MJ
  Produced as byproduct of containerboard production. Sold i.e., not used on site. Allocation set to 0%.
- Turpentine, from industry-average containerboard (2010): 0.0013366 kg
  (same comment as for Sold steam, from industry-average containerboard (2010))
- Tall oil, from industry-average containerboard (2010): 0.017228 kg
  (same comment as for Sold steam, from industry-average containerboard (2010))
- Sold electricity, from industry-average containerboard (2010): 0.079776 MJ
  (same comment as for Sold steam, from industry-average containerboard (2010))

## Inputs from technosphere
- CUTOFF Recovered paper, high grade deinking: 0.007481 kg
  Grade made of high-grade paper such as letterhead, copier paper, envelopes, and printer, and convertor scrap that has gone through the printing process
- Softwood logs with bark, harvested at average intensity site, at mill, US SE: 0.0015306 m3
  0.691849692 dry kg, 452 dry kg/m3 (http://www.corrim.org/pubs/reports/2013/phase1_updates/SE%20Lumber%20LCA%20may%202013%20final.pdf. Wood (logs and chips) usage in the process is distrubuted as follows: 51% ends up in pulp, 11% in self-generated hogged fuel, and 37% in black liquor.
- CUTOFF Sodium sulphide: 8.75e-5 kg
- Gasoline, at refinery: 3.38e-8 m3
- CUTOFF Disposal, wood ash mixture, pure, 0% water, to uns. land application: 0.0016238 kg
  i.e.: Disposal, wood ash mixture, pure, 0% water, to landfarming
- CUTOFF Disposal, coal ash, to uns. beneficial use: 0.0020872 kg
- CUTOFF Sodium dithionite, anhydrous, at plant: 3.43e-7 kg
  i.e.: Sodium dithionite, anhydrous, at plant
- CUTOFF Lime, hydrated, loose, at plant: 0.0011374 kg
  i.e.: Lime, hydrated, loose, at plant
- Limestone, at mine: 0.0013743 kg
- CUTOFF Maize starch, at plant: 0.0036817 kg
  i.e. : Maize starch, at plant
- Bituminous coal, at mine: 0.066043 kg
- Wood chips, softwood, green, at sawmill, NE-NC: 0.075221 kg
  northern SWD chips, dry mass. Wood (logs and chips) usage in the process is distrubuted as follows: 51% ends up in pulp, 11% in self-generated hogged fuel, and 37% in black liquor.
- CUTOFF Disposal, coal ash, to uns. land application: 0.0010955 kg
- CUTOFF Nitric acid, 50% in H2O, at plant: 2.92e-7 kg
- Petroleum coke, at refinery: 0.00192 kg
- Diesel, at refinery: 4.06e-6 m3
  for distillate fuel oil
- Wood chips, hardwood, green, at sawmill, NE-NC: 0.040465 kg
  northern HWD chips, dry mass. Wood (logs and chips) usage in the process is distrubuted as follows: 51% ends up in pulp, 11% in self-generated hogged fuel, and 37% in black liquor.
- CUTOFF Disposal, other solid waste from plant, to uns. landfill: 0.029944 kg
- CUTOFF Hydrogen peroxide, 50% in H2O, at plant: 0.00010104 kg
  i.e.: Hydrogen peroxide, 50% in H2O, at plant. dry weigh
- Oxygen, liquid, at plant: 0.0017516 kg
- CUTOFF Sodium hydrosulphide: 0.00027891 kg
- CUTOFF Color: 2.18e-5 kg
- CUTOFF Disposal, other solid waste from plant, to uns. land application: 0.0052036 kg
- CUTOFF AKD sizer, in paper production, at plant: 0.00094977 kg
  i.e.: AKD sizer, in paper production, at plant
- Diesel, at refinery: 8.17e-10 m3
- CUTOFF Disposal, wood ash, to uns. beneficial use: 0.0030011 kg
- Transport, combination truck, diesel powered: 0.61692 t*km
  Wood logs to P&P (pulp and paper) mills: 96.8% of total mass travels 145 km. Wood chips to P&P mills: 95.2% of total mass travels 259 km. Recovered fiber to P&P mills: 87.8% of total mass travels 201 km. Pulp to P&P mills: 78.6% of total mass travels 267 km. Chemicals: 59.5% of total mass travels 208km. Residuals to management: 87.8% of total mass travels 201km. Purchased hogged fuel, other biomass: 100% of total mass travels 145km.
- Pulp, kraft market, bleached, average production, at mill: 0.0012625 kg
  bleached kraft market pulp
- CUTOFF Antiskid: 4.26e-6 kg
- Sodium hydroxide, production mix, at plant: 0.0089578 kg
- Electricity, at grid, Texas US, 2000: 0.053725 MJ
  Net purchased, National average grid, Medium voltage: <50 kV
- CUTOFF Scale inhibitor: 2.01e-7 kg
- Roundwood, hardwood, green, at logyard, SE: 0.00015031 m3
  0.097401742 dry kg, 648 dry kg/m3 (http://www.corrim.org/pubs/reports/2010/phase2/Module_L.pdf, Includes bark. Wood (logs and chips) usage in the process is distrubuted as follows: 51% ends up in pulp, 11% in self-generated hogged fuel, and 37% in black liquor.
- CUTOFF Purchased steam mix: 1.2049 MJ
- Sulfuric acid, at plant: 0.010383 kg
- Transport, train, diesel powered: 0.31033 t*km
  Wood logs to P&P (pulp and paper) mills: 3.2% of total mass travels 2828 km. Wood chips to P&P mills: 4.8% of total mass travels 1989 km. Recovered fiber to P&P mills: 11.0% of total mass travels 589 km. Pulp to P&P mills: 21.4% of total mass travels 1347 km. Chemicals: 31.3% of total mass travels 1355 km. Residuals to management: 11.0% of total mass travels 589 km.
- Forest residue, processed and loaded, at landing system: 0.0102 kg
  For energy requirements: purchased: 0.006649412 kg, self-generated: 0.003550538 kg
- CUTOFF Unspecified biomass: 0.001852 kg
- Transport, barge, diesel powered: 0.0074898 t*km
  Recovered fiber to pulp and paper mills: 1.2% of total mass travels 824 km. Chemicals: 6.8% of total mass travels 336 km. Residuals to management : 1.2% of total mass travels 824 km
- CUTOFF Dispersant: 0.00024515 kg
- CUTOFF Phosphoric acid, industrial grade, 85% in H2O, at plant: 6.23e-8 kg
  i.e.: Phosphoric acid, industrial grade, 85% in H2O, at plant
- CUTOFF Sulphite, at plant: 0.0005815 kg
  i.e.: Sulphite, at plant. Sodium sulfate
- CUTOFF Sodium chlorate, powder, at plant: 0.0010133 kg
  i.e.: Dummy, Sodium chlorate, powder, at plant
- CUTOFF Wood fuel, hog fuel and bark, unspecified: 0.1062 kg
  Includes self-generated logging residues, purchased hogged fuel, as well as other renewable fuels. Self-generated hogged fuel (manufacturing) and black liquor solids are not included here but rather in total wood inputs above.
- CUTOFF Electricity, hydropower, at run-of-river power plant: 0.002124 MJ
  For self-generated hydro. i.e.: Electricity, hydropower, at run-of-river power plant
- Residual fuel oil, at refinery: 7.92e-6 m3
- CUTOFF Disposal, coal ash, to uns. landfill: 0.0058235 kg
- Methanol, at plant: 0.00010271 kg
- CUTOFF Cationic resin, at plant: 0.00013052 kg
  i.e. : Cationic resin, at plant
- Quicklime, at plant: 0.0043288 kg
- Liquefied petroleum gas, at refinery: 1.85e-7 m3
- CUTOFF Anionic resin, at plant: 5.18e-5 kg
  i.e.: Anionic resin, at plant
- CUTOFF Sodium hypochlorite, 15% in H2O, at plant: 3.45e-6 kg
  i.e. Sodium hypochlorite, 15% in H2O, at plant
- CUTOFF Precipitated calcium carbonate: 0.00031896 kg
- CUTOFF Disposal, wastewater treatment plant residuals, to uns. landfill: 0.030402 kg
- Hydrochloric acid, at plant: 1.3e-6 kg
- CUTOFF Disposal, wastewater treatment plant residuals, to uns. land application: 0.021245 kg
- CUTOFF Recycled non-deinked pulp: 0.0022998 kg
- Electricity, at grid, Eastern US, 2000: 1.1779 MJ
  Net purchased, National average grid, Medium voltage: <50 kV
- Natural soda ash (Sodium carbonate), at plant: 0.0010909 kg
  i.e.: Sodium carbonate from ammonium chloride production, at plant
- Natural gas, processed, at plant: 0.084814 m3
- CUTOFF Disposal, wastewater treatment plant residuals, to uns. Incinerator: 0.0055819 kg
- Transport, ocean freighter, diesel powered: 0.0032336 t*km
  Chemicals: 2.5% of total mass travel 2020 km
- CUTOFF Sodium acetate: 0.0001999 kg
- Ammonia, steam reforming, liquid, at plant: 0.00031947 kg
- CUTOFF Sodium sulphate, powder, production mix, at plant: 0.00049079 kg
  i.e.: Sodium sulphate, powder, production mix, at plant
- Roundwood, hardwood, average, at forest road, NE-NC: 4.7629e-5 m3
  0.029720529 dry kg, 624 dry kg/m3 (http://www.corrim.org/pubs/reports/2010/phase2/Module_C.pdf), Includes bark. Wood (logs and chips) usage in the process is distrubuted as follows: 51% ends up in pulp, 11% in self-generated hogged fuel, and 37% in black liquor.
- CUTOFF Recovered paper, mixed: 0.076241 kg
  Broad category that often includes items such as discarded mail, telephone books, paper board, magazines, and catalogs
- Wood chips, hardwood, green, at sawmill, SE: 0.08569 kg
  hardwood SWD chips. Wood (logs and chips) usage in the process is distrubuted as follows: 51% ends up in pulp, 11% in self-generated hogged fuel, and 37% in black liquor.
- CUTOFF Defoamer: 0.00024013 kg
- CUTOFF Barium scale inibitor: 2.55e-5 kg
- Pulp chips, at sawmill, US SE: 0.27391 kg
  southern SWD chips. Wood (logs and chips) usage in the process is distrubuted as follows: 51% ends up in pulp, 11% in self-generated hogged fuel, and 37% in black liquor.
- CUTOFF Unspecified polymer: 0.00038117 kg
- Kerosene, at refinery: 1.29e-10 m3
- CUTOFF Sulphate pulp, unbleached, at plant: 6.67e-5 kg
  i.e. : Sulphate pulp, unbleached, at plant
- CUTOFF Disposal, other solid waste from plant, to uns. beneficial use: 0.0042801 kg
- CUTOFF Aluminium sulphate, powder, at plant: 0.0033799 kg
  i.e.: Aluminium sulphate, powder, at plant
- CUTOFF Silica sand, at mine: 5.69e-5 kg
- CUTOFF Semichemical pulp: 0.0005775 kg
- CUTOFF Biocides, for paper production, unspecified, at plant: 0.00057114 kg
  i.e.: Biocides, for paper production, unspecified, at plant
- CUTOFF Recovered paper, pulp substitutes: 0.0032329 kg
  High-grade paper that often consists of shavings and clippings from converting operations at paper mills and print shops
- CUTOFF Disposal, other solid waste from plant, to uns. incinerator: 0.0034818 kg
- CUTOFF Felt wash: 5.62e-6 kg
- CUTOFF Disposal, wastewater treatment plant residuals, to uns. beneficial use: 0.0049438 kg
- Electricity, at grid, Western US, 2000: 0.21858 MJ
  Net purchased, National average grid, Medium voltage: <50 kV
- CUTOFF Retention aids, in paper production, at plant: 0.00031224 kg
  i.e.: Retention aids, in paper production, at plant
- CUTOFF Disposal, wood ash mixture, pure, 0% water, to sanitary landfill: 0.008448 kg
  i.e.: Disposal, wood ash mixture, pure, 0% water, to sanitary landfill
- Sulfur, at plant: 0.00024353 kg
- CUTOFF Unspecified additive: 3.14e-6 kg
- CUTOFF Old corrugated containers: 0.43161 kg
  consist of converting wastes (pre-consumer OCC) and ppost-cosumer old corrugated containers (OCC)

## Inputs from nature
- Water, cooling: 5.778 kg
  Equal to output of cooling water
- Water, river: 0.031691 m3
  Total intake - Cooling

## Emissions to nature
- Acrolein: 3.34e-6 kg
- Bromoform: 1.33e-9 kg
- Fluoride: 1.52e-6 kg
- Nickel: 8.49e-7, 6.69e-8 kg (2 entries, compartments not in this file)
- Ethane, 1,1,1-trichloro-, HCFC-140: 1.49e-7 kg
- Strontium: 1.44e-7 kg
- Waste water/m3: 0.027605 m3
- Acenaphthene: 1.36e-7 kg
- Boron: 6.55e-7 kg
- Selenium: 7.22e-7 kg
- Iron: 4.84e-10, 2.16e-7 kg (2 entries, compartments not in this file)
- Hydrazine: 5.78e-9 kg
- Pyrene: 1.12e-11 kg
- Methyl ethyl ketone: 1.33e-8 kg
- Propene: 1.31e-9 kg
- Vanadium: 1.71e-7, 1.27e-7 kg (2 entries, compartments not in this file)
- Water, cooling, unspecified natural origin/kg: 5.778 kg
- Antimony: 4.09e-9 kg
- Fluorene: 3.09e-11 kg
- Chlorine: 1.79e-7 kg
- Methane, monochloro-, R-40: 2.4e-7 kg
- BOD5, Biological Oxygen Demand: 0.0011165 kg
- Styrene: 5.36e-6 kg
- Benzene, hexachloro-: 7.21e-9 kg
- Molybdenum: 8.47e-7 kg
- Phenol: 9.55e-6 kg
- Cadmium: 2.77e-7 kg
- Arsenic: 6.01e-8, 4.24e-8 kg (2 entries, compartments not in this file)
- Methane, biogenic: 0.00018781 kg
  From biomass combustion. Does not include emissions from on-site wastewater treatment or landfills.
- Vinyl acetate: 2.58e-10 kg
- Formaldehyde: 1.9e-5 kg
- Oils, unspecified: 7.56e-8 kg
- Radioactive species, unspecified: 1.5174 Bq
- Water: 5.3554 kg
  Estimated by neglecting water in wastes
- Carbon dioxide, biogenic: 1.3929 kg
  From combustion of biomass materials (wood/bark residues, spent pulping liquor organic solids, and other biomass fuels) for energy production on site.
- Acetophenone: 5.1e-10 kg
- Methane, bromo-, Halon 1001: 4.29e-8 kg
- Zinc: 1.24e-6, 9.93e-7 kg (2 entries, compartments not in this file)
- Methane: 1.67e-5 kg
  From fossil fuel combustion
- Chromium: 7.02e-8, 5.53e-8 kg (2 entries, compartments not in this file)
- Methanol: 0.00086171 kg
- Organic substances, unspecified: 2.06e-7 kg
- Tin: 4.58e-8 kg
- Carbon disulfide: 3.19e-6 kg
- Phthalate, dioctyl-: 2.48e-9 kg
- Mercaptans, unspecified: 7.37e-6 kg
- Phenanthrene: 9.18e-11 kg
- Manganese: 8.23e-6 kg
- Benzene, chloro-: 7.48e-10 kg
- Toluene: 2.96e-5 kg
- Barium: 3.07e-7, 1.17e-6 kg (2 entries, compartments not in this file)
- Indeno(1,2,3-cd)pyrene: 2.07e-12 kg
- Chrysene: 4.15e-12 kg
- Particulates, < 10 um: 0.00081661 kg
- Anthracene: 7.14e-12 kg
- Beryllium: 6.06e-9 kg
- Ethane, dichloro-: 1.36e-9 kg
- Titanium: 1.78e-7 kg
- Benzo(a)pyrene: 7.24e-9 kg
- Benzo(a)anthracene: 2.72e-12 kg
- Fluoranthene: 2.41e-11 kg
- Benzene, ethyl-: 3.19e-9 kg
- Ammonia: 7.64e-5 kg
- Carbon dioxide: 0.40081 kg
  From combustion of fossil fuels for energy generation on site.
- Nitrogen, total: 0.0002219 kg
- Acetone: 6.56e-5 kg
- Carbon monoxide: 0.000323 kg
- Lead II: 5.69e-7 kg
- PAH, polycyclic aromatic hydrocarbons: 2.92e-5 kg
- Methane, dichloro-, HCC-30: 1.66e-8 kg
- 2-Chloroacetophenone: 2.38e-10 kg
- AOX, Adsorbable Organic Halogen as Cl: 5.22e-6 kg
- Cumene: 2.23e-6 kg
- Ethane, 1,2-dibromo-: 4.08e-11 kg
- Phosphorus: 5.56e-7 kg
- VOC, volatile organic compounds: 1.75e-5 kg
- NMVOC, non-methane volatile organic compounds, unspecified origin: 0.00027268 kg
- Propanal: 2.95e-6 kg
- Benzene: 7.59e-6 kg
- Hydrogen chloride: 6.68e-5 kg
- Mercury: 4.89e-11 kg
- Manganese: 2.92e-7 kg
  i.e.: Nitric acid, 50% in H2O, at plant
- Sulfuric acid: 1.63e-9 kg
- Suspended solids, unspecified: 0.0015631 kg
- Mercury II: 1.48e-7 kg
- Naphthalene: 2.34e-9 kg
- Benzofluoranthene, unspecified: 3.74e-12 kg
- Hexane: 2.65e-5 kg
- Benzo(g,h,i)perylene: 9.18e-13 kg
- Chloroform: 3.82e-6 kg
- Cyanide: 8.58e-8 kg
- Nitrogen oxides: 0.0019375 kg
  Total from on-site manufacturing processes and energy generation.
- Particulates, unspecified: 1.7e-10 kg
- Hydrogen fluoride: 2.17e-5 kg
- Acetaldehyde: 4.9e-5 kg
- Particulates, > 10 um: 0.00021546 kg
- Toluene, chloro-: 2.38e-8 kg
- Acenaphthylene: 8.5e-12 kg
- Phosphorus, total: 3.45e-5 kg
- Dioxin, 2,3,7,8 Tetrachlorodibenzo-p-: 2.09e-14 kg
- Chromium VI: 1.13e-8 kg
- Methyl methacrylate: 6.8e-10 kg
- Biphenyl: 5.78e-11 kg
- Lead: 1.06e-7 kg
- Magnesium: 1.37e-6 kg
- Sulfur oxides: 0.0018136 kg
  Total from on-site manufacturing processes and energy generation.
- Ethene, tetrachloro-: 2.09e-6 kg
- Xylene: 1.73e-6 kg
- Particulates, < 2.5 um: 0.00034177 kg
- Copper: 7.97e-8 kg
- Heat, waste: 0.0049297 MJ
- Hydrogen sulfide: 0.00020265 kg
  Proxy for total reduced sulfur compounds (TRS). TRS is a gaseous mixture of compounds consisting mainly of hydrogen sulfide (H2S), but it may also contain other gases such as methyl mercaptan (CH3S-H), dimethyl sulfide (CH3-S-CH3) and dimethyl disulfide (CH3-S-S-CH3). Reported as equivalent mass of H2S.
- Cobalt: 1.58e-8 kg
- Ethene, chloro-: 1.87e-7 kg
- t-Butyl methyl ether: 1.19e-9 kg
- Copper II: 7.34e-7 kg
- Toluene, 2,4-dinitro-: 9.52e-12 kg
- Dinitrogen monoxide: 6.44e-5 kg
  From all fuel combustion, including biomass.
- Thallium: 2e-9 kg
- Chloride: 9.69e-11 kg
- Butadiene: 1.38e-7 kg
- Isophorone: 1.97e-8 kg
- Particulates, > 2.5 um, and < 10um: 0.0001817 kg

## Sampling procedure
The survey included results from 46 containerboard mills representing 27 million short tons per year (TPY), nearly 78% of 2010 production volume.

## Sources
- Corrugated Packaging Alliance (CPA)
