# Paper, freesheet, uncoated, average production, at mill, 2006

Dataset: openLCA process, unit process
Category: Pulp, Paper, and Paperboard Mills
Geography: RNA
Time period: 2006-01-01 to 2006-01-01
Generated by: Caroline Gaudreault
Reviewer: Martha Stevenson
Published in: AF&PA
restrictionsDescription: All information can be accessed by everybody.
copyright: false

## General comment
Uncoated Freesheet, average North American production, at mill. By-products were allocated 0% of the impacts to enable the user to choose and apply their own allocation method more easily. All flows are production-weighted means. Data were developed for a full LCA that was critically reviewed. Reviewers were: • Martha Stevenson, Chairperson – Private Consultant to the public interest with ten years of experience in sustainability, environmental management, packaging and materials recovery; led the development of the Design Guidelines for Sustainable Packaging and the COMPASS software used to compare the environmental impacts of package designs; • Pascal Lesage – Life cycle assessment consultant, Researcher at École Polytechnique de Montréal [at the Inter-University Research Centre for the Life Cycle of Products, Processes and Services (CIRAIG) in Montreal]; and • Dale Phenicie, Environmental Affairs Consulting – Consultant with 35 years of experience in environmental protection and process consulting for the forest products industry. Has served on several U.S. EPA Task Forces dealing with water quality issues and authored several AF&PA Environmental, Health and Safety/Sustainability reports.

## Technology
current technology mix for uncoated freesheet

## Time period
Primary data collected from participating companies and associations for their operational activities are representative for 2006 and 2007.

## Reference product
- Tall oil, at uncoated freesheet mill: 21.818 kg
  Produced as byproduct of pulp production. Sold i.e., not used on site. Allocation set to 0%.

## By-products
- Electricity, at uncoated freesheet mill: 65 kWh
  (same comment as for Tall oil, at uncoated freesheet mill)
- Paper, freesheet, uncoated, average production, at mill: 861.83 kg
  861.83 dry kg is equal to 1 market-dried short ton (5% water).
- Turpentine, at uncoated freesheet mill: 1.6919 kg
  (same comment as for Tall oil, at uncoated freesheet mill)
- Steam, at uncoated freesheet mill: 129 MJ
  (same comment as for Tall oil, at uncoated freesheet mill)

## Inputs from technosphere
- CUTOFF Pulpwood, hardwood, average, at forest road, US S: 0.3645 m3
  Mass of incoming southern hardwood logs intended for pulping. Assumed density: 650 kg/m3. US LCI: "Roundwood, hardwood, green, at mill, SE/US" can be used but transportation needs to be removed as it is already included here. Wood usage in the process is distrubuted as follows: 33% ends up in pulp, 27% in self-generated hogged fuel and 40% in black liquor. All the hogged fuel is combusted onsite. Combustion of this fuel is important to the economic viability of all modern pulp mills. Substitution of other fuels for this fuel is not recommended. Need to be paired with "Self-generated hogged fuel, combusted in industrial boiler, at pulp and paper mill". Black liquor solides are combusted onsite as part of the pulping chemical recovery process that is integral to and is essential to the economic viability of all modern pulp mills. Substitution of other fuels for this fuel is not recommended.
- Fuels, burned at uncoated freesheet, average production, at mill: 13563 MJ
  Includes all fuels burned on site
- Pulp, kraft market, bleached, average production, at mill: 64.41 kg
- Transport, combination truck, average fuel mix: 1.7958 t*km
  Transport of packaging. Paper: 113 km. Containerboard: 201 km.
- Transport, ocean freighter, average fuel mix: 5.3373 t*km
  Transportation of chemicals. Kaolin: 0 km. Sodium hydroxide: 24.1 km. Sodium chlorate, sulfuric acid, hydrogen peroxide, Precipitated calcium carbonate, Quicklime and oxygen: 517 km. Methanol: 740 km. Transports of fuels. Residual fuel oil , Distillate fuel oil: 682 km. Kerosene and gasoline, Other fossil assumed to be diesel: 1183 km.
- CUTOFF Electricity from hydro: 5.1944 kWh
  Generation at company facilities. Ei: Electricity, hydropower, at run-of-river power plant
- Electricity, at grid, Eastern US, 2000: 387.2 kWh
  Net purchased, National average grid, Medium voltage: <50 kV
- CUTOFF Pulp chips, at sawmill, US: 823.72 kg
  Mass of incoming pulp chips intended for pulping. US LCI: "Pulp chips, at sawmill,US SE/kg" can be used as a proxy. The actual mix of chips is: northern softwood chips: 66%, northern hardwood chips: 18%, southern softwood chips: 11% and southern hardwood chips: 6%. Pulp chips usage in the process is distrubuted as follows: 46% ends up in pulp and 54% in black liquor. Combusted onsite as part of the pulping chemical recovery process that is integral to and is essential to the economic viability of all modern pulp mills. Substitution of other fuels for this fuel is not recommended.
- CUTOFF Hydrogen peroxide, at plant: 0.86636 kg
  ei: Hydrogen peroxide, 50% in H2O, at plant
- Paper, freesheet, uncoated, average production, at mill: 7.6657 kg
  Packaging material
- CUTOFF Electricity, at grid, ON: 0.9608 kWh
- Sodium hydroxide, production mix, at plant: 14.47 kg
- CUTOFF Disposal, solid waste, unspecified, to unspecified landfill: 25.583 kg
  Typically company-owned, but some third party.
- Transport, train, diesel powered: 3.1973 t*km
  Transport of packaging. Paper: 1075 km. Containerboard: 1410 km.
- CUTOFF Disposal, wastewater treatment plant residuals, to uns. landfill: 19.051 kg
  Typically company-owned, but some third party. (uns. = unspecified)
- CUTOFF Pulp, deinked market, bleached, at mill: 26.762 kg
- CUTOFF Disposal, solid waste, unspecified, to unspecified incinerator: 0.0016329 kg
  Typically on-site with energy recovery.
- Pulpwood, hardwood, average, at forest road, NE-NC: 0.1674 m3
  Mass of incoming northern hardwood logs intended for pulping. Assumed density: 650 kg/m3. Wood usage in the process is distrubuted as follows: 33% ends up in pulp, 27% in self-generated hogged fuel and 40% in black liquor. All the hogged fuel is combusted onsite. Combustion of this fuel is important to the economic viability of all modern pulp mills. Substitution of other fuels for this fuel is not recommended. Need to be paired with "Self-generated hogged fuel, combusted in industrial boiler, at pulp and paper mill". Black liquor solides are combusted onsite as part of the pulping chemical recovery process that is integral to and is essential to the economic viability of all modern pulp mills. Substitution of other fuels for this fuel is not recommended.
- CUTOFF Disposal, solid waste, unspecified, to unspecified land application: 7.7836 kg
  Typically off-site agricultural/silvicultural
- Pulpwood, softwood, average, at forest road, INW: 0.0548 m3
  Mass of incoming northern softwood logs (assumed 36.5% West based on mill location) intended for pulping. Assumed density: 450 kg/m3. Wood usage in the process is distrubuted as follows: 33% ends up in pulp, 27% in self-generated hogged fuel and 40% in black liquor. All the hogged fuel is combusted onsite. Combustion of this fuel is important to the economic viability of all modern pulp mills. Substitution of other fuels for this fuel is not recommended. Need to be paired with "Self-generated hogged fuel, combusted in industrial boiler, at pulp and paper mill". Black liquor solides are combusted onsite as part of the pulping chemical recovery process that is integral to and is essential to the economic viability of all modern pulp mills. Substitution of other fuels for this fuel is not recommended.
- CUTOFF Sizer, at plant: 6.0328 kg
  ei: AKD sizer, in paper production, at plant/RER U or Rosin size, in paper production, at plant
- CUTOFF Optical brightner, at plant: 1.2156 kg
  ei: Optical brighteners, in paper production, at plant
- CUTOFF Disposal, solid waste, unspecified, to unspecified beneficial use: 4.3998 kg
  Typically off-site.
- Transport, pipeline, natural gas: 122 t*km
  Transports of fuels. Natural gas: 33584 tkm/MMcf, Average transportation for natural gas in North America according to the US LCI database
- Transport, train, diesel powered: 309.1 t*km
  Transportation of chemicals. Kaolin: 1204 km. Sodium hydroxide: 927 km. Sodium chlorate, sulfuric acid, hydrogen peroxide, Precipitated calcium carbonate, Quicklime and oxygen: 1088 km. Methanol: 1254 km. Starch: 1788 km. Optical brighteners: 2313 km. Sizers: 2438 km. Transports of fuels. Coal: 653 km. Residual fuel oil, Distillate fuel oil: 1114 km. Liquefied petroleum gas: 1246 km. Tire derived fuel: 1156 km.
- CUTOFF Disposal, unspecified ashes, to unspecified beneficial use: 7.3573 kg
  Mix of wood and coal ashes. Based on typical ash contents can be assumed to be 78% from wood and 22% from coal. Typically off-site.
- Transport, train, diesel powered: 73.874 t*km
  Transport market pulp. Bleached kraft market pulp, Deinked bleached market pulp: 1452 km.
- Transport, combination truck, average fuel mix: 306.02 t*km
  Transportation of chemicals. Kaolin: 295 km. Sodium hydroxide: 230 km. Sodium chlorate, sulfuric acid, hydrogen peroxide, Precipitated calcium carbonate, Quicklime and oxygen: 183 km. Methanol: 632 km. Starch: 510 km. Obtical brighteners: 270 km. Sizers: 282 km. Transports of fuels. Coal: 153 km. Residual fuel oil, Distillate fuel oil: 50 km. Liquefied petroleum gas, Kerosene and gasoline, Other fossil assumed to be diesel: 80 km. Tire derived fuel: 98 km.
- Transport, barge, average fuel mix: 7.3269 t*km
  Transportation of chemicals. Kaolin: 0 km. Sodium hydroxide: 776 km. Sodium chlorate, sulfuric acid, hydrogen peroxide, Precipitated calcium carbonate, Quicklime and oxygen: 489 km. Methanol: 671 km. Transports of fuels. Coal: 515 km. Residual fuel oil, Distillate fuel oil: 163 km. Kerosene and gasoline, Other fossil assumed to be diesel : 163 km. Tire derived fuel: 315 km.
- CUTOFF Disposal, wastewater treatment plant residuals, to uns. Incinerator: 13.88 kg
  Typically on-site with energy recovery. (uns. = unspecified)
- CUTOFF Starch, at plant: 32.84 kg
  ei: Maize starch, at plant and/or Potato starch, at plant
- Electricity, at grid, Western US, 2000: 92.237 kWh
  Net purchased, National average grid, Medium voltage: <50 kV
- Transport, aircraft, freight: 0.02044 t*km
  Transport of packaging. Paper: 1663
- Containerboard, average production, at mill: 19.323 kg
  Packaging material
- Oxygen, liquid, at plant: 3.2114 kg
- CUTOFF Pulpwood, softwood, average, at forest road, US S: 0.3045 m3
  Mass of incoming southern softwood logs intended for pulping. Assumed density: 450 kg/m3. US LCI: "Softwood logs with bark, harvested at average intensity site, at mill, US SE/US" can be used but transportation needs to be removed as it is already included here. Wood usage in the process is distrubuted as follows: 33% ends up in pulp, 27% in self-generated hogged fuel and 40% in black liquor. All the hogged fuel is combusted onsite. Combustion of this fuel is important to the economic viability of all modern pulp mills. Substitution of other fuels for this fuel is not recommended. Need to be paired with "Self-generated hogged fuel, combusted in industrial boiler, at pulp and paper mill". Black liquor solides are combusted onsite as part of the pulping chemical recovery process that is integral to and is essential to the economic viability of all modern pulp mills. Substitution of other fuels for this fuel is not recommended.
- CUTOFF Clay, at mine: 0.83915 kg
  ei: Kaolin
- CUTOFF Disposal, unspecified ashes, to unspecified land application: 11.975 kg
  Mix of wood and coal ashes. Based on typical ash contents can be assumed to be 78% from wood and 22% from coal. Typically off-site agricultural/silvicultural.
- Transport, combination truck, average fuel mix: 516.83 t*km
  Transportation of pulpwood and chips to pulp mill. Pulpwood: 200 km (rounded trip distance), chips: 254 km (rounded trip distance).
- Transport, combination truck, average fuel mix: 12.921 t*km
  Transport market pulp. Bleached kraft market pulp, Deinked bleached market pulp: 256 km.
- Quicklime, at plant: 61.725 kg
  For production of precipitated calcium carbonate on site
- CUTOFF Pulp slurry, kraft market, bleached, average production, at mill: 39.281 kg
- CUTOFF Disposal, unspecified ashes, to unspecified landfill: 30.3 kg
  Mix of wood and coal ashes. Based on typical ash contents can be assumed to be 78% from wood and 22% from coal. Typically company-owned, but some third party.
- Transport, train, diesel powered: 76.94 t*km
  Transportation of pulpwood and chips to pulp mill. Pulpwood: 375 km, chips: 127 km.
- CUTOFF Disposal, wastewater treatment plant residuals, to uns. land application: 6.7041 kg
  Typically off-site agricultural/silvicultural. (uns. = unspecified)
- CUTOFF Sawdust, at sawmill, US: 29.484 kg
  Mass of incoming sawdusts intended for pulping. US LCI: "Sawdust, at sawmill, US SE/kg" can be used as a proxy. The actual mix of sawdustsis the same as the one for pulp chips. Sawdust usage in the process is distrubuted as follows: 46% ends up in pulp and 54% in black liquor. Combusted onsite as part of the pulping chemical recovery process that is integral to and is essential to the economic viability of all modern pulp mills. Substitution of other fuels for this fuel is not recommended.
- Pulpwood, softwood, average, at forest road, NE-NC: 0.065 m3
  Mass of incoming northern softwood logs (assumed 63.5% East/Central based on mill location) intended for pulping. Assumed density: 450 kg/m3. Wood usage in the process is distrubuted as follows: 33% ends up in pulp, 27% in self-generated hogged fuel and 40% in black liquor. All the hogged fuel is combusted onsite. Combustion of this fuel is important to the economic viability of all modern pulp mills. Substitution of other fuels for this fuel is not recommended. Need to be paired with "Self-generated hogged fuel, combusted in industrial boiler, at pulp and paper mill". Black liquor solides are combusted onsite as part of the pulping chemical recovery process that is integral to and is essential to the economic viability of all modern pulp mills. Substitution of other fuels for this fuel is not recommended.
- CUTOFF Disposal, wastewater treatment plant residuals, to uns. beneficial use: 4.8807 kg
  Typically off-site. (uns. = unspecified)
- CUTOFF Sodium chlorate, at plant: 27.261 kg
  ei: Sodium chlorate, powder, at plant
- CUTOFF Precipitated calcium carbonate, at plant: 12.247 kg
- Sulfuric acid, at plant: 15.513 kg

## Inputs from nature
- Process water: 62892 kg
  Estimated based on individual mill process effluent and cooling water flows and process characteristics. Share between process and cooling estimated.
- Cooling water, non-contact: 10890 kg
  Estimated based on individual mill process effluent and cooling water flows and process characteristics. Share between process and cooling estimated. Includes evaporation and other losses (e.g., water in solid waste).

## Emissions to nature
- Methane, monochloro-, R-40: 4.3902e-9 kg
  In effluent.
- Vanadium: 0.00069256 kg
  In effluent.
- Acetaldehyde: 0.034881 kg
  From process
- Methanol: 0.017095 kg
  In effluent.
- Lead: 0.013586 kg
  From onsite management of solid waste. All metals reported as elemental althought in most cases they are releases into metal compounds.
- Formaldehyde: 5.8399e-5 kg
  (same comment as for Lead)
- Manganese: 0.021633 kg
  In effluent.
- Formaldehyde: 0.0024205 kg
  In effluent.
- BOD5, Biological Oxygen Demand: 1.4622 kg
  In effluent.
- Carbon dioxide, fossil: -16.203 kg
  From process (Precipitated Calcium Carbonate (PCC) production on site). Some emissions reported under "Fuels burned at uncoated freesheet, average producion, at mill" are capture to produce PCC
- Barium: 0.0030806 kg
  In effluent.
- Vanadium: 0.0019921 kg
  (same comment as for Lead)
- AOX, Adsorbable Organic Halogen as Cl: 0.12383 kg
  In effluent.
- Nickel: 0.0016988 kg
  (same comment as for Lead)
- PAH, polycyclic aromatic hydrocarbons: 2.3321e-5 kg
  (same comment as for Lead)
- Mercury: 2.3697e-7 kg
  In effluent.
- Copper: 0.007293 kg
  (same comment as for Lead)
- PAH, polycyclic aromatic hydrocarbons: 4.5162e-6 kg
  In effluent.
- Manganese: 0.10431 kg
  (same comment as for Lead)
- Lead: 4.4642e-5 kg
  In effluent.
- Nitrogen, total: 0.45089 kg
  In effluent.
- Suspended solids, unspecified: 2.15 kg
  In effluent.
- Chromium: 0.00018805 kg
  In effluent.
- Barium: 0.045591 kg
  (same comment as for Lead)
- Nickel: 0.00015365 kg
  In effluent.
- Phenol: 5.6344e-5 kg
  In effluent.
- Phenol: 1.7969e-5 kg
  (same comment as for Lead)
- Cooling water, non-contact: 10890 kg
  (same comment as for Process water)
- Ammonia: 0.00013705 kg
  (same comment as for Lead)
- Zinc: 0.0011237 kg
  In effluent.
- Carbon dioxide, biogenic: -32.295 kg
  (same comment as for Carbon dioxide, fossil)
- Phosphorus, total: 0.057065 kg
  In effluent.
- Chromium: 0.0075148 kg
  (same comment as for Lead)
- Ammonia: 0.1041 kg
  From process
- Arsenic: 0.002519 kg
  (same comment as for Lead)
- Process effluent: 63372 kg
  (same comment as for Cooling water, non-contact)
- Arsenic: 0.00015976 kg
  In effluent.
- Zinc: 0.046004 kg
  (same comment as for Lead)
- Ammonia_toxic: 0.013123 kg
  In effluent.
- Copper: 0.00013912 kg
  In effluent.
- Methanol: 0.391 kg
  From process
- Acetaldehyde: 0.0028363 kg
  In effluent.
- Water, evaporated: 1042 kg
  (same comment as for Cooling water, non-contact)
- Acetaldehyde: 0.00011886 kg
  (same comment as for Lead)
- Mercury: 1.0417e-5 kg
  (same comment as for Lead)

## Sampling procedure
The survey included results from 31 paper mills representing 10.6 million short tons per year (TPY), nearly 75% of 2006/2007 North American production volume.

## Sources
- AF&PA
