# Post, softwood, CCA treated, SE

Dataset: openLCA process, unit process
Category: Wood Preservation
Geography: RNA
Time period: 2005-01-01 to 2009-12-31
Generated by: Chris Bolin
Reviewer: Paul Cooper
Published in: Chris Bolin
restrictionsDescription: All information can be accessed by everybody.
copyright: false

## General comment
Pressure-treated chromated copper arsenate (CCA) softwood post. Base process data presented with allocations to within process co-products noted. Refer to allocation worksheet for specifics. All allocations performed using mass or volume. This sheet sets out each unit process in the production of one cubic meter of CCA treated softwood guard rail post as produced in the US southeast. Important note: although most of the data in the US LCI database has undergone some sort of review, the database as a whole has not yet undergone a formal validation process. Please email comments to lci@nrel.gov.; Geography: US Southeast

## Technology
typical

## Geography
US Southeast

## Time period
2005-2009

## Reference product
- Post, softwood, CCA treated, SE: 1 m3
  Retention = 0.57 lb/ft3 = 9.06 kg/m3

## Inputs from technosphere
- Diesel, combusted in industrial equipment: 5.94 l
  Preservative Wood Treatment
- CUTOFF Copper Chromium Arsenate (CCA), at plant: 9.0575 kg
- Natural gas, combusted in industrial boiler: 0.97 m3
  Preservative Production
- Rough green lumber, at sawmill, US SE: 337.65 kg
  purchase 65% green air dried onsite. 519 kg/m3
- CUTOFF Disposal, solid waste, unspecified, to unspecified landfill: 0.469 kg
  Preservative Wood Treatment; Solid waste disposal associated with metals mining. Solid waste disposal as reported in treater surveys as other (normal trash or municipal waste). Other waste disposal—Amount of normal trash or municipal waste that is typically collected in trash cans or dumpsters.
- Bituminous coal, combusted in industrial boiler: 0.0374 kg
  Preservative Production
- Transport, train, diesel powered: 21 t*km
  11% of Cr transport; 5% of As Transport; survey data
- Diesel, combusted in industrial boiler: 0.253 l
  Preservative Production
- Electricity, at Grid, SERC, 2008: 99.8 kWh
  Preservative Production
- Gasoline, combusted in equipment: 0.038 l
  Preservative Wood Treatment
- Transport, ocean freighter, residual fuel oil powered: 230 t*km
  95% of As transport; 9% or Cr transport; survey data
- CUTOFF Disposal, solid waste, unspecified, to unspecified treatment: 0.084 kg
  Preservative Wood Treatment; Hazardous and Process waste disposed—Amount of hazardous waste for the survey year and units (pounds, tons, drums, etc.). Chemical and process waste disposed—Amount of waste and units from the treatment process, such as from tanks, treatment equipment, and drip pad area, but not including hazardous waste. This may be regulated in your state as chemical, industrial, or special waste.
- Liquefied petroleum gas, combusted in industrial boiler: 0.0661 l
  Preservative Wood Treatment
- Wood waste, unspecified, combusted in industrial boiler: 81.7 kg
  Preservative Wood Treatment; Based on green moisture content 50%
- Natural gas, combusted in industrial boiler: 10.2 m3
  Preservative Wood Treatment
- Residual fuel oil, combusted in industrial boiler: 0.496 l
  Preservative Production
- CUTOFF Disposal, solid waste, unspecified, to unspecified landfill: 12.7 kg
  Preservative Production; Solid waste disposal associated with metals mining. Solid waste disposal as reported in treater surveys as other (normal trash or municipal waste). Other waste disposal—Amount of normal trash or municipal waste that is typically collected in trash cans or dumpsters.
- Electricity, at Grid, SERC, 2008: 29.8 kWh
  Preservative Wood Treatment
- Rough green lumber, at sawmill, US SE: 181.65 kg
  purchase 35% dried onsite. Energy to dry wood is included; 519 kg/m3
- Transport, combination truck, diesel powered: 980 t*km
  100% lumber; 100% CCA concentrate; 80% of Cr transport; 100% of Cu transport; survey data
- Gasoline, combusted in equipment: 0.0154 l
  Preservative Production

## Inputs from nature
- Water, process, unspecified natural origin/m3: 285 m3
  Preservative Production
- Water, process, unspecified natural origin/m3: 0.302 m3
  Preservative Wood Treatment

## Emissions to nature
- Sulfur oxides: 6.1e-5 kg
  Preservative Production
- Mercury: 9e-8 kg
  Preservative Production
- Carbon monoxide: 0.011 kg
  Preservative Production
- Particulates, < 10 um: 0.28 kg
  Preservative Production
- Nitrogen oxides: 0.026 kg
  Preservative Production
- Sulfur dioxide: 0.008 kg
  Preservative Production
- Copper: 0.00017 kg
  Preservative Wood Treatment;
- Carbon dioxide, fossil: 5 kg
  Preservative Production
- Nitrous oxide: 2e-5 kg
  Preservative Production
- Arsenic: 7.5e-5 kg
  Preservative Wood Treatment; Storm water runoff to unspecified location.
- Methane: 0.00044 kg
  Preservative Production
- VOC, volatile organic compounds: 0.18 kg
  Preservative Wood Treatment; at kiln: emission from the wood product being dried
- Chromium: 0.0003 kg
  Preservative Wood Treatment;

## Sampling procedure
Industry survey

## Sources
- Chris Bolin
- Chris Bolin
