# Transport, transit bus, diesel powered, Northeast

Dataset: openLCA process, unit process
Category: Urban Transit Systems
Geography: RNA
Time period: 2010-01-01 to 2010-01-01
Generated by: Nathan Hardesty
Published in: U.S. Environmental Protection Agency (EP
restrictionsDescription: All information can be accessed by everybody.
copyright: false

## General comment
This dataset represents the Northeastern U.S. (CT, DC, DE, ME, MD, MA, NH, NJ, NY, PA, RI, VT (Reference 10)) average airborne emissions for operating a diesel powered transit bus. The inventory includes all vehicle operation processes, including off-network and refueling activities.
The refinery-to-pump transportation and distribution data are calculated from Argonne National Laboratory's GREET 1.8d.1 model.
The vehicle operation data are calculated from EPA's MOVES2010a model, using the assumptions described in the corresponding detailed spreadsheet. Emissions factors in MOVES2010a are largely based on EPA's Mobile Source Observation Database, which in turn includes data from a variety of vehicle studies (References 6-8).
MOVES2010a acknowledges sources of uncertainty in the model structure, the population and acitivty data, and other model parameters. As of July 2011, the uncertainty calculation function of the model has not been activated.

## Technology
Combustion of diesel in a transit bus.

## Geography
US

## Reference product
- Transport, transit bus, diesel powered, Northeast: 1 p*km

## Inputs from technosphere
- CUTOFF Transport, ocean tanker, average fuel mix: 0.074942 t*km
- Transport, barge, average fuel mix: 0.010603 t*km
- Transport, combination truck, average fuel mix: 0.0109622 t*km
- Transport, pipeline, unspecified petroleum products: 0.110495 t*km
- Transport, train, diesel powered: 0.0204568 t*km
- Diesel, at refinery: 0.0340063 l

## Emissions to nature
- Particulates, < 10 um: 7.62842e-7 kg
  PM10 from tirewear.
- Hydrocarbons (other than methane): 5.20945e-5 kg
- Nitrogen dioxide: 7.05274e-5 kg
- Particulates, < 10 um: 2.69452e-6 kg
  PM10 from brakewear.
- Methane: 1.59007e-6 kg
- Dinitrogen monoxide: 2.05931e-7 kg
- Nitrogen oxides: 0.000881855 kg
- Particulates, < 2.5 um: 4.21661e-5 kg
  PM2.5 from organic carbon, elemental carbon, and sulfate particulates.
- Ammonia: 1.33408e-6 kg
- Nitrogen oxide: 0.000811328 kg
- Particulates, < 2.5 um: 7.05372e-7 kg
  PM2.5 from brakewear.
- Particulates, < 2.5 um: 1.82936e-7 kg
  PM2.5 from tirewear.
- Particulates, < 10 um: 4.34686e-5 kg
  PM10 from organic carbon, elemental carbon, and sulfate particulates.
- Carbon monoxide, fossil: 0.000332817 kg
- VOC, volatile organic compounds: 5.37335e-5 kg
- Sulfur dioxide: 1.49694e-6 kg
- Carbon dioxide, fossil: 0.0892841 kg

## Sources
- U.S. Environmental Protection Agency (EP
- National Institute of Standards and Tech
- EPA
- U.S. Alternative Fuels and Advanced Vehi
- Eastern Research Group
- Assessment and Standards Division, Offic
- Assessment and Standards Division, Offic
- Wang, M.
- National Climatic Data Center, National
- unspecified
