# Hog fuel, self-gen., combusted in ind. boiler, at pulp and paper mill (EXCL.)

Dataset: openLCA process, unit process
Category: Pulp, Paper, and Paperboard Mills
Geography: RNA
Generated by: Caroline Gaudreault
Reviewer: Martha Stevenson
Published in: Franklin Associates
restrictionsDescription: All information can be accessed by everybody.
copyright: false

## General comment
This process, "Hog fuel, self-generated, combusted in industrial boiler, at pulp and paper mill", was built to be used within the processes named "Fuels burned at bleached kraft market pulp mill", "Fuels burned at uncoated freesheet paper mill", "Fuels burned at coated freesheet paper mill", "Fuels burned at uncoated mechanical paper mill", "Fuels burned at coated mechanical paper mill" and "Fuels burned at bag and sack paper mill". It was built from the process named "Wood waste, combusted in industrial boiler" v.1.0 available in the US LCI database. Wood input, transport and waste processes were removed. The following emissions to air were excluded (excl.): Sulfur oxidesand Nitrogen oxides. These processes and emissions are reported in pulp and paper mill process chain in which this process is integrated.
Converted previous version from the assumption of 50% MC green basis; 100% MC od basis to OD basis to align with CORRIM calculations. Important note: although most of the data in the US LCI database has
undergone some sort of review, the database as a whole has not yet
undergone a formal validation process.
Please email comments to lci@nrel.gov.

## Technology
Typical

## Geography
US

## Reference product
- Hog fuel, self-gen., combusted in ind. boiler, at pulp and paper mill (EXCL.): 1 kg
  Wood inputs are taken into account in the pulp and paper mill

## Emissions to nature
- Manganese: 1.44e-5 kg
- Beryllium: 9.9e-9 kg
- Cobalt: 5.85e-8 kg
- Naphthalene: 8.73e-7 kg
- Acrolein: 3.6e-5 kg
- Methane, tetrachloro-, CFC-10: 4.05e-7 kg
- Carbon monoxide: 0.0054 kg
- Phenols, unspecified: 4.59e-7 kg
- Hydrogen chloride: 0.000171 kg
- BOD5, Biological Oxygen Demand: 0.0175 kg
- Lead: 4.32e-7 kg
- Chlorine: 7.11e-6 kg
- Methane, dichloro-, HCC-30: 2.61e-6 kg
- Dioxins, measured as 2,3,7,8-tetrachlorodibenzo-p-dioxin: 1.503e-8 kg
- Chromium: 1.89e-7 kg
- Metals, unspecified: 0.00038494 kg
- Benzene: 3.78e-5 kg
- Selenium: 2.52e-8 kg
- Cadmium: 3.69e-8 kg
- Methane: 0.000189 kg
- Carbon dioxide, biogenic: 1.83 kg
  1.83 kg CO2/kg of wood to preserve mass balance (Printing & Writing Papers Life-Cycle Assessment Summary Report)
- Antimony: 7.11e-8 kg
- TOC, Total Organic Carbon: 3.681e-5 kg
- Acetaldehyde: 7.47e-6 kg
- Arsenic: 1.98e-7 kg
- Mercury: 3.15e-8 kg
- Particulates, > 2.5 um, and < 10um: 0.0045 kg
- Nickel: 2.97e-7 kg
- Formaldehyde: 3.96e-5 kg

## Sources
- AF&PA
- Franklin Associates
- U.S. EPA
- Combustion Engineering Inc.
- Kaminski, Paul
- Argonne National Laboratory
- Sassenrath, Charles P
- U.S. DoE
