# Electricity, at eGrid, SPNO, 2008

Dataset: openLCA process, unit process
Category: Utilities
Geography: RNA
Time period: 2008-01-01 to 2008-01-01
Generated by: Alberta Carpenter
Published in: Chris Goemans, Athena Institute
restrictionsDescription: All information can be accessed by everybody.
copyright: false

## General comment
The methodology used to put together the grid information is outlined in reference 1.

## Technology
Typical

## Geography
SPNO North electricity grid to include Kansas and western Missouri (less SRMW).

## Reference product
- Electricity, at eGrid, SPNO, 2008: 1 kWh

## Inputs from technosphere
- CUTOFF Electricity, hydropower, at power plant, unspecified: 0.0205177 kWh
- Electricity, natural gas, at power plant: 0.0886796 kWh
- CUTOFF Electricity, biomass, solid, agriculture by-products, at power plant: 5.15169e-5 kWh
- Electricity, bituminous coal, at power plant: 0.0243735, 0.719218 kWh (2 entries)
- Electricity, residual fuel oil, at power plant: -2.19327e-5 kWh
- CUTOFF Electricity, petroleum coke, at power plant: 0.00123092 kWh
- Electricity, nuclear, at power plant: 0.118178 kWh
- CUTOFF Electricity, tire derived fuel, at power plant: 0.000283619 kWh
- CUTOFF Electricity, at wind power plant, unspecified: 0.026291 kWh
- CUTOFF Electricity, other gases, unspecified, at power plant: 3.59757e-5 kWh
- Electricity, diesel, at power plant: 0.000845673 kWh
- CUTOFF Electricity, biomass, gas, landfill, at power plant: 0.000316738 kWh

## Sampling procedure
based on EIA electricity reports for all power plants in the US.

## Sources
- Chris Goemans, Athena Institute
- unspecified
- USEPA
- Statistics Canada
- Statistics Canada
- Statistics Canada
- Statistics Canada
- Statistics Canada
- Statistics Canada
- USEPA
- EIA
- EIA
- EIA
- EIA
- EIA
- EIA
- EIA
- EIA
- EIA
- EIA
- EIA
- US DOE
- International Energy Agency
- US DOE
