# Transport, refuse truck, diesel powered, Northeast region

Dataset: openLCA process, unit process
Category: Waste Collection
Geography: RNA
Time period: 2010-01-01 to 2010-01-01
Generated by: Nathan Hardesty
Published in: U.S. Environmental Protection Agency (EP
restrictionsDescription: All information can be accessed by everybody.
copyright: false

## General comment
This dataset represents the Northeast U.S. average airborne emissions for operating a diesel powered refuse truck. The inventory includes all vehicle operation processes, including off-network and refueling activities.
The refinery-to-pump transportation and distribution data are calculated from Argonne National Laboratory's GREET 1.8d.1 model.
The vehicle operation data are calculated from EPA's MOVES2010a model, using the assumptions described in the corresponding detailed spreadsheet. Emissions factors in MOVES2010a are largely based on EPA's Mobile Source Observation Database, which in turn includes data from a variety of vehicle studies (References 6-8).
MOVES2010a acknowledges sources of uncertainty in the model structure, the population and acitivty data, and other model parameters. As of July 2011, the uncertainty calculation function of the model has not been activated.

## Technology
Combustion of diesel in a refuse truck.

## Geography
U.S. Northeast climate region: CT, DC, DE, ME, MD, MA, NH, NJ, NY, PA, RI, VT (NOAA, Reference 10)

## Reference product
- Transport, refuse truck, diesel powered, Northeast region: 1 t*km

## Inputs from technosphere
- Transport, barge, average fuel mix: 0.0119815 t*km
- Transport, pipeline, unspecified petroleum products: 0.124861 t*km
- Transport, combination truck, average fuel mix: 0.0123874 t*km
- Transport, train, diesel powered: 0.0231165 t*km
- Diesel, at refinery: 0.0384276 l
- Transport, ocean freighter, average fuel mix: 0.0846855 t*km

## Emissions to nature
- Nitrogen dioxide: 6.2883e-5 kg
- Sulfur dioxide: 1.68744e-6 kg
- Methane: 1.1355e-6 kg
- Ammonia: 1.46214e-6 kg
- Carbon monoxide, fossil: 0.000223969 kg
- Particulates, < 2.5 um: 4.00168e-5 kg
  PM2.5 from organic carbon, elemental carbon, and sulfate particulates.
- Particulates, < 2.5 um: 2.83173e-7 kg
  PM2.5 from tirewear.
- Particulates, < 10 um: 5.05732e-6 kg
  PM10 from brakewear.
- VOC, volatile organic compounds: 4.39516e-5 kg
- Dinitrogen monoxide: 1.61103e-7 kg
- Hydrocarbons (other than methane): 4.26366e-5 kg
- Nitrogen oxides: 0.000774028 kg
- Carbon dioxide, fossil: 0.100892 kg
- Nitrogen oxide: 0.000711147 kg
- Particulates, < 10 um: 1.18083e-6 kg
  PM10 from tirewear.
- Particulates, < 10 um: 4.12528e-5 kg
  PM10 from organic carbon, elemental carbon, and sulfate particulates.
- Particulates, < 2.5 um: 1.32391e-6 kg
  PM2.5 from brakewear.

## Sources
- U.S. Environmental Protection Agency (EP
- National Institute of Standards and Tech
- EPA
- U.S. Alternative Fuels and Advanced Vehi
- Eastern Research Group
- Assessment and Standards Division, Offic
- Assessment and Standards Division, Offic
- Wang, M.
- National Climatic Data Center, National
- Alam, M.
