# Electricity, at eGrid, AZNM, 2010

Dataset: openLCA process, unit process
Category: Utilities
Geography: RNA
Time period: 2010-01-01 to 2010-01-01
Generated by: Samantha Wascavage
Published in: Chris Goemans, Athena Institute
restrictionsDescription: All information can be accessed by everybody.
copyright: false

## General comment
The methodology used to put together the grid information is outlined in reference 1.

## Technology
Typical

## Geography
Southwest US (Arizona and New Mexico and small portions of southern California, southern Nevada and western Texas. )

## Reference product
- Electricity, at eGrid, AZNM, 2010: 1 kWh

## Inputs from technosphere
- CUTOFF Electricity, at wind power plant, unspecified: 0.002569 kWh
- CUTOFF Electricity, other gases, unspecified, at power plant: 4.5e-5 kWh
  Other Gases OG – Other Gas (Butane, Coal Processes, Coke-Oven, Refinery, and other processes, also includes BFG, PG)
- Electricity, diesel, at power plant: 0.000351 kWh
  Petroleum (DFO) - Distillate Fuel Oil (includes all Diesel and No. 1, No. 2, and No. 4 Fuel Oils, also includes DFO, JF, KER)
- CUTOFF Electricity, petroleum coke, at power plant: 3.2e-5 kWh
  Petroleum (Other Fossil) PC – Petroleum Coke also includes SG and WO
- CUTOFF Electricity, geothermal, unspecified: 0.031151 kWh
- CUTOFF Electricity, solar, unspecified, at power plant: 0.001422 kWh
  Solar (Photovoltaic, Thermal)
- CUTOFF Electricity, biomass, gas, landfill, at power plant: 0.000338 kWh
  Gaseous Renewable Fuels (Biomass) LFG - Landfill Gas also includes OBG
- CUTOFF Electricity, other fuels, at power plant, unspecified: 0.000119 kWh
  Other Fuels WH - Waste Heat also includes, OTH, MSN,PUR
- Electricity, bituminous coal, at power plant: 0.216493 kWh
  subbituminous coal
- Electricity, natural gas, at power plant: 0.428032 kWh
- CUTOFF Electricity, hydropower, at power plant, unspecified: 0.045482 kWh
- Electricity, bituminous coal, at power plant: 0.021886 kWh
  BIT - Anthracite Coal, and Bituminous Coal, also includes BIT, SC, SGC, WC.
- CUTOFF Electricity, biomass,solid, unspecified, at power plant: 0.001159 kWh
  OBS – Other Biomass Solid (Animal Manure and Waste, Solid By-products, and other solid biomass not specified also includes, AB, MSB, MSW, TDF, WDS)
- Electricity, nuclear, at power plant: 0.25085 kWh

## Sampling procedure
based on EIA electricity reports for all power plants in the US.

## Sources
- Chris Goemans, Athena Institute
- Statistics Canada
- unspecified
- USEPA
- Statistics Canada
- Statistics Canada
- Statistics Canada
- Statistics Canada
- USEPA
- EIA
- EIA
- EIA
- EIA
- EIA
- EIA
- EIA
- EIA
- EIA
- US DOE
- International Energy Agency
- EIA
