# Natural gas, combusted in industrial equipment

Dataset: openLCA process, unit process
Category: Steam and Air-Conditioning Supply
Geography: RNA
Time period: 1999-01-01 to 2003-01-01
Generated by: Jeff Hernbloom
Published in: Franklin Associates
restrictionsDescription: All information can be accessed by everybody.
copyright: false

## General comment
Important note: although most of the data in the US LCI database has
undergone some sort of review, the database as a whole has not yet
undergone a formal validation process.
Please email comments to lci@nrel.gov.

## Geography
North America

## Reference product
- Natural gas, combusted in industrial equipment: 1 m3

## Inputs from technosphere
- Transport, combination truck, average fuel mix: 0.1985 t*km
  Represents transportation from natural gas plant to combustion.
- Transport, pipeline, natural gas: 1.186 t*km
  Represents transportation from natural gas plant to combustion.
- Transport, train, diesel powered: 0.011858 t*km
  Represents transportation from natural gas plant to combustion.
- Natural gas, processed, at plant: 1 m3

## Emissions to nature
- Nitrogen oxides: 0.0016666 kg
- Benzene, ethyl-: 5.2284e-7 kg
- Sulfur oxides: 1.0126e-5 kg
- Acetaldehyde: 6.5355e-7 kg
- Acrolein: 1.0457e-7 kg
- Formaldehyde: 1.1601e-5 kg
- Benzene: 1.9607e-7 kg
- Propylene oxide: 4.7383e-7 kg
- Naphthalene: 2.124e-8 kg
- Butadiene: 7.0257e-9 kg
- Carbon dioxide, fossil: 1.962 kg
- Toluene: 2.124e-6 kg
- Xylene: 1.0457e-6 kg
- VOC, volatile organic compounds: 3.438e-5 kg
- Methane, fossil: 0.00013948 kg
- PAH, polycyclic aromatic hydrocarbons: 3.5945e-8 kg
- Carbon monoxide, fossil: 0.00024557 kg
- Particulates, > 2.5 um, and < 10um: 0.00010772 kg

## Sources
- Center for Transportation Research, Argo
- Franklin Associates
- EPA
- U.S. EPA Office of Solid Waste and Emerg
- unspecified
