# Sawn Lumber, softwood, planed, kiln dried, at planer mill, INW

Dataset: openLCA process, unit process
Category: Sawmills
Geography: RNA
Time period: 2006-01-01 to 2007-01-01
Generated by: Maureen Puetmann
Published in: Francis G. Wagner
restrictionsDescription: All information can be accessed by everybody.
copyright: false

## General comment
1. Allocation on a mass basis.
2. Important note: although most of the data in the US LCI database has
undergone some sort of review, the database as a whole has not yet
undergone a formal validation process.
3. Please email comments to lci@nrel.gov. 4. WRT soil carbon, what is not known, is the degree of carbon release from the decomposed fine roots in the soil and whether the net release of fine root carbon will be different over different time periods and under different treatment regimes. The results do not address soil carbon or the effect of forest management activities on total soil carbon because no reliable predictors were found that relate to the management treatments being considered.

## Technology
Average

## Geography
Meant to represent operations in eastern Washington, eastern Oregon, Idaho and western Montana. Actual representative mill sample found in eastern Washington and Idaho only.

## Reference product
- Sawn Lumber, softwood, planed, kiln dried, at planer mill, INW: 1 m3
  Represents 436 kg, OD basis. Represents 0.6165 million board feet (Mbft) based on a nominal 2x6 lumber (actual 38 x 140 mm (1.5 x 5.5 inches)).

## By-products
- Shavings, softwood, kiln dried, at planer mill, INW: 36.5 kg
- Wood chips, softwood, kiln dried, at planer mill, INW: 3.97 kg

## Inputs from technosphere
- Sawn lumber, softwood, rough, kiln dried, at kiln, INW: 1.093 m3
- Gasoline, combusted in equipment: 0.0627 l
- Residual fuel oil, at refinery: 0.1022 l
  Proxy for motor oil and hyraulic oils
- Diesel, combusted in industrial equipment: 0.4355 l
- Electricity, at grid, Western US, 2000: 34.1 kWh

## Sampling procedure
Questionnaires from 4 mills assumed to be representative of the softwood lumber industry in US Inland West.

## Sources
- Forest Products Laboratory
- Francis G. Wagner
- Maureen Puettmann
