# RFO, combusted in industrial boiler, at pulp and paper mill (EXCL.)

Dataset: openLCA process, unit process
Category: Pulp, Paper, and Paperboard Mills
Geography: RNA
Time period: 1998-01-01 to 2001-01-01
Generated by: Caroline Gaudreault
Reviewer: Martha Stevenson
Published in: Franklin Associates
restrictionsDescription: All information can be accessed by everybody.
copyright: false

## General comment
This process was built to be used within the processes named "Fuels burned at bleached kraft market pulp mill", "Fuels burned at uncoated freesheet paper mill", "Fuels burned at coated freesheet paper mill", "Fuels burned at uncoated mechanical paper mill", "Fuels burned at coated mechanical paper mill" and "Fuels burned at bag and sack paper mill". It was built from the process named "Residual fuel oil (RFO), combusted in industrial boiler" v.1.6 available in the US LCI database. Transport and waste processes were removed. The following emissions to air were excluded (excl.): Sulfur oxidesand Nitrogen oxides. These processes and emissions are reported in pulp and paper mill process chain in which this process is integrated.
Important note: although most of the data in the US LCI database has
undergone some sort of review, the database as a whole has not yet
undergone a formal validation process.
Please email comments to lci@nrel.gov.

## Technology
Residual oil combustion in average industrial boiler

## Geography
United States

## Reference product
- RFO, combusted in industrial boiler, at pulp and paper mill (EXCL.): 1 l

## Inputs from technosphere
- Residual fuel oil, at refinery: 1 l

## Emissions to nature
- VOC, volatile organic compounds: 3.5907e-5 kg
- Mercury: 1.354e-8 kg
- Dioxins, measured as 2,3,7,8-tetrachlorodibenzo-p-dioxin: 1.7914e-12 kg
- Methane, dichloro-, HCC-30: 5.7773e-7 kg
- Radioactive species, unspecified: 0.099393 kBq
- Methane, fossil: 0.00012784 kg
- Nickel: 1.0125e-5 kg
- Ethene, tetrachloro-: 8.3916e-9 kg
- Beryllium: 3.3312e-9 kg
- Formaldehyde: 3.9543e-6 kg
- Dinitrogen monoxide: 1.4205e-5 kg
- Lead: 1.8094e-7 kg
- Suspended solids, unspecified: 1.2872e-6 kg
- Iron: 4.2906e-8 kg
- Copper, ion: 4.2906e-8 kg
- Carbon dioxide, fossil: 3.262 kg
- Benzene: 2.5643e-8 kg
- Hydrogen chloride: 8.3807e-5 kg
- Naphthalene: 1.354e-7 kg
- Manganese: 3.5948e-7 kg
- Chloride: 8.5811e-9 kg
- Arsenic: 1.5817e-7 kg
- Phenols, unspecified: 4.3531e-7 kg
- Cobalt: 7.2136e-7 kg
- Chromium: 1.0125e-7 kg
- Oils, unspecified: 6.4359e-7 kg
- Selenium: 8.1841e-8 kg
- Particulates, > 2.5 um, and < 10um: 0.00024267 kg
- Carbon monoxide, fossil: 0.00063922 kg
- Cadmium: 4.7691e-8 kg

## Sources
- AF&PA
- Center for Transportation Research, Argo
- U.S. EPA
- U.S. EPA
- EIA
- U.S. EPA Office of Solid Waste and Emerg
- Franklin Associates
- EPA
- unspecified
