# Cladding, roll formed, at plant

Dataset: openLCA process, unit process
Category: Architectural and Structural Metals Manufacturing
Geography: RNA
Time period: 2014-02-01 to 2015-02-28
Generated by: PE INTERNATIONAL
Published in: PE INTERNATIONAL
restrictionsDescription: All information can be accessed by everybody.
copyright: false

## General comment
Roll forming is a continuous bending operation in which a strip of metal (typically coiled steel or aluminum) is passed through consecutive sets of rolls, or stands, each performing only an incremental part of the bend, until the desired cross-section profile is obtained. Roll forming is ideal for producing parts with long lengths or in large quantities with a minimum amount of handling as compared to other types of forming (i.e. press brake). A variety of cross-section profiles can be produced, but each profile requires a carefully crafted set of roll tools. Producing the panels requires a five-stage process, as follows: The metal coils are introduced from an uncoiler (1). A flattener ensures an even, consistent surface for shaping (2). Any punching is done by presses prior to forming (3). The coil then enters a series of rolls designed to incrementally shape the steel sheet into the desired profile (4). Finally, the roll formed sheet is sheared to the required length, and stacked for inspection and final packaging (5). The roll forming process process includes all material and inbound transportation necessary for construction-ready products: coated steel coils, auxiliary inputs, and packaging materials. Energy and utility inputs include electricity, natural gas, and propane. All known solid waste, air, and water emissions are captured in the output.

## Technology
Steel sheet with corrugated profile designs. Technology based on companies identified by Metal Construction Association to be representative of industry.

## Geography
North America

## Reference product
- Cladding, roll formed, at plant: 1 m2

## Inputs from technosphere
- CUTOFF Adhesives and binders, at plant: 0.0212109 kg
- CUTOFF Paper, woodcontaining, LWC, at plant: 0.000117923 kg
- Natural gas, combusted in industrial equipment: 0.00303599 m3
- CUTOFF Lubricants, unspecified, at plant: 1.31944e-5 kg
- Dry rough lumber, at kiln, US SE: 0.0466769 kg
- Transport, single unit truck, long-haul, diesel powered: 438.92 kg*km
- Electricity, at grid, US, 2008: 0.600224 MJ
- Galvanized steel sheet, at plant: 5.66874 kg
- Containerboard, average production, at mill: 0.00201163 kg
- CUTOFF Disposal, wood waste, to unspecified treatment: 0.00164923 kg
- Hot rolled sheet, steel, at plant: 0.000373752 kg
- CUTOFF Recycling, Steel scrap: 0.0814391 kg
- CUTOFF Clay, at mine: 0.000802367 kg
- Galvanized steel coil, coated, at plant: 6.37905 kg
- CUTOFF Disposal, solid waste, unspecified, to unspecified treatment: 0.0844998 kg
- Polyethylene, high density, resin, at plant: 1.32556e-5 kg
- Gasoline, at refinery: 0.000237112 l
- CUTOFF Mineral spirits: 0.000211419 kg
- CUTOFF Glue-adhesive(30-50% terpene,30-50% polybutene,5-10% polyolefin), at plant: 2.77082e-5 kg
- CUTOFF Polyurethane Caulk: 0.0053708 kg
- CUTOFF Thermal energy from propane (MJ): 0.0261592 MJ
- CUTOFF Low Density Polyethylene Film: 0.00136237 kg

## Emissions to nature
- VOC, volatile organic compounds: 1.06769e-6 kg

## Sources
- PE INTERNATIONAL
