# Electric tail drive; Manufacture; For underground coal mine, at plant

Dataset: openLCA process, unit process
Category: Bit. Coal and Lignite Surface Mining
Geography: US
Time period: 2008-01-01 to 2008-12-31
Generated by: Timothy Skone
Owner: National Energy Technology Laboratory
Reviewer: Robert James
Published in: National Energy Technology Laboratory (NETL). 2010. Electric tail drive; Manufacture; For underground coal mine, at plant
restrictionsDescription: Use of this dataset is not restricted, but a statement of attribution is required. Please use the following attribution statement:
National Energy Technology Laboratory's (NETL) Unit Process Library
626 Cochrans Mill Road, P.O. Box 10940
Pittsburgh, PA 15236-0940
http://www.netl.doe.gov/research/energy-analysis/life-cycle-analysis/unit-process-library
Neither the U.S. Department of Energy (DOE) National Energy Technology Laboratory (NETL) nor any person acting on behalf of these organizations:
A. Makes any warranty or representation, express or implied, with respect to the accuracy, completeness, or usefulness of the information contained in this document, or that the use of any information, apparatus, method, or process disclosed in this document may not infringe on privately owned rights; or
B. Assumes any liability with this report as to its use, or damages resulting from the use of any information, apparatus, method, or process disclosed in this document.
Reference herein to any specific commercial product, process, or service by trade name, trademark, manufacturer, or otherwise, does not necessarily constitute or imply its endorsement, recommendation, or favoring by NETL. The views and opinions of the authors expressed herein do not necessarily state or reflect those of NETL.
copyright: true

## General comment
This process is part of the NETL Unit Process Library. To access the library and the original dataset:
1) Navigate to the NETL LCA home page (http://www.netl.doe.gov/lca)
2) Then navigate to the “Unit Process Library”
3) From the library, the unit process of interest can be found either through the "Complete Listing of the Unit Process Library link" or through the link to the "Unit Process Database" spreadsheet
4) For each process, a Data Sheet (DS) and Data File (DF) are available

BRIEF DESCRIPTION
This unit process is based on specifications for a Joy Mining electric tail drive. It assumes tail drive constructed entirely of steel plate with negligible amounts of other materials.

GOAL AND SCOPE
The scope of this unit process encompasses the weight of materials necessary to construct a single, 45 short ton, electric tail drive, to be used during the longwall underground mining of Illinois No. 6 bituminous coal. The process is based on the reference flow of 1 piece of tail drive, as described below and shown in the associated documentation (referenced in the Citation and Associated Documentation section below). The tail drive is assumed to be constructed entirely of steel, and other materials are assumed to be negligible. By default, all steel within this study was assumed to be steel plate, based on available GaBi profiles, unless other steel types were specified per available data, or a higher grade of steel would be required, per NETL engineering judgment. Therefore, all steel considered in this unit process was assumed to be steel plate.

This unit process is used during Life Cycle (LC) Stage #1 to assist in the mining of Illinois No. 6 bituminous coal from an underground coal mine. It is combined with other longwall mining system equipment construction unit processes in an individual assembly unit process for a longwall miner, Longwall mining system; Equipment assembly; Production mix, at underground coal mine. This assembly unit process quantifies the fraction of each piece of underground mining equipment needed under LC Stage #1 to produce 1 kg of Illinois No. 6 bituminous coal ready for transport (LC Stage #2) to the energy conversion facility (LC Stage #3).

BOUNDARY AND DESCRIPTION
Construction of the tail drive was based on communication with an equipment manufacturer for a Joy Mining electric tail drive associated with the longwall mining unit.

A visual representation of the boundary of this unit process is available in the associated documentation (referenced in the Citation and Associated Documentation section below). Emissions related to the physical assembly of the tail drive (e.g., emitted while putting together the components of a tail drive, including transport of those components) are not considered in this study. Upstream emissions from the production of raw materials used for the construction of the tail drive (e.g., steel plate) are calculated outside the boundary of this unit process, based on proprietary profiles available within the GaBi model. As shown in the associated documentation (referenced in the Citation and Associated Documentation section below) and discussed above, the tail drive constructed in this unit process is incorporated into the longwall mining system assembly processes for LC Stage #1 for Illinois No. 6 bituminous coal.

The total weight of a tail drive was readily available, but reliable data for the material breakdown of tail drive subcomponents were not. Therefore, the tail drive was assumed to be composed entirely of steel plate.

Relevant properties and assumptions used to calculate the amount of steel plate contained in a single tail drive are available in the associated documentation (referenced below). The manufacturer gave a range of weights from 36,287 to 45,359 kg (80,000 to 100,000 lbs). These weights were averaged to estimate the total weight for one tail drive, approximately 40,823 kg (90,000 lbs) (Bruniany 2008). Based on the assumption that the tail drive is constructed entirely out of steel plate, the total weight is assigned to this material. Additional detail regarding input and output flows, including calculation methods, is contained in the associated documentation (referenced below).

CITATION AND ASSOCIATED DOCUMENTATION
This document should be cited as:
National Energy Technology Laboratory (NETL). 2015. NETL Life Cycle Inventory Data – Unit Process: Electric tail drive; Manufacture; For underground coal mine, at plant. U.S. Department of Energy, National Energy Technology Laboratory. Last Updated: September 2015 (Version 01). Retrieved on [DATE] from [URL for this dataset].

This dataset is part of the NETL Unit Process Library. The Library offers additional information concerning this dataset in the form of a Detailed Spreadsheet Documentation (DS) file and a Process Documentation File (DF). The DS file is an Excel file that contains all of the parameters, inputs, and outputs for a given system as well as background data, calculations and quality scores. The DF file is a PDF document that contains major assumptions and data sources that are the basis for each unit process. The NETL Unit Process Library is located on the NETL website (netl.doe.gov) under Research / Energy Analysis / Energy Trends and Issues / Life Cycle Analysis / Unit Process Library.

This dataset was converted directly from the DS with additional supporting information provided by the DF. Full citations for the DS and DF are given below.

DS File
National Energy Technology Laboratory (NETL). 2010. NETL Life Cycle Inventory Data – Unit Process: Electric Tail Drive, 45 Tons, Construction. U.S. Department of Energy, National Energy Technology Laboratory. Last Updated: January 2010 (version 01). Retrieved on 6/30/2014 from: http://www.netl.doe.gov/File%20Library/Research/Energy%20Analysis/Life%20Cycle%20Analysis/UP_Library/DS_Stage1_C_Electric_Tail_Drive_45_Tons_2010-01.xls

DF File
National Energy Technology Laboratory (NETL). 2010. NETL Life Cycle Inventory Data – Unit Process: Electric Tail Drive, 45 Tons, Construction. U.S. Department of Energy, National Energy Technology Laboratory. Last Updated: January 2010 (version 01). Retrieved on 6/30/2014 from: http://www.netl.doe.gov/File%20Library/Research/Energy%20Analysis/Life%20Cycle%20Analysis/UP_Library/DF_Stage1_C_Electric_Tail_Drive_45_Tons_2010-01.pdf

## Technology
The scope of this unit process encompasses the weight of materials necessary to construct a single, 45 short ton, electric tail drive, to be used during the longwall underground mining of Illinois No. 6 bituminous coal. The tail drive is assumed to be constructed entirely of steel, and other materials are assumed to be negligible. By default, all steel within this study was assumed to be steel plate, based on available GaBi profiles, unless other steel types were specified per available data, or a higher grade of steel would be required, per NETL engineering judgment. Therefore, all steel considered in this unit process was assumed to be steel plate.

Construction of the tail drive was based on communication with an equipment manufacturer for a Joy Mining electric tail drive associated with the longwall mining unit. A visual representation of the boundary of this unit process is available in the associated documentation (referenced in the Citation and Associated Documentation section in the Description field). As shown in the associated documentation (referenced in the Citation and Associated Documentation section below) and discussed above, the tail drive constructed in this unit process is incorporated into the longwall mining system assembly processes for LC Stage #1 for Illinois No. 6 bituminous coal.

The total weight of a tail drive was readily available, but reliable data for the material breakdown of tail drive subcomponents were not. Therefore, the tail drive was assumed to be composed entirely of steel plate. Additional details regarding input and output flows, including calculation methods and technological assumptions, are contained in the associated documentation.

## Time period
This data set is representative of best available public data from 01/01/2008 to 12/31/2008 and is not subject to limited usability within sub-time spans (e.g. summer, winter).

## Reference product
- Electric tail drive; Manufacture; For underground coal mine, at plant: 1 Item(s); data quality (3,3,1,2,1)

## Inputs from technosphere
- Steel plate; Blast furnace route; Production mix; 85% recovery rate: 40823.3 kg; data quality (3,3,1,2,1)

## Inventory method
Attributional

## Modelling constants
All elementary and technosphere flows are calculated on a functional unit basis. Calculations involving combustion primarily to generate useful work are done using lower heating values (LHV) and calculations involving combustion primarily to generate useful heat are done using higher heating values (HHV). Unless explicitly stated in the associated reference documents applicable calculations assumed standard atmospheric temperature and pressure (SATP).

## Completeness
Individual relevant flows captured

## Data selection
Best publically available data

## Data treatment
No allocation applied

## Data collection
No primary data collected

## Intended application
This is a gate-to-gate manufacturing process and can be used for any type of LCA study.

## Project
National Energy Technology Laboratory (NETL) Unit Process Library

## Sources
- Bruniany, C. 2008. E-mail Interview
- National Energy Technology Laboratory (NETL). 2010. Electric tail drive; Manufacture; For underground coal mine, at plant
