# Corn grain, harvested and stored

Dataset: openLCA process, unit process
Category: Corn Farming
Geography: RNA
Time period: 2010-01-01 to 2100-01-01
Generated by: Daniel Inman
Published in: Hsu, D.
restrictionsDescription: All information can be accessed by everybody.
copyright: false

## Technology
modern

## Geography
North America

## Time period
2010

## Reference product
- Corn grain, harvested and stored: 8790 kg

## Inputs from technosphere
- CUTOFF Fodder loading, by self-loading trailer: 28.317 m3
  Scale value used with corn stover
- CUTOFF Dried roughage store, non ventilated: 1.2035e-6 m3
  Scaled from corn stover.
- Corn, production, average, US, 2022: 9290 kg
  Mean grain yield of corn in the US, kg per ha. NASS 2007. Accounting for both rain fed and irrigated. The estimated genetic yield potential of corn is 25Mgha (Tollenaar, 1983; Tollenaar and Lee 2002; Johnson et al., 2006)
- Transport, single unit truck, diesel powered: 14.9 t*km
  Shipping by single or tandem axle truck. Yu 2008
- CUTOFF Transport, tractor and trailer: 16.4 t*km
  Shipping by wagon. Yu 2008
- CUTOFF Conveyor belt, at plant: 3.4747e-5 m
- Corn, decomposition, 15.5% moisture: 506 kg
- Transport, combination truck, diesel powered: 233 t*km
  Shipping by semi. Yu 2008

## Sources
- Hsu, D.
- T.H. Yu
- M. Tollenaar
- M. Tollenaar
- J. Johnson
