# Fuels, burned at unbleached kraft bag sack paper, average production, at mill

Dataset: openLCA process, unit process
Category: Pulp, Paper, and Paperboard Mills
Geography: RNA
Time period: 2006-01-01 to 2006-01-01
Generated by: Caroline Gaudreault
Reviewer: Martha Stevenson
Published in: AF&PA
restrictionsDescription: All information can be accessed by everybody.
copyright: false

## General comment
Unbleached kraft bag and sack paper, average North American production, at mill. All flows are production-weighted means. Data were developed for a full LCA that was critically reviewed. Reviewers were: • Martha Stevenson, Chairperson – Private Consultant to the public interest with ten years of experience in sustainability, environmental management, packaging and materials recovery; led the development of the Design Guidelines for Sustainable Packaging and the COMPASS software used to compare the environmental impacts of package designs; • Pascal Lesage – Life cycle assessment consultant, Researcher at École Polytechnique de Montréal [at the Inter-University Research Centre for the Life Cycle of Products, Processes and Services (CIRAIG) in Montreal]; and • Dale Phenicie, Environmental Affairs Consulting – Consultant with 35 years of experience in environmental protection and process consulting for the forest products industry. Has served on several U.S. EPA Task Forces dealing with water quality issues and authored several AF&PA Environmental, Health and Safety/Sustainability reports.

## Technology
current technology mix for unbleached kraft bag and sack paper

## Time period
Primary data collected from participating companies and associations for their operational activities are representative for 2006 and 2007.

## Reference product
- Fuels, burned at unbleached kraft bag sack paper, average production, at mill: 11045 MJ

## Inputs from technosphere
- Bituminous coal, combusted in industrial boiler, at pulp and paper mill (EXCL.): 51.363 kg
- Hog fuel, self-gen., combusted in ind. boiler, at pulp and paper mill (EXCL.): 76.544 kg
  Combustion of self-generated hogged fuel from pulpwood. Wood inputs are accounted for in the process named Unbleached kraft sack paper, average production, at mill
- Diesel, combusted in industrial boiler, at pulp and paper mill (EXCL.): 2.012 l
  Proxy for light fuel oil.
- Natural gas, combusted in industrial boiler, at pulp and paper mill (EXCL.): 70.235 m3
- Gasoline, combusted in equipment, at pulp and paper mill (EXCL.): 8.058 l
  Gasoline and kerosene, assumed to be gasoline.
- Diesel, combusted in industrial boiler, at pulp and paper mill (EXCL.): 4.4041 l
  Other fossil fuels assumed to be diesel.
- Hog fuel, pur., combusted in industrial boiler, at pulp and paper mill (EXCL.): 132.77 kg
  Purchased hogged fuel. Typically from wood products manufacturing.
- LPG, combusted in industrial boiler, at pulp and paper mill (EXCL.): 0.73606 l
- RFO, combusted in industrial boiler, at pulp and paper mill (EXCL.): 48.156 l
  All combusted on site. Actually received at supplier, not refinery.

## Emissions to nature
- Dioxin, 2,3,7,8 Tetrachlorodibenzo-p-: 4.1342e-15 kg
  From black liquor recovery, non-recyclable paper combustion and wastewater residuals combustion
- Polycyclic organic matter, unspecified: 0.00013392 kg
  (same comment as for Dioxin, 2,3,7,8 Tetrachlorodibenzo-p-)
- Ethane, 1,1,2-trichloro-: 4.991e-6 kg
  (same comment as for Dioxin, 2,3,7,8 Tetrachlorodibenzo-p-)
- Phenol: 0.0059892 kg
  (same comment as for Dioxin, 2,3,7,8 Tetrachlorodibenzo-p-)
- Selenium: 0.00082351 kg
  (same comment as for Dioxin, 2,3,7,8 Tetrachlorodibenzo-p-)
- Lead: 4.0801e-6 kg
  (same comment as for Dioxin, 2,3,7,8 Tetrachlorodibenzo-p-)
- TSP: 0.011687 kg
  (same comment as for Dioxin, 2,3,7,8 Tetrachlorodibenzo-p-)
- Benzene, hexachloro-: 5.8228e-12 kg
  (same comment as for Dioxin, 2,3,7,8 Tetrachlorodibenzo-p-)
- Vanadium: 7.0706e-7 kg
  (same comment as for Dioxin, 2,3,7,8 Tetrachlorodibenzo-p-)
- Dinitrogen monoxide: 0.023122 kg
  (same comment as for Dioxin, 2,3,7,8 Tetrachlorodibenzo-p-)
- Xylene: 0.00044919 kg
  (same comment as for Dioxin, 2,3,7,8 Tetrachlorodibenzo-p-)
- 4-Methyl-2-pentanone: 0.00019548 kg
  (same comment as for Dioxin, 2,3,7,8 Tetrachlorodibenzo-p-)
- Styrene: 0.00010814 kg
  (same comment as for Dioxin, 2,3,7,8 Tetrachlorodibenzo-p-)
- Cresol: 0.001776 kg
  (same comment as for Dioxin, 2,3,7,8 Tetrachlorodibenzo-p-)
- Zinc: 2.4955e-5 kg
  (same comment as for Dioxin, 2,3,7,8 Tetrachlorodibenzo-p-)
- Methanol: 0.064051 kg
  (same comment as for Dioxin, 2,3,7,8 Tetrachlorodibenzo-p-)
- Cadmium: 3.7432e-5 kg
  (same comment as for Dioxin, 2,3,7,8 Tetrachlorodibenzo-p-)
- Hydrogen chloride: 0.035353 kg
  (same comment as for Dioxin, 2,3,7,8 Tetrachlorodibenzo-p-)
- Nitrogen dioxide: 1.7837 kg
  From all combustion processes at pulp and paper mill.
- Chromium: 5.1989e-6 kg
  (same comment as for Dioxin, 2,3,7,8 Tetrachlorodibenzo-p-)
- Carbon dioxide, biogenic: 1183 kg
  (same comment as for Dioxin, 2,3,7,8 Tetrachlorodibenzo-p-)
- Cumene: 0.00039096 kg
  (same comment as for Dioxin, 2,3,7,8 Tetrachlorodibenzo-p-)
- Sulfur dioxide: 2.1755 kg
  From all combustion processes at pulp and paper mill.
- Chloroform: 1.2145e-5 kg
  (same comment as for Dioxin, 2,3,7,8 Tetrachlorodibenzo-p-)
- Hydrogen sulfide: 0.18808 kg
  Total reduced sulfur assumed to be hydrogen sulfide. From all combustion processes at pulp and paper mill.
- Benzo(ghi)perylene: 1.6179e-6 kg
  (same comment as for Dioxin, 2,3,7,8 Tetrachlorodibenzo-p-)
- Methane, tetrachloro-, CFC-10: 2.0879e-5 kg
  (same comment as for Dioxin, 2,3,7,8 Tetrachlorodibenzo-p-)
- Carbon monoxide: 0.078608 kg
  (same comment as for Dioxin, 2,3,7,8 Tetrachlorodibenzo-p-)
- Benzene, 1,2,4-trichloro-: 6.2387e-5 kg
  (same comment as for Dioxin, 2,3,7,8 Tetrachlorodibenzo-p-)
- Mercury: 1.4058e-6 kg
  (same comment as for Dioxin, 2,3,7,8 Tetrachlorodibenzo-p-)
- Acetaldehyde: 0.00703 kg
  (same comment as for Dioxin, 2,3,7,8 Tetrachlorodibenzo-p-)
- Sulfuric acid: 0.012186 kg
  (same comment as for Dioxin, 2,3,7,8 Tetrachlorodibenzo-p-)
- Ethene, tetrachloro-: 2.4955e-7 kg
  (same comment as for Dioxin, 2,3,7,8 Tetrachlorodibenzo-p-)
- Barium: 7.1953e-6 kg
  (same comment as for Dioxin, 2,3,7,8 Tetrachlorodibenzo-p-)
- Arsenic: 1.3226e-6 kg
  (same comment as for Dioxin, 2,3,7,8 Tetrachlorodibenzo-p-)
- Silver: 5.1989e-5 kg
  (same comment as for Dioxin, 2,3,7,8 Tetrachlorodibenzo-p-)
- Aldehydes, C3: 0.0027118 kg
  (same comment as for Dioxin, 2,3,7,8 Tetrachlorodibenzo-p-)
- Acrolein: 0.00015306 kg
  (same comment as for Dioxin, 2,3,7,8 Tetrachlorodibenzo-p-)
- Toluene: 0.00030486 kg
  (same comment as for Dioxin, 2,3,7,8 Tetrachlorodibenzo-p-)
- Copper: 1.2353e-5 kg
  (same comment as for Dioxin, 2,3,7,8 Tetrachlorodibenzo-p-)
- Naphthalene: 6.821e-5 kg
  (same comment as for Dioxin, 2,3,7,8 Tetrachlorodibenzo-p-)
- Formaldehyde: 0.00324 kg
  (same comment as for Dioxin, 2,3,7,8 Tetrachlorodibenzo-p-)
- Biphenyl: 7.5281e-5 kg
  (same comment as for Dioxin, 2,3,7,8 Tetrachlorodibenzo-p-)
- Methane, monochloro-, R-40: 0.021336 kg
  (same comment as for Dioxin, 2,3,7,8 Tetrachlorodibenzo-p-)
- Benzene: 0.000366 kg
  (same comment as for Dioxin, 2,3,7,8 Tetrachlorodibenzo-p-)
- Carbon disulfide: 0.0002745 kg
  (same comment as for Dioxin, 2,3,7,8 Tetrachlorodibenzo-p-)
- Beryllium: 0.00072785 kg
  (same comment as for Dioxin, 2,3,7,8 Tetrachlorodibenzo-p-)
- Hexane: 0.0002142 kg
  (same comment as for Dioxin, 2,3,7,8 Tetrachlorodibenzo-p-)
- Methane, dichloro-, HCC-30: 9.1501e-5 kg
  (same comment as for Dioxin, 2,3,7,8 Tetrachlorodibenzo-p-)
- Methane: 0.028931 kg
  (same comment as for Dioxin, 2,3,7,8 Tetrachlorodibenzo-p-)
- Manganese: 2.5496e-5 kg
  (same comment as for Dioxin, 2,3,7,8 Tetrachlorodibenzo-p-)
- Ethene, trichloro-: 1.1521e-5 kg
  (same comment as for Dioxin, 2,3,7,8 Tetrachlorodibenzo-p-)
- Ethane, 1,1,1-trichloro-, HCFC-140: 2.1503e-5 kg
  (same comment as for Dioxin, 2,3,7,8 Tetrachlorodibenzo-p-)
- Nickel: 1.0023e-5 kg
  (same comment as for Dioxin, 2,3,7,8 Tetrachlorodibenzo-p-)
- Hydrogen fluoride: 0.00054069 kg
  (same comment as for Dioxin, 2,3,7,8 Tetrachlorodibenzo-p-)
- Antimony: 4.1592e-5 kg
  (same comment as for Dioxin, 2,3,7,8 Tetrachlorodibenzo-p-)

## Sampling procedure
The survey included results from 9 mills representing 1.17 million short tons per year (TPY), nearly 89% of 2006/2007 North American production volume.

## Sources
- AF&PA
