# Seedlings, at greenhouse, US PNW

Dataset: openLCA process, unit process
Category: Forest Nurseries, Gathering Forest Prod.
Geography: RNA
Generated by: Jamie Meil
Published in: Maureen Puetmann
restrictionsDescription: All information can be accessed by everybody.
copyright: false

## General comment
Base process data presented with allocations to within process co-products noted. Refer to allocation worksheet for specifics. All allocations performed using mass or volume., general growth related process for tree seedlings
Important note: although most of the data in the US LCI database has
undergone some sort of review, the database as a whole has not yet
undergone a formal validation process.
Please email comments to lci@nrel.gov.

## Technology
Typical

## Geography
US Pacific North West

## Reference product
- Seedlings, at greenhouse, US PNW: 1 Item(s)

## Inputs from technosphere
- Gasoline, combusted in equipment: 0.00654 l
- Electricity, at grid, Western US, 2000: 0.042 kWh
- Nitrogen fertilizer, production mix, at plant: 4.26e-5 kg
- Phosphorous fertilizer, production mix, at plant: 7.17e-5 kg
- CUTOFF Potassium fertilizer, production mix, at plant: 0.000175 kg

## Inputs from nature
- Water, unspecified natural origin: 4.64 l

## Sources
- Leonard R. Johnson
- Michael Milota
- Maureen Puetmann
