# Scanner, desktop, i2900

Dataset: openLCA process, unit process
Category: Other material
Geography: GLO
Time period: 2003-06-10 to 2012-09-15
Generated by: Roy Wood
Reviewer: Jay Mathewson
Published in: Roy Wood
restrictionsDescription: All information can be accessed by everybody.
copyright: false

## General comment
Cradle to Gate data for a single 16.4 kg line of scanner model for a single company. Scanner scans at 120 A4 images per minute. Use can exceed 10,000 images per day. This cradle to gate data was extracted from a full cradle to end of life LCA. Internal company validation via business and peer review and internal assessment. This dataset was consistent with LCA conducted using same approach as the office scanner LCA, which was peer reviewed by Kate Winnebeck, LCACP, New York State Pollution Prevention Institute , Rochester Institute of Technology. Data is only directly representative for the scanner model i2900. However components and manufacturing process is similar for many scanners, so extrapolation to other similar scanners may be done using judement. Component proxy data for original LCA was from Ecoinvent. Each flow represents one or more parts made with the same materials and processes, which were aggregated The scanner was manufactured in China with the subcomponents mostly from China. However the best available datasets were used as proxy data and the best data often came from different geographic locations. Some data was replaced in this cradle to gate dataset by USLCI data where appropriate data was available. Unless otherwise noted in a General Comment for individual flows, data described as dummy_ was from Ecoinvent. Waste scrap was 0.5% of input flows. Although these were included in the full LCA, they were not shown to be significant in the modeling and according to a 1% cutoff criteria, have not been included in this cradle to gate data.

## Technology
Best available technology

## Geography
Global

## Time period
start date was based on earliest date of secondary data. Start date of primary data was 2011-07-01

## Reference product
- Scanner, desktop, i2900: 1 Item(s)

## Inputs from technosphere
- E-glass, at plant: 0.02 kg; triangle minimum 0.019, mode 0.02, maximum 0.021
  original data - glass fibre, at plant, RER/U from Ecoinvent
- CUTOFF Steel, low-alloyed, at plant: 6.31 kg; triangle minimum 6.2, mode 6.33, maximum 6.4
- CUTOFF Nylon 6, at plant: 0.034 kg; triangle minimum 0.0335, mode 0.034, maximum 0.0345
- CUTOFF Polycarbonate, at plant: 0.47 kg; triangle minimum 0.46, mode 0.47, maximum 0.48
- Polyethylene, low density, resin, at plant: 0.027 kg; triangle minimum 0.0265, mode 0.027, maximum 0.0275
  original data - LDPE granulate, at plant, RER/U from Ecoinvent
- CUTOFF Synthetic rubber, at plant: 0.11 kg; triangle minimum 0.105, mode 0.11, maximum 0.115
  data from Ecoinvent
- Transport, combination truck, diesel powered: 19 t*km; triangle minimum 10, mode 14, maximum 33
  original data - transport, lorry >32t, EURO5/ RER U
- CUTOFF Tetrafluoroethylene, at plant: 0.012 kg; triangle minimum 0.011, mode 0.012, maximum 0.013
- Aluminum ingot, production mix, at plant: 0.000933 t; triangle minimum 0.00093, mode 0.000933, maximum 0.000936
  original data - aluminum, production mix at plant RER/U from Ecoinvent
- CUTOFF LCD glass, at plant: 0.168 kg; triangle minimum 0.16, mode 0.168, maximum 0.176
  About half this quantity was LCD glass and half was lens glass and other highly processed glass. LCD glass was the best available data for lens and other highly processed glass based on cost and manufacturing complexity.
- CUTOFF Injection moulding: 7.02 kg; triangle minimum 6.92, mode 7.02, maximum 7.12
- CUTOFF Printed wiring board, surface mounted, unspec., Pb free, at plant: 0.791 kg; triangle minimum 0.786, mode 0.791, maximum 0.796
- CUTOFF Copper, primary, at refinery: 0.028 kg; triangle minimum 0.027, mode 0.027, maximum 0.03
- CUTOFF Treatment, sewage, to wastewater treatment, class 1/CH U: 50 kg; triangle minimum 45, mode 50, maximum 55
- CUTOFF Cold impact extrusion, aluminium, 1 stroke: 0.933 kg; triangle minimum 0.93, mode 0.933, maximum 0.936
- Acrylonitrile-butadiene-styrene copolymer, resin, at plant: 6.5835 kg; triangle minimum 6.58, mode 6.5835, maximum 6.587
  original data - acrylonitrile-butadiene-styrene (ABS), at plant RER/U from Ecoinvent
- CUTOFF Tap water, at user: 50 kg; triangle minimum 45, mode 50, maximum 55
- CUTOFF Electricity, low voltage, at grid/CN U: 9 kWh; triangle minimum 8, mode 9, maximum 10
- CUTOFF Silver, at regional storage: 0.014 kg; triangle minimum 0.0135, mode 0.014, maximum 0.0145
  silver data was used for neodymium, because there was no neodymium data and silver was the best substitute based on price and cost of production.
- CUTOFF Cable, connector for computer, without plugs, at plant: 0.084 kg; triangle minimum 0.083, mode 0.084, maximum 0.085
  data available as a .065 kg part in Ecoinvent
- Polyvinyl chloride, resin, at plant: 0.014 kg; triangle minimum 0.013, mode 0.014, maximum 0.015
  original data - polyvinyl chloride ar regional storage, RER/U from Ecoinvent
- Polypropylene resin, at plant: 0.342 kg; triangle minimum 0.334, mode 0.342, maximum 0.35
  original data - polypropylene granulate, at plant, RER/U from Ecoinvent
- CUTOFF Steel product manufacturing, average metal working: 6.31 kg; triangle minimum 6.2, mode 6.33, maximum 6.4
- CUTOFF Flat glass, coated, at plant: 0.382 kg; triangle minimum 0.374, mode 0.382, maximum 0.39
- CUTOFF Polymethyl methacrylate, beads, at plant: 0.012 kg; triangle minimum 0.0115, mode 0.012, maximum 0.0125
- CUTOFF Flat glass, uncoated, at plant: 0.382 kg; triangle minimum 0.374, mode 0.382, maximum 0.39
- CUTOFF Copper product manufacturing, average metal working: 0.028 kg; triangle minimum 0.027, mode 0.028, maximum 0.029
- CUTOFF Carbon black, at plant: 0.143 kg; triangle minimum 0.14, mode 0.143, maximum 0.146
- Packaging and information sheets, i2900 desktop scanner: 0.294 kg; triangle minimum 0.288, mode 0.294, maximum 0.3

## Sampling procedure
engineering specifications, variability less than 1% for this model

## Review details
Data was reviewed to ensure in was consistent with the manufacturing process and components, was based on quality sources - primary data from design and manufacturing specifications, and secondary data was from reliable sources (largely from Ecoinvent) and data was properly documented in final report and associated appendices. Initial review was by Roy Wood, followed by an independent internal review by Jay Mathewson.

## Sources
- Roy Wood
