# Pressed raw plywood, from lay-up, at plywood plant, US SE

Dataset: openLCA process, unit process
Category: Softwood Veneer and Plywood Manufacturing
Geography: RNA
Time period: 2000-01-01 to 2000-01-01
Generated by: Jamie Meil
Published in: Eric T. Sackimoto
restrictionsDescription: All information can be accessed by everybody.
copyright: true

## General comment
Base process data presented with allocations to within process co-products noted. Refer to allocation worksheet for specifics. All allocations performed using mass or volume.,
Important note: although most of the data in the US LCI database has
undergone some sort of review, the database as a whole has not yet
undergone a formal validation process.
Please email comments to lci@nrel.gov.

## Technology
typical

## Geography
US South East

## Reference product
- Pressed raw plywood, from lay-up, at plywood plant, US SE: 1 kg

## Inputs from technosphere
- CUTOFF Hogfuel-Biomass (50% MC), combusted in industrial boiler: 0.0719 kg
- Electricity, at grid, Eastern US, 2000: 0.0253 kWh
- Dry veneer, at plywood plant, US SE: 1 kg
- Liquefied petroleum gas, combusted in industrial boiler: 0.000579 l

## Emissions to nature
- Formaldehyde: 1.63e-6 kg
- Acetone: 5.57e-6 kg
- Phenol: 1.2e-6 kg
- VOC, volatile organic compounds: 0.000214 kg
- Methanol: 0.00012 kg
- Acetaldehyde: 3.6e-6 kg
- Methyl ethyl ketone: 6.08e-7 kg
- alpha-Pinene: 8.39e-5 kg
- Particulates, unspecified: 0.000152 kg
- Bicyclo[3.1.1]heptane, 6,6-dimethyl-2-methylene-: 3.25e-5 kg
- D-limonene: 9.42e-6 kg

## Sources
- Leonard R. Johnson
- Eric T. Sackimoto
- Maureen Puetmann
