# Electricity, natural gas, at power plant

Dataset: openLCA process, unit process
Category: Fossil Fuel Electric Power Generation
Geography: RNA
Time period: 2002-01-01 to 2003-01-01
Generated by: Franklin Associates
Published in: Franklin Associates
restrictionsDescription: All information can be accessed by everybody.
copyright: false

## General comment
Important note: although most of the data in the US LCI database has
undergone some sort of review, the database as a whole has not yet
undergone a formal validation process.
Please email comments to lci@nrel.gov.

## Technology
Electricity production by natural gas steam generation

## Geography
United States

## Reference product
- Electricity, natural gas, at power plant: 1 kWh

## Inputs from technosphere
- Transport, combination truck, average fuel mix: 0.05921 t*km
  Represents transportation from natural gas plant to utility.
- Transport, pipeline, natural gas: 0.35372 t*km
  Represents transportation from natural gas plant to utility.
- Transport, train, diesel powered: 0.0035372 t*km
  Represents transportation from natural gas plant to utility.
- Natural gas, processed, at plant: 0.29829 m3
  Fuel consumption: 0.298 m3/kWh (10.5 ft3/kWh)

## Emissions to nature
- Methane, fossil: 1.0743e-5 kg
- Sulfur oxides: 3.0205e-6 kg
- Dinitrogen monoxide: 1.0743e-5 kg
- Selenium: 1.1467e-10 kg
- Carbon monoxide, fossil: 0.00040141 kg
- Nitrogen oxides: 0.00047759 kg
- Chromium: 6.6894e-9 kg
- Formaldehyde: 3.5836e-7 kg
- Lead: 2.3891e-9 kg
- Cadmium: 5.2559e-9 kg
- Cobalt: 4.0136e-10 kg
- Manganese: 1.8157e-9 kg
- Naphthalene: 2.9147e-9 kg
- Beryllium: 5.7337e-11 kg
- Radioactive species, unspecified: 0.0010215 kBq
- Particulates, < 10 um: 3.6137e-5 kg
- Arsenic: 9.5562e-10 kg
- Carbon dioxide, fossil: 0.58466 kg
- Mercury: 1.2423e-9 kg
- Benzene: 1.0034e-8 kg
- VOC, volatile organic compounds: 2.637e-5 kg
- Nickel: 1.0034e-8 kg

## Sources
- Center for Transportation Research, Argo
- U.S. EPA
- U.S. EPA
- Franklin Associates
- U.S. EPA
- U.S. EPA Office of Solid Waste and Emerg
- unspecified
