# Soybean oil, crude, degummed, at plant

Dataset: openLCA process, unit process
Category: All Other Basic Organic Chemical Manufacturing
Geography: RNA
Time period: 2007-01-01 to 2007-01-01
Generated by: James Pollack, PE
Published in: Omni Tech International
restrictionsDescription: All information can be accessed by everybody.
copyright: false

## General comment
1. The study (Main Data Source) underwent external peer review prior to this submission to the US LCI database. 2. CARBON SEQUESTRATION should be accounted for after the product is built in its LCA model, and should be included depending on the use of end of life fate of that product. For example, a soy-based resin may retain the sequestered carbon indefinitely, while a soy-based biodiesel releases the sequestered carbon at use phase.
Biomass carbon contents are as follows:
CRUDE SOY OIL: 77% C --> 2.823 kg CO2/kg crude soy oil;
SOY MEAL: 48% C --> 1.76 kg CO2/kg meal;
REFINED SOY OIL: 80.6% C --> 2.955 kg CO2/kg refined soy oil;
BIODIESEL: 77% C --> 2.823 kg CO2/kg biodiesel.
3 ALLOCATION: THE VALUES IN THE "FLOW INFO" SHEET ARE NOT ALLOCATED, BUT THE DEFAULT ALLOCATION IS ON A PHYSICAL BASIS. FOR SENSITIVITY, OR DEPENDING ON YOUR GOAL AND SCOPE, ECONOMIC ALLOCATION MAY ALSO BE USED. FOR EXAMPLE: DECEMBER 2009 ECONOMIC ALLOCATION VALUES WOULD BE: CRUDE OIL: 38%, MEAL: 62%. LCA PRACTITIONERS ARE ENCOURAGED TO RESEARCH AND USE THE LATEST ECONOMIC DATA BEFORE APPLYING ECONOMIC ALLOCATION FACTORS.

## Technology
Representative of current NA production (which has a mix of newer and older technologies)

## Geography
North America (Data was collected by the National Oilseed Processors Association (NOPA).)

## Reference product
- Soy meal, at plant: 4131 kg

## By-products
- Soybean oil, crude, degummed, at plant: 1000 kg

## Inputs from technosphere
- Natural gas, combusted in industrial boiler: 107.268 m3
- Soybean grains, at field: 5236 kg
  represents 1000 bushels of soybeans
- Diesel, combusted in industrial boiler: 0.816762 l
- CUTOFF Disposal, solid waste, unspecified, to unspecified landfill: 8.7 kg
- Transport, combination truck, diesel powered: 1685 t*km
- Bituminous coal, combusted in industrial boiler: 81.5366 kg
- CUTOFF Heat, from landfill gas: 31.5699 MJ
- Residual fuel oil, combusted in industrial boiler: 1.51352 l
- Electricity, at grid, US, 2000: 289 kWh
- CUTOFF Heat, from biomass: 63.1399 MJ
- CUTOFF Hexane, at plant: 2.96 kg
  NOPA's hexane input and air emissions numbers are based on EPA's Vegetable Oil MACT limit of 0.2 gallon of hexane lost/ton of soybeans processed with an assumed specific gravity of hexane of 5.65 pounds/gallon. The MACT limit is a "total loss" limit that reflects total hexane disappearance, the vast majority of which is via air emissions.

## Inputs from nature
- Water: 2547 l
  NOPA data reflect individual facility metered water use, which includes water used in cooling towers, steam production, and other process-related equipment.

## Emissions to nature
- Hexane: 2.96 kg
- Oils, unspecified: 0.14 kg

## Sources
- Omni Tech International
