# Natural gas, combusted in industrial boiler, at hydrocracker, for pyrolysis gas

Dataset: openLCA process, unit process
Category: Fossil Fuel Electric Power Generation
Geography: RNA
Time period: 1998-01-01 to 2003-01-01
Generated by: Franklin Associates
Published in: THE PLASTICS DIVISION OF THE AMERICAN C
restrictionsDescription: All information can be accessed by everybody.
copyright: false

## General comment
Complete inventory data and metadata are available in full in the final report and appendices, Cradle-to-Gate Life Cycle Inventory of Nine Plastic Resins and Four Polyurethane Precursors. This report has been extensively reviewed within Franklin Associates and has undergone partial critical review by ACC Plastics Division members and is available at: www.americanchemistry.com. Quantities may vary slightly between the reference to main source and and this module due to rounding.Important note: although most of the data in the US LCI database has undergone some sort of review, the database as a whole has not yet undergone a formal validation process. Please email comments to lci@nrel.gov.

## Technology
Natural gas combustion in industrial boiler at hydrocracker

## Geography
North America (US and Canada)

## Reference product
- Natural gas, combusted in industrial boiler, at hydrocracker, for pyrolysis gas: 1 m3

## Inputs from technosphere
- Transport, train, diesel powered: 0.011858 t*km
  Represents transportation from natural gas plant to combustion.
- Transport, pipeline, natural gas: 1.186 t*km
  Represents transportation from natural gas plant to combustion.
- Transport, combination truck, average fuel mix: 0.1985 t*km
  Represents transportation from natural gas plant to combustion.
- Natural gas, processed, at plant: 1 m3

## Emissions to nature
- Dinitrogen monoxide: 3.6017e-5 kg
- Carbon dioxide, fossil: 6.85687 kg
- Mercury: 4.1648e-9 kg
- Naphthalene: 9.7713e-9 kg
- Benzene: 3.3639e-8 kg
- Sulfur oxides: 0.000705397 kg
- Cadmium: 1.762e-8 kg
- Manganese: 6.087e-9 kg
- Lead: 8.0092e-9 kg
- Particulates, < 10 um: 9.54361e-5 kg
- Chromium: 2.2426e-8 kg
- Cobalt: 1.3456e-9 kg
- Arsenic: 3.2037e-9 kg
- Nickel: 3.3639e-8 kg
- Beryllium: 1.9222e-10 kg
- Methane, fossil: 3.6017e-5 kg
- Nitrogen oxides: 0.0044606 kg
- Selenium: 3.8444e-10 kg
- VOC, volatile organic compounds: 8.8405e-5 kg
- Formaldehyde: 1.2014e-6 kg
- Carbon monoxide, fossil: 0.00300831 kg
- Radioactive species, unspecified: 0.0034247 kBq

## Sampling procedure
Data are from primary sources.

## Sources
- THE PLASTICS DIVISION OF THE AMERICAN C
- U.S. EPA
- Franklin Associates
- Center for Transportation Research, Argo
- EPA
- U.S. EPA Office of Solid Waste and Emerg
- unspecified
