# Methylene diphenyl diisocyanate, resin, at plant

Dataset: openLCA process, unit process
Category: Petrochemical Manufacturing
Geography: RNA
Time period: 2003-01-01 to 2003-01-01
Generated by: Franklin Associates
Published in: THE PLASTICS DIVISION OF THE AMERICAN C
restrictionsDescription: All information can be accessed by everybody.
copyright: false

## General comment
A large amount of hydrogen chloride is produced as a coproduct during this process. A mass basis was used to partition the credit for each product. Waterborne emissions collected for phosgene/MDA/MDI included those sent to deepwell disposal. Emissions sent to deepwell disposal are not included in the table as they are not released to a readily accessible aquifer. The following emissions were reported as being sent to deepwell disposal: MDA, aniline, and caustic. This process has net water outputs. The mass imbalance is due to unavailability of the weight of water inputs to production and outputs to nature. Complete inventory data and metadata are available in full in the final report and appendices, Cradle-to-Gate Life Cycle Inventory of Nine Plastic Resins and Four Polyurethane Precursors. This report has been extensively reviewed within Franklin Associates and has undergone partial critical review by ACC Plastics Division members and is available at: www.americanchemistry.com. Quantities may vary slightly between the reference to main source and and this module due to rounding. Important note: although most of the data in the US LCI database has undergone some sort of review, the database as a whole has not yet undergone a formal validation process. Please email comments to lci@nrel.gov.

## Technology
Condensation of aniline and formaldehyde in the presence of an acid to produce 4,4-methylenedianiline (MDA), followed by phosgenation of MDA

## Geography
US

## Reference product
- Methylene diphenyl diisocyanate, resin, at plant: 1 kg

## By-products
- Recovered energy: 0.632828 MJ
  Credit for steam or heat co-product sold externally.

## Inputs from technosphere
- CUTOFF Carbon monoxide, at plant: 0.15 kg
  Data for carbon monxide production are not shown due to confidentiality issues but transport of carbon monoxide, specific to MDI, is 0.70 tn-km per 1 kg of carbon monoxide by petroleum pipeline.
- Transport, barge, diesel powered: 0.00113991 t*km
  Values for barge transport are calculated based on average fuel consumption rates as reported in Transportation Energy Data Book: Edition 22 from Oak Ridge National Laboratory, September 2002: 22% of barges use diesel fuel in their engines, 78% use residual oil to generate steam for steam turbines, and a barge that consumes residual oil consumes 3.4 gallons per 1,000 ton-miles
- Electricity, at cogen, for natural gas turbine: 0.0817901 kWh
- CUTOFF Disposal, solid waste, unspecified, to municipal incineration: 0.00145 kg
- Transport, pipeline, natural gas: 3.67616e-5 t*km
- Chlorine, production mix, at plant: 0.378 kg
- Transport, pipeline, unspecified petroleum products: 0.00197929 t*km
  Transport is specific to chlorine and caustic soda transported to MDI and TDI producers
- Methanol, at plant: 0.0656 kg
- Transport, barge, residual fuel oil powered: 0.0037902 t*km
  (same comment as for Transport, barge, diesel powered)
- Natural gas, combusted in industrial boiler: 0.115865 m3
- Sodium hydroxide, production mix, at plant: 0.0582 kg
- Aniline, at plant: 0.48 kg
- CUTOFF Disposal, solid waste, unspecified, to sanitary landfill: 0.00138 kg
- Electricity, at grid, US, 2008: 0.107363 kWh

## Inputs from nature
- Oxygen, in air: 0.0328 kg

## Emissions to nature
- Copper: 1e-9 kg
  This emission was reported by fewer than three companies. To indicate known emissions while protecting the confidentiality of individual company responses, the emission is reported only by order of magnitude.
- Nickel: 1e-8 kg
  (same comment as for Copper)
- Cyanide: 1e-9 kg
  (same comment as for Copper)
- Phenol compounds, unspecified: 1e-7 kg
  (same comment as for Copper)
- Lead: 1e-10 kg
  (same comment as for Copper)
- Chloroform: 1e-9 kg
  (same comment as for Copper)
- NMVOC, non-methane volatile organic compounds, unspecified: 1.4e-5 kg
- Sulfur oxides: 1e-9 kg
  (same comment as for Copper)
- Methane, tetrachloro-, CFC-10: 1e-5 kg
  (same comment as for Copper)
- BOD5, Biological Oxygen Demand: 4.5e-6 kg
- Particulates, > 2.5 um, and < 10um: 1.4e-5 kg
- Particulates, < 2.5 um: 1e-6 kg
  (same comment as for Copper)
- Particulates, unspecified: 1e-6 kg
  (same comment as for Copper)
- Ammonia: 1.1e-6 kg
  (same comment as for Copper)
- Suspended solids, unspecified: 8.3e-6 kg
- COD, Chemical Oxygen Demand: 1e-5 kg
  (same comment as for Copper)
- Nitrogen oxides: 1e-6 kg
  (same comment as for Copper)
- Dissolved solids: 0.01 kg
  (same comment as for Copper)
- Dimethyl ether: 1e-6 kg
  (same comment as for Copper)
- Chlorine: 1e-7 kg
  (same comment as for Copper)
- TOC, Total Organic Carbon: 2.0297e-5 kg
- Phosphates: 7.1e-6 kg
- Organic substances, unspecified: 0.00011 kg
- Carbon monoxide: 0.000594912 kg
- Hydrogen chloride: 1e-7 kg
  (same comment as for Copper)
- Methanol: 1e-6 kg
  (same comment as for Copper)
- Oil and grease, unspecified: 1e-5 kg
  (same comment as for Copper)
- Nitrates: 1e-11 kg
  (same comment as for Copper)
- Carbon dioxide, fossil: 0.01 kg
  (same comment as for Copper)
- Ammonia: 2.4e-6 kg
- Aldehydes: 2.00092e-7 kg

## Sampling procedure
Data are from primary sources.

## Sources
- THE PLASTICS DIVISION OF THE AMERICAN C
