# Electricity, at eGrid, SRVC, 2008

Dataset: openLCA process, unit process
Category: Utilities
Geography: RNA
Time period: 2008-01-01 to 2008-01-01
Generated by: Alberta Carpenter
Published in: Chris Goemans, Athena Institute
restrictionsDescription: All information can be accessed by everybody.
copyright: false

## General comment
The methodology used to put together the grid information is outlined in reference 1.

## Technology
Typical

## Geography
SRVC Virginia-Carolina electricity grid to includes North and South Carolina and most of Virginia (less RFCW).

## Reference product
- Electricity, at eGrid, SRVC, 2008: 1 kWh

## Inputs from technosphere
- Electricity, natural gas, at power plant: 0.0649818 kWh
  Natural Gas
- CUTOFF Electricity, petroleum coke, at power plant: 0.000177101 kWh
  Petroleum (Other Fossil) PC - petroleum coke
- Electricity, biomass, at power plant: 0.00817284 kWh
  Solid Renewable Fuels (Biomass) WDS – Wood/Wood Waste Solids (Paper Pellets, Railroad Ties, Utility Poles, Wood Chips, and other wood solids)
- CUTOFF Electricity, biomass,solid, unspecified, at power plant: 7.11056e-5 kWh
  Solid Renewable Fuels (Biomass) OBS – Other Biomass Solid (Animal Manure and Waste, Solid By-products, and other solid biomass not specified)
- CUTOFF Electricity, biomass, gas, landfill, at power plant: 0.00138731 kWh
  Gaseous Renewable Fuels (Biomass) LFG - landfill gas
- Electricity, diesel, at power plant: 0.00236368 kWh
  Petroleum (DFO) – Distillate Fuel Oil (includes all Diesel and No. 1, No. 2, and No. 4 Fuel Oils)
- CUTOFF Electricity, solar, unspecified, at power plant: 6.14567e-6 kWh
  Solar (Photovoltaic, Thermal)
- CUTOFF Electricity, other fuels, unspecified, at power plant: 0.000823424 kWh
  Other Fuels OTH – Other (Batteries, Chemicals, Coke Breeze, Hydrogen, Pitch, Sulfur, Tar Coal, and miscellaneous technologies)
- CUTOFF Electricity, MSW, non-biogenic, at power plant: 0.00154555 kWh
  Other Fuels MSN – Municipal Solid Waste – Non-biogenic components
- CUTOFF Electricity, hydropower, at power plant, unspecified: 0.00626093 kWh
  Hydroelectric WAT – Water (Conventional, Pumped Storage)
- CUTOFF Electricity, biomass, solid, biogenic MSW, at power plant: 0.0019671 kWh
  Solid Renewable Fuels (Biomass) MSB – Municipal Solid Waste – Biogenic Component
- CUTOFF Electricity, petroleum, waste oil, at power plant: 0.000191444 kWh
  Petroleum (Other Fossil) WO – Waste/Other Oil (including Crude Oil, Liquid Butane, Liquid Propane, Oil Waste, Re-Refined Motor Oil, Sludge Oil, Tar Oil, or other petroleum-based liquid wastes)
- CUTOFF Electricity, biomass, liquid, sludge, at power plant: 6.31842e-5 kWh
  Liquid Renewable Fuels (Biomass) SLW -sludge waste
- Electricity, residual fuel oil, at power plant: 0.00270527 kWh
  Petroleum (RFO) – Residual Fuel Oil (includes No. 5 and No. 6 Fuel Oils and Bunker C Fuel Oil)
- CUTOFF Electricity, tire derived fuel, at power plant: 0.000503063 kWh
  Solid Renewable Fuels (Biomass) TDF - tires, tire derived fuel
- CUTOFF Electricity, biomass,liquid, unspecified, at power plant: 0.0102196 kWh
  Liquid Renewable Fuels (Biomass) BLQ - black liquor
- Electricity, nuclear, at power plant: 0.407675 kWh
  Nuclear Fission NUC – Nuclear (Uranium, Plutonium, Thorium)
- Electricity, bituminous coal, at power plant: 0.490885 kWh
  Bituminous Coal BIT - Anthracite Coal, and Bituminous Coal.
- CUTOFF Electricity, biomass,liquid, unspecified, at power plant: 1.39788e-7 kWh
  Liquid Renewable Fuels (Biomass) OBL – Other Biomass Liquid (Ethanol, Fish Oil, Liquid Acetonitrile Waste, Medical Waste, Tall Oil, Waste Alcohol, and other Biomass not specified)

## Sampling procedure
based on EIA electricity reports for all power plants in the US.

## Sources
- Chris Goemans, Athena Institute
- unspecified
- USEPA
- Statistics Canada
- Statistics Canada
- Statistics Canada
- Statistics Canada
- Statistics Canada
- Statistics Canada
- USEPA
- EIA
- EIA
- EIA
- EIA
- EIA
- EIA
- EIA
- EIA
- EIA
- EIA
- EIA
- US DOE
- International Energy Agency
- US DOE
