# Ethanol, denatured, corn dry mill

Dataset: openLCA process, unit process
Category: Ethyl alcohol manufacturing
Geography: RNA
Time period: 2008-01-01 to 2100-01-01
Generated by: Daniel Inman
Published in: Hsu, D.
restrictionsDescription: All information can be accessed by everybody.
copyright: false

## Technology
modern

## Geography
North America

## Time period
2008

## Reference product
- Ethanol, denatured, corn dry mill: 14900 kg

## By-products
- Distillers dried grains with solubles, 2022: 15000 kg

## Inputs from technosphere
- CUTOFF Heat, at cogen with ignition biogas engine, allocation exergy: 12457 MJ
  Integrated Biogas Energy System. From Mueller (2007).
- Soy meal, at plant: 4550 kg
  no CO2 sequestration. Proxy: Soybean meal, at oil mill/US U
- Corn grain, at conversion plant, 2022: 46.4 t
- CUTOFF Disposal, inert waste, 5% water, to inert material landfill: 138 kg
  tramp metal and rocks
- Enzyme, Glucoamylase, Novozyme Spirizyme: 47 kg
- Corn wet mill, gluten drying, AP-42: 7.36 t
  Assumed emissions for DDGS dryer. calculated based on regression fit from several Aspen runs.
- Wood waste, unspecified, combusted in industrial boiler: 860 kg
  Biomass CHP. From Mueller (2007). Multiplied by efficiency of 0.85 used in Ecoinvent.
- CUTOFF Treatment,maize starch production effluent,to wastewater treatment,class2: 0.1 m3
  wastewater treatment
- CUTOFF Yeast paste, from whey, at fermentation: 60 kg
  Assumed for yeast
- Electricity, at grid, US, 2008: 39.7 kWh
  Integrated Biogas Energy System. From Mueller (2007).
- CUTOFF Sulphuric acid, liquid, at plant: 92 kg
- Gasoline, at refinery: 266 l
  About a 0.6% impurity content in product stream (water, CO2, alcohols)
- Quicklime, at plant: 55 kg
  proxy: lime, hydrated, packed, at plant
- Enzyme, Alpha-amylase, Novozyme Liquozyme: 32 kg
- Nitrogen fertilizer, production mix, at plant: 173 kg
  Proxy: Urea, as N, at regional storehouse/RER with US electricity U
- Sodium hydroxide, production mix, at plant: 231 kg
  Assumed for used caustic from CIP. proxy: sodium hydroxide, 50% in H2O, production mix, at plant
- Natural gas, combusted in industrial boiler: 219 m3
  Integrated Biogas Energy System. Natural gas makes up balance of energy. From Mueller (2007). Multiplied by efficiency of 0.9 used in Ecoinvent.
- CUTOFF Energy, output: 299000 MJ
  from DDGS
- Corn wet milling, operations, AP-42: 14.89 kg
- Lignite coal, combusted in industrial boiler: 416 kg
  Coal CHP. From Mueller (2007). Multiplied by efficiency of 0.8 used in Ecoinvent.
- Corn grain, harvested and stored: 14200 kg
  no CO2 sequestration
- CUTOFF Ethanol fermentation plant: 7.19e-6 Item(s)
  plant lifetime is 20 years. only need 1 hr. 90000 Mtons of ethanol is about 31 Mgal/yr in the econinvent process. Assume equipment scales by a power law.

## Inputs from nature
- Water, unspecified natural origin/kg: 1830 kg
  steam losses. calculated based on regression fit from several Aspen runs.
- Water, process, unspecified natural origin/kg: 19600 kg
  process/makeup water. calculated based on regression fit from several Aspen runs.
- Water, cooling, unspecified natural origin/kg: 62300 kg
  cooling tower water losses. calculated based on regression fit from several Aspen runs.

## Emissions to nature
- Carbon dioxide, biogenic: 22000 kg
  calculated by difference for biogenic carbon. contribution from DDGS = CO2 in corn - CO2 out in conversion plan - CO2 in fuel
- Water: 62300 kg
  cooling tower water lost to air. calculated based on regression fit from several Aspen runs.
- Methane, biogenic: -50.6 kg
  Reduced CH4 emissions from animals because of use of DDGS feed
- Ethanol: 0.534 kg
  calculated based on regression fit from several Aspen runs.

## Sources
- Hsu, D.
- Andrew McAloon
