# Fuels, burned at coated freesheet, average production, at mill

Dataset: openLCA process, unit process
Category: Pulp, Paper, and Paperboard Mills
Geography: RNA
Time period: 2006-01-01 to 2006-01-01
Generated by: Caroline Gaudreault
Reviewer: Martha Stevenson
Published in: AF&PA
restrictionsDescription: All information can be accessed by everybody.
copyright: false

## General comment
Coated Freesheet, average North American production, at mill. All flows are production-weighted means. Data were developed for a full LCA that was critically reviewed. Reviewers were: • Martha Stevenson, Chairperson – Private Consultant to the public interest with ten years of experience in sustainability, environmental management, packaging and materials recovery; led the development of the Design Guidelines for Sustainable Packaging and the COMPASS software used to compare the environmental impacts of package designs; • Pascal Lesage – Life cycle assessment consultant, Researcher at École Polytechnique de Montréal [at the Inter-University Research Centre for the Life Cycle of Products, Processes and Services (CIRAIG) in Montreal]; and • Dale Phenicie, Environmental Affairs Consulting – Consultant with 35 years of experience in environmental protection and process consulting for the forest products industry. Has served on several U.S. EPA Task Forces dealing with water quality issues and authored several AF&PA Environmental, Health and Safety/Sustainability reports.

## Technology
current technology mix for coated freesheet

## Time period
Primary data collected from participating companies and associations for their operational activities are representative for 2006 and 2007.

## Reference product
- Fuels, burned at coated freesheet, average production, at mill: 15145 MJ

## Inputs from technosphere
- Hog fuel, pur., combusted in industrial boiler, at pulp and paper mill (EXCL.): 139.39 kg
  Purchased hogged fuel. Typically from wood products manufacturing.
- Natural gas, combusted in industrial boiler, at pulp and paper mill (EXCL.): 60.48 m3
- TDF, combusted in industrial boiler, at pulp and paper mill (EXCL.): 5.3691 kg
  All combusted. Not present in any database.
- LPG, combusted in industrial boiler, at pulp and paper mill (EXCL.): 0.34796 l
- Hog fuel, self-gen., combusted in ind. boiler, at pulp and paper mill (EXCL.): 120.96 kg
  Combustion of self-generated hogged fuel from pulpwood. Wood inputs are accounted for in the process named Coated freesheet, average production, at mill
- Diesel, combusted in industrial boiler, at pulp and paper mill (EXCL.): 0.99561 l
  Proxy for light fuel oil.
- Gasoline, combusted in equipment, at pulp and paper mill (EXCL.): 0.018174 l
  Gasoline and kerosene, assumed to be gasoline.
- RFO, combusted in industrial boiler, at pulp and paper mill (EXCL.): 39.531 l
  All combusted on site. Actually received at supplier, not refinery.
- Bituminous coal, combusted in industrial boiler, at pulp and paper mill (EXCL.): 185.44 kg
- Diesel, combusted in industrial boiler, at pulp and paper mill (EXCL.): 0.087824 l
  Other fossil fuels assumed to be diesel.

## Emissions to nature
- Nickel: 8.8687e-6 kg
  From black liquor recovery, non-recyclable paper combustion and wastewater residuals combustion
- Benzene, hexachloro-: 3.1301e-10 kg
  (same comment as for Nickel)
- Ethane, 1,1,2-trichloro-: 1.3684e-5 kg
  (same comment as for Nickel)
- Formaldehyde: 0.0025055 kg
  (same comment as for Nickel)
- Chloroform: 1.072e-5 kg
  (same comment as for Nickel)
- Dinitrogen monoxide: 0.018017 kg
  (same comment as for Nickel)
- Carbon disulfide: 0.00020961 kg
  (same comment as for Nickel)
- Dioxin, 2,3,7,8 Tetrachlorodibenzo-p-: 1.4921e-13 kg
  (same comment as for Nickel)
- Hydrogen chloride: 0.027178 kg
  (same comment as for Nickel)
- Sulfuric acid: 0.0093031 kg
  (same comment as for Nickel)
- Carbon dioxide, biogenic: 818.28 kg
  (same comment as for Nickel)
- Aldehydes, C3: 0.0020715 kg
  (same comment as for Nickel)
- Phenol: 0.004573 kg
  (same comment as for Nickel)
- Ethane, 1,1,1-trichloro-, HCFC-140: 1.8032e-5 kg
  (same comment as for Nickel)
- Arsenic: 1.1294e-6 kg
  (same comment as for Nickel)
- Beryllium: 0.00055629 kg
  (same comment as for Nickel)
- Hydrogen fluoride: 0.00041277 kg
  (same comment as for Nickel)
- Acrolein: 0.00011814 kg
  (same comment as for Nickel)
- Benzene: 0.00028908 kg
  (same comment as for Nickel)
- Manganese: 9.9572e-5 kg
  (same comment as for Nickel)
- Xylene: 0.00034425 kg
  (same comment as for Nickel)
- Cresol: 0.0013558 kg
  (same comment as for Nickel)
- Methane, dichloro-, HCC-30: 8.4253e-5 kg
  (same comment as for Nickel)
- Barium: 0.00020611 kg
  (same comment as for Nickel)
- Cumene: 0.00029919 kg
  (same comment as for Nickel)
- Antimony: 3.1887e-5 kg
  (same comment as for Nickel)
- Naphthalene: 5.5133e-5 kg
  (same comment as for Nickel)
- Polycyclic organic matter, unspecified: 0.00010244 kg
  (same comment as for Nickel)
- 4-Methyl-2-pentanone: 0.00016754 kg
  (same comment as for Nickel)
- Hydrogen sulfide: 0.067546 kg
  Total reduced sulfur assumed to be hydrogen sulfide. From all combustion processes at pulp and paper mill.
- Nitrogen dioxide: 2.769 kg
  From all combustion processes at pulp and paper mill.
- Methane, monochloro-, R-40: 0.008161 kg
  (same comment as for Nickel)
- Styrene: 8.5146e-5 kg
  (same comment as for Nickel)
- Methane: 0.023177 kg
  (same comment as for Nickel)
- Biphenyl: 5.747e-5 kg
  (same comment as for Nickel)
- TSP: 0.031139 kg
  (same comment as for Nickel)
- Vanadium: 5.6405e-7 kg
  (same comment as for Nickel)
- Lead: 4.7483e-6 kg
  (same comment as for Nickel)
- Selenium: 0.00062871 kg
  (same comment as for Nickel)
- Sulfur dioxide: 6.9726 kg
  From all combustion processes at pulp and paper mill.
- Methane, tetrachloro-, CFC-10: 1.6458e-5 kg
  (same comment as for Nickel)
- Benzo(ghi)perylene: 1.2389e-6 kg
  (same comment as for Nickel)
- Hexane: 0.00017537 kg
  (same comment as for Nickel)
- Cadmium: 2.9461e-5 kg
  (same comment as for Nickel)
- Acetaldehyde: 0.00537 kg
  (same comment as for Nickel)
- Silver: 3.9721e-5 kg
  (same comment as for Nickel)
- Methanol: 0.048917 kg
  (same comment as for Nickel)
- Zinc: 5.1399e-5 kg
  (same comment as for Nickel)
- Ethene, tetrachloro-: 1.7622e-6 kg
  (same comment as for Nickel)
- Copper: 1.8534e-5 kg
  (same comment as for Nickel)
- Toluene: 0.0002337 kg
  (same comment as for Nickel)
- Ethene, trichloro-: 9.5933e-6 kg
  (same comment as for Nickel)
- Chromium: 1.5332e-5 kg
  (same comment as for Nickel)
- Benzene, 1,2,4-trichloro-: 5.2153e-5 kg
  (same comment as for Nickel)
- Mercury: 1.1016e-6 kg
  (same comment as for Nickel)
- Carbon monoxide: 0.084726 kg
  (same comment as for Nickel)

## Sampling procedure
The survey included results from 15 mills representing 5 million short tons per year (TPY), nearly 76% of 2006/2007 North American production volume.

## Sources
- AF&PA
