# Potato, whole plant, at field

Dataset: openLCA process, unit process
Category: Potato Farming
Geography: US
Time period: 1997-01-01 to 2001-01-01
Generated by: Olivier Muller
restrictionsDescription: All information can be accessed by everybody.
copyright: true

## General comment
Agricultural Crop Production, Harvested acres are 97% of the planted acres (1998-2000 US average).
The impacts of producing 1 kg of seed are assumed equal to those of producing 1kg of potatoes.
For Water, only consumptive use is taken into account (i.e. 60.7% of the total water consumption).
Important note: although most of the data in the US LCI database has
undergone some sort of review, the database as a whole has not yet
undergone a formal validation process.
Please email comments to lci@nrel.gov.

## Technology
US average

## Geography
USA

## Reference product
- Potato leaves, at field: 0.4 kg
  Residue to Crop Ratio (4), C N content of residues (4). Initially considered an output to nature. Changed to unvalued co-product by Pascal Lesage (12/07)

## By-products
- Potato, at field: 1 kg
  Planted surface (1), Production (1), Seeds (18)

## Inputs from technosphere
- CUTOFF Copper, at regional storage: 7.7036e-6 kg
  Pesticides - consumption (19)
- Transport, single unit truck, diesel powered: 0.0068968 t*km
  Transportation of fertilizers (200 km)
- Nitrogen fertilizer, production mix, at plant: 0.0060369 kg
  Fertilizers NPK (8)
- CUTOFF Phosphorous Fertilizer (TSP as P2O5), at plant: 0.0046554 kg
  Fertilizers NPK (8)
- Diesel, combusted in industrial equipment: 0.0045906 l
  Farm tractor. Energy production (20)
- Transport, train, diesel powered: 0.018368 t*km
  Transportation of fertilizers (400km)
- CUTOFF Agrochemicals, at plant: 0.0013244 kg
  Pesticides - consumption (19)
- CUTOFF Sulfuric acid, at plant: 0.0010199 kg
  Pesticides - consumption (19)
- CUTOFF Potash Fertilizer (K2O), at plant: 0.0044393 kg
  Fertilizers NPK (8)
- Quicklime, at plant: 0.0097017 kg
  Fertilizer Ca and fertilizer application (9)

## Inputs from nature
- Occupation, arable, conservation tillage: 0.045407 m2*a
  Planted surface (1), Tillage practices (3)
- Water, well, in ground: 28.25 l
  Water consumption - consumptive use for irrigation and percent of water from surface/ground (5), Water consumption - depth of irrigation water applied (17), Water consumption - area irrigated (11)
- Carbon dioxide, in air: 1.343 kg
  Carbon fixation through plant growth
- Occupation, arable, conventional tillage: 0.16802 m2*a
  Planted surface (1), Tillage practices (3)
- Occupation, arable, reduced tillage: 0.048865 m2*a
  Planted surface (1), Tillage practices (3)
- Water, river: 48.51 l
  (same comment as for Water, well, in ground)

## Emissions to nature
- 2,4-D: 3.3787e-11 kg
  Pesticides - consumption (19), Pesticide - application method (11), Runoff of pesticides (14)
- Copper, ions: 1.1555e-7 kg
  (same comment as for 2,4-D)
- Disulfoton: 2.0597e-6 kg
  Pesticides - consumption (19), Pesticide - application method (11), Pesticide - air emission factors (12), Pesticide - vapor pressure (13),
- Metolachlor: 1.8672e-6 kg
  (same comment as for Disulfoton)
- Paraquat: 1.264e-8 kg
  (same comment as for 2,4-D)
- Metribuzin: 2.2415e-6 kg
  (same comment as for Disulfoton)
- Carbofuran: 7.6804e-8 kg
  (same comment as for 2,4-D)
- Phorate: 7.0862e-6 kg
  (same comment as for Disulfoton)
- Parathion, methyl: 1.3672e-7 kg
  (same comment as for Disulfoton)
- Ethoprop: 1.701e-7 kg
  (same comment as for 2,4-D)
- Dipropylthiocarbamic acid S-ethyl ester: 1.2691e-5 kg
  (same comment as for Disulfoton)
- Trifluralin: 1.0421e-8 kg
  (same comment as for 2,4-D)
- Pendimethalin: 8.0838e-8 kg
  (same comment as for 2,4-D)
- Nitrogen oxides: 0.00098187 kg
  Air emissions of N2O and NH3 and NOx (4)
- Propene, 1,3-dichloro-: 3.2175e-6 kg
  (same comment as for 2,4-D)
- Mancozeb: 3.1837e-5 kg
  (same comment as for Disulfoton)
- Azinphos-methyl: 2.6758e-8 kg
  (same comment as for 2,4-D)
- Chlorothalonil: 4.1207e-5 kg
  (same comment as for Disulfoton)
- Endosulfan: 5.9194e-8 kg
  (same comment as for 2,4-D)
- Endosulfan: 9.8657e-7 kg
  (same comment as for Disulfoton)
- Carbaryl: 3.1286e-8 kg
  (same comment as for 2,4-D)
- Oxamyl: 5.2361e-7 kg
  (same comment as for Disulfoton)
- Glyphosate: 2.9987e-7 kg
  (same comment as for Disulfoton)
- Propene, 1,3-dichloro-: 9.0091e-5 kg
  (same comment as for Disulfoton)
- Linuron: 5.5382e-7 kg
  (same comment as for Disulfoton)
- Linuron: 3.3229e-8 kg
  (same comment as for 2,4-D)
- Azinphos-methyl: 4.4597e-7 kg
  (same comment as for Disulfoton)
- Glyphosate: 1.7992e-8 kg
  (same comment as for 2,4-D)
- Ammonia: 0.00036286 kg
  Air emissions of N2O and NH3 and NOx (4)
- Metham sodium: 0.00018805 kg
  (same comment as for Disulfoton)
- Dinitrogen monoxide: 0.00022079 kg
  Air emissions of N2O and NH3 and NOx (4)
- Diazinon: 1.4576e-9 kg
  (same comment as for 2,4-D)
- Phosphorus compounds, unspecified: 2.7441e-5 kg
  Runoff/leaching of fertilizers (15)
- Ethoprop: 4.7629e-6 kg
  (same comment as for Disulfoton)
- Paraquat: 2.1067e-7 kg
  (same comment as for Disulfoton)
- Aldicarb: 1.1453e-7 kg
  (same comment as for 2,4-D)
- Diazinon: 2.4294e-8 kg
  (same comment as for Disulfoton)
- Carbofuran: 1.2801e-6 kg
  (same comment as for Disulfoton)
- Trifluralin: 2.9179e-7 kg
  (same comment as for Disulfoton)
- Pendimethalin: 1.3473e-6 kg
  (same comment as for Disulfoton)
- Permethrin: 1.0861e-7 kg
  (same comment as for Disulfoton)
- Chlorothalonil: 1.4717e-6 kg
  (same comment as for 2,4-D)
- Nitrogen, total: 0.00073575 kg
  Runoff/leaching of fertilizers (15)
- Permethrin: 6.5168e-9 kg
  (same comment as for 2,4-D)
- Dipropylthiocarbamic acid S-ethyl ester: 4.5326e-7 kg
  (same comment as for 2,4-D)
- Oxamyl: 1.87e-8 kg
  (same comment as for 2,4-D)
- 2,4-D: 5.6312e-10 kg
  (same comment as for Disulfoton)
- Suspended solids, unspecified: 0.18227 kg
  Erosion (6)
- Parathion, methyl: 8.2029e-9 kg
  (same comment as for 2,4-D)
- Metribuzin: 1.3449e-7 kg
  (same comment as for 2,4-D)
- Carbaryl: 5.2143e-7 kg
  (same comment as for Disulfoton)
- Phorate: 2.5308e-7 kg
  (same comment as for 2,4-D)
- Mancozeb: 1.137e-6 kg
  (same comment as for 2,4-D)
- Metolachlor: 1.1204e-7 kg
  (same comment as for 2,4-D)
- Aldicarb: 1.9088e-6 kg
  (same comment as for Disulfoton)
- Disulfoton: 7.3559e-8 kg
  (same comment as for 2,4-D)
- Hydrocarbons, unspecified: 0.00079462 kg
  (same comment as for Disulfoton)
- Metham sodium: 1.1283e-5 kg
  (same comment as for 2,4-D)

## Sources
- USDA/National Agricultural Statistics Se
- USDA/ERS
- Conservation Technology Information Cent
- U.S. EPA
- USGS
- USDA/NRI
- USDA/ERS
- USDA/ERS
- USDA/ERS
- U.S. EPA
- U.S. EPA
- USDA/NCRS
- USGS
- USDA/ERS
- U.S. EPA
- USDA/ERS
- National Center for Food and Agricultura
- USDA/NRCS
- USDA/ERS
- Ecobalance
