# Unsaturated polyester, resin, at plant

Dataset: openLCA process, unit process
Category: Plastics Material and Resin Manufacturing
Geography: US
Time period: 2011-01-01 to 2012-01-01
Generated by: Franklin Associates
Published in: American Composites Manufacturers Assn.
restrictionsDescription: All information can be accessed by everybody.
copyright: false

## General comment
An average of 0.0014 kg of resin scrap is produced for every kilogram of unsaturated polyester resin produced; this scrap is sold for recycling. Possible differences in the mass balance stem from small amounts of inputs which are not included in the analysis, solid wastes shown as outputs that are not shown as inputs, as well as possibly some emissions from burning the overhead losses within the plant. Complete inventory data and metadata are shown in full in the final report, Life Cycle Inventory of Polymer Composites. The report is not publicly available. This report has been extensively reviewed within Franklin Associates by Rebe Feraldi, Anne Marie Molen, and Melissa Huff and has undergone partial critical review by ACMA members. Important note: although most of the data in the US LCI database has undergone some sort of review, the database as a whole has not yet undergone a formal validation process. Please email comments to lci@nrel.gov.

## Technology
Production of unsaturated polyester resin by a polycondensation of dicarboxylic acids and glycol monomers. When the reaction is complete, the resulting fluid polyester is cooled and blended with a vinylic reactive monomer. Styrene is the most common reactive diluent used in UPR production. Water is a by-product of the esterification reaction and is continuously removed during the esterification step to drive the reaction to completion. This water is sent to a thermal oxidizer to eliminate the hydrocarbons. The waste heat generated from the thermal oxidation process is sometimes utilized to produce steam energy for re-use within the UPR production facility. In some manufacturing sites, the oxidized vapor is released directly to the air without capture and re-use of the waste heat. The final UPR product is shipped to composite fabricators via drum, tote, or bulk tankers where it is combined with other materials, such as fibers and fillers, and processed into a finished or semi-finished part.

## Geography
US

## Reference product
- Unsaturated polyester, resin, at plant: 1 kg

## By-products
- Unsaturated polyester scrap, resin, at plant: 0.0014 kg

## Inputs from technosphere
All rows: lognormal geomSd 1
- Polyethylene terephthalate, resin, at plant: 0.015 kg
- CUTOFF Purified terephthalic acid, at plant: 0.013, 0.029 kg (2 entries)
- CUTOFF Disposal, solid waste, unspecified, to waste-to-energy: 0.0019 kg
- Electricity, at Grid, US, 2010: 0.19226 kWh
- CUTOFF Disposal, solid waste, unspecified, to municipal incineration: 0.0013 kg
- Transport, combination truck, diesel powered: 0.24489 t*km
- Ethylene glycol, at plant: 0.02, 0.1 kg (2 entries)
- CUTOFF Neo pentyl glycol, at plant: 0.014 kg
- CUTOFF Tetrabromophthalic acid, at plant: 0.0071 kg
- CUTOFF Propylene Glycol, liquid, at plant: 0.081, 0.015 kg (2 entries)
- Petroleum coke, at refinery: 1.9912e-5 kg
- CUTOFF Disposal, solid waste, unspecified, to sanitary landfill: 0.0016 kg
- Natural gas, combusted in industrial boiler: 0.11543 m3
- Transport, train, diesel powered: 2.154 t*km
- Diesel, combusted in industrial equipment: 0.00022657 l
- CUTOFF Phthalic anhydride, at plant: 0.074 kg
- Ethylene, at plant: 0.09 kg
- Ethylbenzene styrene, at plant: 0.33 kg
- CUTOFF Maleic anhydride, at plant: 0.18 kg

## Inputs from nature
- Water, process, unspecified natural origin/m3: 0.000567 m3; lognormal geomSd 1

## Emissions to nature
All rows: lognormal geomSd 1
- Chromium: 5e-9 kg
- Cadmium: 7.4e-10 kg
- Suspended solids, unspecified: 0.00059 kg
- COD, Chemical Oxygen Demand: 0.0011 kg
- BOD5, Biological Oxygen Demand: 0.0011 kg
- NMVOC, non-methane volatile organic compounds, unspecified origin: 2.3e-5 kg
- Styrene: 0.00013 kg
- 1-Butanol: 2e-7 kg
- Hydrocarbons (other than methane): 2.8e-5 kg
- Phthalic Acid: 1.3e-5 kg
- Xylene: 9.7e-7 kg
- Ethylene glycol: 7.5e-6 kg
- Carbon monoxide: 0.00027 kg
- Particulates, >2.5 um, and < 10um: 4.3e-6 kg
- Aniline, N,N-dimethyl-: 1.5e-8 kg
- Methyl methacrylate: 2.4e-5 kg
- Aluminum, ion: 1.4e-7 kg
- Carbon dioxide, fossil: 0.037 kg
- Sulfur oxides: 1.9e-7 kg
- Dicyclopentadiene: 3.9e-6 kg
- Toluene, vinyl: 1.2e-6 kg
- Nickel: 1.9e-9 kg
- Lead: 4.5e-8 kg
- Methane: 7.1e-7 kg
- Cyanide: 3.8e-9 kg
- Particulates, < 2.5 um: 7.8e-6 kg
- Particulates, unspecified: 0.00013 kg
- Zinc: 3.1e-8 kg
- Heat, waste: 0.29157 MJ
- Oils, unspecified: 1e-5 kg
- Hydrocarbons, unspecified: 4.2e-5 kg
- Nitrogen oxides: 3.1e-5 kg
- Dissolved solids: 5.4e-5 kg
- Maleic anhydride: 9.2e-6 kg

## Sampling procedure
Data are from primary sources. The unsaturated polyester producers who provided data for this module verified that the characteristics of their plants are representative of US UPR production facilities. Data was collected from 100% of the companies producing UPR in the US.

## Sources
- American Composites Manufacturers Assn.
