# Coal extraction; Surface mine

Dataset: openLCA process, unit process
Category: Bit. Coal and Lignite Surface Mining
Geography: US
Time period: 1989-01-01 to 2011-12-31
Generated by: Timothy Skone
Owner: National Energy Technology Laboratory
Reviewer: Robert James
Published in: National Energy Technology Laboratory (NETL). 2013. Surface Coal Mining – Overburden Removal, Extraction, and Reclamation
restrictionsDescription: Use of this dataset is not restricted, but a statement of attribution is required. Please use the following attribution statement:
National Energy Technology Laboratory's (NETL) Unit Process Library
626 Cochrans Mill Road, P.O. Box 10940
Pittsburgh, PA 15236-0940
http://www.netl.doe.gov/research/energy-analysis/life-cycle-analysis/unit-process-library
Neither the U.S. Department of Energy (DOE) National Energy Technology Laboratory (NETL) nor any person acting on behalf of these organizations:
A. Makes any warranty or representation, express or implied, with respect to the accuracy, completeness, or usefulness of the information contained in this document, or that the use of any information, apparatus, method, or process disclosed in this document may not infringe on privately owned rights; or
B. Assumes any liability with this report as to its use, or damages resulting from the use of any information, apparatus, method, or process disclosed in this document.
Reference herein to any specific commercial product, process, or service by trade name, trademark, manufacturer, or otherwise, does not necessarily constitute or imply its endorsement, recommendation, or favoring by NETL. The views and opinions of the authors expressed herein do not necessarily state or reflect those of NETL.
copyright: true

## General comment
This process is part of the NETL Unit Process Library. To access the library and the original dataset:
1) Navigate to the NETL LCA home page (http://www.netl.doe.gov/lca)
2) Then navigate to the “Unit Process Library”
3) From the library, the unit process of interest can be found either through the "Complete Listing of the Unit Process Library link" or through the link to the "Unit Process Database" spreadsheet
4) For each process, a Data Sheet (DS) and Data File (DF) are available

BRIEF DESCRIPTION
This unit process provides a summary of relevant input and output flows associated with the extraction of coal from a surface mine. This includes the amount of electricity and fuel required to power equipment and the direct particulate matter (PM) and volatile organic compound (VOC) emissions from operating equipment and using explosives. Combustion emissions are not included in this unit process.

MODELING NOTE
In the DS file, this unit process is one of three mining stages grouped into a single proces entitled, "Surface Coal Mining – Overburden Removal, Extraction, and Reclamation". The metadata below reflects the Goal and Scope, Boundary and Description, and Citation and Associated Documentation of all three mining stages within the combined process.

GOAL AND SCOPE
This unit process provides a summary of relevant input and output flows associated with the extraction of coal from a surface mine. This includes the amount of electricity and fuel required to power equipment and the direct particulate matter (PM) and volatile organic compound (VOC) emissions from operating equipment and using explosives. Combustion emissions are not included in this unit process. The reference flow of this unit process is: 1 kg of coal.

Note: This process deviates from the DS in that it uses the input "Ammonia, steam reforming, liquid, at plant" in place of "Ammonium nitrate". The input value for ammonia reflects the amount of ammonia necessary to produce the required quantity of ammonium nitrate for this process.

BOUNDARY AND DESCRIPTION
A visual representation of the boundary of this unit process is available in the associated documentation (referenced in the Citation and Associated Documentation section below). This UP is parameterized into mining stages: Overburden removal, coal extraction, and mine reclamation. This UP is based on a reference Western mine. A strip ratio from any mine can be applied to scale the impacts of the overburden removal scenario. The reference strip ratio is 5:1 and represents a reference Western mine. This UP has a diesel scalar and electricity switch to account for mines that use all diesel equipment (e.g., Indonesia).

For energy calculations, the mining equipment was separated into electrically powered equipment and diesel powered equipment. For all calculations, the equipment was separated into mining stage: overburden removal, coal extraction, and mine reclamation.

The diesel requirements were calculated using the Energy and Environmental Profile of the U.S. Mining Industry developed by the U.S. Department of Energy’s Energy Efficiency and Renewable Energy division and the National Mining Association (U.S. Department of Energy and National Mining Association, n.d.). Chapter Two of the source focused on coal; description of coal types, overview of coal mining, energy requirements for underground and surface mines, and emissions from coal mining. The data source provides energy data for specific mining activities such as coal handling, extraction, and grinding. BCS, Incorporated (BCS) developed the data by integrating the U.S. Department of Energy’s Energy Information Administration’s 1997 Coal Industry data into the Western Mining Engineering, Inc.’s SHERPA Mine Cost Software to create 2002 estimates. BCS also used Mine and Mill Equipment Cost, An Estimator’s Guide to develop the data. Newer data for specific coal mining processes are not available. This unit process parameterizes key variables to allow for evaluation of data uncertainty when used in a life cycle model.

The reference flow for this unit process is one kg of coal. To calculate the amount of diesel needed, the sum of the equipment’s energy requirements, in Btu per ton, was divided by the appropriate conversion to convert tons to kg and then divided by the high heating value of diesel (U.S. Energy Information Administration, 2011), in Btu per kg, to obtain the diesel requirement in kg of diesel per kg of coal.

To calculate the amount of ammonium nitrate and fuel oil (ANFO) used to excavate coal, 1994 data specific to the Powder River Basin (PRB) was used (Stump, B., 1995). The average weight percentages for the composition of ANFO were taken from an ANFO material safety data sheet (Maxam North America, 2010). The amount of ammonium nitrate was calculated by multiplying the kg of ANFO per coal produced by the average weight percent of ammonium nitrate. The kg of ANFO per coal produced was multiplied by the average weight percent of light fuel oil to calculate the amount of light fuel oil in kg fuel oil per kg of coal. Particulate matter (PM) and volatile organic compounds (VOCs) are emitted during coal extraction from an underground mine. To calculate the amount of VOC emissions released during the excavation of coal, 1989-1998 data specific to the PRB (McVehil, G.E., 2001) and 2011 coal production data by the National Mining Association (National Mining Association, 2012) was used. The amount of VOCs released, in tons per year, was multiplied by the appropriate conversion and divided by the amount of coal produced, which was also multiplied by the appropriate conversions, to obtain the kg of VOC per kg of coal. The VOC emissions were calculated for the coal types of bituminous, subbituminous, and lignite by using the calculation just described above but replacing the coal produced with the appropriate coal type production value. It was assumed the VOC emissions released were for one year.

The PM emissions were calculated using the U.S. Environmental Protection Agency’s AP 42 (U.S. Environmental Protection Agency, 2009). Chapter 11.9 of the source focused on Western surface coal which included emission factor equations and scaling factors. Other factors that were incorporated into these equations, such as coal moisture content, were obtained from a 2012 U.S. Department of Energy document (U.S. Department of Energy, 2012) and a Caterpillar, Inc. equipment specification (Caterpillar). The PM emissions were broken down into extraction processes such as blasting, truck loading, bulldozing, etc. Emission factor equations and conversions were used to calculate the amount of PM emissions based on the reference flow of one kg of coal. Where applicable, the moisture content of coal was used to calculate PM emissions for the coal types of bituminous, subbituminous, and lignite. To obtain the emissions for PM10 and PM2.5, the scaling factor pertaining to each emission was multiplied by the amount of PM emissions per unit of coal for both PM10 and PM25. It was assumed that PM data not pertaining to coal types was calculated for a surface mine only. For the bulldozer, it was assumed that the equipment operated for 12 hours per day. A five miles per hour grading speed and 20 year lifetime of coal mine for existing mines was assumed in the calculation of the PM emissions for grading. To calculate the unmitigated PM emissions, the sum of the PM10 and PM2.5 emissions were both multiplied by 15 percent, because it was assumed mitigation measures would reduce emissions by 85 percent. The ammonium nitrate, electricity, light fuel oil, PM, and VOC requirements were placed as parameters in the DS file, so the items could be adjusted to measure uncertainties. There are other adjustable parameters such as coal type and moisture content.

Additional details regarding input and output flows, including calculation methods, are contained in the associated documentation (referenced in the Citation and Associated Documentation section below).

This process contains one or more surrogate product flows as replacements for proprietary product flows used in the NETL Unit Process Library. All surrogate flow were taken from the U.S. Life Cycle Inventory Database; a list of surrogate flows used in this process is provided below:
1) Diesel, at refinery
2) Electricity, at Grid, US, 2010

CITATION AND ASSOCIATED DOCUMENTATION
This dataset should be cited as:
National Energy Technology Laboratory (NETL). 2015. NETL Life Cycle Inventory Data - Unit Process: Coal extraction; Surface mine. U.S. Department of Energy, National Energy Technology Laboratory. Last Updated: September 2015 (version 01). Retrieved on [DATE] from [URL for this dataset].

This dataset is part of the NETL Unit Process Library. The Library offers additional information concerning this dataset in the form of a Detailed Spreadsheet Documentation (DS) file and a Process Documentation File (DF). The DS file is an Excel file that contains all of the parameters, inputs, and outputs for a given system as well as background data, calculations and quality scores. The DF file is a PDF document that contains major assumptions and data sources that are the basis for each unit process. The NETL Unit Process Library is located on the NETL website (netl.doe.gov) under Research / Energy Analysis / Energy Trends and Issues / Life Cycle Analysis / Unit Process Library.

This dataset was converted directly from the DS with additional supporting information provided by the DF. Full citations for the DS and DF are given below.

DS File
National Energy Technology Laboratory (NETL). 2013. NETL Life Cycle Inventory Data - Unit Process: Surface Coal Mining – Overburden Removal, Extraction, and Reclamation. U.S. Department of Energy, National Energy Technology Laboratory. Last updated: Last updated: September 2015 (Version 02). Retrieved on 09/29/2015 from: http://www.netl.doe.gov/File%20Library/Research/Energy%20Analysis/Life%20Cycle%20Analysis/UP_Library/DS_Stage1_O_Surface_Coal_Mining_2013-02.xlsx.

DF File
National Energy Technology Laboratory (NETL). 2013. NETL Life Cycle Inventory Data - Unit Process: Surface Coal Mining – Overburden Removal, Extraction, and Reclamation. U.S. Department of Energy, National Energy Technology Laboratory. Last updated: September 2015 (Version 02). Retrieved on 09/29/2015 from: http://www.netl.doe.gov/File%20Library/Research/Energy%20Analysis/Life%20Cycle%20Analysis/UP_Library/DF_Stage1_O_Surface_Coal_Mining_2013-02.docx.

## Technology
This parameterized unit process provides a summary of relevant input and output flows associated with the amount of electricity required to power equipment used in the extraction of coal from a surface mine. This equipment includes drills and graders. Key inputs include light fuel oil, ammonium nitrate, diesel, and coal. Extracted coal, Dust (PM10 and PM2.5), and VOCs are key outputs.

A visual representation of the boundary of this unit process is available in the associated documentation (referenced in the Citation and Associated Documentation section in the Description field). Cable shovels (western)/hydraulic shovels (interior), rotary drills, water tankers, pumps, and graders were the pieces of equipment used for extracting coal from a surface mine; it was assumed that all equipment uses diesel.

Additional details regarding the technologies used for this unit process are contained in the associated documentation (referenced in the Citation and Associated Documentation section in the Description field).

## Time period
This data set is representative of best available public data from 01/01/1989 to 12/31/2011 and is not subject to limited usability within sub-time spans (e.g. summer, winter).

## Parameters
- PM25_Unmit: 7.05033e-7; = PM25*(1-Percent_Mit)
  [kg/kg] Mass of unmitigated PM2.5 emissions per unit of coal produced
- Diesel_Scale: 0.00015879; = Diesel_Ref*Dies_Eff_Scaler
  [kg/kg] Amount of diesel energy input per unit of coal produced
- PM_25to10: 3.28489e-5
  [kg/kg] Mass of total PM2.5 to PM10 emissions per unit of coal produced for reference mine
- NH3_NH4NO3: 0.425546
  [kg/kg] Mass of ammonia required to product 1 kg ammonium nitrate
- PM25: 4.70022e-6
  [kg/kg] Mass of total PM2.5 emissions per unit of coal produced for reference mine
- Strip_Ratio_Ref: 5
  [dimensionless] Ratio of overburden removal to coal extracted for reference mine
- Elec_Scale: 7.50135e-7; = Elec_Ref*Elec_Switch
  [MWh/kg] Amount of electricity input per unit of coal produced
- Elec_Switch: 1
  [dimensionless] Switch to turn electricity on/off depending on mining country (0 = no elec; 1 = elec)
- NH3NO3_Ref: 0.000290889
  [kg/kg] Mass of ammonium nitrate per unit of coal produced for reference mine
- Percent_Mit: 0.85
  [dimensionless] Fraction of PM emissions that are mitigated
- VOC_Ref: 4.27723e-8
  [kg/kg] Mass of VOC emissions per unit of coal produced for reference mine
- Dies_Eff_Scaler: 1
  [dimensionless] Scaler to adjust diesel consumption to account for manual operations at Indonesian mine
- Strip_Ratio_UI: 4
  [dimensionless] Ratio of overburden removal to coal extracted for modeled mine
- Diesel_Ref: 0.00015879
  [kg/kg] Amount of diesel energy input per unit of coal produced for reference mine
- PM_25to10_Unmit: 4.92734e-6; = PM_25to10*(1-Percent_Mit)
  [kg/kg] Mass of unmitigated PM2.5 to PM10 emissions per unit of coal produced
- Diesel_MDensity: 846.671
  [kg/m3] Mass density of diesel. Source: NETL 2008 Petroleum Baseline
- FO_Ref: 2.02222e-5
  [kg/kg] Mass of light fuel oil per unit of coal produced for reference mine
- Diesel_EDensity: 43.2
  [MJ/kg diesel] Energy density of diesel taken from the Excel model of NETL's 2008 Petroleum Baseline (http://netl.doe.gov/File%20Library/Research/Energy%20Analysis/Life%20Cycle%20Analysis/PetroBasedFuelsLCGHGAnlys2005BslnModel.xls)
- NOx: 1.65167e-6
  [kg/kg] Mass of NOx emissions from overburden blasting per unit of coal produced
- Elec_Ref: 7.50135e-7
  [MWh/kg] Amount of electricity input per unit of coal produced for reference mine
- Convert_kWh_MWh: 1000
  [MJ/MWh] Units conversion

## Reference product
- Coal; Production mix, from surface mine: 1 kg; data quality (3,5,5,3,1)

## Inputs from technosphere
All rows: data quality (3,5,5,3,1)
- Thermal energy; From diesel fired equipment; Production mix: 0.00685973 MJ; = Diesel_Scale*Diesel_EDensity
- Water use and quality; Production mix, from surface coal mine: 1 Item(s)
- Fuel consumption and emissions from coal mine commissioning and decommissioning; Surface mine: 1 Item(s)
- Diesel, at refinery: 2.38844e-8 m3; = FO_Ref*(1/Diesel_MDensity)
- Electricity, at Grid, US, 2010: 0.000750135 kWh; = Elec_Scale*Convert_kWh_MWh
- Coal mine equipment assembly; Production mix, surface mine: 1 Item(s)
- Methane emission; Production mix, surface mine: 1 Item(s)
- Ammonia, steam reforming, liquid, at plant: 0.000123787 kg; = NH3NO3_Ref*NH3_NH4NO3
- Overburden removal; Surface coal mine: 1 Item(s)
- Land reclamation; Surface coal mine: 1 Item(s)

## Inputs from nature
- Coal; Raw, in ground; Surface mine; 19.9 MJ/kg: 1 kg; data quality (3,5,5,3,1)

## Emissions to nature
- Particulates, > 2.5 um, and < 10um: 4.92734e-6 kg; = PM_25to10_Unmit; data quality (3,5,5,3,1)
- Nitrogen oxides: 1.65167e-6 kg; = NOx; data quality (3,5,5,3,1)
- Particulates, < 2.5 um: 7.05033e-7 kg; = PM25_Unmit; data quality (3,5,5,3,1)
- VOC, volatile organic compounds: 4.27723e-8 kg; = VOC_Ref; data quality (3,5,5,3,1)

## Inventory method
Attributional

## Modelling constants
All elementary and technosphere flows are calculated on a functional unit basis. Calculations involving combustion primarily to generate useful work are done using lower heating values (LHV) and calculations involving combustion primarily to generate useful heat are done using higher heating values (HHV). Unless explicitly stated in the associated reference documents applicable calculations assumed standard atmospheric temperature and pressure (SATP).

## Completeness
Individual relevant flows captured

## Data selection
Best publically available data

## Data treatment
No allocation applied

## Data collection
No primary data collected

## Intended application
This is a gate-to-gate extraction process and can be used for any type of LCA study.

## Project
National Energy Technology Laboratory (NETL) Unit Process Library

## Sources
- National Energy Technology Laboratory (NETL). 2012. Quality Guidelines for Energy System Studies: Specifications for Selected Feedstocks
- Caterpillar. n.d. 623G Wheel Tractor Scraper
- McVehil, G.E.; Addison, E.L.; Baugues, K.A. 2001. Air Quality and Visibility Impacts of Powder River Basin Coal Mining at Badlands National Park
- Stump, B. 1995. Practical Observations of US Mining Practices and Implications for CTBT Monitoring
- National Mining Association (NMA). 2012. U.S. Coal Production and Number of Mines by State and Coal Type
- U.S. Environmental Protection Agency (EPA). 2009a. AP 42, Fifth Edition, Volume I, Chapter 11: Mineral Products Industry, 11.9 Western Surface Coal Mining
- U.S. Department of Energy (DOE) and National Mining Association (NMA). 2002. Energy and Environmental Profile of the U.S. Mining Industry: Chapter 2 Coal
- Maxam North America, Inc. 2010. Material Safety Data Sheet, ANFO
- National Energy Technology Laboratory (NETL). 2013. Surface Coal Mining – Overburden Removal, Extraction, and Reclamation
