# Soybean grains, at field

Dataset: openLCA process, unit process
Category: Soybean Farming
Geography: RNA
Time period: 2004-01-01 to 2007-01-01
Generated by: Anne Landfield Greig
Published in: Omni Tech International
restrictionsDescription: All information can be accessed by everybody.
copyright: false

## General comment
1. Carbon Sequestration should be accounted for after the product is built in its LCA model, and should be included depending on the use of end of life fate of that product. For example, a soy-based resin may retain the sequestered carbon indefinitely, while a soy-based biodiesel releases the sequestered carbon at use phase. Biomass carbon contents are as follows: Crude soy oil: 77% C --> 2.823 kg CO2/kg crude soy oil; Soy meal: 48% C --> 1.76 kg CO2/kg meal; Refined soy oil: 80.6% C --> 2.955 kg CO2/kg refined soy oil; Biodiesel: 77% C --> 2.823 kg CO2/kg biodiesel. 2. The study (Main Data Source) underwent external peer review prior to this submission to the US LCI database.

## Technology
US average

## Geography
USA

## Reference product
- Soybean residues, at field: 2100 kg
  2.1 * soybean production. Source 11

## By-products
- Soybean grains, at field: 1000 kg
  The average yield of soybeans for the years 2004 through 2007 was 1120 kg/acre. See yield basis sheet

## Inputs from technosphere
- CUTOFF Phosphorous Fertilizer (TSP as P2O5), at plant: 5 kg
  See fertilizer application rate sheet
- Transport, single unit truck, diesel powered: 0.022 t*km
- CUTOFF Potash Fertilizer (K2O), at plant: 9.3 kg
  See fertilizer application rate sheet
- CUTOFF Agrochemicals, at plant: 0.52 kg
  See pesticide use summary sheet.
- Transport, train, diesel powered: 20.85 t*km
- Nitrogen fertilizer, production mix, at plant: 1.6 kg
  See fertilizer application rate sheet
- Diesel, combusted in industrial equipment: 14.3 l
- Liquefied petroleum gas, combusted in industrial boiler: 1.28305 l
- Electricity, at grid, US, 2008: 25 kWh
- Quicklime, at plant: 94.3 kg
- Natural gas, combusted in industrial boiler: 1.2598 m3
- Gasoline, combusted in equipment: 4.5 l

## Inputs from nature
- Occupation, arable, conventional tillage: 956 m2
- Occupation, arable, reduced tillage: 813 m2
- Occupation, arable, conservation tillage: 2278 m2
- Water, well, in ground: 34725 l
  See Irrigation Basis sheet
- Water, river: 15855 l
  See Irrigation Basis sheet

## Emissions to nature
- Phosphorus compounds, unspecified: 0.0282525 kg
  P runoff as fract of P fert applied * P fert applied. Sources 9 & 10.
- Imazamox: 1.33284e-6, 3.10995e-5 kg (2 entries, compartments not in this file)
  See pesticide use summary sheet
- Cyhalothrin, gamma-: 6.06608e-6, 0.000141542 kg (2 entries, compartments not in this file)
  See pesticide use summary sheet
- Flumioxazin: 0.000210323, 9.01383e-6 kg (2 entries, compartments not in this file)
  See pesticide use summary sheet
- Glyphosate: 0.00669752, 0.156275 kg (2 entries, compartments not in this file)
  See pesticide use summary sheet
- Bentazone: 0.000216312, 9.27053e-6 kg (2 entries, compartments not in this file)
  See pesticide use summary sheet
- Pendimethalin: 0.00018812, 0.00438947 kg (2 entries, compartments not in this file)
  See pesticide use summary sheet
- Imazethapyr: 0.000205225, 8.79537e-6 kg (2 entries, compartments not in this file)
  See pesticide use summary sheet
- Paraquat: 1.78556e-5, 0.000416631 kg (2 entries, compartments not in this file)
  See pesticide use summary sheet
- Flumiclorac-pentyl: 8.90808e-7, 2.07855e-5 kg (2 entries, compartments not in this file)
  See pesticide use summary sheet
- Flumetsulam: 1.21515e-5, 5.2078e-7 kg (2 entries, compartments not in this file)
  See pesticide use summary sheet
- Thiodicarb: 1.08492e-6, 2.53149e-5 kg (2 entries, compartments not in this file)
  See pesticide use summary sheet
- Zeta-cypermethrin: 1.28231e-6, 2.99206e-5 kg (2 entries, compartments not in this file)
  See pesticide use summary sheet
- Diflubenzuron: 2.78186e-7, 6.491e-6 kg (2 entries, compartments not in this file)
  See pesticide use summary sheet
- Fomesafen: 0.000781855, 3.35081e-5 kg (2 entries, compartments not in this file)
  See pesticide use summary sheet
- Permethrin: 2.79515e-6, 6.52202e-5 kg (2 entries, compartments not in this file)
  See pesticide use summary sheet
- Alachlor: 0.00050038, 2.14448e-5 kg (2 entries, compartments not in this file)
  See pesticide use summary sheet
- Fenoxaprop: 4.13658e-6, 9.65202e-5 kg (2 entries, compartments not in this file)
  See pesticide use summary sheet
- Cloransulam-methyl: 6.1507e-5, 2.63601e-6 kg (2 entries, compartments not in this file)
  See pesticide use summary sheet
- Metribuzin: 2.77531e-5, 0.000647572 kg (2 entries, compartments not in this file)
  See pesticide use summary sheet
- Methyl parathion: 7.99538e-5, 3.42659e-6 kg (2 entries, compartments not in this file)
  See pesticide use summary sheet
- Sethoxydim: 5.21093e-5, 2.23326e-6 kg (2 entries, compartments not in this file)
  See pesticide use summary sheet
- Chlorimuron-ethyl: 5.06216e-6, 0.000118117 kg (2 entries, compartments not in this file)
  See pesticide use summary sheet
- Quizalofop-ethyl: 2.42076e-5 kg
  See pesticide use summary sheet
- Clethodim: 0.000349359, 1.49725e-5 kg (2 entries, compartments not in this file)
  See pesticide use summary sheet
- Azoxystrobin: 0.000233994, 6.05156e-6 kg (2 entries, compartments not in this file)
  See pesticide use summary sheet
- Thifensulfuron: 7.10191e-6, 3.04368e-7 kg (2 entries, compartments not in this file)
  See pesticide use summary sheet
- Acifluorfen: 7.07137e-5, 3.03059e-6 kg (2 entries, compartments not in this file)
  See pesticide use summary sheet
- Pyraclostrobin: 7.73356e-6, 0.00018045 kg (2 entries, compartments not in this file)
  See pesticide use summary sheet
- Flufenacet: 5.1928e-5, 2.22548e-6 kg (2 entries, compartments not in this file)
  See pesticide use summary sheet
- Sulfentrazone: 2.13563e-5, 0.000498313 kg (2 entries, compartments not in this file)
  See pesticide use summary sheet
- Chlorpyrifos: 0.000100973, 0.00235604 kg (2 entries, compartments not in this file)
  See pesticide use summary sheet
- Trifluralin: 0.000185604, 0.00717669 kg (2 entries, compartments not in this file)
  See pesticide use summary sheet
- Suspended solids, unspecified: 2812.26 kg
  No change from 2003 USDA Soy Ag LCI
- Propiconazole: 3.28259e-6, 7.65938e-5 kg (2 entries, compartments not in this file)
  See pesticide use summary sheet
- Acephate: 0.000515061, 2.2074e-5 kg (2 entries, compartments not in this file)
  See pesticide use summary sheet
- Cyfluthrin: 5.28553e-7, 1.23329e-5 kg (2 entries, compartments not in this file)
  See pesticide use summary sheet
- Dicamba: 1.69693e-6, 3.95951e-5 kg (2 entries, compartments not in this file)
  See pesticide use summary sheet
- Hydrocarbons, unspecified: 0.200699 kg
  See pesticide use summary sheet
- Dinitrogen monoxide: 0.349772 kg
  See Nitrous Oxide Basis Sheet. Source 8
- Ammonia: 0.0966447 kg
  See Nitrous Oxide Basis Sheet
- Imazaquin: 9.91548e-5, 4.24949e-6 kg (2 entries, compartments not in this file)
  See pesticide use summary sheet
- Tribenuron-methyl: 1.7223e-7 kg
  DELETE LINE ITEM - NO USE RECORDED
- Nitrogen oxides: 0.261509 kg
  See Nitrous Oxide Basis Sheet. Source 8
- Fluazifop-p-butyl: 0.000138521, 5.9366e-6 kg (2 entries, compartments not in this file)
  See pesticide use summary sheet
- Acetamide: 0.000126848, 3.28054e-6 kg (2 entries, compartments not in this file)
  See pesticide use summary sheet
- Metolachlor: 6.99242e-5, 0.00163156 kg (2 entries, compartments not in this file)
  See pesticide use summary sheet
- Lactofen: 9.98516e-5, 4.27935e-6 kg (2 entries, compartments not in this file)
  See pesticide use summary sheet
- Carbaryl: 5.90681e-5, 2.53149e-6 kg (2 entries, compartments not in this file)
  See pesticide use summary sheet
- Carfentrazone-ethyl: 2.78186e-7, 6.491e-6 kg (2 entries, compartments not in this file)
  See pesticide use summary sheet
- Nitrogen, total: 0.197607 kg
  N runoff as fact of N fert applied*N fert applied. Sources 9 & 10.
- Atrazine: 0.000395789, 1.69624e-5 kg (2 entries, compartments not in this file)
  See pesticide use summary sheet
- Trifloxystrobin: 4.5437e-6, 1.9473e-7 kg (2 entries, compartments not in this file)
  See pesticide use summary sheet
- Particulates: 0.0012 kg
  No change from 2003 USDA Soy Ag LCI
- 2,4-D: 0.00484606, 0.000207688 kg (2 entries, compartments not in this file)
  See pesticide use summary sheet
- Quizalofop ethyl ester: 1.03747e-6 kg
  See pesticide use summary sheet
- Esfenvalerate: 3.16047e-6, 7.37444e-5 kg (2 entries, compartments not in this file)
  See pesticide use summary sheet

## Sources
- Omni Tech International
- United States Department of Agriculture
- United States Department of Agriculture
- United States Department of Agriculture
- Sheehan, J.
- Pesticide Action Network (PAN)
- Environmental Protection Agency (EPA)
- United States Department of Agriculture
- United States Department of Agriculture
- USGS for NOAA
- USDA/ERS
