# Mixed recyclables, at collection, curbside, weight basis

Dataset: openLCA process, unit process
Category: Collection of postconsumer products
Geography: RNA
Time period: 2007-01-01 to 2008-01-01
Generated by: Franklin Associates
restrictionsDescription: All information can be accessed by everybody.
copyright: false

## General comment
Important note: although most of the data in the US LCI database has
undergone some sort of review, the database as a whole has not yet
undergone a formal validation process.
Please email comments to lci@nrel.gov.

## Technology
Typical

## Geography
United States

## Reference product
- Mixed recyclables, at collection, curbside, weight basis: 1 kg
  Applies to one kg of any collected material

## Inputs from technosphere
- CUTOFF Mixed recyclables, at source: 1 kg
  Based on wastes removed at MRF, the collected material contains about 0.087 kg waste per kg of usable material.
- Transport, single unit truck, diesel powered: 0.373737 t*km
  Fuel use allocated to one kg of material collected, based on fuel use per truckload collected and total kg of material collected per truckload

## Sources
- THE PLASTICS DIVISION OF THE AMERICAN CH
