# Spring wheat straw, carted, 2022

Dataset: openLCA process, unit process
Category: Wheat Farming
Geography: RNA
Time period: 2022-01-01 to 2022-01-01
Generated by: Daniel Inman
Published in: Hsu, D.
restrictionsDescription: All information can be accessed by everybody.
copyright: false

## Geography
North America

## Time period
2008

## Reference product
- Spring wheat straw, carted, 2022: 0.476 t

## Inputs from technosphere
- CUTOFF Baling: 0.397 ha
  hectares of corn stover calculated based on mass ratio, then scaled by the amount of stover (0.46) per mass of corn grain. Impact of baling is slightly overstated because it involves tractor--INL design report has baler behind the harvester.
- Transport, combination truck, diesel powered: 7.8546 t*km
  1.12 is for conversion to short ton
- CUTOFF Spring wheat straw, production, average, US, 2022: 357 kg
- CUTOFF Transport, tractor and trailer: 0.38835 t*km
  1.12 is for conversion to short ton

## Sources
- Hsu, D.
- Hess, J.
