# Polyethylene, linear low density, resin, at plant, CTR

Dataset: openLCA process, unit process
Category: All Other Basic Organic Chemical Manufacturing
Geography: RNA
Time period: 2003-01-01 to 2004-01-01
Generated by: Franklin Associates
Published in: THE PLASTICS DIVISION OF THE ACC
restrictionsDescription: All information can be accessed by everybody.
copyright: false

## General comment
Scrap is produced as a coproduct during this process. A mass basis was used to partition the credit for scrap. Complete inventory data and metadata are available in full in the final report and appendices, Cradle-to-Gate Life Cycle Inventory of Nine Plastic Resins and Four Polyurethane Precursors. This report has been extensively reviewed within Franklin Associates and has undergone partial critical review by ACC Plastics Division members and is available at: www.americanchemistry.com. Quantities may vary slightly between the reference to main source and and this module due to rounding. Important note: although most of the data in the US LCI database has undergone some sort of review, the database as a whole has not yet undergone a formal validation process. Please email comments to lci@nrel.gov.

## Technology
Polymerization of ethylene via combination of a solution and gas phase processes

## Geography
Representative of North America (US and Canada)

## Reference product
- Polyethylene, linear low density, resin, at plant, CTR: 1 kg

## By-products
- Recovered energy, for Polyethylene, linear low density, resin, at plant, CTR: 0.029 MJ

## Inputs from technosphere
- CUTOFF Disposal, solid waste, process, to sanitary landfill: 0.027223 kg
- CUTOFF Disposal, solid waste,process, to municipal incineration: 0.00373 kg
- CUTOFF Disposal, solid waste, process, to waste-to-energy: 0.000114 kg
- CUTOFF Disposal, solid waste, fuel, to municipal incineration: 0.044112 kg

## Inputs from nature
- Water, consumptive use, unspecified origin/m3: 0.0079295 m3
- Oil, crude, in ground: 0.19598 kg
  This flow represents the amount of crude oils that is a material input for producing the resin output. The energy content of the crude oil used as EMR/feedstock is 43.7 MJ per kg. The energy content multiplied by the mass should be considered an Energy of Material Resource (EMR)/feedstock energy.
- Uranium oxide, 332 GJ per kg, in ore: 2.2746e-6 kg
- Coal, lignite, in ground: 0.0089228 kg
- Oil, crude, in ground: 0.052799 kg
  This flow represents the amount of crude oil that is used for fuel. The energy content of the crude oil used for fuel is 43.7 MJ per kg.
- Gas, natural, in ground: 0.86611 kg
  This flow represents the amount of natural gas that is a material input for producing the resin output. The energy content of the natural gas used as EMR/feedstock is 49.8 MJ per kg. The energy content multiplied by the mass should be considered an Energy of Material Resource (EMR)/feedstock energy.
- Energy, from biomass: 0.0018909 MJ
- Energy, unspecified: 0.0061457 MJ
  Energy unspecified reflects "other fossil" fuels
- Energy, solar: 0.0001927 MJ
- Energy, from hydro power: 0.087198 MJ
- Gas, natural, in ground: 0.54021 m3
  This flow represents the amount of natural gas that is used for fuel. The energy content of the natural gas used for fuel is 36.7 MJ per m3.
- Energy, geothermal: 0.0045887 MJ
- Energy, kinetic (in wind), converted: 0.0045406 MJ
- Coal, unprocessed bituminous, in ground: 0.092818 kg

## Emissions to nature
- Ethane, 1,1,1-trichloro-, HCFC-140: 4.247e-13 kg
- Vinyl acetate: 1.6138e-13 kg
- Furan: 1e-6 kg
- Xylene: 0.00010542, 1.6526e-7 kg (2 entries, compartments not in this file)
- Methane, dichloro-, HCC-30: 2.2524e-8 kg
- Radium-228/kg: 6.72e-17 kg
- Styrene: 5.3087e-13, 1e-9 kg (2 entries, compartments not in this file)
- Mercaptans, unspecified: 4.2571e-9 kg
- Kerosene: 5.7819e-8 kg
- Titanium, ion: 3.1968e-7 kg
- Lithium, ion: 0.00018289 kg
- Methane, monochloro-, R-40: 1.1254e-11, 9.0356e-12 kg (2 entries, compartments not in this file)
- Cyclohexane: 1e-7 kg
- BOD5, Biological Oxygen Demand: 4.5439e-5 kg
- Methane, chlorodifluoro-, HCFC-22: 1.1e-8 kg
- Hexanoic acid: 7.6347e-8 kg
- Zinc: 8.0602e-7, 1.8606e-10 kg (2 entries, compartments not in this file)
- Phenol: 1.0727e-6, 3.3976e-13 kg (2 entries, compartments not in this file)
- Fluorene, 1-methyl-: 2.5549e-11 kg
- Toluene, 2,4-dinitro-: 5.9457e-15 kg
- Propanal: 8.0692e-12 kg
- 4-Methyl-2-pentanone: 9.4741e-10 kg
- Hexane: 1.4227e-12 kg
- Arsenic, ion: 6.9199e-8 kg
- Copper: 2.7909e-10, 8.1887e-8 kg (2 entries, compartments not in this file)
- Butene: 1e-7 kg
- Phthalate, dioctyl-: 1.5501e-12 kg
- Anthracene: 9.1385e-12 kg
- Phosphorus: 1e-7 kg
- Dioxins, measured as 2,3,7,8-tetrachlorodibenzo-p-dioxin: 6.1443e-14 kg
- Lead-210/kg: 3.7762e-17 kg
- VOC, volatile organic compounds: 0.0010042 kg
- Organic substances, unspecified: 1.1265e-5 kg
- Cyanide: 1.6201e-11, 5.3087e-11 kg (2 entries, compartments not in this file)
- Mercury: 5.3665e-9, 4.1255e-10 kg (2 entries, compartments not in this file)
- Nickel: 8.3342e-8, 1.7312e-7 kg (2 entries, compartments not in this file)
- Organic acids: 4.4363e-10 kg
- Ethylene dibromide: 1.0153e-9 kg
- Fluorene: 1.8372e-9, 3.9599e-11 kg (2 entries, compartments not in this file)
- Biphenyl: 4.3952e-9, 7.3978e-11 kg (2 entries, compartments not in this file)
- Dinitrogen monoxide: 3.5242e-5 kg
- t-Butyl methyl ether: 7.4322e-13 kg
- Dodecane: 1.999e-8 kg
- Yttrium: 2.441e-9 kg
- Chromium: 2.0584e-8, 8.892e-7 kg (2 entries, compartments not in this file)
- Methane: 0.00032139 kg
- Acenaphthene: 2.2193e-11 kg
- Benzo(a)anthracene: 3.4813e-12 kg
- Sulfate: 6.729e-5 kg
- Chloroform: 1.2529e-12 kg
- p-Cresol: 1.128e-8 kg
- NMVOC, non-methane volatile organic compounds, unspecified origin: 0.00061622 kg
- Aluminum: 1e-7, 3.5018e-5 kg (2 entries, compartments not in this file)
- Thallium: 4.3839e-9 kg
- Methane, fossil: 0.016823 kg
- Process solvents, unspecified: 1e-7 kg
- Ethane, 1,2-dichloro-: 8.4939e-13 kg
- Tetradecane: 8.5704e-9 kg
- Benzyl chloride: 1.4864e-11 kg
- Cobalt: 1.536e-8, 8.05e-9 kg (2 entries, compartments not in this file)
- Radioactive species, unspecified: 2464 Bq
- Lead: 1.857e-7, 2.4302e-8 kg (2 entries, compartments not in this file)
- Magnesium: 4.7868e-7, 0.00014704 kg (2 entries, compartments not in this file)
- Sulfuric acid, dimethyl ester: 1.0193e-12 kg
- n-Hexacosane: 1.4986e-10 kg
- Phenol, 2,4-dimethyl-: 1.018e-8 kg
- Octadecane: 5.4198e-9 kg
- p-Xylene: 3.9216e-9 kg
- Strontium: 1.9786e-5 kg
- Dissolved solids: 0.0091684 kg
- Bromide: 4.398e-5 kg
- Silver: 4.4309e-7 kg
- Nitrogen oxides: 0.0022305 kg
- Hydrogen: 4e-6 kg
- Propene: 5.1181e-8 kg
- Cadmium, ion: 1.1008e-8 kg
- Sulfur dioxide: 0.0036331 kg
- Manganese: 9.6125e-7, 2.8893e-8 kg (2 entries, compartments not in this file)
- Isophorone: 1.2316e-11 kg
- Benzenes, alkylated, unspecified: 6.7878e-8 kg
- Fluoranthene: 3.0897e-11 kg
- Beryllium: 1.1662e-9, 4.3288e-9 kg (2 entries, compartments not in this file)
- Surfactants: 2.9084e-8 kg
- Phenols, unspecified: 9.0194e-8, 8.159e-9 kg (2 entries, compartments not in this file)
- 5-methyl Chrysene: 9.5736e-13 kg
- Hexadecane: 2.1861e-8 kg
- Radium-226/kg: 1.3137e-14 kg
- Methane, tetrachloro-, CFC-10: 3.3056e-10 kg
- Selenium: 1.3441e-8, 5.8596e-8 kg (2 entries, compartments not in this file)
- Benzoic acid: 3.6866e-7 kg
- Methacrylic acid, methyl ester: 4.247e-13 kg
- Indeno(1,2,3-cd)pyrene: 2.6546e-12 kg
- COD, Chemical Oxygen Demand: 0.00013336 kg
- Eicosane: 5.4904e-9 kg
- Hydrogen chloride: 5.367e-5 kg
- Benzo(ghi)perylene: 1.175e-12 kg
- Cadmium: 8.9423e-9 kg
- Dibenzothiophene: 4.5535e-11 kg
- Sulfide: 4.4861e-8 kg
- Benzene, ethyl-: 1.454e-5, 3.1263e-8 kg (2 entries, compartments not in this file)
- Ammonium, ion: 2.5812e-8 kg
- Dibenzofuran: 4.2686e-11 kg
- Naphthalenes, alkylated, unspecified: 1.1123e-9 kg
- Methyl ethyl ketone: 1.8071e-11, 8.2816e-12 kg (2 entries, compartments not in this file)
- Phenanthrene: 2.9123e-10, 1.175e-10 kg (2 entries, compartments not in this file)
- Benzo(a)pyrene: 1.6536e-12 kg
- Particulates, < 10 um: 7.9648e-5 kg
- Radionuclides (Including Radon): 3.2333e-6 kg
- Carbon monoxide, fossil: 0.00074 kg
- PAH, polycyclic aromatic hydrocarbons: 3.3328e-9 kg
- Molybdenum: 8.3422e-9 kg
- Naphthalene, 2-methyl-: 5.5989e-9 kg
- Fluorenes, alkylated, unspecified: 3.9338e-9 kg
- Benzo(b,j,k)fluoranthene: 4.7868e-12 kg
- Copper, ion: 3.934e-8 kg
- Sulfur: 9.1556e-7 kg
- Sodium, ion: 0.0020912 kg
- Decane: 1.0541e-8 kg
- Methane, bromo-, Halon 1001: 3.3976e-12 kg
- Bromoform: 8.2816e-13 kg
- Benzene, 1-methyl-4-(1-methylethyl)-: 2.2433e-11 kg
- Aldehydes, unspecified: 4.1764e-8 kg
- Benzene: 3.8949e-7, 0.00011667 kg (2 entries, compartments not in this file)
- 2-Hexanone: 2.4184e-9 kg
- Ethane, chloro-: 8.9186e-13 kg
- Toluene: 0.00018176, 4.5014e-7 kg (2 entries, compartments not in this file)
- Polycyclic organic matter, unspecified: 1.3222e-8 kg
- Ammonia: 7.2774e-6, 8.8488e-7 kg (2 entries, compartments not in this file)
- Surfactants, unspecified: 1.5085e-7 kg
- Phenanthrenes, alkylated, unspecified: 4.6121e-10 kg
- Docosane: 2.4022e-10 kg
- Hydrocarbons, unspecified: 6.9678e-7 kg
- Oils, unspecified: 1.2686e-5 kg
- Iron: 6.3902e-5 kg
- Radioactive species, Nuclides, unspecified: 3.7492 Bq
- Benzene, pentamethyl-: 1.6825e-11 kg
- Chlorine: 1e-7 kg
- Tin: 8.2868e-8 kg
- Chloride: 0.009132 kg
- Fluoride: 3.587e-9, 4.1982e-7 kg (2 entries, compartments not in this file)
- Acetaldehyde: 1.5227e-8 kg
- Carbon disulfide: 2.7605e-12 kg
- Hydrogen fluoride: 6.5265e-6 kg
- Antimony: 2.0217e-8, 1.265e-9 kg (2 entries, compartments not in this file)
- Vanadium: 2.2396e-8 kg
- Naphthalene: 6.6113e-9, 5.8109e-9 kg (2 entries, compartments not in this file)
- Butadiene: 7.7565e-10 kg
- Sulfur oxides: 0.00051527 kg
- Acetophenone: 3.1852e-13 kg
- Calcium, ion: 0.00073432 kg
- Carbon dioxide, fossil: 1.4484 kg
- o-Cresol: 1.0462e-8 kg
- Ammonium chloride: 1.2073e-7 kg
- Hydrazine, methyl-: 3.6099e-12 kg
- Particulates, > 2.5 um, and < 10um: 0.00012145 kg
- Nitrogen, total: 6.4256e-8 kg
- Ethene, tetrachloro-: 2.0241e-9 kg
- Formaldehyde: 4.9311e-7 kg
- Acenaphthylene: 1.0879e-11 kg
- Particulates, unspecified: 0.0001748 kg
- Suspended solids, unspecified: 0.0037272 kg
- Benzene, chloro-: 4.6717e-13 kg
- Chromium VI: 3.4377e-9 kg
- Pyrene: 1.436e-11 kg
- Acetone: 2.312e-9 kg
- Ethane, 1,2-dibromo-: 2.5482e-14 kg
- Arsenic: 2.1472e-8 kg
- Methane, chlorotrifluoro-, CFC-13: 5.1945e-9 kg
- TOC, Total Organic Carbon: 1e-6 kg
- Carbon monoxide: 0.00023932 kg
- o-Xylene: 3.9216e-9 kg
- Chrysene: 4.3517e-12 kg
- 2-Chloroacetophenone: 1.4864e-13 kg
- Barium: 0.00044602 kg
- Particulates, < 2.5 um: 7.4232e-5 kg
- Boron: 1.1377e-6 kg
- m-Xylene: 1.0667e-8 kg
- Cumene: 1.1254e-13 kg

## Sampling procedure
Data are from both primary and secondary sources. A weighted average using production amounts was calculated from the LLDPE production data from five plants collected from three leading producers in North America. The LLDPE producers who provided data for this module verified that the characteristics of their plants are representative of a majority of North American LLDPE production.

## Sources
- THE PLASTICS DIVISION OF THE ACC
