# Quicklime, at plant

Dataset: openLCA process, unit process
Category: Lime Manufacturing
Geography: RNA
Time period: 1992-01-01 to 2002-01-01
Generated by: James Littlefield, Franklin Associates
Published in: Franklin Associates
restrictionsDescription: All information can be accessed by everybody.
copyright: false

## General comment
This module shows limestone mining and lime production as 2 separate unit processes, and also shows it as 1 cradle-to-gate process., Lime is manufactured by calcining in a rotary kiln.
Important note: although most of the data in the US LCI database has
undergone some sort of review, the database as a whole has not yet
undergone a formal validation process.
Please email comments to lci@nrel.gov.

## Technology
Includes calcination of limestone in a rotary kiln to produce lime.

## Geography
United States

## Reference product
- Quicklime, at plant: 1 kg

## Inputs from technosphere
- CUTOFF Disposal, solid waste, unspecified, to sanitary landfill: 0.005 kg
- Limestone, at mine: 1.87 kg
  The quantity of limestone required for the production of 1,000 lbs of lime was estimated from the calcining chemistry: 100 lbs of limestone (CaCO3) yield 56 lbs of lime (CaO) and 44 lbs of carbon dioxide (CO2). Also, a 95% oxides content of limestone was assumed.
- Transport, barge, average fuel mix: 0.0241 t*km
- Transport, combination truck, diesel powered: 0.0805 t*km
- Natural gas, combusted in industrial boiler: 0.021 m3
- Liquefied petroleum gas, combusted in industrial boiler: 3.22e-5 l
- Diesel, combusted in industrial boiler: 0.000945 l
- Electricity, at grid, US, 2000: 0.0678 kWh
- Transport, train, diesel powered: 0.0161 t*km
- Bituminous coal, combusted in industrial boiler: 0.172 kg

## Emissions to nature
- Particulates, unspecified: 5.63e-5 kg
- Sulfur dioxide: 0.00015 kg
- Carbon dioxide: 0.768 kg

## Sources
- Franklin Associates
- US Geological Survey
- unspecified
- U.S. EPA
- U.S. Department of Energy, Office of Ene
- U.S. EPA
- U.S. EPA
- U.S. Energy Information Administration
- M. Michael Miller
- unspecified
