# Electricity, at eGrid, NEWE, 2008

Dataset: openLCA process, unit process
Category: Utilities
Geography: RNA
Time period: 2008-01-01 to 2008-01-01
Generated by: Alberta Carpenter
Published in: Chris Goemans, Athena Institute
restrictionsDescription: All information can be accessed by everybody.
copyright: false

## General comment
The methodology used to put together the grid information is outlined in reference 1.

## Technology
Typical

## Geography
Maine, New Hampshire, Vermont,Massachusetts, Rhode Island and Connecticut.

## Reference product
- Electricity, at eGrid, NEWE, 2008: 1 kWh

## Inputs from technosphere
- Electricity, diesel, at power plant: 0.00168788 kWh
  Petroleum (DFO) - Distillate Fuel Oil (includes all Diesel and No. 1, No. 2, and No. 4 Fuel Oils)
- Electricity, bituminous coal, at power plant: 0.0249468 kWh
  Subbituminous Coal
- CUTOFF Electricity, solar, unspecified, at power plant: 6.30949e-7 kWh
  Solar (Photovoltaic, Thermal)
- CUTOFF Electricity, tire derived fuel, at power plant: 0.00213881 kWh
  Solid Renewable Fuels (Biomass) TDF - tires, tire derived fuel
- Electricity, residual fuel oil, at power plant: 0.0241276 kWh
  Petroleum (RFO) – Residual Fuel Oil (includes No. 5 and No. 6 Fuel Oils and Bunker C Fuel Oil)
- CUTOFF Electricity, biomass, liquid, sludge, at power plant: 0.00040937 kWh
  Liquid Renewable Fuels (Biomass) SLW – Sludge Waste
- Electricity, biomass, at power plant: 0.0322557 kWh
  Solid Renewable Fuels (Biomass) WDS – Wood/Wood Waste Solids (Paper Pellets, Railroad Ties, Utility Poles, Wood Chips, and other wood solids)
- Electricity, diesel, at power plant: 0.000173352 kWh
  Petroleum (DFO) KER - kerosene
- CUTOFF Electricity, other fuels, unspecified, at power plant: 0.000185581 kWh
  Other Fuels OTH – Other (Batteries, Chemicals, Coke Breeze, Hydrogen, Pitch, Sulfur, Tar Coal, and miscellaneous technologies)
- CUTOFF Electricity, MSW, non-biogenic, at power plant: 0.0121751 kWh
  Other Fuels MSN - Municipal Solid Waste – Non-biogenic components
- CUTOFF Electricity, biomass, gas, landfill, at power plant: 0.00321861 kWh
  Gaseous Renewable Fuels (Biomass) LFG - landfill gas
- CUTOFF Electricity, biomass,liquid, unspecified, at power plant: 0.00879671 kWh
  Liquid Renewable Fuels (Biomass) BLQ - black liquor
- CUTOFF Electricity, other fuels, unspecified, at power plant: 0.000102774 kWh
  Other Fuels PUR – Purchased Steam
- CUTOFF Electricity, biomass, solid, biogenic MSW, at power plant: 0.0154954 kWh
  Solid Renewable Fuels (Biomass) MSB - Municipal Solid Waste – Biogenic Component
- Electricity, nuclear, at power plant: 0.279689 kWh
  Nuclear Fission
- Electricity, bituminous coal, at power plant: 0.00044391 kWh
  Bituminous Coal SC - Coal Synfuel. Coal-based solid fuel that has been processed by a coal synfuel plant, and coal-based fuels such as briquettes, pellets, or extrusions, which are formed from fresh or recycled coal and binding materials.
- CUTOFF Electricity, biomass, gas, unspecified, at power plant: 1.19376e-5 kWh
  Gaseous Renewable Fuels (Biomass) OBG – Other Biomass Gases (Digester Gas, Methane, and other biomass gases)
- Electricity, bituminous coal, at power plant: 0.122671 kWh
  Bituminous Coal BIT - Anthracite Coal, and Bituminous Coal.
- CUTOFF Electricity, biomass,liquid, unspecified, at power plant: 1.24644e-6 kWh
  Liquid Renewable Fuels (Biomass) OBL – Other Biomass Liquid (Ethanol, Fish Oil, Liquid Acetonitrile Waste, Medical Waste, Tall Oil, Waste Alcohol, and other Biomass not specified)
- CUTOFF Electricity, petroleum, waste oil, at power plant: 0.000113672 kWh
  Petroleum (Other Fossil) WO – Waste/Other Oil (including Crude Oil, Liquid Butane, Liquid Propane, Oil Waste, Re-Refined Motor Oil, Sludge Oil, Tar Oil, or other petroleum-based liquid wastes)
- CUTOFF Electricity, at wind power plant, unspecified: 0.00122623 kWh
  Wind
- CUTOFF Electricity, hydropower, at power plant, unspecified: 0.0669494 kWh
  Hydroelectric
- Electricity, diesel, at power plant: 3.33024e-5 kWh
  Petroleum (DFO) JF - jet fuel
- Electricity, natural gas, at power plant: 0.403145 kWh
  Natural Gas

## Sampling procedure
based on EIA electricity reports for all power plants in the US.

## Sources
- Chris Goemans, Athena Institute
- unspecified
- USEPA
- Statistics Canada
- Statistics Canada
- Statistics Canada
- Statistics Canada
- Statistics Canada
- Statistics Canada
- USEPA
- EIA
- EIA
- EIA
- EIA
- EIA
- EIA
- EIA
- EIA
- EIA
- EIA
- EIA
- US DOE
- International Energy Agency
- US DOE
