# Hydrochloric acid, at plant

Dataset: openLCA process, unit process
Category: Petrochemical Manufacturing
Geography: RNA
Time period: 2003-01-01 to 2004-01-01
Generated by: Franklin Associates
Published in: THE PLASTICS DIVISION OF THE ACC
restrictionsDescription: All information can be accessed by everybody.
copyright: false

## General comment
Complete inventory data and metadata are available in full in the final report and appendices, Cradle-to-Gate Life Cycle Inventory of Nine Plastic Resins and Four Polyurethane Precursors. This report has been extensively reviewed within Franklin Associates and has undergone partial critical review by ACC Plastics Division members and is available at: www.americanchemistry.com. Quantities may vary slightly between the reference to main source and and this module due to rounding. Important note: although most of the data in the US LCI database has undergone some sort of review, the database as a whole has not yet undergone a formal validation process. Please email comments to lci@nrel.gov.

## Technology
Although there are a number of processes used to produce hydrochloric acid, this dataset assumes that it is produced from the synthesis of the elements hydrogen and chloride.

## Geography
Representative of North America (US and Canada)

## Reference product
- Hydrochloric acid, at plant: 1 kg

## Inputs from technosphere
- CUTOFF Disposal, solid waste, process, to sanitary landfill: 0.0024508 kg
- CUTOFF Disposal, solid waste,process, to municipal incineration: 0.001372 kg
- CUTOFF Disposal, solid waste, fuel, to municipal incineration: 0.11786 kg

## Inputs from nature
- Energy, from hydro power: 0.25992 MJ
- Gas, natural, in ground: 0.081988 kg
  This flow represents the amount of natural gas that is a material input for producing the resin output. The energy content of the natural gas used as EMR/feedstock is 49.8 MJ per kg. The energy content multiplied by the mass should be considered an Energy of Material Resource (EMR)/feedstock energy.
- Energy, unspecified: 0.018319 MJ
  Energy unspecified reflects "other fossil" fuels
- Coal, unprocessed bituminous, in ground: 0.31809 kg
- Energy, from biomass: 0.0056364 MJ
- Uranium oxide, 332 GJ per kg, in ore: 6.7801e-6 kg
- Energy, geothermal: 0.013678 MJ
- Coal, lignite, in ground: 0.026597 kg
- Water, consumptive use, unspecified origin/m3: 0.010376 m3
  Franklin Associates uses a default as opposed to Egalitarian approach in collecting data for water use. During data collection, water use data were only requested and compiled in terms of 'evaporative' or consumptive use (i.e., ultimate withdraws, evaporation, or incorporation into the product). Data were not collected to determine reliable averages for non-evaporative water use. In other words, averages for water inputs and outputs are not available for this unit process. Consumptive use includes: water incorporated into the product, water evaporated during the process, and/or water used and released to a body other than that from which it was drawn.
- Oil, crude, in ground: 0.02643 kg
  This flow represents the amount of crude oil that is used for fuel. The energy content of the crude oil used for fuel is 43.7 MJ per kg.
- Energy, solar: 0.00057441 MJ
- Salt, unspecified: 0.8722 kg
- Energy, kinetic (in wind), converted: 0.013535 MJ
- Gas, natural, in ground: 0.29841 m3
  This flow represents the amount of natural gas that is used for fuel. The energy content of the natural gas used for fuel is 36.7 MJ per m3.

## Emissions to nature
- Benzo(b,j,k)fluoranthene: 1.6232e-11 kg
- Methyl ethyl ketone: 4.1994e-12, 6.9862e-9 kg (2 entries, compartments not in this file)
- Selenium: 1.9597e-7, 2.7854e-8 kg (2 entries, compartments not in this file)
- Radium-228/kg: 1.4746e-17 kg
- Chloroform: 1.0569e-9 kg
- Mercury: 1.8094e-10, 3.6156e-8 kg (2 entries, compartments not in this file)
- Calcium, ion: 0.00015946 kg
- Fluorene: 4.0203e-10, 1.3428e-10 kg (2 entries, compartments not in this file)
- Acenaphthene: 7.5256e-11 kg
- Methane, fossil: 0.0035087 kg
- Dibenzofuran: 9.9195e-12 kg
- 5-methyl Chrysene: 3.2464e-12 kg
- Naphthalene: 1.4506e-9, 6.3955e-9 kg (2 entries, compartments not in this file)
- Ethane, chloro-: 7.5236e-10 kg
- Naphthalenes, alkylated, unspecified: 2.4326e-10 kg
- Chromium: 4.5549e-8, 1.9439e-7 kg (2 entries, compartments not in this file)
- Antimony: 2.7073e-9, 4.4093e-9 kg (2 entries, compartments not in this file)
- Cadmium, ion: 3.4876e-9 kg
- Surfactants, unspecified: 3.6031e-8 kg
- Silver: 9.5918e-8 kg
- Nitrogen oxides: 0.002539 kg
- Molybdenum: 1.8308e-9 kg
- Bromide: 9.5123e-6 kg
- Kerosene: 1.7235e-7 kg
- Radionuclides (Including Radon): 9.6378e-6 kg
- Benzyl chloride: 1.2539e-8 kg
- Oils, unspecified: 2.2458e-6 kg
- Butadiene: 2.9051e-10 kg
- Zinc: 8.0161e-10, 2.854e-7 kg (2 entries, compartments not in this file)
- Lead: 1.2544e-7, 4.9669e-8 kg (2 entries, compartments not in this file)
- Carbon disulfide: 2.3287e-9 kg
- Carbon monoxide: 0.0003137 kg
- Isophorone: 1.039e-8 kg
- Biphenyl: 2.5086e-10, 9.6117e-10 kg (2 entries, compartments not in this file)
- Benzene, ethyl-: 3.4746e-6, 4.618e-9 kg (2 entries, compartments not in this file)
- Beryllium: 9.4247e-10, 3.6983e-9 kg (2 entries, compartments not in this file)
- Ammonia: 1.9428e-7, 1.2416e-6 kg (2 entries, compartments not in this file)
- Indeno(1,2,3-cd)pyrene: 9.0017e-12 kg
- Lithium, ion: 4.3678e-5 kg
- Sulfuric acid, dimethyl ester: 8.5984e-10 kg
- Barium: 9.7461e-5 kg
- Pyrene: 4.8696e-11 kg
- Phenol: 7.6187e-9, 2.8661e-10 kg (2 entries, compartments not in this file)
- Acenaphthylene: 3.6891e-11 kg
- Phenanthrene: 3.9843e-10, 6.3963e-11 kg (2 entries, compartments not in this file)
- Benzo(a)pyrene: 5.6075e-12 kg
- Fluorenes, alkylated, unspecified: 8.6029e-10 kg
- Sulfur dioxide: 0.0049394 kg
- Fluoride: 8.067e-7, 1.2514e-6 kg (2 entries, compartments not in this file)
- n-Hexacosane: 3.4826e-11 kg
- Aldehydes, unspecified: 1.2449e-7 kg
- Dissolved solids: 0.046078 kg
- Ammonium, ion: 7.6941e-8 kg
- NMVOC, non-methane volatile organic compounds, unspecified origin: 3.1218e-5 kg
- Chlorine: 0.0019011 kg
- Fluorene, 1-methyl-: 5.9373e-12 kg
- Acetone: 5.3533e-10 kg
- Ethane, 1,2-dichloro-: 7.1653e-10 kg
- Methane, monochloro-, R-40: 9.4941e-9, 2.0997e-12 kg (2 entries, compartments not in this file)
- Copper: 1.2024e-9, 1.9676e-8 kg (2 entries, compartments not in this file)
- Benzene, pentamethyl-: 3.9099e-12 kg
- Nickel: 1.8763e-8, 1.7868e-7 kg (2 entries, compartments not in this file)
- Radioactive species, unspecified: 7339.5 Bq
- Hexane: 1.2002e-9 kg
- Aluminum: 1.0056e-5 kg
- Methane, chlorotrifluoro-, CFC-13: 5.5187e-10 kg
- Hexanoic acid: 1.6753e-8 kg
- Radioactive species, Nuclides, unspecified: 11.176 Bq
- Ethane, 1,1,1-trichloro-, HCFC-140: 3.5827e-10 kg
- Ethane, 1,2-dibromo-: 2.1496e-11 kg
- Hydrogen chloride: 0.00016894 kg
- t-Butyl methyl ether: 6.2697e-10 kg
- Cobalt: 2.4102e-8, 1.7664e-9 kg (2 entries, compartments not in this file)
- Polycyclic organic matter, unspecified: 1.4048e-9 kg
- Benzene, chloro-: 3.9409e-10 kg
- Propanal: 6.8071e-9 kg
- Phenol, 2,4-dimethyl-: 2.2337e-9 kg
- Eicosane: 1.2057e-9 kg
- Copper, ion: 7.3463e-8 kg
- Acetaldehyde: 1.5909e-8 kg
- Ammonium chloride: 3.5986e-7 kg
- Hydrogen fluoride: 2.1324e-5 kg
- Styrene: 4.4783e-10 kg
- Methane, bromo-, Halon 1001: 2.8661e-9 kg
- o-Xylene: 8.623e-10 kg
- p-Xylene: 8.623e-10 kg
- Titanium, ion: 6.9911e-8 kg
- Phthalate, dioctyl-: 1.3077e-9 kg
- Particulates, > 2.5 um, and < 10um: 0.00011431 kg
- Particulates, < 10 um: 7.4607e-5 kg
- Benzene, 1-methyl-4-(1-methylethyl)-: 5.213e-12 kg
- Cadmium: 1.4432e-8 kg
- Dinitrogen monoxide: 3.8206e-5 kg
- Chloride: 0.001988 kg
- Manganese: 7.734e-8, 2.4944e-6 kg (2 entries, compartments not in this file)
- Mercaptans, unspecified: 3.8862e-6 kg
- Arsenic, ion: 1.7207e-8 kg
- o-Cresol: 2.2949e-9 kg
- VOC, volatile organic compounds: 0.00027469 kg
- Ethane, 1,2-dichloro-1,1,2-trifluoro-, HCFC-123: 8.918e-8 kg
- Chrysene: 1.4757e-11 kg
- Arsenic: 6.2491e-8 kg
- Fluoranthene: 1.0477e-10 kg
- Benzenes, alkylated, unspecified: 1.4844e-8 kg
- Hydrazine, methyl-: 3.0453e-9 kg
- Ethene, tetrachloro-: 6.573e-9 kg
- Nitrogen, total: 1.9154e-7 kg
- Dioxins, measured as 2,3,7,8-tetrachlorodibenzo-p-dioxin: 1.3342e-13 kg
- Thallium: 9.5876e-10 kg
- Octadecane: 1.1893e-9 kg
- PAH, polycyclic aromatic hydrocarbons: 1.2483e-9 kg
- Bromoform: 6.9862e-10 kg
- COD, Chemical Oxygen Demand: 1.8541e-5 kg
- Toluene, 2,4-dinitro-: 5.0157e-12 kg
- Formaldehyde: 5.5388e-7 kg
- Benzo(a)anthracene: 1.1805e-11 kg
- BOD5, Biological Oxygen Demand: 0.00027318 kg
- Strontium: 4.342e-6 kg
- Xylene: 3.5527e-8, 2.5182e-5 kg (2 entries, compartments not in this file)
- Docosane: 5.5823e-11 kg
- Organic substances, unspecified: 9.0696e-7 kg
- Surfactants: 3.0899e-9 kg
- Iron: 2.0427e-5 kg
- Carbon dioxide, fossil: 1.5526 kg
- Sulfate: 0.0001592 kg
- 2-Hexanone: 5.3154e-10 kg
- Toluene: 7.5914e-8, 4.3419e-5 kg (2 entries, compartments not in this file)
- Radium-226/kg: 2.8827e-15 kg
- Sodium, ion: 0.0004526 kg
- Boron: 2.4971e-7 kg
- Phenols, unspecified: 1.2521e-8, 2.1543e-8 kg (2 entries, compartments not in this file)
- Yttrium: 5.358e-10 kg
- Methane: 0.0010945 kg
- Methacrylic acid, methyl ester: 3.5827e-10 kg
- Methane, tetrachloro-, CFC-10: 1.8624e-7 kg
- Vinyl acetate: 1.3614e-10 kg
- Chromium VI: 1.1657e-8 kg
- Ethylene dibromide: 1.0787e-10 kg
- Methane, dichloro-, HCC-30: 5.6278e-8 kg
- p-Cresol: 2.4752e-9 kg
- Hydrocarbons, unspecified: 2.077e-6 kg
- Dodecane: 4.3886e-9 kg
- Tetradecane: 1.8856e-9 kg
- Suspended solids, unspecified: 0.00091645 kg
- Hexadecane: 4.7985e-9 kg
- Benzo(ghi)perylene: 3.9843e-12 kg
- m-Xylene: 2.3479e-9 kg
- Lead-210/kg: 8.2861e-18 kg
- Propene: 1.9169e-8 kg
- Decane: 2.314e-9 kg
- Carbon monoxide, fossil: 0.00044152 kg
- Sulfur oxides: 0.00026451 kg
- Tin: 1.8144e-8 kg
- Magnesium: 1.6232e-6, 3.196e-5 kg (2 entries, compartments not in this file)
- Vanadium: 3.4758e-9 kg
- Cyanide: 3.765e-12, 4.4783e-8 kg (2 entries, compartments not in this file)
- Particulates, unspecified: 0.00049933 kg
- Dibenzothiophene: 1.0653e-11 kg
- Sulfur: 2.0189e-7 kg
- 4-Methyl-2-pentanone: 2.2019e-10 kg
- Naphthalene, 2-methyl-: 1.2319e-9 kg
- Furan: 5.804e-13 kg
- 2-Chloroacetophenone: 1.2539e-10 kg
- Cumene: 9.4941e-11 kg
- Sulfide: 4.7662e-9 kg
- Benzene: 2.9727e-5, 8.2316e-8 kg (2 entries, compartments not in this file)
- Ethane, 1,1,1,2-tetrafluoro-, HFC-134a: 8.918e-8 kg
- Acetophenone: 2.687e-10 kg
- Anthracene: 3.0989e-11 kg
- Organic acids: 1.3224e-9 kg
- TOC, Total Organic Carbon: 9.72e-5 kg
- Phenanthrenes, alkylated, unspecified: 1.0086e-10 kg
- Benzoic acid: 8.0896e-8 kg
- Particulates, < 2.5 um: 6.65e-5 kg

## Sampling procedure
The dataset is adapted from ecoinvent and is provided by Swiss Centre for LCI, EMPA from the 2007 Life Cycle Inventories of Chemicals. the data represents a cross-section of actual plants in Europe for the years 1997-2000.

## Sources
- THE PLASTICS DIVISION OF THE ACC
