# Railroad ties, hardwood, creosote treated, SE

Dataset: openLCA process, unit process
Category: Wood Preservation
Geography: RNA
Time period: 2005-01-01 to 2009-12-31
Generated by: Chris Bolin;
Reviewer: Paul Cooper
Published in: Chris Bolin
restrictionsDescription: All information can be accessed by everybody.
copyright: false

## General comment
Pressure-treated creosote southeast US hardwood rail road ties. Base process data presented with allocations to within process co-products noted. Refer to allocation worksheet for specifics. All allocations performed using mass or volume. This sheet sets out each unit process in the production of one cubic meter of creosote treated rail road ties producted in the Southeast region. Important note: although most of the data in the US LCI database has undergone some sort of review, the database as a whole has not yet undergone a formal validation process. Please email comments to lci@nrel.gov.; Geography: SE US

## Technology
typical

## Geography
US Southeast

## Time period
2005-2009

## Reference product
- Railroad ties, hardwood, creosote treated, SE: 1 m3
  Retention = 5.4537 lb/ft3 = 87.35989 kg/m3

## Inputs from technosphere
- Transport, barge, residual fuel oil powered: 0.363 t*km
  Preservative production: creosote production; coal tar; from surveys
- CUTOFF Disposal, solid waste, unspecified, to unspecified landfill: 0.003159 kg
  Preservative Production;
  Solid waste disposal associated with the coal mining and coal distillation by product processing. Solid waste disposal as reported in treater surveys as other (normal trash or municipal waste). Other waste disposal—Amount of normal trash or municipal waste that is typically collected in trash cans or dumpsters.
- Bituminous coal, combusted in industrial boiler: 113 kg
  Preservative Production
- Transport, combination truck, diesel powered: 0.3292 t*km
  Preservative Production; from surveys
  68% of diluent oil for preservative producion by truck; transport coal tar
- Natural gas, combusted in industrial boiler: 24.9 m3
  Preservative Wood Treatment
- Gasoline, combusted in equipment: 0.0948 l
  Preservative Production
- Gasoline, combusted in equipment: 0.08799 l
  Preservative Wood Treatment
- CUTOFF Disposal, solid waste, unspecified, to unspecified treatment: 0.6444 kg
  Preservative Wood Treatment;
  Hazardous and Process waste disposed—Amount of hazardous waste for the survey year and units (pounds, tons, drums, etc.). Chemical and process waste disposed—Amount of waste and units from the treatment process, such as from tanks, treatment equipment, and drip pad area, but not including hazardous waste. This may be regulated in your state as chemical, industrial, or special waste.
- Transport, train, diesel powered: 255.9 t*km
  Preservative Wood Treatment; from surveys
  46% of tie total by rail; 45% of preservative by rail;
- Natural gas, combusted in industrial equipment: 3.31e-5 m3
  Preservative Wood Treatment; surrogate for LPG
- Diesel, combusted in industrial equipment: 2.091 l
  Preservative Production
- Transport, combination truck, diesel powered: 230.6 t*km
  Preservative Wood Treatment; from surveys
  54% of tie total by truck; 48% of preservative by truck;
- Transport, train, diesel powered: 93.53 t*km
  Preservative production; from surveys; 32% of diluent oil for preservative producion by rail; 100% of coal production; transport coal tar
- Transport, ocean freighter, residual fuel oil powered: 48.4 t*km
  Preservative production: creostoe production; coal tar; from surveys
- CUTOFF Disposal, solid waste, unspecified, to unspecified treatment: 32.42 kg
  Preservative Production;
  Hazardous and Process waste disposed—Amount of hazardous waste for the survey year and units (pounds, tons, drums, etc.). Chemical and process waste disposed—Amount of waste and units from the treatment process, such as from tanks, treatment equipment, and drip pad area, but not including hazardous waste. This may be regulated in your state as chemical, industrial, or special waste.
- Residual fuel oil, at refinery: 6.64 l
  Preservative Wood Treatment; feedstock
- Diesel, combusted in industrial equipment: 2.048 l
  Preservative Wood Treatment
- Residual fuel oil, combusted in industrial boiler: 0.197 l
  Preservative Production
- Electricity, at Grid, SERC, 2008: 19.35 kWh
  Preservative Wood Treatment
- Wood waste, unspecified, combusted in industrial boiler: 36.7 kg
  Preservative Wood Treatment
- CUTOFF Disposal, solid waste, unspecified, to unspecified landfill: 3.749 kg
  Preservative Wood Treatment;
  Solid waste disposal associated with the coal mining and coal distillation by product processing. Solid waste disposal as reported in treater surveys as other (normal trash or municipal waste). Other waste disposal—Amount of normal trash or municipal waste that is typically collected in trash cans or dumpsters.
- Electricity, at Grid, SERC, 2008: 12.5 kWh
  Preservative Production
- CUTOFF Creosote, at plant: 281.1 kg
  Preservative Wood Treatment
- Railroad tie, hardwood, rough, green, at sawmill, SE: 563.64 kg
  Preservative Wood Production;
  Untreated Railroad ties, surrogate for SE hardwood lumber;
  65,794 lb/MCF, 65.794 lb/cuft = 1054 kg/m3 green weight @ 87% MC.
  Oven dry weight = 563.6364 kg/m3. MEP Hdwd worksheet Column H, Row 35. Actual green weight input is at 76% 992.00 kg/m3

## Inputs from nature
- Water, process, unspecified natural origin/m3: 0.164 m3
  Preservative Wood Treatment

## Emissions to nature
- Hydrogen chloride: 0.000118 kg
  Preservative Production
- Hydrogen fluoride: 2.56e-6 kg
  Preservative Production
- Carbon monoxide: 0.16 kg
  Preservative Production
- Particulates, < 10 um: 0.0212 kg
  Preservative Production
- Nitrogen oxides: 0.098 kg
  Preservative Production
- Creosote: 0.126, 0.000239 kg (2 entries, compartments not in this file)
  Preservative Wood Treatment
- Ammonia: 0.000987 kg
  Preservative Production
- Carbon dioxide, fossil: 21.1 kg
  Preservative Production
- Sulfur oxides: 0.0422 kg
  Preservative Production
- Sulfur dioxide: 0.00081 kg
  Preservative Production
- Methane: 0.499 kg
  Preservative Production
- VOC, volatile organic compounds: 0.0145 kg
  Preservative Wood Treatment; at kiln; emission from the wood product being dried

## Sampling procedure
Industry survey

## Sources
- Chris Bolin
- Chris Bolin
