# Harvest, switchgrass

Dataset: openLCA process, unit process
Category: Biomass
Geography: RNA
Time period: 2010-01-01 to 2100-12-31
Generated by: Daniel Inman
Published in: Hsu, D.
restrictionsDescription: All information can be accessed by everybody.
copyright: false

## General comment
Estimate from standard forage harvesting processes in the US. This process accounts for the harvest and baling of switchgrass from one hectare of land. Processes include cutting and windrowing (aka swathing), tedding-which turns the windrows for proper drying, and baling. Moving, loading, and storing bales is not included.

## Technology
modern

## Geography
North America

## Time period
2010 and after

## Reference product
- Harvest, switchgrass: 1 ha
  This is one ha of baling

## Inputs from technosphere
- CUTOFF Baling: 1 ha
- CUTOFF Haying, by rotary tedder: 1 ha
- CUTOFF Swath, by rotary windrower: 1 ha

## Sources
- Hsu, D.
- Hess, J. R.
