# Electricity, at Grid, ASCC, 2008

Dataset: openLCA process, unit process
Category: Utilities
Geography: RNA
Time period: 2008-01-01 to 2008-01-01
Generated by: Alberta Carpenter
Published in: Chris Goemans, Athena Institute
restrictionsDescription: All information can be accessed by everybody.
copyright: false

## General comment
The methodology used to put together the grid information is outlined in reference 1.

## Technology
Typical

## Geography
Alaska

## Reference product
- Electricity, at Grid, ASCC, 2008: 1 kWh

## Inputs from technosphere
- Electricity, diesel, at power plant: 0.0643081 kWh
  JF – Jet Fuel
- CUTOFF Electricity, biomass,liquid, unspecified, at power plant: 0.000691042 kWh
  OBL – Other Biomass Liquid (Ethanol, Fish Oil, Liquid Acetonitrile Waste, Medical Waste, Tall Oil, Waste Alcohol, and other Biomass not specified)
- CUTOFF Electricity, at wind power plant, unspecified: 1.00371e-5 kWh
  WND – Wind
- Electricity, diesel, at power plant: 0.0613402 kWh
  DFO – Distillate Fuel Oil (includes all Diesel and No. 1, No. 2, and No. 4 Fuel Oils)
- CUTOFF Electricity, hydropower, at power plant, unspecified: 0.172964 kWh
  WAT – Water (Conventional, Pumped Storage)
- Electricity, residual fuel oil, at power plant: 0.0186969 kWh
  RFO – Residual Fuel Oil (includes No. 5 and No. 6 Fuel Oils and Bunker C Fuel Oil)
- Electricity, natural gas, at power plant: 0.590785 kWh
  NG – Natural Gas
- Electricity, bituminous coal, at power plant: 0.0912047 kWh
  SUB – Subbituminous Coal

## Sampling procedure
based on EIA electricity reports for all power plants in the US.

## Sources
- Chris Goemans, Athena Institute
- unspecified
- USEPA
- Statistics Canada
- Statistics Canada
- Statistics Canada
- Statistics Canada
- Statistics Canada
- Statistics Canada
- USEPA
- EIA
- EIA
- EIA
- EIA
- EIA
- EIA
- EIA
- EIA
- EIA
- EIA
- EIA
- US DOE
- International Energy Agency
- US DOE
