# Winter wheat straw, production, average, US, 2022

Dataset: openLCA process, unit process
Category: Wheat Farming
Geography: RNA
Time period: 2010-01-01 to 2100-12-31
Generated by: Daniel Inman
Published in: Hsu, D.
restrictionsDescription: All information can be accessed by everybody.
copyright: false

## General comment
Wheat production based on US average yeilds and practices extrapolated from historic data to 2022. Includes all crop production processes from field preperation to crop maturity. Infrastructure, maintenance, and construction of faciilities and equipment is included. Harvest and storage is not included. Grain and components are assumed to be at field-dry conditions of 15% moisture.

Multiple output process

Process has been reviewed by Dr. Dwayne Westfall, Dept Soil and Crop Sciences, Colorado State University. Date of review Sept 10 - 30 2008. Data from NASS where available. Projections based on historic data. Extrapolation of historic data to 2022 estimates. mass based between straw and grain. Biomass Production: 12/08\Incremental Allocation

## Technology
Future technology

## Geography
North America

## Time period
2010 and after

## Reference product
- Winter wheat straw, production, average, US, 2022: 1040 kg

## Inputs from technosphere
- Fertilizer, winter wheat straw, 2022: 1 ha
  Fertilizer data from Data from: USDA NASS. 2007.
  Agricultural Chemical Usage 2006 Field Crops Summary: revision. Page 57.
- Harvest, wheat, single pass: 0.32 ha
  Single pass harvest is scaled up to account for increased material flow. 1.46 ha = 1 ha single pass. The .46 is attributable to straw

## Inputs from nature
- Carbon dioxide, in air: 1470 kg
  Wheat straw is 46% carbon dry weight basis, adjusted to 15% moisture. Data from: Phyllis database available online: http://www.ecn.nl/phyllis/dataTable.asp
  Verified 10/14/08
- Energy, from biomass: 15600 MJ
  LHV for wheat straw. Data from the Phyllis database http://www.ecn.nl/phyllis/ Verified 9/28/08.

## Sources
- Hsu, D.
- ECN, Phyllis
- USDA
- Hess, J. R.
- J.E. Sawyer
- NASS
- Graham, R. L.
- NASS
- NASS
