# Pesticide, Switchgrass

Dataset: openLCA process, unit process
Category: Biomass
Geography: RNA
Time period: 2010-01-01 to 2100-12-31
Generated by: Daniel Inman
Published in: Hsu, D.
restrictionsDescription: All information can be accessed by everybody.
copyright: false

## General comment
Application of pesticides (herbicides and insecticides) to one hectare of switchgrass. Data are based on Perrin et al 2008

## Technology
modern

## Geography
North America

## Time period
2010 and after

## Reference product
- Pesticide, Switchgrass: 1 ha
  Assuming pesticides applied via sprayer each Year

## Inputs from technosphere
- CUTOFF Application of plant protection products, by field sprayer: 1 ha
- Transport, combination truck, diesel powered: 0.266 t*km
  transport to field of 2-4-D
- CUTOFF 2,4-D, at regional storehouse: 0.5 kg
  Assuming 2,4-D is applied annually to help control broad leaf weeds. (Perrin et al, 2008)

## Emissions to nature
- 2,4-D: 0.5 kg
  Assuming 2,4-D is applied annually to help control broad leaf weeds. (Perrin et al, 2008)

## Sources
- Hsu, D.
- Downs, H. W.
- Cassler, M. D
