# Fuel grade uranium, at regional storage

Dataset: openLCA process, unit process
Category: Uranium-Radium-Vanadium Ore Mining
Geography: RNA
Time period: 1981-01-01 to 2002-01-01
Generated by: Franklin Associates
Published in: Franklin Associates
restrictionsDescription: All information can be accessed by everybody.
copyright: false

## General comment
Important note: although most of the data in the US LCI database has
undergone some sort of review, the database as a whole has not yet
undergone a formal validation process.
Please email comments to lci@nrel.gov.

## Technology
Represents the front-end of the nuclear fuel cycle (from uranium mining through UO2 fuel fabrication). Uranium mining technologies are weighted by market shares of conventional and solution mining methods. Uranium enrichment is performed by gaseous diffusion.

## Geography
United States

## Reference product
- Fuel grade uranium, at regional storage: 1 kg

## Inputs from technosphere
- Transport, combination truck, diesel powered: 27.9 t*km
- Natural gas, combusted in industrial boiler: 184 m3
- Transport, ocean freighter, diesel powered: 7.89 t*km
- Diesel, combusted in industrial boiler: 20.6 l
- Residual fuel oil, combusted in industrial boiler: 0.111 l
- Transport, ocean freighter, residual fuel oil powered: 71 t*km
- Electricity, at grid, US, 2000: 4080 kWh
- Bituminous coal, combusted in industrial boiler: 22.7 kg

## Inputs from nature
- Uranium oxide (U3O8), 332 GJ per kg, in ore: 10.9 kg

## Emissions to nature
- Kerosene: 0.277 kg
- Carbon dioxide, fossil: 29.4 kg
- Ammonium, ion: 0.124 kg
- Suspended solids, unspecified: 7.66 kg
- Ammonia: 0.167, 0.108 kg (2 entries, compartments not in this file)
- Sulfur dioxide: 49.7 kg
- Iron: 7.35 kg
- Fluoride: 2.01, 0.013 kg (2 entries, compartments not in this file)
- Mercury: 0.00016 kg
- Sulfate: 250 kg
- Organic acids: 0.00212 kg
- Chloride: 0.797 kg
- Lead: 0.0159 kg
- Cadmium, ion: 0.00189 kg
- Sulfur oxides: 0.0177 kg
- Selenium: 0.0433 kg
- Nitrogen oxides: 13.8 kg
- Aldehydes: 0.00212 kg
- Particulates, unspecified: 16.9 kg
- Calcium, ion: 0.0768 kg
- Arsenic, ion: 0.00377 kg
- Aluminum: 4.54 kg
- Radionuclides (Including Radon): 15.5 kg
- Manganese: 1.39 kg
- Carbon monoxide, fossil: 0.466 kg
- Sodium, ion: 0.358 kg
- Zinc: 0.193 kg
- Nitrogen, total: 0.308 kg
- Copper, ion: 0.114 kg
- Radioactive species, Nuclides, unspecified: 18000 kBq
- Hydrocarbons, unspecified: 3.34 kg
- Ammonium chloride: 0.578 kg

## Sampling procedure
Data on different elementary flows come from different sources

## Sources
- Franklin Associates
- M.A. DeLuchi
- Oak Ridge National Laboratory
- U.S. Department of Commerce
- U.S. Department of Energy
- U.S. Energy Information Administration
- unspecified
