# Lost foam casting, aluminum

Dataset: openLCA process, unit process
Category: Aluminum Foundries (except Die-Casting)
Geography: RNA
Time period: 1996-01-01 to 1996-01-01
Generated by: James Littlefield
Published in: Vehicle Recycling Partnership (VRP)
restrictionsDescription: All information can be accessed by everybody.
copyright: false

## General comment
No co-product allocation for scrap materials that are recycled or reused; all environmental flows for scrap are included in the environmental flows for the product.
Important note: although most of the data in the US LCI database has
undergone some sort of review, the database as a whole has not yet
undergone a formal validation process.
Please email comments to lci@nrel.gov.

## Technology
representative of lost foam aluminum casting technology.

## Geography
USA

## Reference product
- Aluminum, cast, lost foam, at plant: 1 kg

## By-products
- Alumimum scrap, at lost foam casting: 0.398 kg
  Composition by weight: 28% aluminum, 12% shotblast (urea and acrylic), 0.6% expandable polystyrene, 59% sand/sand fines.

## Inputs from technosphere
- CUTOFF Zinc stearate, at plant: 3e-5 kg
- CUTOFF Aluminum, liquid, at plant: 1.11 kg
- CUTOFF Expandable polystyrene, at plant: 0.0153 kg
  consists of 90-95% polystyrene and 5-10% blowing agent
- CUTOFF Plasticshot, polyurea formaldehyde, at plant: 0.0347 kg
- CUTOFF Argon, liquid, at plant: 0.0047 kg
- CUTOFF Plastic baggies, low density polyethylene, at plant: 9e-5 kg
- CUTOFF Water, at user: 0.184 kg
- Natural gas, combusted in industrial boiler: 0.409 m3
- CUTOFF Plasticshot, polymethylmethacrylate, at plant: 0.015 kg
- CUTOFF Disposal, solid waste, unspecified, to sanitary landfill: 0.0139 kg
- Electricity, at grid, US, 2000: 1.9 kWh
- CUTOFF Refractory material, unspecified, at plant: 0.0643 kg
- CUTOFF Glue, at plant: 0.00032 kg
- CUTOFF Water, process, deionized: 1.26 kg

## Inputs from nature
- Water, process: 0.000233 m3
  Includes measured process emissions. Does not include fuel emissions.
- Sand, quartz: 0.235 kg

## Emissions to nature
- Suspended solids, unspecified: 0.000233 kg
- Particulates, unspecified: 9.4e-5 kg
  Measured values after abatement which includes both process and on-site fuel emissions.
- Sulfur oxides: 5e-6 kg
  Measured values after abatement which includes both process and on-site fuel emissions.
- Phenol: 3.01e-6 kg
  Includes measured process emissions. Does not include fuel emissions.
- Oils, unspecified: 0.000462 kg
  Includes measured process emissions. Does not include fuel emissions.
- NMVOC, non-methane volatile organic compounds: 0.00154 kg
  Measured values after abatement which includes both process and on-site fuel emissions.
- Carbon dioxide: 0.899 kg
  Measured values after abatement which includes both process and on-site fuel emissions.
- Carbon monoxide: 0.000897 kg
  Measured values after abatement which includes both process and on-site fuel emissions.
- Nitrogen oxides: 0.000945 kg
  Measured values after abatement which includes both process and on-site fuel emissions.
- BOD5, Biological Oxygen Demand: 0.000866 kg
  Includes measured process emissions. Does not include fuel emissions.
- Nitrogen oxides: 4.21e-5 kg
  Includes measured process emissions. Does not include fuel emissions.

## Sources
- Vehicle Recycling Partnership (VRP)
