# Palm kernels, at plant

Dataset: openLCA process, unit process
Category: Oilseed (except Soybean) Farming
Geography: RNA
Time period: 1985-01-01 to 1991-01-01
Generated by: Franklin Associates
Published in: THE PLASTICS DIVISION OF THE AMERICAN C
restrictionsDescription: All information can be accessed by everybody.
copyright: false

## General comment
Bunch ash, crude palm oil, and shells used in road construction have been treated as coproducts, for which credit has been given on a mass basis. Mass imbalance is due to unavailability of the weight of empty fruit bunches sent to incineration. Complete inventory data and metadata are available in full in the final report and appendices, Cradle-to-Gate Life Cycle Inventory of Nine Plastic Resins and Four Polyurethane Precursors. This report has been extensively reviewed within Franklin Associates and has undergone partial critical review by ACC Plastics Division members and is available at: www.americanchemistry.com. Quantities may vary slightly between the reference to main source and and this module due to rounding. Important note: although most of the data in the US LCI database has undergone some sort of review, the database as a whole has not yet undergone a formal validation process. Please email comments to lci@nrel.gov.

## Technology
Stem sterilization, and incineration of fresh fruit bunches followed by mechanical processing, and centrifuge separation

## Geography
Maylasia

## Reference product
- Palm kernels, at plant: 1 kg

## Inputs from technosphere
- CUTOFF Disposal, solid waste, unspecified, to sanitary landfill: 0.0197 kg
- Wood waste, unspecified, combusted in industrial boiler: 1.4 kg
- Transport, single unit truck, diesel powered: 0.0604147 t*km
- Harvesting, fresh fruit bunch, at farm: 2.98 kg

## Emissions to nature
- Dissolved solids: 0.00507 kg
- NMVOC, non-methane volatile organic compounds, unspecified: 0.00052 kg
- Sulfur oxides: 0.00105 kg
- Oil and grease, unspecified: 4.8e-5 kg
- BOD5, Biological Oxygen Demand: 0.00018 kg
- Carbon monoxide: 0.00011 kg
- Methane: 0.02297 kg
- COD, Chemical Oxygen Demand: 0.00163 kg
- Odorous sulfur, unspecified: 0.00015 kg
- Nitrogen: 9.7e-5 kg
- Suspended solids, unspecified: 0.00073 kg
- Particulates, unspecified: 0.003 kg
- Nitrogen oxides: 0.00027 kg
- Carbon dioxide, biogenic: 0.631 kg

## Sampling procedure
Data are from secondary sources.

## Sources
- THE PLASTICS DIVISION OF THE AMERICAN C
