# Electricity, at eGrid, AKGD, 2008

Dataset: openLCA process, unit process
Category: Utilities
Geography: RNA
Time period: 2008-01-01 to 2008-01-01
Generated by: Alberta Carpenter
Published in: Chris Goemans, Athena Institute
restrictionsDescription: All information can be accessed by everybody.
copyright: false

## General comment
The methodology used to put together the grid information is outlined in reference 1.

## Technology
Typical

## Geography
Alaska

## Reference product
- Electricity, at eGrid, AKGD, 2008: 1 kWh

## Inputs from technosphere
- CUTOFF Electricity, hydropower, at power plant, unspecified: 0.0661184 kWh
- Electricity, natural gas, at power plant: 0.72382 kWh
- Electricity, residual fuel oil, at power plant: 0.0231839 kWh
  Petroleum (RFO) - Residual Fuel Oil (includes No. 5 and No. 6 Fuel Oils and Bunker C Fuel Oil)
- Electricity, bituminous coal, at power plant: 0.113093 kWh
  subbituminous coal
- Electricity, diesel, at power plant: 0.0708949 kWh
  Petroleum (DFO) JF - Jet fuel
- Electricity, diesel, at power plant: 0.00289028 kWh
  Petroleum (DFO) - Distillate Fuel Oil (includes all Diesel and No. 1, No. 2, and No. 4 Fuel Oils)

## Sampling procedure
based on EIA electricity reports for all power plants in the US.

## Sources
- Chris Goemans, Athena Institute
- unspecified
- USEPA
- Statistics Canada
- Statistics Canada
- Statistics Canada
- Statistics Canada
- Statistics Canada
- Statistics Canada
- USEPA
- EIA
- EIA
- EIA
- EIA
- EIA
- EIA
- EIA
- EIA
- EIA
- EIA
- EIA
- US DOE
- International Energy Agency
- US DOE
