# Semi-permanent mold (SPM) casting, aluminum

Dataset: openLCA process, unit process
Category: Aluminum Foundries (except Die-Casting)
Geography: RNA
Time period: 1996-01-01 to 2001-01-01
Generated by: James Littlefield
Published in: Vehicle Recycling Parnership (VRP)
restrictionsDescription: All information can be accessed by everybody.
copyright: false

## General comment
No co-product allocation for scrap materials; all environmental flows for scrap are included in the environmental flows for the product. A percent difference is calculated in cases when 2 plants reported the same data point; the percent difference is calculated by dividing the difference between the 2 plants by the average of the 2 plants.
Important note: although most of the data in the US LCI database has
undergone some sort of review, the database as a whole has not yet
undergone a formal validation process.
Please email comments to lci@nrel.gov.

## Technology
representative of current SPM casting technologies

## Geography
United States

## Reference product
- Aluminum, cast, semi-permanent mold (SPM), at plant: 1 kg
  Average of 2 plants

## By-products
- Aluminum scrap, at semi-permanent mold casting: 0.669 kg
  Average of 2 plants. Composition by weight: 56% salt, 32% sand, 4% aluminum dross/scrap/flashing/chips, 5% irony offal, 3% pallets/dust/cardboard.
- Byproduct of aluminum casting, SPM, liquid residuals: 0.0168 kg
  Average of 2 plants. Composition by weight: 74% oily water and 25% sulfuric acid/amines.

## Inputs from technosphere
- CUTOFF Disposal, solid waste, unspecified, to sanitary landfill: 0.661 kg
  Average of 2 plants.
- CUTOFF Carbon dioxide, liquid, at plant: 0.013 kg
  Average of 2 plants. There's a 134% difference between the 2 plants. Carbon dioxide is used to clean molds.
- CUTOFF Hydraulic fluid, at plant: 0.0035 kg
  Represents 1 plant.
- CUTOFF TEA-DMEA (trimethyl amine, dimethylamine), at plant: 0.00381 kg
  Average of 2 plants. There's an 11% difference between the 2 plants.
- CUTOFF Flux, at plant: 0.225 kg
  Represents 1 plant. Flux is comprised of KCl, NaCl, various carbonates, silicas, and oxides.
- CUTOFF Disposal, liquid wastes, unspecified, to sanitary landfill: 0.0002 kg
  Average of 2 plants.
- Natural gas, combusted in industrial boiler: 0.917 m3
  Average of 2 plants. There's a 37% difference between the 2 plants. In this case, one plant is higher for both natural gas and electricity consumption.
- CUTOFF Cleaning blast, at plant: 0.0032 kg
  Represents 1 plant. Includes glass oxide and chemicals for removing flash.
- Quicklime, at plant: 0.0083 kg
  Represents 1 plant. Lime is used to clean emissions from rotaries.
- CUTOFF Nitrogen, at plant: 0.0382 kg
  Average of 2 plants. There's an 80% difference between the 2 plants. Nitrogen is used to de-gas and cover.
- CUTOFF Sulfuric acid, at plant: 0.00151 kg
  Average of 2 plants. There's a 15% difference between the 2 plants. Sulfuric acid is used for TEA gas abatement system.
- CUTOFF Release agent, unspecified, at plant: 0.0005 kg
  Represents 1 plant. Release agent is 59% silicates and 39% water.
- CUTOFF Isocyanate resin, at plant: 0.0177 kg
  Average of 2 plants. There's an 8% difference between the 2 plants. Resin system is A and B stage: isocyanate and phenolic.
- Oxygen, liquid, at plant: 0.257 kg
  Represents 1 plant. Oxygen combustion in rotaries.
- CUTOFF Core coating for aluminum casting: 0.00037 kg
  Represents 1 plant.
- CUTOFF Oil, at plant: 0.0031 kg
  Represents 1 plant. Includes mostly paraffinic petroleum distallates; these fluids are used as lubrication oils, greases, and lubricating sprays.
- Aluminum ingot, production mix, at plant: 1.09 kg
  This is the average of total aluminum inputs for 2 plants. There's a 13% difference between the 2 plants. Aluminum ingot includes a combination of 319 and 356 alloys. Weight of ingot includes alloying materials.
- Electricity, at grid, US, 2000: 1.92 kWh
  Average of 2 plants. There's a 36% difference between the 2 plants. In this case, one plant is higher for both natural gas and electricity consumption.

## Inputs from nature
- Sand, quartz: 0.825 kg
  Average of 2 plants. There's a 108% difference between the 2 plants.
- Water: 0.00456 m3
  Average of 2 plants. There's a 77% difference between the 2 plants.

## Emissions to nature
- Carbon dioxide: 1.12 kg
  Represents 1 plant. Measured values after abatement which includes both process and on-site fuel emissions.
- Carbon monoxide: 0.00016 kg
  (same comment as for Carbon dioxide)
- Aluminum, fume or dust: 1.5e-5 kg
  Represents 1 plant. Based on published emission factors for process emissions.
- Copper compounds: 5.75e-6 kg
  Represents 1 plant. Based on published emission factors for process emissions.
- Aluminum: 3.62e-6 kg
  Represents 1 plant. Measured process emissions.
- Adipate, bis(1-ethylhexyl)-: 1.59e-5 kg
  Represents 1 plant. Based on published emission factors for process emissions.
- Dioxins, measured as 2,3,7,8-tetrachlorodibenzo-p-dioxin: 4e-6 kg
  Represents 1 plant. Based on published emission factors for process emissions.
- Triethyl amine: 3.63e-5 kg
  Represents 1 plant. Based on published emission factors for process emissions.
- Copper, ion: 4.82e-8 kg
  Represents 1 plant. Measured process emissions.
- NMVOC, non-methane volatile organic compounds, unspecified origin: 0.00434 kg
  (same comment as for Carbon dioxide)
- Suspended solids, unspecified: 9.65e-5 kg
  Represents 1 plant. Measured process emissions.
- Particulates, unspecified: 0.0141 kg
  (same comment as for Carbon dioxide)
- BOD5, Biological Oxygen Demand: 4.48e-5 kg
  Represents 1 plant. Measured process emissions.
- Phosphate: 3.62e-7 kg
  Represents 1 plant. Measured process emissions.
- Manganese compounds, unspecified: 5e-7 kg
  Represents 1 plant. Based on published emission factors for process emissions.
- Sulfur oxides: 2e-5 kg
  (same comment as for Carbon dioxide)
- Zinc: 4.48e-7 kg
  Represents 1 plant. Measured process emissions.
- Zinc compounds: 1e-6 kg
  Represents 1 plant. Based on published emission factors for process emissions.
- Oils, unspecified: 8.61e-6 kg
  Represents 1 plant. Measured process emissions.
- Phenol: 3.44e-8 kg
  Represents 1 plant. Measured process emissions.
- Nitrogen oxides: 0.00066 kg
  (same comment as for Carbon dioxide)
- Phenol: 1e-6 kg
  Represents 1 plant. Based on published emission factors for process emissions.
- Chromium: 1.21e-8 kg
  Represents 1 plant. Measured process emissions.

## Sources
- Vehicle Recycling Parnership (VRP)
