# Green veneer processing, at plywood plant, US PNW

Dataset: openLCA process, unit process
Category: Softwood Veneer and Plywood Manufacturing
Geography: RNA
Time period: 2000-01-01 to 2000-01-01
Generated by: Jamie Meil
Published in: Eric T. Sackimoto
restrictionsDescription: All information can be accessed by everybody.
copyright: true

## General comment
Base process data presented with allocations to within process co-products noted. Refer to allocation worksheet for specifics. All allocations performed using mass or volume., coproducts include pulp chips, peeler core and green veneer sold
Important note: although most of the data in the US LCI database has
undergone some sort of review, the database as a whole has not yet
undergone a formal validation process.
Please email comments to lci@nrel.gov.

## Technology
typical

## Geography
US Pacific North West

## Reference product
- Green veneer, at plywood plant, US PNW: 1 kg

## By-products
- Peeler core, from green veneer production at plywood plant, US PNW: 0.076 kg
- Pulp chips, from green veneer production at plywood plant, US PNW: 0.34 kg
- Green veneer, sold, at plywood plant, US PNW: 0.0128 kg

## Inputs from technosphere
- Diesel, combusted in industrial boiler: 0.00101 l
- Electricity, at grid, Western US, 2000: 0.0431 kWh
- Conditioned log, at plywood plant, US PNW: 1.43 kg
- Liquefied petroleum gas, combusted in industrial boiler: 0.000453 l

## Emissions to nature
- Particulates, unspecified: 1.05e-5 kg

## Sources
- Leonard R. Johnson
- Eric T. Sackimoto
- Maureen Puetmann
