# Compression molding, rigid composites part, at plant

Dataset: openLCA process, unit process
Category: Plastics Product Manufacturing
Geography: US
Time period: 2011-01-01 to 2012-01-01
Generated by: Franklin Associates
Published in: American Composites Manufacturers Assn.
restrictionsDescription: All information can be accessed by everybody.
copyright: false

## General comment
For each kilogram of composite part fabrication, the amount of incoming corrugated box material is equivalent to that coming out of the process as it is purchased to be used as shipping packaging. An average of 0.0014 kg of rigid composite part scrap is produced for every kilogram of compression molded parts produced; this scrap is sold for recycling. The packaging inputs in this data set represent the average reported per kilogram of output across a range of products produced at manufacturing facilities. Because the solid wastes shown are of unknown types, these could include food wastes, office wastes, or packaging wastes from incoming tools/materials. The data providers could not expound on the source of these solid wastes. The difference in the mass balance likely lays here. Complete inventory data and metadata are shown in full in the final report, Life Cycle Inventory of Polymer Composites. The report is not publicly available. This report has been extensively reviewed within Franklin Associates by Rebe Feraldi, Anne Marie Molen, and Melissa Huff and has undergone partial critical review by ACMA members. Important note: although most of the data in the US LCI database has undergone some sort of review, the database as a whole has not yet undergone a formal validation process. Please email comments to lci@nrel.gov.

## Technology
Fabrication of rigid composite parts by compression molding.

## Geography
US

## Reference product
- Compression molding, rigid composites part, at plant: 1 kg

## By-products
- Composite scrap, from composites compression molding, at plant: 0.0014 kg
- Corrugate packaging, from compression molding, for shipping: 0.027 kg

## Inputs from technosphere
All rows: lognormal geomSd 1
- CUTOFF Disposal, solid waste, unspecified, to sanitary landfill: 0.09 kg
- CUTOFF Mold-release agent, at plant: 0.014 kg
- CUTOFF Disposal, solid waste, unspecified, to waste-to-energy: 0.0014 kg
- Unsaturated polyester, resin, at plant: 0.17 kg
- CUTOFF Pigment, at plant: 0.0081 kg
- Ethylbenzene styrene, at plant: 0.034 kg
- Electricity, at Grid, US, 2010: 1.59 kWh
- CUTOFF Disposal, solid waste, unspecified, to municipal incineration: 0.0029 kg
- CUTOFF Converted corrugated box, with average bleaching, at plant: 0.027 kg
- Liquefied petroleum gas, combusted in industrial boiler: 0.0027 m3
- Transport, combination truck, diesel powered: 1.21 t*km
- CUTOFF Aluminum hydroxide, at plant: 0.24 kg
- Transport, ocean freighter, average fuel mix: 1.07 t*km
- Diesel, combusted in industrial equipment: 0.00024 l
- CUTOFF In-mold coating, styrene-based, at plant: 0.0087 kg
- CUTOFF Additive, low-profile, at plant: 0.019 kg
- Natural gas, combusted in industrial boiler: 0.0079 m3
- Limestone, at mine: 0.22 kg
- CUTOFF Co-resin, UPR and styrene-based, at plant: 0.015 kg
- CUTOFF Initiator, MEKP, at plant: 0.0085 kg
- CUTOFF Thickener, at plant: 0.011 kg
- E-glass, at plant: 0.28 kg

## Inputs from nature
- Water, process, unspecified natural origin/m3: 0.00045 m3; lognormal geomSd 1

## Emissions to nature
All rows: lognormal geomSd 1
- Styrene: 0.0022 kg
- Nitrogen: 0.0058 kg
- Nitrogen oxides: 0.00021 kg
- Sulfur oxides: 1.1e-6 kg
- VOC, volatile organic compounds: 0.00039 kg
- Oxygen, in air: 0.00037 kg
- Ammonia: 2.6e-6 kg
- Particulates, unspecified: 9.4e-5 kg
- Carbon dioxide, fossil: 9.4e-5 kg

## Sampling procedure
Data are from primary sources. The composites fabricators who provided data for this module verified that the characteristics of their plants are representative of US composites fabrication facilities producing compression molded composite parts. The representativeness of the composites fabrication processes are unknown, but estimated to be less than 10% of the US production volume.

## Sources
- American Composites Manufacturers Assn.
