# Reforesting, average state or private moist cold softwood forest, INW

Dataset: openLCA process, unit process
Category: Logging
Geography: RNA
Time period: 1989-01-01 to 1996-01-01
Generated by: Maureen Puetmann
Published in: Leonard R. Johnson
restrictionsDescription: All information can be accessed by everybody.
copyright: false

## General comment
Important note: although most of the data in the US LCI database has undergone some sort of review, the database as a whole has not yet undergone a formal validation process. Please email comments to lci@nrel.gov.

## Technology
Average technology. Some data extrapolated from similar processes.

## Geography
US Inland West including Montana, Idaho, and eastern Washington

## Reference product
- Reforesting, average state or private moist cold softwood forest, INW: 1 ha

## Inputs from technosphere
- Greenhouse seedling, softwood, INW: 865 Item(s)
- Gasoline, combusted in equipment: 11.11 l
  Used for precommercial thinning operations
- Gasoline, combusted in equipment: 4.85 l
  For crew transportation only - actual planting is manual

## Sampling procedure
Region specific data on the level of resource consumption during stand establishment is limited. Estimates for these values were developed using a limited set of published data and through direct inquiries of forest nursery managers.
Cost and fuel consumption factors were developed as a rate per seedling and were then multiplied by the number of planted seedlings per unit area (hectare or acre) to determine costs and fuel consumption rates per unit area.

## Sources
- Maureen Puettmann
- Leonard R. Johnson
