# Petroleum refining, for olefins production, at plant

Dataset: openLCA process, unit process
Category: Petrochemical Manufacturing
Geography: RNA
Time period: 2003-01-01 to 2003-01-01
Generated by: Franklin Associates
Published in: THE PLASTICS DIVISION OF THE AMERICAN C
restrictionsDescription: All information can be accessed by everybody.
copyright: false

## General comment
This module expresses data on the basis 1 kilogram of general refinery product as well as data allocated to specific refinery products. The data are allocated to specific refinery products based on the percent by mass of each product in the refinery output. Refinery products include gasoline, distillate/diesel oil, LPG, residual oil, kerosene/jet fuel, and other (still gas, petroleum, coke, asphalt, and petrochemical feedstocks). Complete inventory data and metadata are available in full in the final report and appendices, Cradle-to-Gate Life Cycle Inventory of Nine Plastic Resins and Four Polyurethane Precursors. This report has been extensively reviewed within Franklin Associates and has undergone partial critical review by ACC Plastics Division members and is available at: www.americanchemistry.com. Quantities may vary slightly between the reference to main source and and this module due to rounding. Important note: although most of the data in the US LCI database has undergone some sort of review, the database as a whole has not yet undergone a formal validation process. Please email comments to lci@nrel.gov.

## Technology
Desalting, atmospheric distillation, vacuum distillation, and hydrotreating

## Geography
US

## Reference product
- Petroleum refining, for olefins production, at plant: 1 kg

## Inputs from technosphere
- Electricity, at grid, US, 2008: 0.143 kWh
- CUTOFF Disposal, solid waste, unspecified, to sanitary landfill: 0.00560421 kg
- Transport, barge, residual fuel oil powered: 0.000958092 t*km
  Values for barge transport are calculated based on average fuel consumption rates as reported in Transportation Energy Data Book: Edition 22 from Oak Ridge National Laboratory, September 2002: 22% of barges use diesel fuel in their engines, 78% use residual oil to generate steam for steam turbines, and a barge that consumes residual oil consumes 3.4 gallons per 1,000 ton-miles
- Transport, barge, diesel powered: 0.000288148 t*km
  (same comment as for Transport, barge, residual fuel oil powered)
- Crude oil, extracted: 1.018 kg
  This weight reflects material loss at processing. INTERNAL OFFGAS USE.
- Transport, ocean freighter, residual fuel oil powered: 4.4089 t*km
  Values for ocean freighter transport are calculated based on average fuel consumption rates as determined from a personal communication with Rich Sonnenschein, U.S. Department of Transportation, Maritime Administration in February 2004: 10% of ocean freighters use diesel fuel, 90% use residual fuel, and a freighter that consumes residual fuel consumes 1.9 gallons per 1,000 ton-miles
- Transport, ocean freighter, diesel powered: 0.489877 t*km
  (same comment as for Transport, ocean freighter, residual fuel oil powered)
- Transport, pipeline, unspecified petroleum products: 0.652171 t*km
- Liquefied petroleum gas, combusted in industrial boiler: 0.00114923 l
- Residual fuel oil, combusted in industrial boiler: 0.0272 l
- Natural gas, combusted in industrial boiler: 0.0111 m3

## Emissions to nature
- Benzene: 1.1e-6 kg
- Lead: 9.8e-10 kg
- Methane, fossil: 7.1e-5 kg
- Polycyclic organic matter, unspecified: 5.6e-8 kg
- Phenol: 2.3e-7 kg
- Methane, tetrachloro-, CFC-10: 1.2e-11 kg
- NMVOC, non-methane volatile organic compounds, unspecified origin: 0.002 kg
- Oils, unspecified: 1.1e-5 kg
- Mercury: 6e-11 kg
- Sulfide: 1.9e-7 kg
- Ammonia: 1.5e-5, 2.1e-5 kg (2 entries, compartments not in this file)
- Particulates, < 2.5 um: 0.00024 kg
- Antimony: 2.04e-9 kg
- COD, Chemical Oxygen Demand: 0.00023 kg
- Chromium: 6.76e-10, 3e-9 kg (2 entries, compartments not in this file)
- Suspended solids, unspecified: 2.8e-5 kg
- Selenium: 1.6e-9 kg
- Ethylene dibromide: 4.3e-9 kg
- Particulates, < 10 um: 0.0024 kg
- Sulfur oxides: 0.0024 kg
- BOD5, Biological Oxygen Demand: 3.4e-5 kg
- Carbon monoxide: 0.013 kg
- Methane, chlorotrifluoro-, CFC-13: 2.2e-8 kg
- Nitrogen oxides: 0.00033 kg
- Carbon dioxide, fossil: 0.00025 kg
- Nickel: 5.75e-9 kg
- Arsenic: 2.57e-10 kg
- Vanadium: 5.4e-8 kg

## Sampling procedure
Data collected from secondary sources.

## Sources
- THE PLASTICS DIVISION OF THE AMERICAN C
