# Automotive painting, pretreatment

Dataset: openLCA process, unit process
Category: Motor Vehicle Body Manufacturing
Geography: RNA
Time period: 2000-01-01 to 2004-01-01
Generated by: James Littlefield, Franklin Associates
Published in: VRP (Vehicle Recycling Partnership)
restrictionsDescription: All information can be accessed by everybody.
copyright: false

## General comment
Square meters of pretreated automotive body is functional unit.,
Important note: although most of the data in the US LCI database has
undergone some sort of review, the database as a whole has not yet
undergone a formal validation process.
Please email comments to lci@nrel.gov.

## Technology
state-of-the art painting booth

## Geography
North America

## Reference product
- Automotive painting, pretreatment: 1 m2

## Inputs from technosphere
- CUTOFF Cleaner alkaline, at plant: 0.00193 kg
- CUTOFF Solution corrosion inhibitor, at plant: 0.00073 kg
- CUTOFF Disposal, sludge, containing nitrate compounds, to sanitary landfill: 7e-8 kg
- CUTOFF Rinse conditioner, at plant: 0.00059 kg
- CUTOFF Biocide, at plant: 0.00022 kg
- CUTOFF Highlighter, at plant: 0.0003 kg
- CUTOFF Disposal, sludge, containing 1-methoxy-2-propanol, to sanitary landfill: 2e-8 kg
- CUTOFF Phosphate anti-corrosion: 0.0105 kg
- CUTOFF Accelerator, at plant: 0.00113 kg
- CUTOFF Disposal, sludge, containing phosphorous, to sanitary landfill: 3.3e-7 kg
- CUTOFF Disposal, sludge, containing manganese compounds, to sanitary landfill: 8.28e-5 kg
- CUTOFF Disposal, packaging-biocide carboys (HDPE), to sanitary landfill: 0.000468 kg
- CUTOFF Disposal, sludge, to sanitary landfill: 0.000613 kg
- CUTOFF Disposal, filters, to sanitary landfill: 2.85e-6, 5e-8, 9.12e-6 kg (3 entries)
- CUTOFF Prewipe, at plant: 0.00286 kg
- CUTOFF Phosphate anti-corrosion makeup: 0.00017 kg
- CUTOFF Disposal, sludge, containing zinc compounds, to sanitary landfill: 0.000132 kg
- Electricity, at grid, US, 2000: 0.105 kWh
- CUTOFF Phosphate anti-corrosion post-rinse: 0.00113 kg
- CUTOFF Body washer, at plant: 0.00225 kg
- CUTOFF Disposal, sludge, containing glycol ethers, to sanitary landfill: 7e-8 kg

## Inputs from nature
- Water: 22.4 l

## Emissions to nature
- Propylene glycol methyl ether: 5.4e-7 kg
- Diethylene glycol: 1.82e-6 kg
- Nitric acid: 4e-7 kg

## Sources
- VRP (Vehicle Recycling Partnership)
- VRP (Vehicle Recycling Partnership)
