# Recycled postconsumer HDPE pellet

Dataset: openLCA process, unit process
Category: Processing postconsumer HDPE to pellet
Geography: RNA
Time period: 2007-01-01 to 2009-01-01
Generated by: Franklin Associates
restrictionsDescription: All information can be accessed by everybody.
copyright: false

## General comment
Important note: although most of the data in the US LCI database has
undergone some sort of review, the database as a whole has not yet
undergone a formal validation process.
Please email comments to lci@nrel.gov.

## Technology
Typical

## Geography
United States

## Reference product
- Recycled postconsumer HDPE pellet: 1 kg
  Depending on the practitioner's choice of methodology, some share of the virgin material burdens for initially producing the plastic may be allocated to the recycled resin.

## Inputs from technosphere
- Diesel, combusted in industrial boiler: 0.00018 l
- Natural gas, combusted in industrial boiler: 0.0077 m3
- CUTOFF Disposal, solid waste, unspecified, to unspecified landfill: 0.066 kg
  Wastes landfilled or incinerated include bale wire trash, labels, PVC in incoming bale, and other materials that become processing wastes or sludges.
- CUTOFF Alkaline cleaner, unspecified: 6e-5 kg
- CUTOFF Wetting agent, unspecified: 0.00057 kg
- Deposit containers, at collection, CRV: 0.046397 kg
  Percentage of postconsumer HDPE collected via California container refund value (CRV) system. Includes wt of contaminants in incoming material.
- Liquefied petroleum gas, combusted in industrial boiler: 0.0011 l
- Transport, combination truck, diesel powered: 0.911123 t*km
  Represents transport of inbound material (HDPE and contaminants).
- CUTOFF Disposal, solid waste, unspecified, to incineration with energy recovery: 0.013 kg
- Mixed recyclables, sorted at MRF: 1.0326 kg
  Includes wt of contaminants in incoming material from MRF.
- CUTOFF Defoamant, unspecified: 0.00152 kg
- CUTOFF Surfactant, unspecified: 0.00077 kg
- Electricity, at grid, US, 2000: 0.49 kWh
- Sodium hydroxide, production mix, at plant: 0.00027 kg
  Pure weight of NaOH for the solution used

## Inputs from nature
- Water, process: 3.91245 l
  Water input to washing

## Emissions to nature
- COD, Chemical Oxygen Demand: 1.5e-6 kg
- Water: 3.46639 l
  Water returned after washing (reflects evaporative losses of water carried out with washed resin and evaporated during drying)
- BOD5, Biological Oxygen Demand: 0.0003 kg
  Unknown how much of the waterborne emissions are from washing chemicals versus material washed off received plastic. These emissions are not included in the material balance.
- Particulates, >10um: 2.3e-5 kg
- Particulates, < 2.5 um: 1.5e-5 kg
- Dissolved solids: 9.1e-6 kg
- Suspended solids, unspecified: 0.00029 kg

## Sources
- THE PLASTICS DIVISION OF THE AMERICAN CH
