# Electricity, at eGrid, FRCC, 2008

Dataset: openLCA process, unit process
Category: Utilities
Geography: RNA
Time period: 2008-01-01 to 2008-01-01
Generated by: Alberta Carpenter
Published in: Chris Goemans, Athena Institute
restrictionsDescription: All information can be accessed by everybody.
copyright: false

## General comment
The methodology used to put together the grid information is outlined in reference 1.

## Technology
Typical

## Geography
Florida except for the panhandle (SRSO).

## Reference product
- Electricity, at eGrid, FRCC, 2008: 1 kWh

## Inputs from technosphere
- CUTOFF Electricity, biomass, gas, unspecified, at power plant: 0.000210702 kWh
  Gaseous Renewable Fuels (Biomass) OBG - Other Biomass Gases (Digester Gas, Methane, and other biomass gases)
- CUTOFF Electricity, biomass,liquid, unspecified, at power plant: 0.00348289 kWh
  Liquid Renewable Fuels (Biomass) BLQ - Black liquor
- CUTOFF Electricity, petroleum coke, at power plant: 0.0158028 kWh
  Petroleum (Other Fossil) PC - Petroleum Coke
- CUTOFF Electricity, biomass, solid, biogenic MSW, at power plant: 0.00724951 kWh
  Solid Renewable Fuels (Biomass) MSB - Municipal Solid Waste – Biogenic Component
- Electricity, biomass, at power plant: 0.0035268 kWh
  Solid Renewable Fuels (Biomass) WDS - Wood/Wood Waste Solids (Paper Pellets, Railroad Ties, Utility Poles, Wood Chips, and other wood solids)
- Electricity, nuclear, at power plant: 0.15413 kWh
  Nuclear Fission
- CUTOFF Electricity, tire derived fuel, at power plant: 0.000154671 kWh
  Solid Renewable Fuels (Biomass) TDF - Tires (tire derived fuel)
- CUTOFF Electricity, other fuels, unspecified, at power plant: 0.00556204 kWh
  Other Fuels WH - Waste Heat
- Electricity, residual fuel oil, at power plant: 0.039713 kWh
  Petroleum (RFO) - Residual Fuel Oil (includes No. 5 and No. 6 Fuel Oils and Bunker C Fuel Oil)
- Electricity, bituminous coal, at power plant: 0.272361 kWh
  Bituminous Coal, BIT - Anthracite Coal, and Bituminous Coal
- CUTOFF Electricity, biomass, solid, agriculture by-products, at power plant: 0.00221481 kWh
  Solid Renewable Fuels (Biomass) AB - Agriculture Crop By-products/Straw/Energy Crops
- Electricity, natural gas, at power plant: 0.483109 kWh
  Natural Gas
- CUTOFF Electricity, biomass, gas, landfill, at power plant: 0.000845808 kWh
  Gaseous Renewable Fuels (Biomass) LFG - Landfill Gas
- CUTOFF Electricity, other gases, unspecified, at power plant: 2.9723e-7 kWh
  Other Gases PG - Propane
- Electricity, diesel, at power plant: 0.00182249 kWh
  Petroleum (DFO) - Distillate Fuel Oil (includes all Diesel and No. 1, No. 2, and No. 4 Fuel Oils)
- CUTOFF Electricity, other fuels, unspecified, at power plant: 0.00212347 kWh
  Other Fuels OTH - Other (Batteries, Chemicals, Coke Breeze, Hydrogen, Pitch, Sulfur, Tar Coal, and miscellaneous technologies)
- CUTOFF Electricity, biomass,solid, unspecified, at power plant: 0.000490063 kWh
  Solid Renewable Fuels (Biomass) OBS - Other Biomass Solid (Animal Manure and Waste, Solid By-products, and other solid biomass not specified)
- Electricity, bituminous coal, at power plant: 0.00050971 kWh
  Bituminous Coal, SC - Coal Synfuel. Coal-based solid fuel that has been processed by a coal synfuel plant, and coal-based fuels such as briquettes, pellets, or extrusions, which are formed from fresh or recycled coal and binding materials.
- CUTOFF Electricity, petroleum, waste oil, at power plant: 6.26017e-6 kWh
  Petroleum (Other Fossil) WO - Waste/Other Oil (including Crude Oil, Liquid Butane, Liquid Propane, Oil Waste, Re-Refined Motor Oil, Sludge Oil, Tar Oil, or other petroleum-based liquid wastes)
- CUTOFF Electricity, MSW, non-biogenic, at power plant: 0.00569614 kWh
  Other Fuels MSN - Municipal Solid Waste – Non-biogenic components
- CUTOFF Electricity, hydropower, at power plant, unspecified: 0.000988855 kWh
  Hydroelectric

## Sampling procedure
based on EIA electricity reports for all power plants in the US.

## Sources
- Chris Goemans, Athena Institute
- unspecified
- USEPA
- Statistics Canada
- Statistics Canada
- Statistics Canada
- Statistics Canada
- Statistics Canada
- Statistics Canada
- USEPA
- EIA
- EIA
- EIA
- EIA
- EIA
- EIA
- EIA
- EIA
- EIA
- EIA
- EIA
- US DOE
- International Energy Agency
- US DOE
