# Coal mine ventilation energy; Electric fan; Underground mine

Dataset: openLCA process, unit process
Category: Bit. Coal and Lignite Surface Mining
Geography: US
Time period: 1998-01-01 to 2002-12-31
Generated by: Timothy Skone
Owner: National Energy Technology Laboratory
Reviewer: Robert James
Published in: National Energy Technology Laboratory (NETL). 2013. Coal mine ventilation energy; Electric fan; Underground mine
restrictionsDescription: Use of this dataset is not restricted, but a statement of attribution is required. Please use the following attribution statement:
National Energy Technology Laboratory's (NETL) Unit Process Library
626 Cochrans Mill Road, P.O. Box 10940
Pittsburgh, PA 15236-0940
http://www.netl.doe.gov/research/energy-analysis/life-cycle-analysis/unit-process-library
Neither the U.S. Department of Energy (DOE) National Energy Technology Laboratory (NETL) nor any person acting on behalf of these organizations:
A. Makes any warranty or representation, express or implied, with respect to the accuracy, completeness, or usefulness of the information contained in this document, or that the use of any information, apparatus, method, or process disclosed in this document may not infringe on privately owned rights; or
B. Assumes any liability with this report as to its use, or damages resulting from the use of any information, apparatus, method, or process disclosed in this document.
Reference herein to any specific commercial product, process, or service by trade name, trademark, manufacturer, or otherwise, does not necessarily constitute or imply its endorsement, recommendation, or favoring by NETL. The views and opinions of the authors expressed herein do not necessarily state or reflect those of NETL.
copyright: true

## General comment
This process is part of the NETL Unit Process Library. To access the library and the original dataset:
1) Navigate to the NETL LCA home page (http://www.netl.doe.gov/lca)
2) Then navigate to the “Unit Process Library”
3) From the library, the unit process of interest can be found either through the "Complete Listing of the Unit Process Library link" or through the link to the "Unit Process Database" spreadsheet
4) For each process, a Data Sheet (DS) and Data File (DF) are available

BRIEF DESCRIPTION
This parameterized unit process calculates the amount of electricity required to ventilate an underground coal mine. Inputs and outputs are reported on the basis of 1 kg of coal.

GOAL AND SCOPE
This parameterized unit process provides a summary of relevant input and output flows associated with the amount of electricity required in the ventilation of an underground coal mine using a fan. The key input is electricity, which is also an adjustable parameter to measure uncertainties. Coal is the key output. The unit process is based on the reference flow of one kg of coal. The relevant flows of this unit process are described below and shown in the assoc8iated documentation (referenced in the Citation and Associated Documentation section below).

BOUNDARY AND DESCRIPTION
A visual representation of the boundary of this unit process is available in the associated documentation (referenced in the Citation and Associated Documentation section below). The electricity requirement was calculated using the Energy and Environmental Profile of the U.S. Mining Industry developed by the U.S. Department of Energy’s Energy Efficiency and Renewable Energy division and the National Mining Association (DOE and NMA, 2002). Chapter Two of the source focused on coal; description of coal types, overview of coal mining, energy requirements for underground and surface mines, and emissions from coal mining. The data source provides energy data for specific mining activities such as coal handling, extraction, and grinding. BCS, Incorporated (BCS) developed the data by integrating the U.S. Department of Energy’s Energy Information Administration’s 1997 Coal Industry data into the Western Mining Engineering, Inc.’s SHERPA Mine Cost Software to create 2002 estimates. BCS also used Mine and Mill Equipment Cost, An Estimator’s Guide to develop the data. Newer data for specific coal mining processes are not available. This unit process parameterizes key variables, which allow for evaluation of data uncertainty when used in a life cycle model.

A main fan was used to ventilate an underground mine. To calculate the electricity requirement, based on the reference flow of one kg of coal, the energy requirement for the main fan, in Btu per ton, was divided by the appropriate conversions to obtain the electricity needed in kWh per kg of coal. Electricity was placed as a parameter so the item could be adjusted to measure uncertainties.

Additional details regarding input and output flows, including calculation methods, are contained in the associated documentation (referenced in the Citation and Associated Documentation section below).

This process contains one or more surrogate product flows as replacements for proprietary product flows used in the NETL Unit Process Library. All surrogate flow were taken from the U.S. Life Cycle Inventory Database; a list of surrogate flows used in this process is provided below:
1) Electricity, at Grid, US, 2010

CITATION AND ASSOCIATED DOCUMENTATION
This document should be cited as:
National Energy Technology Laboratory (NETL). 2015. NETL Life Cycle Inventory Data – Unit Process: Coal mine ventilation energy; Electric fan; Underground coal mine. U.S. Department of Energy, National Energy Technology Laboratory. Last Updated: September 2015. (version 01). Retrieved on [DATE] from [URL for this dataset].

This dataset is part of the NETL Unit Process Library. The Library offers additional information concerning this dataset in the form of a Detailed Spreadsheet Documentation (DS) file and a Process Documentation File (DF). The DS file is an Excel file that contains all of the parameters, inputs, and outputs for a given system as well as background data, calculations and quality scores. The DF file is a PDF document that contains major assumptions and data sources that are the basis for each unit process. The NETL Unit Process Library is located on the NETL website (netl.doe.gov) under Research / Energy Analysis / Energy Trends and Issues / Life Cycle Analysis / Unit Process Library.

This dataset was converted directly from the DS with additional supporting information provided by the DF. Full citations for the DS and DF are given below.

DS File
National Energy Technology Laboratory (NETL). 2013. NETL Life Cycle Inventory Data – Unit Process: Ventilation Energy for Underground Mine. U.S. Department of Energy, National Energy Technology Laboratory. Last Updated: July 2013 (version 01). Retrieved on 6/30/2014 from: http://www.netl.doe.gov/File%20Library/Research/Energy%20Analysis/Life%20Cycle%20Analysis/UP_Library/DS_Stage1_O_Ventilation_Underground_2013-01.xlsx

DF File
National Energy Technology Laboratory (NETL). 2013. NETL Life Cycle Inventory Data – Unit Process: Ventilation Energy for Underground Mine. U.S. Department of Energy, National Energy Technology Laboratory. Last Updated: July 2013 (version 01). Retrieved on 6/30/2014 from: http://www.netl.doe.gov/File%20Library/Research/Energy%20Analysis/Life%20Cycle%20Analysis/UP_Library/DF_Stage1_O_Ventilation_Underground_2013-01.pdf

## Technology
This parameterized unit process provides a summary of relevant input and output flows associated with the amount of electricity required in the ventilation of an underground coal mine using a fan. The key input is electricity and coal is the key output. A visual representation of the boundary of this unit process is available in the associated documentation (referenced in the Citation and Associated Documentation section in the Description field). A main fan was used to ventilate an underground mine. Additional details regarding input and output flows, including calculation methods, are contained in the associated documentation(referenced in the Citation and Associated Documentation section in the Description field).

## Time period
This data set is representative of best available public data from 01/01/1998 to 12/31/2002 and is not subject to limited usability within sub-time spans (e.g. summer, winter).

## Parameters
- Electricity: 0.0426433
  [kWh/kg] Ventilation electricity per kg of coal extracted

## Reference product
- Coal mine ventilation energy; Electric fan; Underground mine: 1 Item(s); data quality (1,2,1,4,1)

## Inputs from technosphere
- Electricity, at Grid, US, 2010: 0.153516 MJ; = Electricity*3.6; data quality (1,2,1,4,1)

## Inventory method
Attributional

## Modelling constants
All elementary and technosphere flows are calculated on a functional unit basis. Calculations involving combustion primarily to generate useful work are done using lower heating values (LHV) and calculations involving combustion primarily to generate useful heat are done using higher heating values (HHV). Unless explicitly stated in the associated reference documents applicable calculations assumed standard atmospheric temperature and pressure (SATP).

## Completeness
Individual relevant flows captured

## Data selection
Best publically available data

## Data treatment
No allocation applied

## Data collection
No primary data collected

## Intended application
This is a gate-to-gate basic process and can be used for any type of LCA study.

## Project
National Energy Technology Laboratory (NETL) Unit Process Library

## Sources
- National Energy Technology Laboratory (NETL). 2013. Coal mine ventilation energy; Electric fan; Underground mine
- U.S. Department of Energy (DOE) and National Mining Association (NMA). 2002. Energy and Environmental Profile of the U.S. Mining Industry: Chapter 2 Coal
