# Electricity, at eGrid, SRMW, 2010

Dataset: openLCA process, unit process
Category: Utilities
Geography: RNA
Time period: 2010-01-01 to 2010-01-01
Generated by: Samantha Wascavage
Published in: Chris Goemans, Athena Institute
restrictionsDescription: All information can be accessed by everybody.
copyright: false

## General comment
The methodology used to put together the grid information is outlined in reference 1.

## Technology
Typical

## Geography
SRMW Midwest electricity grid to include eastern Missouri (less SPNO) and Southern Illinois (less RFCW).

## Reference product
- Electricity, at eGrid, SRMW, 2010: 1 kWh

## Inputs from technosphere
- CUTOFF Electricity, hydropower, at power plant, unspecified: 0.010794 kWh
  Hydroelectric WAT – Water (Conventional, Pumped Storage)
- Electricity, nuclear, at power plant: 0.191569 kWh
  Nuclear Fission NUC – Nuclear (Uranium, Plutonium, Thorium)
- Electricity, natural gas, at power plant: 0.022654 kWh
  Natural Gas
- CUTOFF Electricity, biomass, gas, landfill, at power plant: 0.000797 kWh
  Gaseous Renewable Fuels (Biomass) LFG, OBG - landfill gas
- Electricity, bituminous coal, at power plant: 0.686976 kWh
  Subbituminous Coal
- Electricity, bituminous coal, at power plant: 0.063613 kWh
  Bituminous Coal BIT, SC, SGC, WC - Anthracite Coal, and Bituminous Coal.
- Electricity, residual fuel oil, at power plant: 2.1e-5 kWh
  Petroleum (RFO) – Residual Fuel Oil (includes No. 5 and No. 6 Fuel Oils and Bunker C Fuel Oil)
- Electricity, diesel, at power plant: 0.010237 kWh
  Petroleum (DFO, JF, KER) – Distillate Fuel Oil (includes all Diesel and No. 1, No. 2, and No. 4 Fuel Oils)
- CUTOFF Electricity, at wind power plant, unspecified: 0.013197 kWh
  Wind
- CUTOFF Electricity, tire derived fuel, at power plant: 0.0001 kWh
  Solid Renewable Fuels (Biomass) TDF, AB, MSB, MSW, OBS, WDS - tires, tire derived fuel

## Sampling procedure
based on EIA electricity reports for all power plants in the US.

## Sources
- Chris Goemans, Athena Institute
- Statistics Canada
- unspecified
- USEPA
- Statistics Canada
- Statistics Canada
- Statistics Canada
- Statistics Canada
- USEPA
- EIA
- EIA
- EIA
- EIA
- EIA
- EIA
- EIA
- EIA
- EIA
- US DOE
- International Energy Agency
- EIA
