# Polyethylene, low density, resin, at plant, CTR

Dataset: openLCA process, unit process
Category: All Other Basic Organic Chemical Manufacturing
Geography: RNA
Time period: 2002-01-01 to 2003-01-01
Generated by: Franklin Associates
Published in: THE PLASTICS DIVISION OF THE ACC
restrictionsDescription: All information can be accessed by everybody.
copyright: false

## General comment
Scrap and steam are produced as coproducts during this process. A mass basis was used to partition the credit for scrap, while the energy amount for the steam was reported separately as recovered energy. Complete inventory data and metadata are available in full in the final report and appendices, Cradle-to-Gate Life Cycle Inventory of Nine Plastic Resins and Four Polyurethane Precursors. This report has been extensively reviewed within Franklin Associates and has undergone partial critical review by ACC Plastics Division members and is available at: www.americanchemistry.com. Quantities may vary slightly between the reference to main source and and this module due to rounding. Important note: although most of the data in the US LCI database has undergone some sort of review, the database as a whole has not yet undergone a formal validation process. Please email comments to lci@nrel.gov.

## Technology
Free-radical or ionic polymerization of ethylene via a combination of tubular and autoclave high-pressure reactors

## Geography
Representative of North America (US and Canada)

## Reference product
- Polyethylene, low density, resin, at plant, CTR: 1 kg

## By-products
- Recovered energy, for Polyethylene, low density, resin, at plant, CTR: 0.42923 MJ

## Inputs from technosphere
- CUTOFF Disposal, solid waste,process, to municipal incineration: 0.0038688 kg
- CUTOFF Disposal, solid waste, fuel, to municipal incineration: 0.053134 kg
- CUTOFF Disposal, solid waste, process, to sanitary landfill: 0.027151 kg
- CUTOFF Disposal, solid waste, process, to waste-to-energy: 2.3184e-5 kg

## Inputs from nature
- Energy, solar: 0.00023181 MJ
- Gas, natural, in ground: 0.67357 m3
  This flow represents the amount of natural gas that is used for fuel. The energy content of the natural gas used for fuel is 36.7 MJ per m3.
- Oil, crude, in ground: 0.19754 kg
  This flow represents the amount of crude oils that is a material input for producing the resin output. The energy content of the crude oil used as EMR/feedstock is 43.7 MJ per kg. The energy content multiplied by the mass should be considered an Energy of Material Resource (EMR)/feedstock energy.
- Coal, lignite, in ground: 0.010733 kg
- Water, consumptive use, unspecified origin/m3: 0.0099793 m3
- Energy, geothermal: 0.0055199 MJ
- Oil, crude, in ground: 0.052334 kg
  This flow represents the amount of crude oil that is used for fuel. The energy content of the crude oil used for fuel is 43.7 MJ per kg.
- Energy, kinetic (in wind), converted: 0.005462 MJ
- Energy, from hydro power: 0.10489 MJ
- Uranium oxide, 332 GJ per kg, in ore: 2.7361e-6 kg
- Coal, unprocessed bituminous, in ground: 0.11165 kg
- Gas, natural, in ground: 0.87304 kg
  This flow represents the amount of natural gas that is a material input for producing the resin output. The energy content of the natural gas used as EMR/feedstock is 49.8 MJ per kg. The energy content multiplied by the mass should be considered an Energy of Material Resource (EMR)/feedstock energy.
- Energy, from biomass: 0.0022746 MJ
- Energy, unspecified: 0.0073929 MJ
  Energy unspecified reflects "other fossil" fuels

## Emissions to nature
- Nickel: 1.684e-7, 8.9256e-8 kg (2 entries, compartments not in this file)
- Hydrogen: 4.032e-6 kg
- Carbon monoxide, fossil: 0.00089119 kg
- Ammonia: 7.5541e-6, 8.9573e-7 kg (2 entries, compartments not in this file)
- Dodecane: 2.1425e-8 kg
- Benzo(a)pyrene: 1.9892e-12 kg
- Benzyl chloride: 1.7881e-11 kg
- Isophorone: 1.4816e-11 kg
- n-Hexacosane: 1.6176e-10 kg
- Methane, trichlorofluoro-, CFC-11: 1e-7 kg
- Methane, dichloro-, HCC-30: 2.4589e-8 kg
- Manganese: 3.3604e-8, 1.1286e-6 kg (2 entries, compartments not in this file)
- Sulfuric acid, dimethyl ester: 1.2261e-12 kg
- Docosane: 2.5929e-10 kg
- Radionuclides (Including Radon): 3.8894e-6 kg
- Toluene: 4.755e-7, 0.00019689 kg (2 entries, compartments not in this file)
- Methane, fossil: 0.018183 kg
- Naphthalene: 7.086e-9, 6.9916e-9 kg (2 entries, compartments not in this file)
- Biphenyl: 4.7084e-9, 8.8991e-11 kg (2 entries, compartments not in this file)
- Pyrene: 1.7275e-11 kg
- Nitrogen, total: 7.7296e-8 kg
- Selenium: 7.0109e-8, 1.5564e-8 kg (2 entries, compartments not in this file)
- Benzo(b,j,k)fluoranthene: 5.7582e-12 kg
- Aluminum: 3.6665e-5 kg
- Ammonium chloride: 1.4522e-7 kg
- 5-methyl Chrysene: 1.1516e-12 kg
- Zinc: 2.0661e-10, 8.6804e-7 kg (2 entries, compartments not in this file)
- Methacrylic acid, methyl ester: 5.1088e-13 kg
- Calcium, ion: 0.00078595 kg
- VOC, volatile organic compounds: 0.0010943 kg
- Titanium, ion: 3.4246e-7 kg
- Benzene, chloro-: 5.6197e-13 kg
- Fluoride: 4.3149e-9, 5.0502e-7 kg (2 entries, compartments not in this file)
- Organic substances, unspecified: 5.1327e-5 kg
- Hydrogen fluoride: 7.851e-6 kg
- PAH, polycyclic aromatic hydrocarbons: 3.526e-9 kg
- Chromium: 2.5578e-8, 9.5252e-7 kg (2 entries, compartments not in this file)
- Benzene, pentamethyl-: 1.8161e-11 kg
- Vinyl acetate: 1.9413e-13 kg
- Naphthalenes, alkylated, unspecified: 1.1916e-9 kg
- Fluorene, 1-methyl-: 2.7578e-11 kg
- Aldehydes, unspecified: 5.0239e-8 kg
- Acetophenone: 3.8316e-13 kg
- Fluorene: 1.9682e-9, 4.7635e-11 kg (2 entries, compartments not in this file)
- COD, Chemical Oxygen Demand: 0.0002278 kg
- 4-Methyl-2-pentanone: 1.0227e-9 kg
- Antimony: 1.4261e-9, 2.165e-8 kg (2 entries, compartments not in this file)
- Benzene, ethyl-: 3.2839e-8, 1.5751e-5 kg (2 entries, compartments not in this file)
- Phenanthrenes, alkylated, unspecified: 4.9408e-10 kg
- Chloride: 0.0097771 kg
- Acenaphthene: 2.6696e-11 kg
- Ethane, 1,2-dichloro-: 1.0218e-12 kg
- Xylene: 0.0001142, 1.7674e-7 kg (2 entries, compartments not in this file)
- Particulates, unspecified: 0.0002398 kg
- Octadecane: 5.8085e-9 kg
- Benzene: 4.1622e-7, 0.00012637 kg (2 entries, compartments not in this file)
- Benzene, 1-methyl-4-(1-methylethyl)-: 2.4214e-11 kg
- Radioactive species, Nuclides, unspecified: 4.51 Bq
- Acetaldehyde: 1.6112e-8 kg
- Acenaphthylene: 1.3087e-11 kg
- Chromium VI: 4.1354e-9 kg
- Sulfur: 9.818e-7 kg
- Mercury: 4.454e-10, 6.6242e-9 kg (2 entries, compartments not in this file)
- Arsenic: 2.5334e-8 kg
- Chrysene: 5.2348e-12 kg
- Hexane: 1.7114e-12 kg
- Fluorenes, alkylated, unspecified: 4.2142e-9 kg
- Tetradecane: 9.1878e-9 kg
- Radioactive species, unspecified: 2963.7 Bq
- Yttrium: 2.6161e-9 kg
- Strontium: 2.1205e-5 kg
- Boron: 1.2193e-6 kg
- Bromoform: 9.9622e-13 kg
- Cadmium: 1.1552e-8 kg
- Magnesium: 5.7582e-7, 0.00015741 kg (2 entries, compartments not in this file)
- Mercaptans, unspecified: 5.121e-9 kg
- o-Xylene: 4.2038e-9 kg
- Carbon dioxide, fossil: 1.7099 kg
- Cobalt: 1.5598e-8 kg
- Phenols, unspecified: 9.7702e-8, 7.9267e-9 kg (2 entries, compartments not in this file)
- Particulates, < 10 um: 9.2124e-5 kg
- BOD5, Biological Oxygen Demand: 5.6976e-5 kg
- Lead-210/kg: 4.047e-17 kg
- Sulfur oxides: 0.00051683 kg
- Vanadium: 2.3147e-8 kg
- Hydrogen chloride: 6.4196e-5 kg
- Particulates, > 2.5 um, and < 10um: 0.00013577 kg
- Copper: 3.0992e-10 kg
- Hexanoic acid: 8.1821e-8 kg
- o-Cresol: 1.1212e-8 kg
- Butadiene: 8.2062e-10 kg
- m-Xylene: 1.1436e-8 kg
- Chloroform: 1.5071e-12 kg
- Benzo(ghi)perylene: 1.4134e-12 kg
- t-Butyl methyl ether: 8.9404e-13 kg
- p-Cresol: 1.2089e-8 kg
- Dibenzothiophene: 4.9193e-11 kg
- 2-Propanol: 1e-7 kg
- Phenanthrene: 3.1214e-10, 1.4134e-10 kg (2 entries, compartments not in this file)
- Particulates, < 2.5 um: 8.3111e-5 kg
- Radium-226/kg: 1.4079e-14 kg
- TOC, Total Organic Carbon: 1.008e-6 kg
- Ethane, 1,1,1-trichloro-, HCFC-140: 5.1088e-13 kg
- Bromide: 4.7051e-5 kg
- Sodium, ion: 0.0022373 kg
- Methyl ethyl ketone: 9.9622e-12, 1.9506e-11 kg (2 entries, compartments not in this file)
- Furan: 2.3423e-13 kg
- Barium: 0.00047776 kg
- Surfactants, unspecified: 1.6341e-7 kg
- Toluene, 2,4-dinitro-: 7.1523e-15 kg
- Hexadecane: 2.3429e-8 kg
- Nitrogen oxides: 0.0024757 kg
- Naphthalene, 2-methyl-: 6.0023e-9 kg
- Methane, monochloro-, R-40: 1.3538e-11, 9.753e-12 kg (2 entries, compartments not in this file)
- Phenol: 1.081e-6, 4.087e-13 kg (2 entries, compartments not in this file)
- NMVOC, non-methane volatile organic compounds, unspecified origin: 0.0011286 kg
- Beryllium: 4.6348e-9, 1.3873e-9 kg (2 entries, compartments not in this file)
- Methane, bromo-, Halon 1001: 4.087e-12 kg
- Tin: 8.8786e-8 kg
- 2-Hexanone: 2.5923e-9 kg
- Dinitrogen monoxide: 2.4913e-5 kg
- Polycyclic organic matter, unspecified: 1.3281e-8 kg
- Phenol, 2,4-dimethyl-: 1.091e-8 kg
- Methane, chlorodifluoro-, HCFC-22: 1.001e-6 kg
- Lead: 2.8909e-8, 1.993e-7 kg (2 entries, compartments not in this file)
- Decane: 1.1297e-8 kg
- Styrene: 1.008e-9, 6.386e-13 kg (2 entries, compartments not in this file)
- Surfactants: 2.9213e-8 kg
- Sulfur dioxide: 0.0040831 kg
- Arsenic, ion: 7.4174e-8 kg
- Anthracene: 1.0993e-11 kg
- Ethylene dibromide: 1.0198e-9 kg
- Ammonium, ion: 3.105e-8 kg
- Chlorine: 1.018e-7 kg
- Acetone: 2.4951e-9 kg
- Kerosene: 6.9552e-8 kg
- Fluoranthene: 3.7167e-11 kg
- p-Xylene: 4.2038e-9 kg
- Molybdenum: 8.9405e-9 kg
- Dioxins, measured as 2,3,7,8-tetrachlorodibenzo-p-dioxin: 6.6142e-14 kg
- Methane, tetrachloro-, CFC-10: 3.3202e-10 kg
- Radium-228/kg: 7.2019e-17 kg
- Dibenzofuran: 4.6075e-11 kg
- Lithium, ion: 0.00019811 kg
- Methane: 0.0003908 kg
- Phosphorus: 1e-7 kg
- Carbon disulfide: 3.3207e-12 kg
- Cyanide: 1.7488e-11, 6.386e-11 kg (2 entries, compartments not in this file)
- Benzo(a)anthracene: 4.1877e-12 kg
- Benzenes, alkylated, unspecified: 7.2716e-8 kg
- Cumene: 1.3538e-13 kg
- Sulfate: 7.8954e-5 kg
- Methane, chlorotrifluoro-, CFC-13: 5.2175e-9 kg
- Hydrocarbons, unspecified: 8.3818e-7 kg
- Ethene, tetrachloro-: 2.3981e-9 kg
- Indeno(1,2,3-cd)pyrene: 3.1933e-12 kg
- Ethane, chloro-: 1.0728e-12 kg
- Silver: 4.7408e-7 kg
- Hydrazine, methyl-: 4.3425e-12 kg
- Phthalate, dioctyl-: 1.8647e-12 kg
- Dissolved solids: 0.009784 kg
- Propanal: 9.7067e-12 kg
- Eicosane: 5.8846e-9 kg
- Propene: 5.4148e-8 kg
- Suspended solids, unspecified: 0.0039669 kg
- 2-Chloroacetophenone: 1.7881e-13 kg
- Benzoic acid: 3.951e-7 kg
- Iron: 6.8743e-5 kg
- Copper, ion: 4.4197e-8 kg
- Sulfide: 4.506e-8 kg
- Carbon monoxide: 0.00015772 kg
- Oils, unspecified: 1.0792e-5 kg
- Thallium: 4.6963e-9 kg
- Ethane, 1,2-dibromo-: 3.0653e-14 kg
- Organic acids: 5.3366e-10 kg
- Formaldehyde: 6.4196e-7 kg

## Sampling procedure
Data are from both primary and secondary sources. A weighted average using production amounts was calculated from the LDPE production data from seven plants collected from three leading producers in North America. The LDPE data collected for this module represents a majority of North American LDPE production.

## Sources
- THE PLASTICS DIVISION OF THE ACC
