# Railroad tie, hardwood, rough, green, at sawmill, SE

Dataset: openLCA process, unit process
Category: Sawmills
Geography: RNA
Generated by: Chris Bolin;
Reviewer: Richard Bergmann
Published in: Richard D. Bergman
restrictionsDescription: All information can be accessed by everybody.
copyright: false

## General comment
Allocation based on mass.

## Technology
Average technology. Some data extrapolated from similar processes.

## Geography
NE/NC = Northeast (NE) and Northcentral (NC) United States. The 20 states are Connecticut, Delaware, Illinois, Indiana, Iowa, Maine, Maryland, Massachusetts, Michigan, Minnesota, Missouri, New Hampshire, New Jersey, New York, Ohio, Pennsylvania, Rhode Island, Vermont, West Virginia, Wisconsin.

## Reference product
- Railroad tie, hardwood, rough, green, at sawmill, SE: 1 kg

## Inputs from technosphere
- Gasoline, combusted in equipment: 0.000152 l
  transporation on-site for forklifts, haulers, and loaders
- Natural gas, combusted in industrial equipment: 7.13e-8 m3
  transporation on-site for forklifts, haulers, and loaders
- Electricity, at Grid, SERC, 2008: 0.025 kWh
  Amount of electricity used for making SE railroad tie primary cuts
- Diesel, combusted in industrial equipment: 0.00175 l
  transporation on-site for forklifts, haulers, and loaders
- Roundwood, hardwood, green, at logyard, NE-NC: 0.0019 m3
  Surrogate for SE railroad tie production. Weight reported on an ovendry basis. Moisture content (ovendry basis) = 87%

## Emissions to nature
- Particulates, unspecified: 0.002483 kg

## Sampling procedure
Questionnaires from 20 mills (17 companies) from the 20 states of Forest Service (FS) Northeastern (NE) Region. Hardwood sawmills were members of the Hardwood Manufacturer Association (HMA).

## Sources
- Richard D. Bergman
