# Electricity, at eGrid, RMPA, 2008

Dataset: openLCA process, unit process
Category: Utilities
Geography: RNA
Time period: 2008-01-01 to 2008-01-01
Generated by: Alberta Carpenter
Published in: Chris Goemans, Athena Institute
restrictionsDescription: All information can be accessed by everybody.
copyright: false

## General comment
The methodology used to put together the grid information is outlined in reference 1.

## Technology
Typical

## Geography
RMPA Rockies electricity grid to include Colorado, eastern Wyoming (less NWPP) and small portions of South Dakota, Nebraska and New Mexico

## Reference product
- Electricity, at eGrid, RMPA, 2008: 1 kWh

## Inputs from technosphere
- Electricity, natural gas, at power plant: 0.174392 kWh
  Natural Gas
- CUTOFF Electricity, biomass, gas, unspecified, at power plant: 0.000453101 kWh
  Gaseous Renewable Fuels (Biomass) OBG – Other Biomass Gases (Digester Gas, Methane, and other biomass gases)
- Electricity, diesel, at power plant: 0.000740087 kWh
  Petroleum (DFO) – Distillate Fuel Oil (includes all Diesel and No. 1, No. 2, and No. 4 Fuel Oils)
- CUTOFF Electricity, other gases, unspecified, at power plant: 0.00016044 kWh
  Other Gases OG – Other Gas (Butane, Coal Processes, Coke-Oven, Refinery, and other processes)
- CUTOFF Electricity, solar, unspecified, at power plant: 0.000226274 kWh
  Solar (Photovoltaic, Thermal)
- Electricity, biomass, at power plant: 1.66411e-6 kWh
  Solid Renewable Fuels (Biomass) WDS – Wood/Wood Waste Solids (Paper Pellets, Railroad Ties, Utility Poles, Wood Chips, and other wood solids)
- Electricity, bituminous coal, at power plant: 0.467659 kWh
  Subbituminous Coal
- CUTOFF Electricity, at wind power plant, unspecified: 0.0470071 kWh
  Wind
- CUTOFF Electricity, biomass, gas, landfill, at power plant: 0.000103139 kWh
  Gaseous Renewable Fuels (Biomass) LFG - landfill gas
- CUTOFF Electricity, hydropower, at power plant, unspecified: 0.0313026 kWh
  Hydroelectric WAT – Water (Conventional, Pumped Storage)
- Electricity, bituminous coal, at power plant: 0.277515 kWh
  Bituminous Coal BIT - Anthracite Coal, and Bituminous Coal.
- CUTOFF Electricity, other fuels, unspecified, at power plant: 0.000404255 kWh
  Other Fuels WH – Waste heat not directly attributed to a fuel source. Note that WH should only be reported where the fuel source for the waste heat is undetermined, and for combined cycle steam turbines that are not supplementary fired
- CUTOFF Electricity, petroleum, waste oil, at power plant: 3.57463e-5 kWh
  Petroleum (Other Fossil) WO – Waste/Other Oil (including Crude Oil, Liquid Butane, Liquid Propane, Oil Waste, Re-Refined Motor Oil, Sludge Oil, Tar Oil, or other petroleum-based liquid wastes)

## Sampling procedure
based on EIA electricity reports for all power plants in the US.

## Sources
- Chris Goemans, Athena Institute
- unspecified
- USEPA
- Statistics Canada
- Statistics Canada
- Statistics Canada
- Statistics Canada
- Statistics Canada
- Statistics Canada
- USEPA
- EIA
- EIA
- EIA
- EIA
- EIA
- EIA
- EIA
- EIA
- EIA
- EIA
- EIA
- US DOE
- International Energy Agency
- US DOE
