# Corn stover, carted

Dataset: openLCA process, unit process
Category: Corn Farming
Geography: RNA
Time period: 2008-01-01 to 2022-01-01
Generated by: Daniel Inman
Published in: Hsu, D.
restrictionsDescription: All information can be accessed by everybody.
copyright: false

## Technology
modern

## Geography
North America

## Time period
2008

## Reference product
- Corn stover, carted: 1.71 t

## Inputs from technosphere
- CUTOFF Baling: 0.405 ha
  ha of corn stover calculated based on mass ratio, then scaled by the amount of stover (0.46) per mass of corn grain. Impact of baling is slightly overstated because it involves tractor--INL design report has baler behind the harvester.
- Corn stover, production, average, US, 2022: 1330 kg
- CUTOFF Transport, tractor and trailer: 1.3957 t*km
  1.12 is conversion from metric tons to short tons.
- Transport, combination truck, diesel powered: 28.177 t*km
  1.12 is conversion from metric tons to short tons.

## Sources
- Hsu, D.
- Hess, J.
