# Melamine urea formaldehyde resin, at plant

Dataset: openLCA process, unit process
Category: Plastics Material and Resin Manufacturing
Geography: RNA
Generated by: Jamie Meil
restrictionsDescription: All information can be accessed by everybody.
copyright: true

## General comment
Base process data presented with allocations to within process co-products noted. Refer to allocation worksheet for specifics. All allocations performed using mass or volume. To take profile back to cradle the user must add LCI profile information for PNW dry and rough green lumber from PNW dry lumber LCI module. Cradle-to-gate LCI information presented for PRF and MUF resins and hardeners which were derived from secondary source., information from secondary source
Important note: although most of the data in the US LCI database has
undergone some sort of review, the database as a whole has not yet
undergone a formal validation process.
Please email comments to lci@nrel.gov.

## Technology
Typical

## Geography
US Pacific North West

## Reference product
- Melamine urea formaldehyde resin, at plant: 1 kg

## Inputs from technosphere
- CUTOFF Disposal, inert solid waste, to unspecified treatment: 0.04088 kg
- CUTOFF Disposal, chemical waste, unspecified, to unspecified treatment: 0.0109 kg
- CUTOFF Disposal, formaldehyde, to unspecified treatment: 2e-6 kg

## Inputs from nature
- Oil, crude, in ground: 0.086529 kg
  The original data was in terms of volume. This was changed to mass using a conversion factor of 850 kg/m3
- Calcium carbonate, in ground: 0.00066 kg
- Coal, bituminous, 24.8 MJ per kg, in ground: 0.28349 kg
- Iron ore, in ground: 6e-5 kg
- Gas, natural, in ground: 0.9532 m3
- Sodium chloride, in ground: 0.00422 kg
- Uranium, in ground: 0.000135 kg
- Copper ore, in ground: 0.000136 kg

## Emissions to nature
- Hydrocarbons, unspecified: 0.00213, 1.7e-5 kg (2 entries, compartments not in this file)
- Calcium carbonate: 1e-5 kg
- Sodium, ion: 0.000509 kg
- Dimethyl ether: 2e-6 kg
- BOD5, Biological Oxygen Demand: 3.1e-5 kg
- Sulfate: 0.000929 kg
- TOC, Total Organic Carbon: 0.000228 kg
- Nitrogen, total: 0.00034 kg
- COD, Chemical Oxygen Demand: 0.00124 kg
- Ammonia: 0.000165 kg
- Nitrogen oxides: 0.00527 kg
- Oils, unspecified: 4.4e-5 kg
- Methanol: 0.0001 kg
- Suspended solids, unspecified: 0.000489 kg
- Acidity, unspecified: 4e-5 kg
- Ammonium, ion: 6.56e-5 kg
- Dissolved solids: 0.000191 kg
- Carbon monoxide: 0.000721 kg
- Sulfur dioxide: 0.00714 kg
- Methane: 0.00689 kg
- Particulates, unspecified: 0.000926 kg
- Metallic ions, unspecified: 5.7e-5 kg
- Carbon dioxide: 1.44 kg

## Sources
- Maureen E. Puettman
