# Biodegradable loose fill

Dataset: openLCA process, unit process
Category: All Other Basic Organic Chemical Manufacturing
Geography: RNA
Time period: 2005-01-01 to 2010-01-01
Generated by: Seth Levine
Published in: Caspervandertak Consulting USA
restrictionsDescription: All information can be accessed by everybody.
copyright: false

## General comment
Willem Christiaens, Jesse Houlihan - CVDT Consulting (compiled/evaluated data supplied by Starchtech, Inc.

## Technology
Extrusion, thermoplastic starch

## Geography
Midwest US

## Reference product
- Biodegradable loose fill: 1 m3

## Inputs from technosphere
- CUTOFF Water, at plant: 0.001658 t
  Water usage
- Transport, ocean freighter, average fuel mix: 148 t*km
  Equivalent finished product that would be made from Renew 400, bulk density = 7.53 kg/m^3
- Transport, single unit truck, diesel powered: 0.0017409 t*km
- Transport, combination truck, average fuel mix: 0.622 t*km
  European potato starch
- CUTOFF Talc, at plant: 1.079e-5 t
  Talc usage
- Transport, combination truck, average fuel mix: 6.613 t*km
  Talc (Chicago, IL), shipped through Fitz Chemical
- CUTOFF PVOH, at plant: 0.0009277 t
  PVOH usage
- Electricity, at Grid, US, 2010: 2.986 kWh
- Transport, ocean freighter, average fuel mix: 8.353 t*km
  European potato starch
- CUTOFF Corn Starch, at plant: 0.007165 t
  Corn starch usage
- Transport, combination truck, average fuel mix: 0.07969 t*km
- Transport, train, diesel powered: 3.014 t*km
  PVOH (Taiwan), shipped through Perry Chemical
- Transport, combination truck, average fuel mix: 1.866 t*km
  Peanuts shipped from STI nationwide; a weighted average of shipping distance/amount
- Natural gas, combusted in industrial equipment: 0.764718 kWh
- Transport, ocean freighter, average fuel mix: 10.28 t*km
  PVOH (Taiwan), shipped through Perry Chemical
- CUTOFF Polymers, at plant: 0.000274 t
  Polymers usage
- Transport, combination truck, average fuel mix: 5.97 t*km
  Domestic (US) corn starch, trucked in from IA
- CUTOFF Potato Starch, at plant: 0.001264 t
  Potato starch usage
- Transport, ocean freighter, average fuel mix: 0.1845 t*km
  Polymers
- Transport, train, diesel powered: 159.2 t*km
  Equivalent finished product that would be made from Renew 400, bulk density = 7.53 kg/m^3
- Transport, combination truck, average fuel mix: 0.6306 t*km
  Domestic (US) potato starch
- Transport, combination truck, average fuel mix: 163.4 t*km
  Equivalent finished product that would be made from Renew 400, bulk density = 7.53 kg/m^3
- Transport, train, diesel powered: 0.07969 t*km
  Polymers
- Transport, single unit truck, gasoline powered: 0.0007461 t*km
- Transport, combination truck, average fuel mix: 0.6792 t*km
  PVOH (Taiwan), shipped through Perry Chemical

## Inputs from nature
- Water: 0.2202 t

## Emissions to nature
- Carbon dioxide: 0.4124 kg
  Total carbone dioxide generation from disposal phase
- Carbon dioxide: 7.69841 kg
  Total carbon dioxide generation from production of raw materials and products
- Methane: 0.2735 kg
  Total methane generation from production of raw materials and products
- Water: 0.8145 kg
  Release of steam during pellitization process
- Methane: 0.9622 kg
  Total methane generation from disposal phase

## Sampling procedure
Based on annual acquisition/shipment data

## Sources
- Caspervandertak Consulting USA
- EPA 2010 (MO
- Energy Information Administration
