# Sawn lumber, softwood, rough, kiln dried, at kiln, INW

Dataset: openLCA process, unit process
Category: Sawmills
Geography: RNA
Time period: 2006-01-01 to 2007-01-01
Generated by: Maureen Puetmann
Published in: Francis G. Wagner
restrictionsDescription: All information can be accessed by everybody.
copyright: false

## General comment
Important note: although most of the data in the US LCI database has
undergone some sort of review, the database as a whole has not yet
undergone a formal validation process.
Please email comments to lci@nrel.gov.

## Technology
Average

## Geography
Meant to represent operations in eastern Washington, eastern Oregon, Idaho and western Montana. Actual representative mill sample found in eastern Washington and Idaho only.

## Reference product
- Sawn lumber, softwood, rough, kiln dried, at kiln, INW: 1 m3
  Represents 436 kg, OD basis. Moisture content (OD basis)

## Inputs from technosphere
- Residual fuel oil, at refinery: 0.0776 l
  Proxy for hydaulic oils, greases, motor oils, and other oils
- Wood, softwood, INW, generated at lumber mill, combusted in industrial boiler: 55.3 kg
  Oven dry weight. Based on 1050 BTU/lb of steam with a 67% efficiency and 9000 BTU/lb ovendry wood/bark.
- Sawn lumber, softwood, rough, green, at sawmill, INW: 436 kg
  Oven dry mass
- Natural gas, combusted in industrial boiler: 25.6 m3
  Based on 1050BTU/lb of steam with a 80% efficiency and 1030 BTU's/ft3 natural gas
- Electricity, at grid, Western US, 2000: 16.7 kWh
- Diesel, combusted in industrial equipment: 0.13 l

## Emissions to nature
- VOC, volatile organic compounds: 0.168 kg
  Dryer emissions
- Formaldehyde: 0.00064 kg
  Dryer emissions
- Methanol: 0.0225 kg
  Dryer emissions
- Acetaldehyde: 0.00201 kg
  Dryer emissions

## Sampling procedure
Questionnaires from 4 mills assumed to be representative of the softwood lumber industry in US Inland West.

## Sources
- Forest Products Laboratory
- Francis G. Wagner
- Maureen Puettmann
