# Coil, coating, m2, at plant

Dataset: openLCA process, unit process
Category: Architectural and Structural Metals Manufacturing
Geography: RNA
Time period: 2014-01-01 to 2015-02-28
Generated by: PE INTERNATIONAL
Published in: PE INTERNATIONAL
restrictionsDescription: All information can be accessed by everybody.
copyright: false

## General comment
The coil coating process includes all known cradle-to-gate processes necessary for the treatment of metallic sheets. The process however omits the production of the metal coils themselves as the feedstock metal can vary depending on the product. Raw materials include all known pre-treatments, cleaners, paints, and packaging materials to protect the finished sheets--as well as inbound transport. Manufacturing processes require electricity, heat from natural gas, and process water. Air and water emissions are captured in the output of the process.

## Technology
Metal coil coating process necessary for metallic construction products. Technology based on companies identified by Metal Construction Association to be representative of industry.

## Geography
North America

## Reference product
- Coil, coating, m2, at plant: 1 m2

## Inputs from technosphere
- Particleboard, average, softwood, particleboard mill: 0.00605048 kg
- CUTOFF Thermal energy from propane (MJ): 0.0564943 MJ
- CUTOFF Disposal, chemical waste, unspecified, to unspecified treatment: 0.000928836 kg
- CUTOFF Disposal, sludge, to sanitary landfill: 0.00128683 kg
- Containerboard, average production, at mill: 0.00661996 kg
- CUTOFF Chromium III chromate sealer: 0.000325005 kg
- Electricity, at grid, US, 2008: 1.04814 MJ
- CUTOFF Polyvinylidene fluoride: 0.00945089 kg
- CUTOFF Water, process: 1.51852 kg
- CUTOFF Chromic acid: 0.00149189 kg
- Transport, single unit truck, long-haul, diesel powered: 1300.6 kg*km
- CUTOFF Waste, industrial: 0.000877633 kg
- CUTOFF Alkaline cleaner, unspecified: 0.00159484 kg
- CUTOFF Mineral spirits: 2.85715e-6 kg
- CUTOFF Disposal, solid waste, unspecified, to unspecified treatment: 0.0390179 kg
- CUTOFF Polypropylene-film (oriented) (PP): 0.0001139 kg
- CUTOFF Materials for basecoat painting, at plant: 0.0146103 kg
- CUTOFF Flouropolymer (PVDF): 0.0458205 kg
- CUTOFF Low Density Polyethylene Film: 0.0020748 kg
- CUTOFF Disposal, liquid wastes, unspecified to waste water treatment: 1.51852 l
- CUTOFF Disposal, chemical waste, unspecified, to residual materials landfill: 0.000380835 kg
- CUTOFF Phosphate pre-treat: 0.000511245 kg
- Hot rolled sheet, steel, at plant: 0.000970302 kg
- CUTOFF Lubricants, unspecified, at plant: 0.00174117 kg
- Natural gas, combusted in industrial equipment: 0.00469836 m3

## Emissions to nature
- Particulates, < 2.5 um: 3.47601e-5 kg
- Carbon monoxide: 0.000134893 kg
- Sulfur dioxide: 1.67408e-7 kg
- BOD5, Biological Oxygen Demand: 3.34972e-6 kg
- Nitrogen oxides: 0.000828269 kg
- Suspended solids, unspecified: 0.000541955 kg
- Chromium, ion: 2.74758e-9 kg
- Carbon, organically bound: 2.23568e-7 kg
- VOC, volatile organic compounds: 0.000832175 kg
- Ammonia: 3.12996e-7 kg
- Copper, ion: 1.51269e-8 kg
- Particulates, < 10 um: 6.38541e-5 kg
- COD, Chemical Oxygen Demand: 2.94498e-5 kg
- Lead: 1.45577e-8 kg

## Sources
- PE INTERNATIONAL
