# Coal mine water use and quality; Underground mine

Dataset: openLCA process, unit process
Category: Bit. Coal and Lignite Surface Mining
Geography: US
Time period: 2004-01-01 to 2004-12-30
Generated by: Timothy Skone
Owner: National Energy Technology Laboratory
Reviewer: Robert James
Published in: National Energy Technology Laboratory (NETL). 2013. Coal mine water use and quality; Underground mine
restrictionsDescription: Use of this dataset is not restricted, but a statement of attribution is required. Please use the following attribution statement:
National Energy Technology Laboratory's (NETL) Unit Process Library
626 Cochrans Mill Road, P.O. Box 10940
Pittsburgh, PA 15236-0940
http://www.netl.doe.gov/research/energy-analysis/life-cycle-analysis/unit-process-library
Neither the U.S. Department of Energy (DOE) National Energy Technology Laboratory (NETL) nor any person acting on behalf of these organizations:
A. Makes any warranty or representation, express or implied, with respect to the accuracy, completeness, or usefulness of the information contained in this document, or that the use of any information, apparatus, method, or process disclosed in this document may not infringe on privately owned rights; or
B. Assumes any liability with this report as to its use, or damages resulting from the use of any information, apparatus, method, or process disclosed in this document.
Reference herein to any specific commercial product, process, or service by trade name, trademark, manufacturer, or otherwise, does not necessarily constitute or imply its endorsement, recommendation, or favoring by NETL. The views and opinions of the authors expressed herein do not necessarily state or reflect those of NETL.
copyright: true

## General comment
This process is part of the NETL Unit Process Library. To access the library and the original dataset:
1) Navigate to the NETL LCA home page (http://www.netl.doe.gov/lca)
2) Then navigate to the “Unit Process Library”
3) From the library, the unit process of interest can be found either through the "Complete Listing of the Unit Process Library link" or through the link to the "Unit Process Database" spreadsheet
4) For each process, a Data Sheet (DS) and Data File (DF) are available

BRIEF DESCRIPTION
This unit process considers water use and quality from underground mining of coal, based on data for Illinois No. 6 coal.
Inputs and outputs are reported on the basis of 1 Item of "Water use and quality; Production mix, from underground coal mine".

GOAL AND SCOPE
The scope of this process covers the water use and water quality for underground mining of coal. Water flows include water required for mining and cleaning operations and wastewater flows. Storm water is included in the inventory for wastewater flows. This process is based on the reference flow of 1 Item of "Water use and quality; Production mix, from underground coal mine".

This process differs slightly from the Detailed Spreadsheet Documentation (DS) file referenced in the Citation and Associated Documentation section below. Differences between this process and the DS are as follows:
1) Different reference flows. This is because, in the openLCA model, coal is produced in a separate process.
2) Different units for input flows. Units for inputs In the openLCA model have been converted from liters (L) to kilograms (kg) based on the densities of fresh and salt water.

BOUNDARY AND DESCRIPTION
This unit process is based on water data for the underground mining of Illinois No. 6 coal. It is assumed that all underground mines have similar water use and quality profiles.

A visual representation of the boundary of this unit process is available in the associated documentation (referenced in the Citation and Associated Documentation section below). Water use was estimated by dividing USGS 2005 county-level water use (USGS 2000) by the 2005 Galatia Mine coal production (EIA 2013), which correlates well with an estimate provided by Galatia Mine staff (Personal Communication 2009). Water use for other counties with coal mines is provided to provide a bound for uncertainty. Water emissions data, including flows and concentrations of relevant inorganic constituents and biological oxygen demand, were taken from available National Pollutant Discharge Elimination System permit reporting documentation for Galatia Mine from 2009-2011 (EPA 2013).

Additional details regarding input and output flows, including calculation methods, are contained in the associated documentation (referenced in the Citation and Associated Documentation section in the below).

CITATION AND ASSOCIATED DOCUMENTATION
This document should be cited as:
National Energy Technology Laboratory (NETL). 2015. NETL Life Cycle Inventory Data – Unit Process:Coal mine water use and quality; Underground mine. U.S. Department of Energy, National Energy Technology Laboratory. Last updated: September 2015 (Version 01). Retrieved on [DATE] from [URL for this dataset].

This dataset is part of the NETL Unit Process Library. The Library offers additional information concerning this dataset in the form of a Detailed Spreadsheet Documentation (DS) file and a Process Documentation File (DF). The DS file is an Excel file that contains all of the parameters, inputs, and outputs for a given system as well as background data, calculations and quality scores. The DF file is a PDF document that contains major assumptions and data sources that are the basis for each unit process. The NETL Unit Process Library is located on the NETL website (netl.doe.gov) under Research / Energy Analysis / Energy Trends and Issues / Life Cycle Analysis / Unit Process Library.

This dataset was converted directly from the DS with additional supporting information provided by the DF. Full citations for the DS and DF are given below.

DS File
National Energy Technology Laboratory (NETL). 2013. NETL Life Cycle Inventory Data – Unit Process: Water use and quality from underground mining of coal. U.S. Department of Energy, National Energy Technology Laboratory. Last updated: 2013 (version 01). Retrieved on 6/30/2014 from: http://www.netl.doe.gov/File%20Library/Research/Energy%20Analysis/Life%20Cycle%20Analysis/UP_Library/DS_Stage1_O_Underground_Coal_Mine_Water_2013-01.xlsx

DF File
National Energy Technology Laboratory (NETL). 2013. NETL Life Cycle Inventory Data – Unit Process: Water use and quality from underground mining of coal. U.S. Department of Energy, National Energy Technology Laboratory. Last updated: 2013 (version 01). Retrieved on 6/30/2014 from: http://www.netl.doe.gov/File%20Library/Research/Energy%20Analysis/Life%20Cycle%20Analysis/UP_Library/DF_Stage1_O_Underground_Coal_Mine_Water_2013-01.pdf

## Technology
The scope of this process covers the water use and water quality for underground mining of coal. Water flows include water required for mining and cleaning operations and wastewater flows. Storm water is included in the inventory for wastewater flows. This unit process assumes that all underground mines have water use and quality profiles similar to Illinois No. 6 coal.

Additional details are contained in the associated documentation (referenced in the Citation and Associated Documentation section in the Description field).

## Geography
IL

## Time period
This data set is representative of best available public data from 01/01/2004 to 12/31/2004 and is not subject to limited usability within sub-time spans (e.g. summer, winter).

## Parameters
- gnd_water_s: 0.0516454
  [l/kg coal] Saline groundwater withdrawal
- gnd_water_f: 0.134278
  [l/kg coal] Fresh groundwater withdrawal
- water_chloride: 0.00243664; = EF_water_chl*water_disch
  [kg Cl/kg coal] Chloride emissions to fresh water
- water_alk: 6.09879e-5; = EF_water_alk*water_disch
  [kg CaCO/kg coal] Discharged water alkalinity
- EF_water_chl: 0.00645411
  [kg/l] Concentration of discharge water constituent
- Water_FDensity: 998.23
  [kg/m^3] Density of pure water at 20° C and 1 atm. Source: CSGNetwork.com (http://www.csgnetwork.com/h2odenscalc.html)
- EF_water_tss: 1.40888e-5
  [kg/l] Concentration of discharge water constituent
- water_disch: 0.377533
  [l/kg coal] Water discharge from mine
- surf_water_f: 0.118047
  [l/kg coal] Fresh surface water withdrawal
- EF_water_iron: 2.4426e-7
  [kg/l] Concentration of discharge water constituent
- EF_water_alk: 0.000161543
  [kg/l] Concentration of discharge water constituent
- water_nitro: 1.88282e-6; = EF_water_nitro*water_disch
  [kg N/kg coal] Nitrogen emissions to fresh water
- water_bod: 7.48928e-6; = EF_water_bod*water_disch
  [kg O/kg coal] Biological oxygen demand of discharges to fresh water
- EF_water_bod: 1.98374e-5
  [kg/l] Concentration of discharge water constituent
- EF_water_nitro: 4.98716e-6
  [kg/l] Concentration of discharge water constituent
- water_sulfate: 0.000379793; = EF_water_sulf*water_disch
  [kg SO/kg coal] Sulfate emissions to fresh water
- EF_water_acid: -7.86317e-5
  [kg/l] Concentration of discharge water constituent
- EF_water_sulf: 0.00100599
  [kg/l] Concentration of discharge water constituent
- water_iron: 9.22163e-8; = EF_water_iron*water_disch
  [kg Fe/kg coal] Iron emissions to fresh water
- water_acidity: -2.96861e-5; = EF_water_acid*water_disch
  [kg CaCO/kg coal] Discharged water acidity
- water_tss: 5.31899e-6; = EF_water_tss*water_disch
  [kg solids/kg coal] Total suspended solids emissions to fresh water
- Water_SDensity: 1024.79
  [kg/m^3] Density of salt water (salinity = 35,000 PPM Total Dissolved Solids) at 20° C and 1 atm. Source: CSGNetwork.com (http://www.csgnetwork.com/h2odenscalc.html)

## Reference product
- Water use and quality; Production mix, from underground coal mine: 1 Item(s); data quality (2,3,2,1,1)

## Inputs from nature
- Water (ground water, saline) [Water]: 0.0529257 kg; = gnd_water_s*(1/1000)*Water_SDensity; data quality (2,3,2,1,1)
- Water (ground water, fresh) [Water]: 0.13404 kg; = gnd_water_f*(1/1000)*Water_FDensity; data quality (2,3,2,1,1)
- Water (surface water, fresh) [Water]: 0.117838 kg; = surf_water_f*(1/1000)*Water_FDensity; data quality (2,3,2,1,1)

## Emissions to nature
All rows: data quality (2,3,2,1,1)
- Ammonia: 1.88282e-6 kg; = water_nitro
- BOD, Biological Oxygen Demand: 7.48928e-6 kg; = water_bod
- Chloride: 0.00243664 kg; = water_chloride
- Water, surface: 0.377533 kg; = water_disch
- Iron: 9.22163e-8 kg; = water_iron
- Acidity, unspecified: -2.96861e-5 kg; = water_acidity
- Suspended solids, unspecified: 5.31899e-6 kg; = water_tss
- Sulfate: 0.000379793 kg; = water_sulfate

## Inventory method
Attributional

## Modelling constants
All elementary and technosphere flows are calculated on a functional unit basis. Calculations involving combustion primarily to generate useful work are done using lower heating values (LHV) and calculations involving combustion primarily to generate useful heat are done using higher heating values (HHV). Unless explicitly stated in the associated reference documents applicable calculations assumed standard atmospheric temperature and pressure (SATP).

## Completeness
All Relevant Flows Captured

## Data selection
Best publically available data

## Data treatment
No allocation applied

## Data collection
No primary data collected

## Intended application
This is a cradle-to-gate extraction process and can be used for any type of LCA study.

## Project
National Energy Technology Laboratory (NETL) Unit Process Library

## Sources
- Evans, R., P. Roe, and J. Joy. 2003. Water Use and Sustainable Development in Coal Mining - A Case Study from Central Queensland
- U.S. Geological Survey (USGS). 2009. Estimated Use of Water in the United States: Illinois County-Level Data for 2005
- Illinois Department of Commerce and Economic Opportunity. 2008. The Illinois Coal Industry
- U.S. Environmental Protection Agency (EPA). 2013. CWA Effluent Report: Permit ID IL0061727
- National Energy Technology Laboratory (NETL). 2013. Coal mine water use and quality; Underground mine
- U.S. Energy Information Administration (EIA). 2013. Historical Detailed Coal Production Data (1983-2011)
