# Electricity, at Grid, ASCC, 2010

Dataset: openLCA process, unit process
Category: Utilities
Geography: RNA
Time period: 2010-01-01 to 2010-01-01
Generated by: Samantha Wascavage
Published in: Chris Goemans, Athena Institute
restrictionsDescription: All information can be accessed by everybody.
copyright: false

## General comment
The methodology used to put together the grid information is outlined in reference 1.

## Technology
Typical

## Geography
Alaska

## Reference product
- Electricity, at Grid, ASCC, 2010: 1 kWh

## Inputs from technosphere
- Electricity, natural gas, at power plant: 0.631999 kWh
  NG – Natural Gas
- CUTOFF Electricity, hydropower, at power plant, unspecified: 0.229633 kWh
  WAT – Water (Conventional, Pumped Storage)
- Electricity, bituminous coal, at power plant: 0.072632 kWh
  SUB – Subbituminous Coal
- CUTOFF Electricity, biomass,liquid, unspecified, at power plant: 0.001062 kWh
  OBL, BLQ, SLW, WDL – Other Biomass Liquid (Ethanol, Fish Oil, Liquid Acetonitrile Waste, Medical Waste, Tall Oil, Waste Alcohol, and other Biomass not specified)
- Electricity, residual fuel oil, at power plant: 0.001721 kWh
  RFO – Residual Fuel Oil (includes No. 5 and No. 6 Fuel Oils and Bunker C Fuel Oil)
- Electricity, diesel, at power plant: 0.062953 kWh
  DFO, JF, KER – Distillate Fuel Oil (includes all Diesel and No. 1, No. 2, and No. 4 Fuel Oils)

## Sampling procedure
based on EIA electricity reports for all power plants in the US.

## Sources
- Chris Goemans, Athena Institute
- Statistics Canada
- unspecified
- USEPA
- Statistics Canada
- Statistics Canada
- Statistics Canada
- Statistics Canada
- USEPA
- EIA
- EIA
- EIA
- EIA
- EIA
- EIA
- EIA
- EIA
- EIA
- US DOE
- International Energy Agency
- EIA
