# Hardboard, at hardboard plant

Dataset: openLCA process, unit process
Category: Reconstituted Wood Product Manufacturing
Geography: RNA
Time period: 2010-01-01 to 2010-12-31
Generated by: Richard Bergman
Reviewer: Maureen Puettmann
Published in: Bergman, R.
restrictionsDescription: All information can be accessed by everybody.
copyright: false

## General comment
Manufacturing hardboard in North America currently uses either a wet or dry production processes to create high-density wood composition panels. The wet and dry processes use a thermo-mechanical processes to reduce the wood chips or raw material to individual fibers. Resins are added to the fibers before or during mat forming and then the (dry or wet) mats are pressed to create the hardboard panel. Final products made from uncoated hardboard commonly called “dealer board” include case-goods, paneling and pegboard. Density for the final products ranges from 800 to 1,100 kg/m3. Hardboard is a panel product developed to utilize industrial wood residue. The production of hardboard falls into the Standard Industrial Classification (SIC) Code 321219—reconstituted wood products—which include other wood composite products such as cellulosic fiberboard, medium density fiberboard, particleboard, and oriented strand board. EWST are composite panels designed and manufactured to perform in applications with the appearance of traditional wood. In addition, all hardboard/EWST plants follow the ‘Eco-certified composite sustainability standard’.

All allocations performed using mass or volume. This sheet sets out each unit process in the production of one cubic meter of cellulosic fiberbaord as produced in the North America. For the year 2012 7 hardboard facilities operated in North America. These seven facilities produced 205 million m2 at 3.2-mm basis equaling 650 thousand m3 of hardboard.

Important note: although most of the data in the US LCI database has undergone some sort of review, the database as a whole has not yet undergone a formal validation process. Please email comments to lci@nrel.gov.; Geography: North America

## Technology
typical

## Geography
North America

## Time period
2010 and after

## Reference product
- Hardboard, at hardboard plant: 768 kg

## By-products
- Dry sawdust, wood fuel, at hardboard plant, North America: 5.9 kg
- Bag house dust, wood fuel, at hardboard plant, North America: 46.7 kg
- Sander dust, wood fuel, at hardboard plant, North America: 18.7 kg
- Bag house dust, re-pulped, at hardboard plant, North America: 1.4 kg
- Culled boards, wood fuel, at hardboard plant, North America: 33.8 kg
- Other, not specified, hardboard, at hardboard plant, North America: 15 kg

## Inputs from technosphere
- Electricity, bituminous coal, at power plant: 338.772 kWh
  Hardboard Production; MEP field change; 11/2015; 51.80% of total electricity
- CUTOFF Disposal, wood waste, to residual material landfill: 0.950975 kg
  Feedstock Production
- Transport, combination truck, diesel powered: 3.2 t*km
  Hardboard production; Transportation for purchased wood fuel
- Transport, combination truck, diesel powered: 95.6064 t*km
  Feedstock Production; MEP Field change; Nov. 2015; Transportation of roundwood to primary processing
- Wood Combusted, at boiler, at hardboard mill: 290 kg
  Hardboard Production;Oven dried weight, 47.6% purchased wood fuel; 290 OD kg;
- Gasoline, combusted in equipment, at pulp and paper mill (EXCL.): 0.0571979 l
  Feedstock Production;
- CUTOFF Recycling, wood waste, unspecified: 0.126011 kg
  Feedstock Production
- Potassium sulphate_alum, as K2O, Hardboard: 5.09 kg
  Hardboard Production;
- Electricity, residual fuel oil, at power plant: 0.00747599 kWh
  Forestry Operations;
- Electricity, biomass, at power plant: 0.78838 kWh
  Feedstock Production;
- Transport, combination truck, diesel powered: 56.6 t*km
  Hardboard production; total transportation for all feedstocks from primary processing and roundwood directly to hardboard facilities; 56.6 tkm
- Electricity, at grid, US, 2008: 0.00523 kWh
  MEP Field change; Hardboard Production;
- Electricity, nuclear, at power plant: 176.58 kWh
  Hardboard Production; MEP field change; 11/2015; 27% of total electricity
- Gasoline, combusted in equipment, at pulp and paper mill (EXCL.): 0.149 l
  Hardboard Production
- CUTOFF Electricity, fossil, unspecified, at power plant: 0.118257 kWh
  Feedstock Production;
- Diesel, combusted in industrial equipment: 3.56 l
  Hardboard Production; off-road and on-road diesel fuel (1.63+1.93 = 3.56)
- CUTOFF Materials for basecoat painting, at plant: 0.00899 m3
  Hardboard Production;
- Recycled postconsumer PET flake: 0.3122 kg
  Hardboard Production; Final packaging material;
- Natural gas, combusted in industrial equipment: 0.0201 m3
  Hardboard Production; proxy for propane; adjusted for density (7.96*2.52=20.1)
- Electricity, natural gas, at power plant: 0.00640799 kWh
  Forestry Operations;
- CUTOFF Electricity, at wind power plant, unspecified: 7.194 kWh
  Hardboard Production; MEP field change; 11/2015; 1.1% of total electricity
- Electricity, residual fuel oil, at power plant: 0.473028 kWh
  Feedstock Production;
- Paper, bag and sack, unbleached kraft, average production, at mill: 0.217271 kg
  Hardboard Production; Final packaging material; wrapping
- Cellulosic fiberboard, uncoated, at plant: 1.4211 kg
  Hardboard Production; Final packaging material;
- Liquefied petroleum gas, combusted in industrial boiler: 0.0113759 l
  Feedstock Production; proxy for LPG equipment
- CUTOFF Zinc Borate: 6.92 kg
  Hardboard Production;
- Electricity, natural gas, at power plant: 66.708 kWh
  Hardboard Production; MEP field change; 11/2015; 10.20% of total electricity
- CUTOFF Electricity, at wind power plant, unspecified: 0.433609 kWh
  Feedstock Production;
- Polyethylene, low density, resin, at plant: 0.0592565 kg
  Hardboard Production; Final packaging material; wrapping
- Residual fuel oil, combusted in industrial boiler: 12 l
  Hardboard Production
- CUTOFF Recycling, wood waste, unspecified: 26.5 kg
  Hardboard Production;
- Gasoline, at refinery: 0.12811 l
  MEP Field change; Forestry Operations; lubricant oils; 0.11061kg; 7.2054 lb/gal
- CUTOFF Electricity, hydropower, at power plant, unspecified: 41.856 kWh
  Hardboard Production; MEP field change; 11/2015; 6.4% of total electricity
- CUTOFF Roundwood, hardwood, green, at hardboard plant: 167.87 kg
  Feedstock Production;
- Transport, combination truck, diesel powered: 19.7 t*km
  Hardboard production; Total transportation for all additives
- Slack wax, at plant, US SE: 13.6 kg
  Hardboard production; proxy for parffin wax
- Slack wax, at plant, US SE: 0.306 kg
  Hardboard Production;
- Electricity, biomass, at power plant: 0.00411942 kWh
  Forestry Operations;
- Electricity, bituminous coal, at power plant: 20.419 kWh
  Feedstock Production;
- Wood Combusted, at boiler, at hardboard mill: 318 kg
  Hardboard Production; Oven dried weight, 52.4% on-site at non hardboard facility; 318 OD kg
- Electricity, bituminous coal, at power plant: 0.12816 kWh
  Forestry Operations;
- Gasoline, at refinery: 0.0277971 l
  MEP Field change; Hardboard production; lubricant oils; 0.24 kg; 7.2054 lb/gal
- CUTOFF Ink: 0.006 kg
  Hardboard Production;
- Natural gas, combusted in industrial boiler, at pulp and paper mill (EXCL.): 8 m3
  Hardboard Production;
- CUTOFF Release agent, unspecified, at plant: 0.456 kg
  Hardboard Production;
- CUTOFF Disposal, solid waste, unspecified, to inert material landfill: 42.6 kg
  Hardboard Production;
- CUTOFF Electricity, hydropower, at power plant, unspecified: 2.52282 kWh
  Feedstock Production;
- CUTOFF Water, at user: 10.3 kg
  Hardboard Production;
- Polyethylene, high density, resin, at plant: 0.217271 kg
  Hardboard Production; Final packaging material; wrapping
- Hot rolled sheet, steel, at plant: 0.018 kg
  MEP Field change; Hardboard Production; Final packaging material; Steel strapping
- Gasoline, at refinery: 0.0440121 l
  MEP Field change; Hardboard production; oils and grease, 0.0380kg; 7.2054 lb/gal
- Surfaced dried lumber, at planer mill, US SE: 6.9739 kg
  Hardboard Production; Final packaging material; stickers
- CUTOFF Disposal, solid waste, unspecified, to inert material landfill: 2.44017 kg
  Feedstock Production
- Phenol formaldehyde, at plant: 4.18 kg
  Hardboard production; proxy for compregnite
- CUTOFF Electricity, at wind power plant, unspecified: 0.000915427 kWh
  Forestry Operations;
- CUTOFF Linseed oil: 0.0857 kg
  Hardboard Production;
- Gasoline, at refinery: 0.442438 l
  MEP Field change; Hardboard production; hydraulic fluid, 0.382kg. 7.2054 lb/gal
- Diesel, combusted in industrial equipment: 5.47799 l
  Forestry Operations;
- Electricity, nuclear, at power plant: 10.6431 kWh
  Feedstock Production;
- Electricity, residual fuel oil, at power plant: 7.848 kWh
  Hardboard Production; MEP field change; 11/2015; 1.20% of total electricity
- Electricity, natural gas, at power plant: 4.02074 kWh
  Feedstock Production;
- Phenol formaldehyde, at plant: 15.3 kg
  Hardboard Production; PF process from USLCI
- CUTOFF Electricity, fossil, unspecified, at power plant: 1.962 kWh
  Hardboard Production; MEP field change; 11/2015; 0.30% of total electricity
- Diesel, combusted in industrial equipment: 0.582349 l
  Feedstock Production;
- CUTOFF Electricity, hydropower, at power plant, unspecified: 0.00564513 kWh
  Forestry Operations;
- Electricity, biomass, at power plant: 13.08 kWh
  Hardboard Production; MEP field change; 11/2015; 2% of total electricity

## Inputs from nature
- Water, process and cooling, surface: 4.00653 l
  Feedstock Production;
- Water, well, in ground: 0.303 m3
  Hardboard Production; ground water
- Carbon, organic, in soil or biomass stock: 1630 kg
  renewable materials from feedstock
- Wood, soft, standing: 0.317098 m3
  24.06%
- Wood, hard, standing: 1.00094 m3
  75.94%
- Water, cooling, surface: 11323 kg
  Hardboard Production; surface water
- Wood for fiber, feedstock: 843.569 kg
- Water, well, in ground: 0.0347767 m3
  Feedstock Production;

## Emissions to nature
- Phenol: 0.0942 kg
  Hardboard Production; Primary
- COD, Chemical Oxygen Demand: 7.66 kg
  Hardboard Production;
- alpha-Pinene: 8.08e-6 kg
  Hardboard Production;
- Phenol: 1.55389e-5 kg
  Feedstock Production
- Cresol: 0.000771 kg
  Hardboard Production;
- Formaldehyde: 1.30121e-8 kg
  Feedstock Production
- Toluene: 0.00185 kg
  Hardboard Production;
- Formic acid: 0.0785 kg
  Hardboard Production; Primary
- Acetone: 0.0174 kg
  Hardboard Production;
- Waste water/m3: 0.0149123 m3
  Feedstock Production
- Formaldehyde: 0.0693 kg
  Hardboard Production; Primary
- Particulates, unspecified: 0.411303 kg
  Feedstock Production
- Benzene, ethyl-: 4.57e-5 kg
  Hardboard Production;
- Ethane, chloro-: 1.81e-5 kg
  Hardboard Production;
- Acetaldehyde: 0.053 kg
  Hardboard Production; Primary data
- Dinitrogen monoxide: 0.004 kg
  Hardboard Production;
- Beta-Pinene: 1.31e-5 kg
  Hardboard Production;
- Methyl ethyl ketone: 0.00341 kg
  Hardboard Production;
- Particulates, unspecified: 0.147 kg
  Hardboard Production;
- Hexanal: 0.0159 kg
  Hardboard Production;
- BOD5, Biological Oxygen Demand: 2 kg
  Hardboard Production;
- Suspended solids, unspecified: 3.8 kg
  Hardboard Production;
- Methanol: 0.000149955 kg
  Feedstock Production
- Hydrocarbons, unspecified: 1.99 kg
  Hardboard Production;
- Particulates, < 10 um: 0.0891 kg
  Hardboard Production;
- Limonene: 0.000724 kg
  Hardboard Production;
- Xylene: 7.66e-5 kg
  Hardboard Production;
- Acetaldehyde: 8.78895e-5 kg
  Feedstock Production
- Carbon monoxide: 0.206 kg
  Hardboard Production;
- VOC, volatile organic compounds: 0.00579881 kg
  Feedstock Production
- Methane, monochloro-, R-40: 0.000171 kg
  Hardboard Production;
- Sulfur dioxide: 0.307 kg
  Hardboard Production; Primary
- Acrolein: 0.023 kg
  Hardboard Production; Primary
- Propanal: 0.053 kg
  Hardboard Production; proionaldehyde/Primary
- VOC, volatile organic compounds: 1.4 kg
  Hardboard Production; Primary
- Methanol: 0.308 kg
  Hardboard Production; Primary
- Acrolein: 1.35457e-7 kg
  Feedstock Production
- Benzene: 3.57e-5 kg
  Hardboard Production; Primary

## Sampling procedure
Industry survey

## Sources
- Bergman, R.
