# Roundwood, sftwd, state-private moist cold forest, steep slope, at forest rd,INW

Dataset: openLCA process, unit process
Category: Logging
Geography: RNA
Time period: 1989-01-01 to 1996-01-01
Generated by: Maureen Puetmann
Published in: Leonard R. Johnson
restrictionsDescription: All information can be accessed by everybody.
copyright: false

## General comment
FIA inventory were from 1989 to 1996 depending on jurisdiction Allocation on a mass basis.
Important note: although most of the data in the US LCI database has
undergone some sort of review, the database as a whole has not yet
undergone a formal validation process.
Please email comments to lci@nrel.gov.

## Technology
Average technology. Some data extrapolated from similar processes.

## Geography
US Inland West including Montana, Idaho, and eastern Washington

## Reference product
- Roundwood, sftwd, state-private moist cold forest, steep slope, at forest rd,INW: 210.24 m3
  Ovendry density = 450 kg/m3

## By-products
- Bark, sftwd, state-private moist cold forest, steep slope, at forest rd,INW: 10460 kg
  Ovendry density = 450 kg/m3. Bark volume evaluated at 23.2 m3/ha
- Pulpwood, sftwd, state-private moist cold forest, steep slope, at forest rd,INW: 50.927 m3
  Ovendry density = 450 kg/m3

## Inputs from technosphere
- Reforesting, average state or private moist cold softwood forest, INW: 1 ha
- Loader operation, large, INW: 10.673 h
  Based on a rate of 0.04 standard machine hours per m3
- Site preparation, state or private moist cold softwood forest, steep slope, INW: 1 ha
- Chainsawing, hand felling and delimbing, INW: 36.94 h
  Hand felling and bucking of thinning and final harvest. Based on a rate of 0.14 standard machine hours per m3
- Skidding, aerial cable yarder, medium: 26.221 h
  Cable yarding of thinning and final harvest. Based on a rate of 0.10 standard machine hours per m3

## Inputs from nature
- Wood, soft, INW, standing: 284.41 m3
- Carbon dioxide, in air: 19163 kg
  Based on carbon content of bark
- Carbon dioxide, in air: 173330 kg
  Based on carbon content of roundwood
- Carbon dioxide, in air: 41986 kg
  Based on carbon content of pulpwood

## Sampling procedure
Harvesting production, cost and fuel consumption rates were assimilated from existing studies of harvesting equipment typical of the systems used to harvest sites in the Inland West. These studies included both published information and personal interviews with timber harvesting contractors.
The costs, production and consumption rates were developed for equipment options within each component of the system. Harvesting systems were developed as combinations of these harvesting components. Although there are many combinations of harvesting equipment and systems that can be used for harvesting timber, this analysis assumes the use of the most common systems operating on the range of slope classifications identified for the harvested sites.

## Sources
- Maureen Puettmann
- Leonard R. Johnson
