# Coal handling; Underground mine

Dataset: openLCA process, unit process
Category: Bit. Coal and Lignite Surface Mining
Geography: US
Time period: 1998-01-01 to 2002-12-31
Generated by: Timothy Skone
Owner: National Energy Technology Laboratory
Reviewer: Robert James
Published in: National Energy Technology Laboratory (NETL). 2013. Coal handling; Underground mine
restrictionsDescription: Use of this dataset is not restricted, but a statement of attribution is required. Please use the following attribution statement:
National Energy Technology Laboratory's (NETL) Unit Process Library
626 Cochrans Mill Road, P.O. Box 10940
Pittsburgh, PA 15236-0940
http://www.netl.doe.gov/research/energy-analysis/life-cycle-analysis/unit-process-library
Neither the U.S. Department of Energy (DOE) National Energy Technology Laboratory (NETL) nor any person acting on behalf of these organizations:
A. Makes any warranty or representation, express or implied, with respect to the accuracy, completeness, or usefulness of the information contained in this document, or that the use of any information, apparatus, method, or process disclosed in this document may not infringe on privately owned rights; or
B. Assumes any liability with this report as to its use, or damages resulting from the use of any information, apparatus, method, or process disclosed in this document.
Reference herein to any specific commercial product, process, or service by trade name, trademark, manufacturer, or otherwise, does not necessarily constitute or imply its endorsement, recommendation, or favoring by NETL. The views and opinions of the authors expressed herein do not necessarily state or reflect those of NETL.
copyright: true

## General comment
This process is part of the NETL Unit Process Library. To access the library and the original dataset:
1) Navigate to the NETL LCA home page (http://www.netl.doe.gov/lca)
2) Then navigate to the “Unit Process Library”
3) From the library, the unit process of interest can be found either through the "Complete Listing of the Unit Process Library link" or through the link to the "Unit Process Database" spreadsheet
4) For each process, a Data Sheet (DS) and Data File (DF) are available

BRIEF DESCRIPTION
This parameterized unit process calculates the amount of electricity and diesel required to power a coal conveyor, service truck, and load haul dumper for an underground mine.

GOAL AND SCOPE
This unit process provides a summary of relevant input and output flows associated with the amount of electricity and diesel required to power a coal conveyor, service trucks, and load haul dumper. All pieces of equipment are used to transport coal from an underground mine. The key inputs are electricity, diesel, and extracted coal, while coal is the key output. The unit process is based on the reference flow of one kg of coal. The relevant flows of this unit process are described below and shown the associated documentation (referenced in the Citation and Associated Documentation section below).

BOUNDARY AND DESCRIPTION
A visual representation of the boundary of this unit process is available in the associated documentation (referenced in the Citation and Associated Documentation section below). The electricity and diesel requirements were calculated using the Energy and Environmental Profile of the U.S. Mining Industry developed by the U.S. Department of Energy’s Energy Efficiency and Renewable Energy division and the National Mining Association (U.S. Department of Energy and National Mining Association). Chapter Two of the source focused on coal; description of coal types, overview of coal mining, energy requirements for underground and surface mines, and emissions from coal mining. The data source provides energy data for specific mining activities such as coal handling, extraction, and grinding. BCS, Incorporated (BCS) developed the data by integrating the U.S. Department of Energy’s Energy Information Administration’s 1997 Coal Industry data into the Western Mining Engineering, Inc.’s SHERPA Mine Cost Software to create 2002 estimates. BCS also used Mine and Mill Equipment Cost, An Estimator’s Guide to develop the data. Newer data for specific coal mining processes are not available. This unit process parameterizes key variables, which allow for evaluation of data uncertainty when used in a life cycle model.

A conveyor, load haul dumper, and service trucks were the pieces of equipment used for coal handling at an underground mine; the conveyor and load haul dumper are powered by electricity, while the service trucks use diesel. To calculate the electricity requirement (in kWh per kg of coal), the sum of the conveyor and load haul dumper energy requirements, in Btu per ton, was divided by the appropriate conversions to determine the electricity needed on the basis of one kg of coal, which is the reference flow. No coal losses were assumed. To obtain the diesel requirement, on the basis of the reference flow, the energy requirement for the service trucks was divided by the appropriate conversion to convert tons to kg and then divided by the high heating value of diesel (U.S. Energy Information Administration, 2011), in Btu per kg, to obtain the diesel requirement in kg of diesel per kg of coal. It was assumed that vehicle efficiency was included in the diesel energy requirements. The electricity and diesel requirements were placed as parameters in the DS file, so the items could be adjusted to measure uncertainties.

Additional details regarding input and output flows, including calculation methods, are contained in the associated documentation (referenced in the Citation and Associated Documentation section below).

This process contains one or more surrogate product flows as replacements for proprietary product flows used in the NETL Unit Process Library. All surrogate flow were taken from the U.S. Life Cycle Inventory Database; a list of surrogate flows used in this process is provided below:
1) Electricity, at Grid, US, 2010

CITATION AND ASSOCIATED DOCUMENTATION
This document should be cited as:
National Energy Technology Laboratory (NETL). 2015. NETL Life Cycle Inventory Data – Unit Process: Coal handling; Underground mine. U.S. Department of Energy, National Energy Technology Laboratory. Last Updated: September 2015 (version 01). Retrieved on [Date] from [URL for this dataset].
www.netl.doe.gov/LCA (http://www.netl.doe.gov/LCA)

This dataset is part of the NETL Unit Process Library. The Library offers additional information concerning this dataset in the form of a Detailed Spreadsheet Documentation (DS) file and a Process Documentation File (DF). The DS file is an Excel file that contains all of the parameters, inputs, and outputs for a given system as well as background data, calculations and quality scores. The DF file is a PDF document that contains major assumptions and data sources that are the basis for each unit process. The NETL Unit Process Library is located on the NETL website (netl.doe.gov) under Research / Energy Analysis / Energy Trends and Issues / Life Cycle Analysis / Unit Process Library.

This dataset was converted directly from the DS with additional supporting information provided by the DF. Full citations for the DS and DF are given below.

DS File
National Energy Technology Laboratory (NETL). 2013. NETL Life Cycle Inventory Data – Unit Process: Coal Handling Energy, Underground. U.S. Department of Energy, National Energy Technology Laboratory. Last Updated: July 2013 (version 01). Retrieved on 09/15/2015 from: http://www.netl.doe.gov/File%20Library/Research/Energy%20Analysis/Life%20Cycle%20Analysis/UP_Library/DS_Stage1_O_Coal_Handling_Underground_2013-01.xlsx

DF File
National Energy Technology Laboratory (NETL). 2013. NETL Life Cycle Inventory Data – Unit Process: Coal Handling Energy, Underground. U.S. Department of Energy, National Energy Technology Laboratory. Last Updated: July 2013 (version 01). Retrieved on09/15/2015 from: http://www.netl.doe.gov/File%20Library/Research/Energy%20Analysis/Life%20Cycle%20Analysis/UP_Library/DF_Stage1_O_Coal_Handling_Underground_2013-01.pdf

## Technology
This unit process provides a summary of relevant input and output flows associated with the amount of electricity and diesel required to power a coal conveyor, service trucks, and load haul dumper. All pieces of equipment are used to transport coal from an underground mine. A conveyor, load haul dumper, and service trucks were the pieces of equipment used for coal handling at an underground mine; the conveyor and load haul dumper are powered by electricity, while the service trucks use diesel. A visual representation of the boundary of this unit process is available in the associated documentation (referenced in the Citation and Associated Documentation section of the Description field.

## Parameters
- Diesel: 0.00146
  [kg/kg] kg of diesel for handling 1 kg of coal
- Electricity: 0.01969
  [kWh/kg] Adjustable parameter - Electrical energy required to operate handling equipment
- Diesel_EDensity: 43.2
  [MJ/kg diesel] Energy density of diesel taken from the Excel model of NETL's 2008 Petroleum Baseline (http://netl.doe.gov/File%20Library/Research/Energy%20Analysis/Life%20Cycle%20Analysis/PetroBasedFuelsLCGHGAnlys2005BslnModel.xls)

## Reference product
- Coal; Handled; From underground mine: 1 kg; data quality (2,3,4,1,1)

## Inputs from technosphere
- Electricity, at Grid, US, 2010: 0.01969 kWh; = Electricity; data quality (2,3,4,1,1)
- Thermal energy; From diesel fired equipment; Production mix: 0.063072 MJ; = Diesel*Diesel_EDensity; data quality (2,3,4,1,1)
- Coal; Production mix, from underground mine: 1 kg; data quality (2,3,4,1,1)

## Inventory method
Attributional

## Modelling constants
All elementary and technosphere flows are calculated on a functional unit basis. Calculations involving combustion primarily to generate useful work are done using lower heating values (LHV) and calculations involving combustion primarily to generate useful heat are done using higher heating values (HHV). Unless explicitly stated in the associated reference documents applicable calculations assumed standard atmospheric temperature and pressure (SATP).

## Completeness
Individual relevant flows captured

## Data selection
Best publically available data

## Data treatment
No allocation applied

## Data collection
No primary data collected

## Intended application
This is a gate-to-gate extraction process and can be used for any type of LCA study.

## Project
National Energy Technology Laboratory (NETL) Unit Process Library

## Sources
- U.S. Energy Information Administration (EIA). 2011. Appendix A British Thermal Unit Conversion Factors
- National Energy Technology Laboratory (NETL). 2013. Coal handling; Underground mine
- U.S. Department of Energy (DOE) and National Mining Association (NMA). 2002. Energy and Environmental Profile of the U.S. Mining Industry: Chapter 2 Coal
