# Pulp, kraft market, bleached, average production, at mill

Dataset: openLCA process, unit process
Category: Pulp, Paper, and Paperboard Mills
Geography: RNA
Time period: 2006-01-01 to 2006-01-01
Generated by: Caroline Gaudreault
Reviewer: Martha Stevenson
Published in: AF&PA
restrictionsDescription: All information can be accessed by everybody.
copyright: false

## General comment
Bleached kraft market pulp, average North American production, at mill. By-products were allocated 0% of the impacts to enable the user to choose and apply their own allocation method more easily. All flows are production-weighted means. Data were developed for a full LCA that was critically reviewed. Reviewers were: • Martha Stevenson, Chairperson – Private Consultant to the public interest with ten years of experience in sustainability, environmental management, packaging and materials recovery; led the development of the Design Guidelines for Sustainable Packaging and the COMPASS software used to compare the environmental impacts of package designs; • Pascal Lesage – Life cycle assessment consultant, Researcher at École Polytechnique de Montréal [at the Inter-University Research Centre for the Life Cycle of Products, Processes and Services (CIRAIG) in Montreal]; and • Dale Phenicie, Environmental Affairs Consulting – Consultant with 35 years of experience in environmental protection and process consulting for the forest products industry. Has served on several U.S. EPA Task Forces dealing with water quality issues and authored several AF&PA Environmental, Health and Safety/Sustainability reports.

## Technology
current technology mix for kraft pulping

## Time period
Primary data collected from participating companies and associations for their operational activities are representative for 2006 and 2007.

## Reference product
- Pulp, kraft market, bleached, average production, at mill: 816.47 kg
  816.46623 dry kg is equal to 1 air-dried short ton (10% water).

## By-products
- Turpentine, at bleached kraft market pulp mill: 2.3133 kg
  Produced as byproduct of pulp production. Sold i.e., not used on site. Allocation set to 0%.
- Electricity, at bleached kraft market pulp mill: 51.389 kWh
  (same comment as for Turpentine, at bleached kraft market pulp mill)
- Tall oil, at bleached kraft market pulp mill: 29.846 kg
  (same comment as for Turpentine, at bleached kraft market pulp mill)
- Steam, at bleached kraft market pulp mill: 114 MJ
  (same comment as for Turpentine, at bleached kraft market pulp mill)

## Inputs from technosphere
- Transport, barge, average fuel mix: 11.008 t*km
  Transportation of chemicals. Talc: 0 km. Sodium hydroxide: 776 km. Sodium chlorate, sulfuric acid, hydrogen peroxide, quicklime and oxygen: 489 km. Methanol: 671 km. Transports of fuels. Coal: 515 km. Residual fuel oil, Distillate fuel oil: 163 km. Kerosene and gasoline, Other fossil assumed to be diesel : 163 km. Tire derived fuel: 315 km.
- Transport, train, diesel powered: 122.05 t*km
  Transportation of pulpwood and chips to pulp mill. Pulpwood: 375 km, chips: 127 km.
- Transport, train, diesel powered: 101.32 t*km
  Transportation of chemicals. Talc: 1204 km. Sodium hydroxide: 927 km. Sodium chlorate, sulfuric acid, hydrogen peroxide, quicklime and oxygen: 1088 km. Methanol: 1254 km. Transports of fuels. Coal: 653 km. Residual fuel oil, Distillate fuel oil: 1114 km. Liquefied petroleum gas: 1246 km. Tire derived fuel: 1156 km.
- Quicklime, at plant: 3.4473 kg
- Transport, pipeline, natural gas: 64.5 t*km
  Transports of fuels. Natural gas: 33584 tkm/MMcf, Average transportation for natural gas in North America according to the US LCI database
- CUTOFF Disposal, wastewater treatment plant residuals, to uns. land application: 3.1751 kg
  Typically off-site agricultural/silvicultural. (uns. = unspecified)
- CUTOFF Electricity, at grid, BC: 70.272 kWh
- CUTOFF Disposal, solid waste, unspecified, to unspecified beneficial use: 8.1647 kg
  Typically off-site.
- CUTOFF Pulpwood, softwood, average, at forest road, US S: 0.39513 m3
  Mass of incoming southern softwood logs intended for pulping. Assumed density: 450 kg/m3. US LCI: "Softwood logs with bark, harvested at average intensity site, at mill, US SE/US" can be used but transportation needs to be removed as it is already included here. Wood usage in the process is distrubuted as follows: 30% ends up in pulp, 30% in self-generated hogged fuel and 40% in black liquor. All the hogged fuel is combusted onsite. Combustion of this fuel is important to the economic viability of all modern pulp mills. Substitution of other fuels for this fuel is not recommended. Need to be paired with "Self-generated hogged fuel, combusted in industrial boiler, at pulp and paper mill". Black liquor solides are combusted onsite as part of the pulping chemical recovery process that is integral to and is essential to the economic viability of all modern pulp mills. Substitution of other fuels for this fuel is not recommended.
- CUTOFF Disposal, unspecified ashes, to unspecified land application: 2.0865 kg
  Mix of wood and coal ashes. Based on typical ash contents can be assumed to be 78% from wood and 22% from coal. Typically off-site agricultural/silvicultural.
- Electricity, at grid, Western US, 2000: 33.592 kWh
  Net purchased, National average grid, Medium voltage: <50 kV
- CUTOFF Disposal, unspecified ashes, to unspecified landfill: 13.336 kg
  Mix of wood and coal ashes. Based on typical ash contents can be assumed to be 78% from wood and 22% from coal. Typically company-owned, but some third party.
- CUTOFF Electricity, at grid, QC: 131.66 kWh
- CUTOFF Hydrogen peroxide, at plant: 0.27079 kg
  ei: Hydrogen peroxide, 50% in H2O, at plant
- CUTOFF Sawdust, at sawmill, US: 55.338 kg
  Mass of incoming sawdusts intended for pulping. US LCI: "Sawdust, at sawmill, US SE/kg" can be used as a proxy. The actual mix of sawdustsis the same as the one for pulp chips. Sawdust usage in the process is distrubuted as follows: 42% ends up in pulp and 58% in black liquor. Combusted onsite as part of the pulping chemical recovery process that is integral to and is essential to the economic viability of all modern pulp mills. Substitution of other fuels for this fuel is not recommended.
- CUTOFF Disposal, solid waste, unspecified, to unspecified incinerator: 0.48081 kg
  Typically on-site with energy recovery.
- Transport, single unit truck, diesel powered: 2.9929 t*km
  Transportation of solid waste to land application and other beneficial use. Other management options assumed to occur onsite. Rounded trip distance: 64.4 km.
- Natural gas, combusted in industrial boiler: 1.0898 m3
  Purchased steam, assumed to be natural gas.
- CUTOFF Disposal, solid waste, unspecified, to unspecified landfill: 25.583 kg
  Typically company-owned, but some third party.
- Sodium hydroxide, production mix, at plant: 19.096 kg
- CUTOFF Disposal, wastewater treatment plant residuals, to uns. beneficial use: 0.90718 kg
  Typically off-site. (uns. = unspecified)
- Transport, combination truck, average fuel mix: 19.126 t*km
  Transportation of chemicals. Talc: 295 km. Sodium hydroxide: 230 km. Sodium chlorate, sulfuric acid, hydrogen peroxide, quicklime and oxygen: 183 km. Methanol: 632 km. Transports of fuels. Coal: 153 km. Residual fuel oil, Distillate fuel oil: 50 km. Liquefied petroleum gas, Kerosene and gasoline, Other fossil assumed to be diesel: 80 km. Tire derived fuel: 98 km.
- CUTOFF Disposal, wastewater treatment plant residuals, to uns. landfill: 14.696 kg
  Typically company-owned, but some third party. (uns. = unspecified)
- CUTOFF Electricity from hydro: 17.222 kWh
  Generation at company facilities. Ei: Electricity, hydropower, at run-of-river power plant/CH S
- CUTOFF Electricity, at grid, NB: 8.8806 kWh
- CUTOFF Pulpwood, hardwood, average, at forest road, US S: 0.17725 m3
  Mass of incoming southern hardwood logs intended for pulping. Assumed density: 650 kg/m3. US LCI: "Roundwood, hardwood, green, at mill, SE/US" can be used but transportation needs to be removed as it is already included here. Wood usage in the process is distrubuted as follows: 30% ends up in pulp, 30% in self-generated hogged fuel and 40% in black liquor. All the hogged fuel is combusted onsite. Combustion of this fuel is important to the economic viability of all modern pulp mills. Substitution of other fuels for this fuel is not recommended. Need to be paired with "Self-generated hogged fuel, combusted in industrial boiler, at pulp and paper mill". Black liquor solides are combusted onsite as part of the pulping chemical recovery process that is integral to and is essential to the economic viability of all modern pulp mills. Substitution of other fuels for this fuel is not recommended.
- Electricity, at grid, Eastern US, 2000: 114.29 kWh
  Net purchased, National average grid, Medium voltage: <50 kV
- CUTOFF Talc, at plant: 16.964 kg
  ei: Malusil, at plant
- CUTOFF Pulp chips, at sawmill, US: 1321.8 kg
  Mass of incoming pulp chips intended for pulping. US LCI: "Pulp chips, at sawmill,US SE/kg" can be used as a proxy. The actual mix of chips is: northern softwood chips: 66%, northern hardwood chips: 18%, southern softwood chips: 11% and southern hardwood chips: 6%. Pulp chips usage in the process is distrubuted as follows: 42% ends up in pulp and 58% in black liquor. Combusted onsite as part of the pulping chemical recovery process that is integral to and is essential to the economic viability of all modern pulp mills. Substitution of other fuels for this fuel is not recommended.
- Pulpwood, softwood, average, at forest road, INW: 0.15547 m3
  Mass of incoming northern softwood logs (assumed 36.5% West based on mill location) intended for pulping. Assumed density: 450 kg/m3. Wood usage in the process is distrubuted as follows: 30% ends up in pulp, 30% in self-generated hogged fuel and 40% in black liquor. All the hogged fuel is combusted onsite. Combustion of this fuel is important to the economic viability of all modern pulp mills. Substitution of other fuels for this fuel is not recommended. Need to be paired with "Self-generated hogged fuel, combusted in industrial boiler, at pulp and paper mill". Black liquor solides are combusted onsite as part of the pulping chemical recovery process that is integral to and is essential to the economic viability of all modern pulp mills. Substitution of other fuels for this fuel is not recommended.
- Pulpwood, hardwood, average, at forest road, NE-NC: 0.46476 m3
  Mass of incoming northern hardwood logs intended for pulping. Assumed density: 650 kg/m3. Wood usage in the process is distrubuted as follows: 30% ends up in pulp, 30% in self-generated hogged fuel and 40% in black liquor. All the hogged fuel is combusted onsite. Combustion of this fuel is important to the economic viability of all modern pulp mills. Substitution of other fuels for this fuel is not recommended. Need to be paired with "Self-generated hogged fuel, combusted in industrial boiler, at pulp and paper mill". Black liquor solides are combusted onsite as part of the pulping chemical recovery process that is integral to and is essential to the economic viability of all modern pulp mills. Substitution of other fuels for this fuel is not recommended.
- Methanol, at plant: 4.8988 kg
- CUTOFF Disposal, wastewater treatment plant residuals, to uns. Incinerator: 6.3503 kg
  Typically on-site with energy recovery. (uns. = unspecified)
- CUTOFF Disposal, unspecified ashes, to unspecified beneficial use: 6.8946 kg
  Mix of wood and coal ashes. Based on typical ash contents can be assumed to be 78% from wood and 22% from coal. Typically off-site.
- Sulfuric acid, at plant: 30.209 kg
- Oxygen, liquid, at plant: 4.7627 kg
- CUTOFF Electricity, at grid, ON: 27.8 kWh
- Fuels, burned at bleached kraft market pulp mill, average production, at mill: 10867 MJ
  Includes all fuels burned on site
- Transport, ocean freighter, average fuel mix: 6.0443 t*km
  Transportation of chemicals. Talc: 0 km. Sodium hydroxide: 24.1 km. Sodium chlorate, sulfuric acid, hydrogen peroxide, quicklime and oxygen: 517 km. Methanol: 740 km. Transports of fuels. Residual fuel oil , Distillate fuel oil: 682 km. Kerosene and gasoline, Other fossil assumed to be diesel: 1183 km.
- Pulpwood, softwood, average, at forest road, NE-NC: 0.2699 m3
  Mass of incoming northern softwood logs (assumed 63.5% East/Central based on mill location) intended for pulping. Assumed density: 450 kg/m3. Wood usage in the process is distrubuted as follows: 30% ends up in pulp, 30% in self-generated hogged fuel and 40% in black liquor. All the hogged fuel is combusted onsite. Combustion of this fuel is important to the economic viability of all modern pulp mills. Substitution of other fuels for this fuel is not recommended. Need to be paired with "Self-generated hogged fuel, combusted in industrial boiler, at pulp and paper mill". Black liquor solides are combusted onsite as part of the pulping chemical recovery process that is integral to and is essential to the economic viability of all modern pulp mills. Substitution of other fuels for this fuel is not recommended.
- Transport, combination truck, average fuel mix: 802.98 t*km
  Transportation of pulpwood and chips to pulp mill. Pulpwood: 200 km (rounded trip distance), chips: 254 km (rounded trip distance).
- CUTOFF Sodium chlorate, at plant: 50.439 kg
  ei: Sodium chlorate, powder, at plant
- CUTOFF Disposal, solid waste, unspecified, to unspecified land application: 3.6287 kg
  Typically off-site agricultural/silvicultural

## Inputs from nature
- Cooling water, non-contact: 14242 kg
  Estimated based on individual mill process effluent and cooling water flows and process characteristics. Share between process and cooling estimated.
- Process water: 65968 kg
  (same comment as for Cooling water, non-contact)

## Emissions to nature
- Barium: 0.018909 kg
  From onsite management of solid waste. All metals reported as elemental althought in most cases they are releases into metal compounds.
- Mercury: 7.2632e-6 kg
  (same comment as for Barium)
- Nitrogen compounds, unspecified: 0.34275 kg
  In effluent.
- Lead: 4.6867e-5 kg
  In effluent.
- Copper: 0.0034313 kg
  (same comment as for Barium)
- Cooling water, non-contact: 14242 kg
  Estimated based on individual mill process effluent and cooling water flows and process characteristics. Share between process and cooling estimated. Includes evaporation and other losses (e.g., water in solid waste).
- Nickel: 0.00016131 kg
  In effluent.
- Ammonia: 0.13726 kg
  From process i.e., excluding from combustion of fuels not including black liquor solids.
- Zinc: 0.035113 kg
  (same comment as for Barium)
- Nickel: 0.0012154 kg
  (same comment as for Barium)
- Water, evaporated: 1155.9 kg
  (same comment as for Cooling water, non-contact)
- Barium: 0.0032342 kg
  In effluent.
- Arsenic: 0.00046523 kg
  (same comment as for Barium)
- Manganese: 0.022711 kg
  In effluent.
- Process effluent: 66975 kg
  (same comment as for Cooling water, non-contact)
- Acetaldehyde: 0.030164 kg
  From process i.e., excluding from combustion of fuels not including black liquor solids.
- Mercury: 2.4878e-7 kg
  In effluent.
- Copper: 0.00014606 kg
  In effluent.
- Phosphorus compounds, unspecified: 0.043324 kg
  In effluent.
- Vanadium: 0.00072708 kg
  In effluent.
- Chromium: 0.0029099 kg
  (same comment as for Barium)
- Lead: 0.012058 kg
  (same comment as for Barium)
- Manganese: 0.085879 kg
  (same comment as for Barium)
- Vanadium: 0.00086319 kg
  (same comment as for Barium)
- Arsenic: 0.00016773 kg
  In effluent.
- Suspended solids, unspecified: 2.4585 kg
  In effluent.
- BOD5, Biochemical Oxygen Demand: 1.6565 kg
  In effluent.
- Chromium: 0.00019581 kg
  In effluent.
- Zinc: 0.0011797 kg
  In effluent.
- AOX, Adsorbable Organic Halogen as C: 0.2105 kg
  In effluent.

## Sampling procedure
The survey included results from 53 pulp mills representing 15.5 million short tons per year (TPY), nearly 97% of 2006 production volume.

## Sources
- AF&PA
