# Calcium carbonate, ground, 20 micron, at plant

Dataset: openLCA process, unit process
Category: Lime and Gypsum Product Manufacturing
Geography: US
Time period: 2013-12-31 to 2015-12-30
Generated by: Sustainble Solutions Corporation
Reviewer: Industrial Ecology Consultants
Published in: Sustainable Solutions Corporation. (2016). IMA-NA Calcium Carbonate Life Cycle Assessment
restrictionsDescription: All information can be accessed by everybody.
copyright: false

## General comment
This unit process represents the gate-to-gate production of 1 kg of calcium carbonate (20 micron) from calcium carbonate rock (i.e., marble, limestone, or chalk) using average technologies for the contiguous United States in 2014-2015. Additional details on the technologies used in this process are available in the Technology description field at the bottom of this section.

The system boundary includes: 1) quarry operations at the mine/quarry; 2) raw material transport from quarry operations to plant processing; 3) plant processing; 4) overhead energy consumption (e.g., lighting, heating, cooling, etc.) at quarry operations and plant processing; and 5) manufacturing waste and emissions. The following processes and life cycle phases fall outside of the system boundary: 1) construction of capital equipment; 2) maintenance of operation and support equipment; 3) Human labor and employee commute; 4) final product shipping; 5) packaging; 6) product use; and 7) product disposal. Additional details regarding system boundaries are available in the Modeling and validation section in the Sampling Procedure field.

## Technology
The technologies described in this process are representative of average technologies in use in the United States from 2014-2015.

Quarry operations include mechanical extraction, primary crushing, screening, and intermediate storage of calcium carbonate rock (marble, limestone, or chalk). The output of quarry operations is then transported via barge, train, or truck to plant processing which includes jaw crushing, washing, impact crushing, ball milling, and then classifying based on particle size.

## Geography
This unit process is reflective of U.S. production.

## Time period
This unit process is representative of operations from 2014-2015.

## Reference product
- Calcium carbonate, ground, 20 micron, at plant: 1 t

## Inputs from technosphere
- CUTOFF Disposal, mineral waste, underground deposit: 1510.17 kg
- CUTOFF Oil and grease, at plant: 0.0651466 kg
  Materials for quarrying equipment
- Transport, barge, diesel powered: 265.657 t*km
  Raw material transport to processing plant
- Residual fuel oil, combusted in industrial boiler: 0.32408 l
- CUTOFF Naphtha, at regional storage: 0.0134887 l
  Assumed density of 0.665 kg/l, materials for quarrying equipment
- CUTOFF Blasting: 0.745162 kg
  Explosives for quarrying
- Transport, train, diesel powered: 252.429 t*km
  Raw material transport to processing plant
- Natural gas, combusted in industrial equipment: 0.000253532 m3
- CUTOFF Disposal, municipal solid wastes, to sanitary landfill: 0.023369 kg
- CUTOFF Lead, at regional storage: 0.000507063 kg
  Battery proxy for quarrying equipment
- Polybutadiene, at plant: 0.0122357 kg
  Materials for quarrying equipment
- CUTOFF Carbon black, at plant: 6.16192e-5 kg
  Materials for quarrying equipment
- CUTOFF Water, process: 0.186291 kg
  Used in quarry operations for washing the quarried stone to remove clay and other residues
- Gasoline, combusted in equipment: 0.0160937 l
- Kerosene, at refinery: 0.0250225 l
  Materials for quarrying equipment
- Ethylene glycol, at plant: 0.0155426 kg
  Antifreeze for quarrying equipment
- CUTOFF Conveyor belt, at plant: 0.000396832 m
- Electricity, at Grid, US, 2010: 44.8641 kWh
- Diesel, combusted in industrial equipment: 1.86291 l
- Transport, combination truck, diesel powered: 52.47 t*km
  Raw material, accessory material and fuel transport to quarry and processing plant
- CUTOFF Sulfuric acid, at plant: 0.000760595 kg
  Battery proxy for quarrying equipment
- Mixed recyclables, at collection, curbside, weight basis: 0.0174165 kg
- CUTOFF Textile, woven cotton, at plant: 0.00296522 kg
  Materials for quarrying equipment
- Steel, stainless 304, quarto plate: 0.0208337 kg
  Materials for quarrying equipment and materials for screens

## Inputs from nature
- Calcium carbonate: 2.49234 t

## Emissions to nature
- Particulates, < 10 um: 0.00864212 kg
  Direct emissions from quarry operations and plant processing
- Water, process: 0.186291 kg
  Water output from washing the quarried stone during quarry operations. Water is discharged to river.
- Particulates, < 2.5 um: 0.000573202 kg
  Direct emissions from quarry operations and plant processing
- Particulates, unspecified: 1.45505 kg
  Direct emissions from quarry operations and plant processing

## Sampling procedure
BOUNDARY CONDITIONS
The system boundary includes: 1) quarry operations at the mine/quarry; 2) raw material transport from quarry operations to plant processing; 3) plant processing; 4) overhead energy consumption (e.g., lighting, heating, cooling, etc.) at quarry operations and plant processing; and 5) manufacturing waste and emissions.

Quarry operations include mechanical extraction, primary crushing, screening, and intermediate storage of calcium carbonate rock (marble, limestone, or chalk). Plant processing includes jaw crushing, washing, impact crushing, ball milling, and then classifying based on particle size. Both quarry operations and plant processing include inputs of energy/fuel, water, and support materials and outputs of waste and emissions.

The following processes and life cycle phases fall outside of the system boundary: 1) construction of capital equipment; 2) maintenance of operation and support equipment; 3) human labor and employee commute; 4) final product shipping; 5) packaging; 6) product use; and 7) product disposal.

DATA COLLECTION
Primary data were collected for both quarry operations and plant processing. These data represent 2014-2015 weighted industry averages based on production from multiple U.S. locations. Quarry operations data were collected from four companies and five locations. Plant processing data were collected from three companies and three locations.

Secondary data were taken from the ecoinvent 3.2 database (Wernet et al., 2016) and the U.S. Life Cycle Inventory Database (National Renewable Energy Laboratory, 2016). The data were global except where otherwise specified.

UNCERTAINTY ESTIMATION
Uncertainty was not quantified.

## Review details
The life cycle assessment study which produced this unit process was critically reviewed per ISO 14040 and 14044 standards by Dr. Thomas Gloria of Industrial Ecology Consultants.

## Sources
- Institute for Environment and Sustainablility. (2011). General guide for Life Cycle Assessment - Detailed guidance.
- National Renewable Energy Laboratory (2016). U.S. Life Cycle Inventory Database.
- Wernet et al. (2016) The ecoinvent database version 3 (part I): overview and methodology.
- Sustainable Solutions Corporation. (2016). IMA-NA Calcium Carbonate Life Cycle Assessment
