# Polyethylene, high density, resin, at plant, CTR

Dataset: openLCA process, unit process
Category: All Other Basic Organic Chemical Manufacturing
Geography: RNA
Time period: 2003-01-01 to 2004-01-01
Generated by: Franklin Associates
Published in: THE PLASTICS DIVISION OF THE ACC
restrictionsDescription: All information can be accessed by everybody.
copyright: false

## General comment
Scrap is produced as a coproduct during this process. A mass basis was used to partition the credit for each product. Complete inventory data and metadata are available in full in the final report and appendices, Cradle-to-Gate Life Cycle Inventory of Nine Plastic Resins and Four Polyurethane Precursors. This report has been extensively reviewed within Franklin Associates and has undergone partial critical review by ACC Plastics Division members and is available at: www.americanchemistry.com. Quantities may vary slightly between the reference to main source and and this module due to rounding. Important note: although most of the data in the US LCI database has undergone some sort of review, the database as a whole has not yet undergone a formal validation process. Please email comments to lci@nrel.gov.

## Technology
Polymerization of ethylene via a combination of slurry and UNIPOL gas phase processes

## Geography
Representative of North America (US and Canada)

## Reference product
- Polyethylene, high density, resin, at plant, CTR: 1 kg

## By-products
- Recovered energy, for Polyethylene, high density, resin, at plant, CTR: 0.02871 MJ

## Inputs from technosphere
- CUTOFF Disposal, solid waste, process, to waste-to-energy: 2.677e-5 kg
- CUTOFF Disposal, solid waste, process, to sanitary landfill: 0.026965 kg
- CUTOFF Disposal, solid waste, fuel, to municipal incineration: 0.049246 kg
- CUTOFF Disposal, solid waste,process, to municipal incineration: 0.003824 kg

## Inputs from nature
- Energy, kinetic (in wind), converted: 0.0052174 MJ
- Oil, crude, in ground: 0.055945 kg
  This flow represents the amount of crude oil that is used for fuel. The energy content of the crude oil used for fuel is 43.7 MJ per kg.
- Energy, geothermal: 0.0052728 MJ
- Gas, natural, in ground: 0.54669 m3
  This flow represents the amount of natural gas that is used for fuel. The energy content of the natural gas used for fuel is 36.7 MJ per m3.
- Energy, from biomass: 0.0021728 MJ
- Energy, solar: 0.00022143 MJ
- Water, consumptive use, unspecified origin/m3: 0.0092205 m3
- Energy, from hydro power: 0.1002 MJ
- Coal, unprocessed bituminous, in ground: 0.10665 kg
- Oil, crude, in ground: 0.19402 kg
  This flow represents the amount of crude oils that is a material input for producing the resin output. The energy content of the crude oil used as EMR/feedstock is 43.7 MJ per kg. The energy content multiplied by the mass should be considered an Energy of Material Resource (EMR)/feedstock energy.
- Uranium oxide, 332 GJ per kg, in ore: 2.6136e-6 kg
- Energy, unspecified: 0.0070619 MJ
  Energy unspecified reflects "other fossil" fuels
- Coal, lignite, in ground: 0.010253 kg
- Gas, natural, in ground: 0.85745 kg
  This flow represents the amount of natural gas that is a material input for producing the resin output. The energy content of the natural gas used as EMR/feedstock is 49.8 MJ per kg. The energy content multiplied by the mass should be considered an Energy of Material Resource (EMR)/feedstock energy.

## Emissions to nature
- Ethane, 1,1,1-trichloro-, HCFC-140: 4.8801e-13 kg
- Antimony: 1.384e-9, 2.0179e-8 kg (2 entries, compartments not in this file)
- Molybdenum: 8.3261e-9 kg
- Benzo(b,j,k)fluoranthene: 5.5003e-12 kg
- Selenium: 6.7331e-8, 1.4782e-8 kg (2 entries, compartments not in this file)
- Surfactants, unspecified: 1.5039e-7 kg
- Oils, unspecified: 1.3613e-5 kg
- Carbon monoxide: 0.00030562 kg
- Chromium VI: 3.9502e-9 kg
- Barium: 0.00044519 kg
- Aluminum: 3.5097e-5 kg
- Sulfur oxides: 0.000549 kg
- Benzenes, alkylated, unspecified: 6.7751e-8 kg
- Copper, ion: 4.3103e-8 kg
- Radionuclides (Including Radon): 3.7152e-6 kg
- Ammonium, ion: 2.966e-8 kg
- Arsenic: 2.4685e-8 kg
- Cadmium, ion: 1.1047e-8 kg
- Silver: 4.4231e-7 kg
- Chloroform: 1.4396e-12 kg
- o-Xylene: 3.9139e-9 kg
- Chromium: 8.9753e-7, 2.2791e-8 kg (2 entries, compartments not in this file)
- Sulfuric acid, dimethyl ester: 1.1712e-12 kg
- Dioxins, measured as 2,3,7,8-tetrachlorodibenzo-p-dioxin: 7.2087e-14 kg
- Surfactants: 2.9222e-8 kg
- Benzene: 3.8872e-7, 0.00011632 kg (2 entries, compartments not in this file)
- COD, Chemical Oxygen Demand: 0.00012441 kg
- Styrene: 6.1001e-13, 9.9e-10 kg (2 entries, compartments not in this file)
- Nitrogen, total: 7.3835e-8 kg
- Radium-226/kg: 1.3112e-14 kg
- Acetaldehyde: 1.5146e-8 kg
- Arsenic, ion: 6.9193e-8 kg
- Phthalate, dioctyl-: 1.7812e-12 kg
- Carbon dioxide, fossil: 1.4487 kg
- Xylene: 1.6497e-7, 0.0001051 kg (2 entries, compartments not in this file)
- Phenanthrene: 1.3501e-10, 2.9066e-10 kg (2 entries, compartments not in this file)
- Methyl ethyl ketone: 9.5161e-12, 1.8022e-11 kg (2 entries, compartments not in this file)
- Mercaptans, unspecified: 4.8917e-9 kg
- Strontium: 1.9747e-5 kg
- Copper: 8.1635e-8, 2.9125e-10 kg (2 entries, compartments not in this file)
- Mercury: 4.1691e-10, 5.9932e-9 kg (2 entries, compartments not in this file)
- Beryllium: 4.3209e-9, 1.321e-9 kg (2 entries, compartments not in this file)
- Cyanide: 1.6158e-11, 6.1001e-11 kg (2 entries, compartments not in this file)
- Particulates, < 10 um: 8.6795e-5 kg
- Nickel: 2.0848e-7, 8.3187e-8 kg (2 entries, compartments not in this file)
- Aldehydes, unspecified: 4.7989e-8 kg
- PAH, polycyclic aromatic hydrocarbons: 3.3147e-9 kg
- Zinc: 1.9417e-10, 8.8561e-7 kg (2 entries, compartments not in this file)
- Dibenzofuran: 4.2571e-11 kg
- Biphenyl: 8.5006e-11, 4.3869e-9 kg (2 entries, compartments not in this file)
- Phenols, unspecified: 8.9917e-8, 9.7361e-9 kg (2 entries, compartments not in this file)
- Benzene, pentamethyl-: 1.678e-11 kg
- Benzoic acid: 3.6795e-7 kg
- Fluoride: 4.8241e-7, 4.1217e-9 kg (2 entries, compartments not in this file)
- Acenaphthene: 2.5501e-11 kg
- Hydrogen chloride: 6.1738e-5 kg
- Particulates, < 2.5 um: 8.1402e-5 kg
- o-Cresol: 1.0442e-8 kg
- Fluorene: 1.8337e-9, 4.5502e-11 kg (2 entries, compartments not in this file)
- Pyrene: 1.6501e-11 kg
- Sulfate: 7.5064e-5 kg
- Naphthalene, 2-methyl-: 5.5879e-9 kg
- Chloride: 0.0091153 kg
- Formaldehyde: 5.1729e-7 kg
- 4-Methyl-2-pentanone: 9.4486e-10 kg
- Ethene, tetrachloro-: 2.3323e-9 kg
- Butadiene: 7.7145e-10 kg
- Lead: 2.7746e-8, 1.8586e-7 kg (2 entries, compartments not in this file)
- Benzo(a)pyrene: 1.9001e-12 kg
- Ammonium chloride: 1.3872e-7 kg
- Methane: 0.000381 kg
- Radium-228/kg: 6.7071e-17 kg
- Manganese: 1.0731e-6, 3.3313e-8 kg (2 entries, compartments not in this file)
- Cobalt: 8.0345e-9, 1.8389e-8 kg (2 entries, compartments not in this file)
- Calcium, ion: 0.00073301 kg
- Magnesium: 5.5003e-7, 0.00014678 kg (2 entries, compartments not in this file)
- Suspended solids, unspecified: 0.0037398 kg
- Sodium, ion: 0.0020875 kg
- Fluorene, 1-methyl-: 2.5481e-11 kg
- Lithium, ion: 0.00018233 kg
- Ammonia: 7.2915e-6, 8.9413e-7 kg (2 entries, compartments not in this file)
- Eicosane: 5.4798e-9 kg
- Sulfide: 4.5075e-8 kg
- Methane, tetrachloro-, CFC-10: 3.3213e-10 kg
- Phenol: 1.0721e-6, 3.904e-13 kg (2 entries, compartments not in this file)
- Sulfur dioxide: 0.0038159 kg
- Radioactive species, Nuclides, unspecified: 4.3081 Bq
- m-Xylene: 1.0646e-8 kg
- Methane, bromo-, Halon 1001: 3.904e-12 kg
- Hydrocarbons, unspecified: 8.0065e-7, 1e-6 kg (2 entries, compartments not in this file)
- Polycyclic organic matter, unspecified: 1.3285e-8 kg
- BOD5, Biological Oxygen Demand: 5.0008e-5 kg
- Hydrazine, methyl-: 4.148e-12 kg
- Bromoform: 9.5161e-13 kg
- Cadmium: 9.5789e-9 kg
- Naphthalene: 6.5984e-9, 6.4193e-9 kg (2 entries, compartments not in this file)
- Methane, chlorotrifluoro-, CFC-13: 5.2192e-9 kg
- Cumene: 1.2932e-13 kg
- Ethane, 1,2-dichloro-: 9.7601e-13 kg
- Tetradecane: 8.5536e-9 kg
- TOC, Total Organic Carbon: 9.9e-7 kg
- Methane, fossil: 0.016793 kg
- Octadecane: 5.4094e-9 kg
- VOC, volatile organic compounds: 0.0010027 kg
- Hexanoic acid: 7.62e-8 kg
- Ethane, chloro-: 1.0248e-12 kg
- Methane, dichloro-, HCC-30: 2.6361e-8 kg
- Carbon monoxide, fossil: 0.00074706 kg
- Organic acids: 5.0977e-10 kg
- Hexane: 1.6348e-12 kg
- Docosane: 2.3957e-10 kg
- Hexadecane: 2.1819e-8 kg
- Decane: 1.052e-8 kg
- Benzene, ethyl-: 1.4496e-5, 3.1124e-8 kg (2 entries, compartments not in this file)
- Fluorenes, alkylated, unspecified: 3.9264e-9 kg
- Naphthalenes, alkylated, unspecified: 1.1102e-9 kg
- Dinitrogen monoxide: 1.9282e-5 kg
- t-Butyl methyl ether: 8.5401e-13 kg
- Carbon disulfide: 3.172e-12 kg
- Tin: 8.2711e-8 kg
- Bromide: 4.3903e-5 kg
- Furan: 2.2374e-13, 1e-9 kg (2 entries, compartments not in this file)
- Benzo(ghi)perylene: 1.3501e-12 kg
- Organic substances, unspecified: 1.1295e-5 kg
- 5-methyl Chrysene: 1.1001e-12 kg
- Dissolved solids: 0.0091725 kg
- Propanal: 9.2721e-12 kg
- Indeno(1,2,3-cd)pyrene: 3.0503e-12 kg
- Ethane, 1,2-dibromo-: 2.928e-14 kg
- Acetone: 2.3057e-9 kg
- NMVOC, non-methane volatile organic compounds, unspecified origin: 0.00067677 kg
- Radioactive species, unspecified: 2831.2 Bq
- Benzene, chloro-: 5.3681e-13 kg
- Nitrogen oxides: 0.0023413 kg
- Toluene: 4.4852e-7, 0.0001812 kg (2 entries, compartments not in this file)
- Iron: 6.4119e-5 kg
- Process solvents, unspecified: 1e-7 kg
- Dodecane: 1.9951e-8 kg
- Acetophenone: 3.66e-13 kg
- Lead-210/kg: 3.7689e-17 kg
- Vinyl acetate: 1.8544e-13 kg
- Boron: 1.1355e-6 kg
- Thallium: 4.3756e-9 kg
- Methane, monochloro-, R-40: 9.0113e-12, 1.2932e-11 kg (2 entries, compartments not in this file)
- Yttrium: 2.4363e-9 kg
- Ethylene dibromide: 1.0201e-9 kg
- Propene: 5.0904e-8 kg
- 2-Chloroacetophenone: 1.708e-13 kg
- Phosphorus: 1e-7 kg
- Vanadium: 2.2438e-8 kg
- p-Cresol: 1.1258e-8 kg
- Phenol, 2,4-dimethyl-: 1.016e-8 kg
- Kerosene: 6.6438e-8 kg
- Chlorine: 9.9e-8 kg
- Methane, chlorodifluoro-, HCFC-22: 9.9e-10 kg
- Fluoranthene: 3.5503e-11 kg
- Particulates, unspecified: 0.00020456 kg
- Titanium, ion: 3.1908e-7 kg
- Benzo(a)anthracene: 4.0002e-12 kg
- Toluene, 2,4-dinitro-: 6.8321e-15 kg
- Sulfur: 9.1374e-7 kg
- Hydrogen fluoride: 7.4994e-6 kg
- Phenanthrenes, alkylated, unspecified: 4.6035e-10 kg
- 2-Hexanone: 2.4137e-9 kg
- Isophorone: 1.4152e-11 kg
- Chrysene: 5.0004e-12 kg
- Acenaphthylene: 1.2501e-11 kg
- p-Xylene: 3.9139e-9 kg
- Methacrylic acid, methyl ester: 4.8801e-13 kg
- Anthracene: 1.0501e-11 kg
- Benzyl chloride: 1.708e-11 kg
- Particulates, > 2.5 um, and < 10um: 0.00014857 kg
- n-Hexacosane: 1.4946e-10 kg
- Hydrogen: 3.96e-6 kg
- Benzene, 1-methyl-4-(1-methylethyl)-: 2.2372e-11 kg
- Dibenzothiophene: 4.5408e-11 kg

## Sampling procedure
Data are from both primary and secondary sources. A weighted average using production amounts was calculated from the HDPE production data from five plants collected from three leading producers in North America. HDPE producers who provided data for this module verified that the characteristics of their plants are representative of a majority of North American HDPE production.

## Sources
- THE PLASTICS DIVISION OF THE ACC
