# Sawn lumber, hardwood, rough, green, at sawmill, SE

Dataset: openLCA process, unit process
Category: Sawmills
Geography: RNA
Time period: 2005-01-01 to 2006-01-01
Generated by: Maureen Puettmann
Published in: Richard D. Bergman
restrictionsDescription: All information can be accessed by everybody.
copyright: false

## General comment
Allocation based on mass.
Important note: although most of the data in the US LCI database has
undergone some sort of review, the database as a whole has not yet
undergone a formal validation process.
Please email comments to lci@nrel.gov.

## Technology
Average technology. Some data extrapolated from similar processes.

## Geography
SE = Southeast United States. The 8 states are Arkansas, Louisiana, Mississippi, Alabama, Tennessee, North Carolina, South Carolina, Georgia.

## Reference product
- Sawn lumber, hardwood, rough, green, at sawmill, SE: 1 kg
  oven-dried weight. Green lumber, wood specific gravity of 0.528 and 85%MC dry basis ; 1.45m3 rough green lumber =1 m3 planed dry lumber

## By-products
- Wood fuel, hardwood, green,at sawmill, SE: 0.1268 kg
  Oven-dried weight. sawdust =30%, hogged fuel= 43%, bark =27%.
- Wood chips, hardwood, green, at sawmill, SE: 0.37124 kg
  Oven-dried weight.
- Bark, hardwood, green, at sawmill, SE: 0.035294 kg
  Oven-dried weight. 100%MC dry basis; roughly half of bark is burned for fuel (49%) and the rest is for mulch (51%)
- Hogged fuel, hardwood, green, at sawmill, SE: 0.16732 kg
  Oven-dried weight.
- Sawdust, hardwood, green, at sawmill, SE: 0.054902 kg
  Oven-dried weight.

## Inputs from technosphere
- Bark, hardwood, green, at logyard, SE: 0.028235 kg
  Wood specific gravity of 0.558 and 100%MC dry basis weight of the bark; bark is used both as fuel (49%) and mulch (51%)
- CUTOFF Disposal, solid waste, unspecified, to inert material landfill: 0.0011373 kg
  weighted for 5 mills that reported value
- CUTOFF Recycling, wood waste, unspecified: 0.00046667 kg
  weighted for 4 mills that reported value
- Electricity, at grid, Eastern US, 2000: 0.097778 kWh
  45% of total electricity is used for sawing
- Diesel, combusted in industrial equipment: 0.0011059 l
  20% of mill use for onsite transportation
- Roundwood, hardwood, green, at logyard, SE: 0.0031895 m3
  Wood specific gravity of 0.528 and 85%MC dry basis weight of the wood
- Electricity, onsite boiler, hardwood mill, average, SE: 0.0054641 kWh
  45% of total electricity is used for sawing
- Natural gas, combusted in industrial equipment: 9.1503e-6 l
  20% of mill use for onsite transportation; proxy for propane
- Gasoline, combusted in equipment: 0.00011503 l
  20% of mill use for onsite transportation

## Sampling procedure
Questionnaires from 12 mills from the 8 states of southeast region. Hardwood sawmills were members of the Hardwood Manufacturer Association (HMA).

## Sources
- Richard D. Bergman
- Maureen Puettmann
- Forest Products Laboratory
- Forest Products Laboratory
- NHLA
- Andrew J. Baker
