# Propylene, at plant

Dataset: openLCA process, unit process
Category: Petrochemical Manufacturing
Geography: RNA
Time period: 2003-01-01 to 2003-01-01
Generated by: Franklin Associates
Published in: THE PLASTICS DIVISION OF THE AMERICAN C
restrictionsDescription: All information can be accessed by everybody.
copyright: false

## General comment
Numerous coproduct streams are produced during this process. Fuel gas and off-gas were two of the coproducts produced that were exported to another process for fuel use. When these fuel coproducts are exported from the hydrocracker, they carry with them the allocated share of the inputs and outputs for their production. The ratio of the mass of the exported fuel over the total mass output was removed from the total inputs and outputs of the hydrocracker, and the remaining inputs and outputs are allocated over the material hydrocracker products. No energy credit is applied for the exported fuels, since both the inputs and outputs for the exported fuels have been removed from the data set. Complete inventory data and metadata are available in full in the final report and appendices, Cradle-to-Gate Life Cycle Inventory of Nine Plastic Resins and Four Polyurethane Precursors. This report has been extensively reviewed within Franklin Associates and has undergone partial critical review by ACC Plastics Division members and is available at: www.americanchemistry.com. Quantities may vary slightly between the reference to main source and and this module due to rounding. Important note: although most of the data in the US LCI database has undergone some sort of review, the database as a whole has not yet undergone a formal validation process. Please email comments to lci@nrel.gov.

## Technology
Steam cracking of hydrocarbons (including natural gas liquids and petroleum liquids)

## Geography
North America (US and Canada)

## Reference product
- Propylene, at plant: 1 kg

## By-products
- Recovered energy: 0.00534971 MJ
  Credit for steam or heat co-product sold externally.

## Inputs from technosphere
- CUTOFF Natural gas, processed, for olefins production, at plant, internal offgas use: 0.120507 kg
  A portion of the material feed combusts within the hydrocracker and produces an offgas, which provides an internal energy source.
- CUTOFF Natural gas, processed, for olefins production, at plant, material use: 0.642682 kg
  Specific raw materials from oil refining and natural gas processing include ethane, propane, liquid feed, heavy raffinate, and DNG
- Transport, train, diesel powered: 0.0240892 t*km
- Transport, barge, diesel powered: 0.023215 t*km
- CUTOFF Disposal, solid waste, unspecified, to waste-to-energy: 4.37487e-6 kg
- Transport, combination truck, diesel powered: 0.0308268 t*km
- CUTOFF Petroleum refining, for olefins production, at plant, internal offgas use: 0.06624 kg
  (same comment as for CUTOFF Natural gas, processed, for olefins production, at plant, inter)
- CUTOFF Disposal, solid waste, unspecified, to sanitary landfill: 0.000362141 kg
- CUTOFF Petroleum refining, for olefins production, at plant, material use: 0.357112 kg
  (same comment as for CUTOFF Natural gas, processed, for olefins production, at plant, mater)
- Transport, pipeline, unspecified petroleum products: 0.145951 t*km
- Electricity, at cogen, for natural gas turbine: 0.047119 kWh
- Transport, barge, residual fuel oil powered: 0.07719 t*km
- CUTOFF Disposal, solid waste, unspecified, to municipal incineration: 0.00559549 kg
- Transport, pipeline, natural gas: 1.22308 t*km
- Natural gas, combusted in industrial boiler, at hydrocracker, for propylene: 0.1098 m3
- Diesel, combusted in industrial equipment: 1.4872e-5 l
  Includes diesel fuel and distillate oil amounts.
- Electricity, at grid, US, 2008: 0.10193 kWh
- Gasoline, combusted in equipment: 1.71253e-5 l

## Inputs from nature
- Water, process, unspecified natural origin/m3: 0.000609612 m3
  Consumptive use includes: water incorporated into the product, water evaporated during the process, and/or water used and released to a body other than that from which it was drawn.

## Emissions to nature
- Xylene: 1e-9 kg
  This emission was reported by fewer than three companies. To indicate known emissions while protecting the confidentiality of individual company responses, the emission is reported only by order of magnitude.
- Chlorine: 1e-7 kg
  (same comment as for Xylene)
- Benzene, ethyl-: 1e-8 kg
  (same comment as for Xylene)
- TOC, Total Organic Carbon: 1e-6 kg
  (same comment as for Xylene)
- Carbon monoxide: 1e-6 kg
  (same comment as for Xylene)
- Hydrogen chloride: 1e-9 kg
  (same comment as for Xylene)
- Hydrogen: 5.18476e-6 kg
- Benzene: 1e-8 kg
  (same comment as for Xylene)
- BOD5, Biological Oxygen Demand: 6.36638e-7 kg
- Styrene: 1e-9 kg
  (same comment as for Xylene)
- Naphthalene: 1e-11 kg
  (same comment as for Xylene)
- Acetone: 1e-11 kg
  (same comment as for Xylene)
- Methane, difluromonochloro-, HCFC-22: 1e-9 kg
  (same comment as for Xylene)
- NMVOC, non-methane volatile organic compounds, unspecified: 0.000105932 kg
- Toluene: 1e-7 kg
  (same comment as for Xylene)
- Phenol compounds, unspecified: 1e-6 kg
  (same comment as for Xylene)
- Organic substances, unspecified: 1e-6 kg
  (same comment as for Xylene)
- Methane: 1e-6 kg
  (same comment as for Xylene)
- COD, Chemical Oxygen Demand: 1e-5 kg
  (same comment as for Xylene)
- Particulates, > 2.5 um, and < 10um: 0.0001 kg
  (same comment as for Xylene)
- VOC, volatile organic compounds: 1e-5 kg
  (same comment as for Xylene)
- Sulfur oxides: 4.06436e-6 kg
- Particulates, unspecified: 8.22987e-6 kg
- Suspended solids, unspecified: 4.80162e-6 kg

## Sampling procedure
Data collected from primary sources.

## Sources
- THE PLASTICS DIVISION OF THE AMERICAN C
