# Polyvinyl chloride, resin, at plant, CTR

Dataset: openLCA process, unit process
Category: All Other Basic Organic Chemical Manufacturing
Geography: RNA
Time period: 2003-01-01 to 2004-01-01
Generated by: Franklin Associates
Published in: THE PLASTICS DIVISION OF THE ACC
restrictionsDescription: All information can be accessed by everybody.
copyright: false

## General comment
Scrap is produced as a coproduct during this process. A mass basis was used to partition the credit for the scrap. Complete inventory data and metadata are available in full in the final report and appendices, Cradle-to-Gate Life Cycle Inventory of Nine Plastic Resins and Four Polyurethane Precursors. This report has been extensively reviewed within Franklin Associates by Rebe Feraldi and Melissa Huff and has undergone partial critical review by ACC Plastics Division members and is available at: www.americanchemistry.com. Quantities may vary slightly between the reference to main source and and this module due to rounding. Important note: although most of the data in the US LCI database has undergone some sort of review, the database as a whole has not yet undergone a formal validation process. Please email comments to lci@nrel.gov.

## Technology
suspension polymerization

## Geography
US

## Reference product
- Polyvinyl chloride, resin, at plant, CTR: 1 kg

## By-products
- Recovered energy, for polyvinyl chloride, CTR: 0.013063 MJ

## Inputs from technosphere
- CUTOFF Disposal, solid waste, process, to waste-to-energy: 0.022032 kg
- CUTOFF Disposal, solid waste,process, to municipal incineration: 0.0056822 kg
- CUTOFF Disposal, solid waste, process, to sanitary landfill: 0.013841 kg
- CUTOFF Disposal, solid waste, fuel, to municipal incineration: 0.09841 kg

## Inputs from nature
- Coal, lignite, in ground: 0.021191 MJ
- Coal, unprocessed bituminous, in ground: 0.24329 MJ
- Water, process, unspecified natural origin/m3: 0.011726 m3
  Franklin Associates uses a default as opposed to Egalitarian approach in collecting data for water use. During data collection, water use data were only requested and compiled in terms of 'evaporative' or consumptive use (i.e., ultimate withdraws, evaporation, or incorporation into the product). Data were not collected to determine reliable averages for non-evaporative water use. In other words, averages for water inputs and outputs are not available for this unit process. Consumptive use includes: water incorporated into the product, water evaporated during the process, and/or water used and released to a body other than that from which it was drawn.
- Oil, crude, in ground: 0.041194 kg
  This flow represents the amount of crude oil that is used for fuel. The energy content of the crude oil used for fuel is 43.7 MJ per kg.
- Energy, from biomass: 0.0044908 MJ
- Gas, natural, in ground: 0.39014 kg
  This flow represents the amount of natural gas that is a material input for producing the resin output. The energy content of the natural gas used as EMR/feedstock is 49.8 MJ per kg. The energy content multiplied by the mass should be considered an Energy of Material Resource (EMR)/feedstock energy.
- Energy, from hydro power: 0.20709 MJ
- Salt, unspecified: 0.48108 kg
- Uranium oxide, 332 GJ per kg, in ore: 5.402e-6 kg
- Gas, natural, in ground: 0.64678 m3
  This flow represents the amount of natural gas that is used for fuel. The energy content of the natural gas used for fuel is 36.7 MJ per m3.
- Energy, solar: 0.00045766 MJ
- Oxygen, in air: 0.14014 kg
- Energy, geothermal: 0.010898 MJ
- Energy, unspecified: 0.014596 MJ
  Energy unspecified reflects "other fossil" fuels
- Energy, kinetic (in wind), converted: 0.010784 MJ
- Oil, crude, in ground: 0.088277 kg
  This flow represents the amount of crude oils that is a material input for producing the resin output. The energy content of the crude oil used as EMR/feedstock is 43.7 MJ per kg. The energy content multiplied by the mass should be considered an Energy of Material Resource (EMR)/feedstock energy.

## Emissions to nature
- Titanium, ion: 2.1117e-7 kg
- Suspended solids, unspecified: 0.0026606 kg
- Acenaphthylene: 2.8299e-11 kg
- Silver: 2.9147e-7 kg
- Zinc: 5.532e-10, 6.9491e-7 kg (2 entries, compartments not in this file)
- Vinyl acetate: 7.521e-11 kg
- Boron: 7.5268e-7 kg
- Docosane: 1.6278e-10 kg
- Phenanthrene: 3.0563e-10, 1.9272e-10 kg (2 entries, compartments not in this file)
- Phenol: 1.5834e-10, 4.8777e-7 kg (2 entries, compartments not in this file)
- Nickel: 1.8497e-7, 5.5321e-8 kg (2 entries, compartments not in this file)
- Phenols, unspecified: 1.6085e-7, 1.0819e-8 kg (2 entries, compartments not in this file)
- m-Xylene: 7.0652e-9 kg
- Chrysene: 1.132e-11 kg
- Copper: 5.6315e-8, 8.2981e-10 kg (2 entries, compartments not in this file)
- Arsenic, ion: 4.6936e-8 kg
- NMVOC, non-methane volatile organic compounds, unspecified origin: 0.00013577 kg
- Magnesium: 9.6888e-5, 1.2452e-6 kg (2 entries, compartments not in this file)
- Toluene, 2,4-dinitro-: 2.7709e-12 kg
- Hexanoic acid: 5.0504e-8 kg
- Tetradecane: 5.6755e-9 kg
- VOC, volatile organic compounds: 0.00072814 kg
- Oils, unspecified: 7.0775e-6 kg
- Dibenzofuran: 2.8926e-11 kg
- Dinitrogen monoxide: 3.9367e-5 kg
- Methane, monochloro-, R-40: 6.1229e-12, 5.2449e-9 kg (2 entries, compartments not in this file)
- Hydrogen: 1.8018e-6 kg
- Hydrogen fluoride: 1.6531e-5 kg
- Antimony: 2.2882e-9, 1.334e-8 kg (2 entries, compartments not in this file)
- Kerosene: 1.3732e-7 kg
- Organic substances, unspecified: 4.7052e-5 kg
- Fluorene: 9.9707e-7, 1.0301e-10 kg (2 entries, compartments not in this file)
- Methane, chlorotrifluoro-, CFC-13: 2.7034e-9 kg
- Benzene: 2.5435e-7, 8.102e-5 kg (2 entries, compartments not in this file)
- Xylene: 7.229e-5, 1.0847e-7 kg (2 entries, compartments not in this file)
- 2-Hexanone: 1.6008e-9 kg
- 5-methyl Chrysene: 2.4903e-12 kg
- Ethene, chloro-: 3.2e-5, 4.3043e-9 kg (2 entries, compartments not in this file)
- Naphthalenes, alkylated, unspecified: 7.3478e-10 kg
- Acetaldehyde: 1.689e-8 kg
- Calcium, ion: 0.00048364 kg
- Nitrogen oxides: 0.0029907 kg
- Naphthalene: 8.4747e-9, 4.3738e-9 kg (2 entries, compartments not in this file)
- Decane: 6.974e-9 kg
- Carbon disulfide: 1.2865e-9 kg
- Sulfur oxides: 0.00039867 kg
- Naphthalene, 2-methyl-: 3.7078e-9 kg
- Methane, dichloro-, HCC-30: 4.4782e-8 kg
- Yttrium: 1.6149e-9 kg
- Methane: 0.00083714 kg
- Iron: 4.6189e-5 kg
- Vanadium: 1.3022e-8 kg
- Acetophenone: 1.4844e-10 kg
- 4-Methyl-2-pentanone: 6.4204e-10 kg
- Toluene: 2.7552e-7, 0.00012464 kg (2 entries, compartments not in this file)
- Ethene, tetrachloro-: 5.0647e-9 kg
- Fluoride: 4.4757e-7, 2.5986e-9 kg (2 entries, compartments not in this file)
- Octadecane: 3.5852e-9 kg
- Aldehydes, unspecified: 9.9188e-8 kg
- o-Cresol: 6.9196e-9 kg
- Ethylene dibromide: 5.2839e-10 kg
- Benzo(ghi)perylene: 3.0563e-12 kg
- 2-Chloroacetophenone: 6.9272e-11 kg
- Butadiene: 5.7349e-10 kg
- Selenium: 1.5052e-7, 2.4317e-8 kg (2 entries, compartments not in this file)
- Fluorenes, alkylated, unspecified: 1.7313e-11 kg
- Methane, tetrachloro-, CFC-10: 1.0287e-7 kg
- Radionuclides (Including Radon): 7.6789e-6 kg
- Methyl ethyl ketone: 3.8594e-9, 1.2246e-11 kg (2 entries, compartments not in this file)
- Particulates, > 2.5 um, and < 10um: 0.00011454 kg
- Methane, chlorodifluoro-, HCFC-22: 1.0005e-6 kg
- Ammonium, ion: 6.1303e-8 kg
- Manganese: 6.2973e-8, 2.0382e-6 kg (2 entries, compartments not in this file)
- Lead: 1.2822e-7, 8.7165e-8 kg (2 entries, compartments not in this file)
- Carbon dioxide, fossil: 1.9382 kg
- Polycyclic organic matter, unspecified: 6.8813e-9 kg
- Benzenes, alkylated, unspecified: 4.4839e-8 kg
- Lithium, ion: 0.0001254 kg
- Sulfuric acid, dimethyl ester: 4.7501e-10 kg
- Radium-228/kg: 4.4453e-17 kg
- Acetone: 1.5649e-9 kg
- Dioxins, measured as 2,3,7,8-tetrachlorodibenzo-p-dioxin: 3.2506e-13 kg
  measured as TEQ; Units are in kgTEQ. 98% of dioxin emissions are process related and 2% are fuel-related.
- Beryllium: 2.8844e-9, 2.8543e-9 kg (2 entries, compartments not in this file)
- Methane, fossil: 0.01157 kg
- Copper, ion: 6.5085e-8 kg
- Hydrazine, methyl-: 1.6823e-9 kg
- Dioxins, measured as 2,3,7,8-tetrachlorodibenzo-p-dioxin: 8.7e-13 kg
  measured as TEQ
- Benzene, ethyl-: 1.851e-8, 9.9713e-6 kg (2 entries, compartments not in this file)
- Styrene: 2.474e-10, 4.5045e-10 kg (2 entries, compartments not in this file)
- o-Xylene: 2.5963e-9 kg
- BOD5, Biological Oxygen Demand: 0.00018593 kg
- Ammonium chloride: 2.8672e-7 kg
- Phenanthrenes, alkylated, unspecified: 3.0467e-10 kg
- Cadmium, ion: 7.9341e-9 kg
- Cobalt: 5.3251e-9, 2.1551e-8 kg (2 entries, compartments not in this file)
- Cumene: 5.2449e-11 kg
- Isophorone: 5.7397e-9 kg
- Dissolved solids: 0.030338 kg
- Propanal: 3.7605e-9 kg
- COD, Chemical Oxygen Demand: 0.0001396 kg
- Ethane, 1,1,1-trichloro-, HCFC-140: 1.9792e-10 kg
- Furan: 4.6244e-13 kg
- Hexane: 6.6303e-10 kg
- Radium-226/kg: 8.6903e-15 kg
- Surfactants: 1.5136e-8 kg
- Organic acids: 1.0536e-9 kg
- Barium: 0.00029453 kg
- Phenol, 2,4-dimethyl-: 6.7339e-9 kg
- Hydrocarbons, unspecified: 1.6548e-6 kg
- Nitrogen, total: 1.5261e-7 kg
- Pyrene: 3.7355e-11 kg
- Dodecane: 1.3226e-8 kg
- Cadmium: 1.6597e-8 kg
- Benzene, chloro-: 2.1771e-10 kg
- Sulfur: 6.0688e-7 kg
- Ammonia: 5.2521e-7, 5.3324e-6 kg (2 entries, compartments not in this file)
- Benzo(b,j,k)fluoranthene: 1.2452e-11 kg
- Propene: 3.7841e-8 kg
- PAH, polycyclic aromatic hydrocarbons: 2.4641e-9 kg
- Benzyl chloride: 6.9272e-9 kg
- Phthalate, dioctyl-: 7.2241e-10 kg
- Surfactants, unspecified: 1.0344e-7 kg
- Chloroform: 5.8387e-10 kg
- Mercury: 2.4337e-8, 3.2783e-10 kg (2 entries, compartments not in this file)
- Particulates, < 10 um: 0.00010654 kg
- Hexadecane: 1.4463e-8 kg
- Mercaptans, unspecified: 2.1466e-6 kg
- Ethane, 1,1,1,2-tetrafluoro-, HFC-134a: 4.9189e-8 kg
- Methacrylic acid, methyl ester: 1.9792e-10 kg
- Indeno(1,2,3-cd)pyrene: 6.9051e-12 kg
- Aluminum: 2.4093e-5 kg
- Radioactive species, Nuclides, unspecified: 8.9042 Bq
- Sulfur dioxide: 0.0049566 kg
- Fluorene, 1-methyl-: 1.2139e-9 kg
- Bromoform: 3.8594e-10 kg
- TOC, Total Organic Carbon: 4.5045e-7 kg
- Chromium: 6.873e-7, 4.2626e-8 kg (2 entries, compartments not in this file)
- Chromium VI: 8.9423e-9 kg
- p-Xylene: 2.5963e-9 kg
- Dibenzothiophene: 3.0945e-11 kg
- Fluoranthene: 8.037e-11 kg
- Benzoic acid: 2.4387e-7 kg
- Eicosane: 3.633e-9 kg
- Ethane, chloro-: 4.1563e-10 kg
- n-Hexacosane: 1.0155e-10 kg
- Thallium: 2.896e-9 kg
- Arsenic: 4.9853e-8 kg
- Benzo(a)pyrene: 4.3015e-12 kg
- Lead-210/kg: 2.498e-17 kg
- Ethane, 1,2-dichloro-: 3.9584e-10 kg
- Nitrate: 1e-5 kg
- Strontium: 1.3089e-5 kg
- Anthracene: 2.3771e-11 kg
- p-Cresol: 7.4618e-9 kg
- Benzene, 1-methyl-4-(1-methylethyl)-: 1.5201e-11 kg
- Sulfate: 0.00013411 kg
- Sodium, ion: 0.0013754 kg
- Bromide: 2.892e-5 kg
- Ethane, 1,2-dichloro-1,1,2-trifluoro-, HCFC-123: 4.9189e-8 kg
- Carbon monoxide: 0.00015615 kg
- Chlorine: 1.1641e-5 kg
- Methane, bromo-, Halon 1001: 1.5834e-9 kg
- Particulates, < 2.5 um: 9.609e-5 kg
- Acenaphthene: 5.7728e-11 kg
- Radioactive species, unspecified: 5849 Bq
- Hydrogen chloride: 0.00013471 kg
- Tin: 5.4768e-8 kg
- Biphenyl: 1.9243e-10, 2.9033e-9 kg (2 entries, compartments not in this file)
- Ethane, 1,2-dibromo-: 1.1875e-11 kg
- Benzene, pentamethyl-: 1.1402e-11 kg
- Benzo(a)anthracene: 9.0556e-12 kg
- Formaldehyde: 8.0271e-7 kg
- Carbon monoxide, fossil: 0.00086797 kg
- t-Butyl methyl ether: 3.4636e-10 kg
- Particulates, unspecified: 0.00048791 kg
- Cyanide: 1.011e-9, 2.474e-8 kg (2 entries, compartments not in this file)
- Molybdenum: 5.5187e-9 kg
- Sulfide: 2.3347e-8 kg
- Chloride: 0.0060208 kg

## Sampling procedure
Data are from primary sources. Data for the production of PVC were provided by three leading producers (3 plants) in North America. At the time this data was collected, there were 12 companies and 25 plants producing PVC. The companies that provided data were the 3 largest producers of PVC at the time. Due to this and the fact that some PVC plants have shut down, we are estimating that these companies produced greater than 50% of the PVC market share. The PVC producers who provided data for this module verified that the characteristics of their plants are representative of a majority of North American PVC suspension technology production.

## Sources
- THE PLASTICS DIVISION OF THE ACC
