# Mixed recyclables, at collection, dropoff center

Dataset: openLCA process, unit process
Category: Collection of postconsumer products
Geography: RNA
Time period: 2007-01-01 to 2008-01-01
Generated by: Franklin Associates
restrictionsDescription: All information can be accessed by everybody.
copyright: false

## General comment
Important note: although most of the data in the US LCI database has
undergone some sort of review, the database as a whole has not yet
undergone a formal validation process.
Please email comments to lci@nrel.gov.

## Technology
Typical

## Geography
United States

## Reference product
- Mixed recyclables, at collection, dropoff center: 1 kg
  Applies to one kg of any material delivered by consumer to dropoff recycling center

## Inputs from technosphere
- CUTOFF Gasoline, used in personal vehicle: 0.0617186 l
  Fuel use for consumer delivering recyclables to a drop-off recycling center
- CUTOFF Mixed recyclables, at source: 1 kg
  Based on wastes removed at MRF, the collected material contains about 0.087 kg waste per kg of usable material.

## Sources
- THE PLASTICS DIVISION OF THE AMERICAN CH
