# Electricity, at eGrid, NYCW, 2008

Dataset: openLCA process, unit process
Category: Utilities
Geography: RNA
Time period: 2008-01-01 to 2008-01-01
Generated by: Alberta Carpenter
Published in: Chris Goemans, Athena Institute
restrictionsDescription: All information can be accessed by everybody.
copyright: false

## General comment
The methodology used to put together the grid information is outlined in reference 1.

## Technology
Typical

## Geography
New York City and Westchester County, NY

## Reference product
- Electricity, at eGrid, NYCW, 2008: 1 kWh

## Inputs from technosphere
- CUTOFF Electricity, biomass, solid, biogenic MSW, at power plant: 0.00584673 kWh
  Solid Renewable Fuels (Biomass) MSB – Municipal Solid Waste – Biogenic Component
- Electricity, natural gas, at power plant: 0.517079 kWh
  Natural Gas
- Electricity, diesel, at power plant: 0.00272449 kWh
  Petroleum (DFO) - DFO – Distillate Fuel Oil (includes all Diesel and No. 1, No. 2, and No. 4 Fuel Oils)
- CUTOFF Electricity, hydropower, at power plant, unspecified: 7.92063e-5 kWh
  Hydroelectric WAT – Water (Conventional, Pumped Storage)
- Electricity, diesel, at power plant: 0.000822217 kWh
  Petroleum (DFO) KER - kerosene
- Electricity, nuclear, at power plant: 0.453479 kWh
  Nuclear Fission NUC - – Nuclear (Uranium, Plutonium, Thorium)
- Electricity, residual fuel oil, at power plant: 0.0153754 kWh
  Petroleum (RFO) – Residual Fuel Oil (includes No. 5 and No. 6 Fuel Oils and Bunker C Fuel Oil)
- CUTOFF Electricity, MSW, non-biogenic, at power plant: 0.00459405 kWh
  Other Fuels MSN – Municipal Solid Waste – Non-biogenic components

## Sampling procedure
based on EIA electricity reports for all power plants in the US.

## Sources
- Chris Goemans, Athena Institute
- unspecified
- USEPA
- Statistics Canada
- Statistics Canada
- Statistics Canada
- Statistics Canada
- Statistics Canada
- Statistics Canada
- USEPA
- EIA
- EIA
- EIA
- EIA
- EIA
- EIA
- EIA
- EIA
- EIA
- EIA
- EIA
- US DOE
- International Energy Agency
- US DOE
