# Aluminum recovery, transport, to plant

Dataset: openLCA process, unit process
Category: Solid Waste Collection
Geography: RNA
Time period: 2005-01-01 to 2005-01-01
Generated by: James Littlefield, Franklin Associates
Published in: Franklin Associates
restrictionsDescription: All information can be accessed by everybody.
copyright: false

## General comment
Separate unit processes are shown for automotive and UBC (used beverage container) scrap; however, it was determined that the recovery rates and processing requirements for these 2 markets are similar, and thus the results for the 2 markets are the same. Atmospheric, waterborne, and solid waste emissions represent process emissions only, not fuel combustion emissions., Important note: although most of the data in the US LCI database has undergone some sort of review, the database as a whole has not yet undergone a formal validation process. Please email comments to lci@nrel.gov.

## Geography
North America

## Reference product
- Aluminum recovery, transport, to plant: 1 kg

## Inputs from technosphere
- Transport, train, diesel powered: 0.040234 t*km
- Transport, combination truck, diesel powered: 0.3621 t*km

## Sources
- Franklin Associates
- The Aluminum Association
- unspecified
- unspecified
