# Potassium sulphate_alum, as K2O, Hardboard

Dataset: openLCA process, unit process
Category: Reconstituted Wood Product Manufacturing
Geography: RNA
Time period: 2007-01-01 to 2007-12-31
Generated by: Angelika Heil
Reviewer: Maggie Osses
Published in: Nemecek, T.
restrictionsDescription: All information can be accessed by everybody.
copyright: true

## General comment
The unit process inventory takes into account the production of potassium sulphate from potassium chloride and sulphuric acid. Transports of raw materials and intermediate products to the fertiliser plant as well as the transport of the fertiliser product from the factory to the regional department store were included. Production and waste treatment of catalysts, coating and packaging of the final fertiliser products were not included. Infrastructure was included by means of a proxy module.

Refers to 1 kg K2O, resp. 2.00 kg potassium sulphate with a K2O-content of 50.0%

Important note: although most of the data in the US LCI database has undergone some sort of review, the database as a whole has not yet undergone a formal validation process. Please email comments to lci@nrel.gov

## Technology
Production inventory was derived from detailed literature studies and specifications from the manufacturer, relevant for the European production. Transport specifications of the fertiliser product to the regional department store, which were not included in the reference used for this inventory, were complemented by data given in Patyk & Reinhardt (1997).

## Geography
According to the reference used for this inventory, the European average is derived from mean values of several fertiliser plants within Europe. The production of raw materials and/or intermediates outside Europe was taken into account by considering the production technology in the respective country and the relative import shares.

## Time period
Year when the principal reference used for this inventory was published.

## Reference product
- Potassium sulphate_alum, as K2O, Hardboard: 1 kg
  Europe: proxy for alum

## Inputs from technosphere
- Transport, train, diesel powered: 1.2 t*km; lognormal geomSd 1.44568
  (4,5,na,na,na,na)
- Residual fuel oil, combusted in industrial boiler: 5.76 l; lognormal geomSd 1.04403
  (2,1,1,2,1,3)
- Transport, combination truck, average fuel mix: 0.2 t*km; lognormal geomSd 1.44568
  (4,5,na,na,na,na)
- Sulfuric acid, at plant: 1.13 kg; lognormal geomSd 1.04403
  (2,1,1,2,1,3)
- Electricity, at grid, US, 2008: 0.122 kWh; lognormal geomSd 1.04403
  (2,1,1,2,1,3)

## Inputs from nature
- Potassium Chloride: 1.03 kg

## Emissions to nature
- Particulates, > 2.5 um, and < 10um: 1.65e-8 kg; lognormal geomSd 1.44914
  (2,3,2,3,3,5)
- Particulates, > 10 um: 3.76e-8 kg; lognormal geomSd 1.27671
  (2,3,2,3,3,5)
- Heat, waste: 0.44 MJ; lognormal geomSd 1.14455
  (2,3,2,3,3,5)
- Particulates, < 2.5 um: 1.19e-8 kg; lognormal geomSd 1.76068
  (2,3,2,3,3,5)

## Sampling procedure
Values given in the reference originate from manufacturers and/or other data sources which in turn refer to the real situation and hence are largely secured.

## Review details
Passed.

## Sources
- Nemecek, T.
