# Electricity, at eGrid, MROE, 2008

Dataset: openLCA process, unit process
Category: Utilities
Geography: RNA
Time period: 2008-01-01 to 2008-01-01
Generated by: Alberta Carpenter
Published in: Chris Goemans, Athena Institute
restrictionsDescription: All information can be accessed by everybody.
copyright: false

## General comment
The methodology used to put together the grid information is outlined in reference 1.

## Technology
Typical

## Geography
MRO East electricity grid to include most of Wisconsin and northern Michigan.

## Reference product
- Electricity, at eGrid, MROE, 2008: 1 kWh

## Inputs from technosphere
- CUTOFF Electricity, biomass, gas, unspecified, at power plant: 7.64866e-5 kWh
  Gaseous Renewable Fuels (Biomass) OBG - Other Biomass Gases (Digester Gas, Methane, and other biomass gases)
- CUTOFF Electricity, tire derived fuel, at power plant: 0.000391665 kWh
  Solid Renewable Fuels (Biomass) TDF - tires, tire derived fuel
- Electricity, bituminous coal, at power plant: 0.515843 kWh
  Subbituminous Coal
- CUTOFF Electricity, biomass,liquid, unspecified, at power plant: 0.0141449 kWh
  Liquid Renewable Fuels (Biomass) BLQ - black liquor
- Electricity, bituminous coal, at power plant: 0.0752206 kWh
  Bituminous Coal BIT - Anthracite Coal, and Bituminous Coal.
- Electricity, natural gas, at power plant: 0.039732 kWh
  Natural Gas
- Electricity, biomass, at power plant: 0.0080055 kWh
  Solid Renewable Fuels (Biomass) WDS - Wood/Wood Waste Solids (Paper Pellets, Railroad Ties, Utility Poles, Wood Chips, and other wood solids)
- Electricity, nuclear, at power plant: 0.289214 kWh
  Nuclear Fission
- CUTOFF Electricity, biomass, liquid, sludge, at power plant: 3.91384e-5 kWh
  Liquid Renewable Fuels (Biomass) SLW - Sludge Waste
- CUTOFF Electricity, petroleum coke, at power plant: 0.0194527 kWh
  Petroleum (Other Fossil) PC - petroleum coke
- CUTOFF Electricity, at wind power plant, unspecified: 0.0097827 kWh
  Wind
- CUTOFF Electricity, biomass, gas, landfill, at power plant: 0.00353126 kWh
  Gaseous Renewable Fuels (Biomass) LFG - landfill gas
- Electricity, residual fuel oil, at power plant: 0.000969005 kWh
  Petroleum (RFO) - Residual Fuel Oil (includes No. 5 and No. 6 Fuel Oils and Bunker C Fuel Oil)
- CUTOFF Electricity, hydropower, at power plant, unspecified: 0.021399 kWh
  Hydroelectric
- CUTOFF Electricity, other fuels, unspecified, at power plant: 0.000717079 kWh
  Other Fuels PUR - purchased steam
- CUTOFF Electricity, biomass,solid, unspecified, at power plant: 7.31186e-5 kWh
  Solid Renewable Fuels (Biomass) OBS - Other Biomass Solid (Animal Manure and Waste, Solid By-products, and other solid biomass not specified)
- Electricity, diesel, at power plant: 0.00140784 kWh
  Petroleum (DFO) - Distillate Fuel Oil (includes all Diesel and No. 1, No. 2, and No. 4 Fuel Oils)

## Sampling procedure
based on EIA electricity reports for all power plants in the US.

## Sources
- Chris Goemans, Athena Institute
- unspecified
- USEPA
- Statistics Canada
- Statistics Canada
- Statistics Canada
- Statistics Canada
- Statistics Canada
- Statistics Canada
- USEPA
- EIA
- EIA
- EIA
- EIA
- EIA
- EIA
- EIA
- EIA
- EIA
- EIA
- EIA
- US DOE
- International Energy Agency
- US DOE
