# Wheat, at field

Dataset: openLCA process, unit process
Category: Wheat Farming
Geography: US
Time period: 1997-01-01 to 2000-01-01
Generated by: Olivier Muller
Published in: USDA/National Agricultural Statistics Se
restrictionsDescription: All information can be accessed by everybody.
copyright: false

## General comment
Agricultural Crop Production, Harvested acres are 85% of the planted acres (1998-2000 US average).
1 bu (wheat) = 60 lbs.
The impacts of producing 1 kg of seed are assumed equal to those of producing 1kg of grain.
For water, only consumptive use is taken into account (i.e. 60.7% of the total water consumption).
Important note: although most of the data in the US LCI database has
undergone some sort of review, the database as a whole has not yet
undergone a formal validation process.
Please email comments to lci@nrel.gov.

## Technology
US average

## Geography
USA

## Reference product
- Wheat straw, at field: 1.3 kg

## By-products
- Wheat grains, at field: 1 kg

## Inputs from technosphere
- Transport, train, diesel powered: 0.054289 t*km
- CUTOFF Agrochemicals, at plant: 0.00017116 kg
- Quicklime, at plant: 0.018711 kg
- Gasoline, combusted in equipment: 0.0039038 l
- Nitrogen fertilizer, production mix, at plant: 0.028534 kg
- CUTOFF Phosphorous Fertilizer (TSP as P2O5), at plant: 0.010291 kg
- Diesel, combusted in industrial equipment: 0.017177 l
- Transport, single unit truck, diesel powered: 0.020384 t*km
- CUTOFF Potash Fertilizer (K2O), at plant: 0.0037422 kg

## Inputs from nature
- Water, well, in ground: 21.9 l
- Water, river: 37.61 l
- Occupation, arable, conventional tillage: 1.837 m2*a
- Carbon dioxide, in air: 1.51 kg
- Occupation, arable, conservation tillage: 1.195 m2*a
- Occupation, arable, reduced tillage: 1.141 m2*a

## Emissions to nature
- Triallate: 5.0402e-6 kg
  Pesticides- consumption (19), Pesticides - application method (11), Pesticide - air emission factors (12), Pesticide - vapor pressure (13)
- Malathion: 1.995e-8 kg
  Pesticides- consumption (19), Pesticides - application method (11), Runoff of pesticide (14)
- Bromoxynil: 1.248e-7 kg
  (same comment as for Malathion)
- Hydrocarbons, unspecified: 0.00010269 kg
  Pesticides- consumption (19), Pesticides - application method (11)
- Permethrin: 1.9412e-7 kg
  (same comment as for Triallate)
- Glyphosate: 4.5336e-6 kg
  (same comment as for Triallate)
- Parathion, methyl: 2.0052e-8 kg
  (same comment as for Malathion)
- Nitrogen oxides: 0.0046409 kg
  Air emissions of N2O and NH3 and NOx (4)
- Phorate: 1.9998e-7 kg
  (same comment as for Triallate)
- MCPA: 9.6848e-6 kg
  (same comment as for Triallate)
- Carbofuran: 4.6516e-9 kg
  (same comment as for Malathion)
- Parathion, methyl: 4.6789e-7 kg
  (same comment as for Triallate)
- Diuron: 5.2763e-9 kg
  (same comment as for Malathion)
- Suspended solids, unspecified: 2.9 kg
  Erosion (6)
- 2,4-D: 1.9257e-5 kg
  (same comment as for Triallate)
- Chlorpyrifos: 5.8521e-8 kg
  (same comment as for Malathion)
- Phosphate: 6.0659e-5 kg
  Runoff of fertilizers (15)
- Carbaryl: 1.0886e-7 kg
  (same comment as for Malathion)
- Carbaryl: 2.54e-6 kg
  (same comment as for Triallate)
- Particulates, unspecified: 1.2186e-6 kg
  Particulate emissions (16)
- Chlorpyrifos: 1.3655e-6 kg
  (same comment as for Triallate)
- Metribuzin: 3.298e-8 kg
  (same comment as for Malathion)
- Dicamba: 8.0538e-8 kg
  (same comment as for Malathion)
- Carbofuran: 1.0854e-7 kg
  (same comment as for Triallate)
- Dinitrogen monoxide: 0.00083664 kg
  Air emissions of N2O and NH3 and NOx (4)
- Permethrin: 8.3196e-9 kg
  (same comment as for Malathion)
- Disulfoton: 1.8784e-8 kg
  (same comment as for Malathion)
- Ammonia: 0.0017151 kg
  Air emissions of N2O and NH3 and NOx (4)
- Paraquat: 4.0793e-8 kg
  (same comment as for Malathion)
- Diuron: 1.2311e-7 kg
  (same comment as for Triallate)
- Phorate: 5.1719e-9 kg
  (same comment as for Malathion)
- Triallate: 1.3035e-7 kg
  (same comment as for Malathion)
- Nitrogen, total: 0.0034776 kg
  Runoff of fertilizers (15)
- Glyphosate: 1.943e-7 kg
  (same comment as for Malathion)
- Malathion: 4.655e-7 kg
  (same comment as for Triallate)
- Bromoxynil: 4.8256e-6 kg
  (same comment as for Triallate)
- Disulfoton: 7.2631e-7 kg
  (same comment as for Triallate)
- Trifluralin: 4.0925e-6 kg
  (same comment as for Triallate)
- Metribuzin: 7.6953e-7 kg
  (same comment as for Triallate)
- MCPA: 4.1506e-7 kg
  (same comment as for Malathion)
- 2,4-D: 8.2532e-7 kg
  (same comment as for Malathion)
- Mancozeb: 1.0525e-6 kg
  (same comment as for Triallate)
- Mancozeb: 2.7219e-8 kg
  (same comment as for Malathion)
- Paraquat: 9.5183e-7 kg
  (same comment as for Triallate)
- Trifluralin: 1.0584e-7 kg
  (same comment as for Malathion)
- Dicamba: 1.8792e-6 kg
  (same comment as for Triallate)

## Sources
- USDA/National Agricultural Statistics Se
- USDA/ERS
- Conservation Technology Information Cent
- U.S. EPA
- USGS
- USDA/NRI
- USDA/ERS
- USDA/ERS
- USDA/ERS
- USDA/NCRS
- USDA/ERS
- U.S. EPA
- U.S. EPA
- USDA/NCRS
- USGS
- U.S. EPA
- USDA/ERS
- National Center for Food and Agricultura
- USDA/ERS
