# Heat, onsite boiler, hardwood mill, average, SE

Dataset: openLCA process, unit process
Category: Steam and Air-Conditioning Supply
Geography: RNA
Time period: 2005-01-01 to 2006-01-01
Generated by: Maureen Puettmann
Published in: Richard D. Bergman
restrictionsDescription: All information can be accessed by everybody.
copyright: false

## General comment
Allocation on a mass basis.
Important note: although most of the data in the US LCI database has
undergone some sort of review, the database as a whole has not yet
undergone a formal validation process.
Please email comments to lci@nrel.gov.

## Technology
Average technology. Some data extrapolated from similar processes.

## Geography
SE = Southeast United States. The 8 states are Arkansas, Louisiana, Mississippi, Alabama, Tennessee, North Carolina, South Carolina, Georgia.

## Reference product
- Heat, onsite boiler, hardwood mill, average, SE: 1 MJ
  Total heat needed to dry 1.0 m^3 lumber;

## By-products
- Electricity, onsite boiler, hardwood mill, average, SE: 0.00191967 kWh
  electricity produced on-site by one mill; 10% efficiency

## Inputs from technosphere
- Residual fuel oil, combusted in industrial boiler: 0.000101386 l
- Wood fuel, hardwood, generated at lumber mill, combusted in industrial boiler, SE: 0.0426236 kg
  Weight reported on an oven dry basis
- Natural gas, combusted in industrial boiler: 0.000724188 m3
- Liquefied petroleum gas, combusted in industrial boiler: 0.00030209 l
  Propane combusted in boiler to provide heat
- Wood fuel, hardwood, purchased, combusted in industrial boiler, SE: 0.00655907 kg
  Weight reported on an oven dry basis

## Sampling procedure
Questionnaires from 12 mills from the 8 states of southeast region. Hardwood sawmills were members of the Hardwood Manufacturer Association (HMA).

## Sources
- Richard D. Bergman
- Maureen Puettmann
- Forest Products Laboratory
- Forest Products Laboratory
- NHLA
