# Scanner, department, i5200, i5600

Dataset: openLCA process, unit process
Category: Other material
Geography: GLO
Time period: 2003-06-10 to 2012-09-15
Generated by: Roy Wood
Reviewer: Jay Mathewson
Published in: Roy Wood
restrictionsDescription: All information can be accessed by everybody.
copyright: false

## General comment
Cradle to Gate data for a single 80.6 kg line of production scanners from a single company. Scanner scans at 280-340 A4 images per minute. Use can exceed 200,000 images per day. This cradle to gate data was extracted from a full cradle to end of life LCA. Internal company validation via business and peer review and internal assessment. This dataset was consistent with LCA conducted using same approach as the office scanner LCA, which was peer reviewed by Kate Winnebeck, LCACP, New York State Pollution Prevention Institute , Rochester Institute of Technology. Data is only directly representative for the scanner models i5200 and i5600. However components and manufacturing process is similar for many scanners, so extrapolation to other similar scanners may be done using judement. Component proxy data for original LCA was from Ecoinvent. Each flow represents one or more parts made with the same materials and processes, which were aggregated. The scanner was manufactured in China with the subcomponents mostly from China. However the best available datasets were used as proxy data and the best data often came from different geographic locations. Some data was replaced in this cradle to gate dataset by USLCI data where appropriate data was available. Unless otherwise noted in a General Comment for individual flows, data described as dummy_ was from Ecoinvent. Waste scrap was 0.5% of input flows. Although these were included in the full LCA, they were not shown to be significant in the modeling and according to a 1% cutoff criteria, have not been included in this cradle to gate data.

## Technology
Best available technology

## Geography
Global

## Time period
start date was based on earliest date of secondary data. Start date of primary data was 2011-07-01

## Reference product
- Scanner, department, i5200, i5600: 1 Item(s)

## Inputs from technosphere
- CUTOFF Polyurethane, flexible foam, at plant: 0.004 kg; triangle minimum 0.0038, mode 0.004, maximum 0.0042
- Polyvinyl chloride, resin, at plant: 0.052 kg; triangle minimum 0.051, mode 0.052, maximum 0.053
  original data - polyvinyl chloride ar regional storage, RER/U from Ecoinvent
- CUTOFF Synthetic rubber, at plant: 0.448 kg; triangle minimum 0.44, mode 0.448, maximum 0.456
- CUTOFF Steel product manufacturing, average metal working: 44.263 kg; triangle minimum 44, mode 44.289, maximum 44.5
- Polypropylene resin, at plant: 1.146 kg; triangle minimum 1.14, mode 1.146, maximum 1.152
  original data - polypropylene granulate, at plant, RER/U from Ecoinvent
- CUTOFF Polyethylene terephthalate, granulate, amorphous, at plant: 0.117 kg; triangle minimum 0.11, mode 0.116, maximum 0.125
- CUTOFF LCD glass, at plant: 0.403 kg; triangle minimum 0.4, mode 0.403, maximum 0.406
  About half this quantity was LCD glass and half was lens glass and other highly processed glass. LCD glass was the best available data for lens and other highly processed glass based on cost and manufacturing complexity.
- CUTOFF Power adapter, for laptop, at plant: 0.808 kg; triangle minimum 0.8, mode 0.804, maximum 0.82
- CUTOFF Polyphenylene sulfide, at plant: 0.616 kg; triangle minimum 0.61, mode 0.616, maximum 0.622
- CUTOFF Silver, at regional storage: 0.009 kg; triangle minimum 0.008, mode 0.009, maximum 0.01
  silver data was used for neodymium, because there was no neodymium data and silver was the best substitute based on price and cost of production.
- CUTOFF Electronic component, unspecified, at plant: 0.002 kg; triangle minimum 0.0018, mode 0.002, maximum 0.0022
- Acrylonitrile-butadiene-styrene copolymer, resin, at plant: 9.164 kg; triangle minimum 9.1, mode 9.162, maximum 9.23
  original data - acrylonitrile-butadiene-styrene (ABS), at plant RER/U from Ecoinvent
- CUTOFF Light emitting diode, LED, at plant: 0.16 kg; triangle minimum 0.15, mode 0.16, maximum 0.17
- CUTOFF Tetrafluoroethylene, at plant: 0.032 kg; triangle minimum 0.031, mode 0.032, maximum 0.033
- CUTOFF Cable, connector for computer, without plugs, at plant: 2.88 kg; triangle minimum 2.8, mode 2.89, maximum 2.95
- Polystyrene, high impact, resin, at plant: 0.164 kg; triangle minimum 0.158, mode 0.164, maximum 0.17
  original data - Polystyrene, high impact, HIPS, at plant, RER/U from Ecoinvent
- CUTOFF Tap water, at user: 212 kg; triangle minimum 191, mode 212, maximum 233
- Aluminum ingot, production mix, at plant: 0.000425 t; triangle minimum 0.00042, mode 0.000425, maximum 0.00043
  original data - aluminum, production mix at plant RER/U from Ecoinvent
- Transport, combination truck, diesel powered: 78 t*km; triangle minimum 39, mode 60, maximum 135
  original data - transport, lorry &amp;amp;gt;32t, EURO5/ RER U from Ecoinvent
- CUTOFF Electricity, low voltage, at grid: 38 kWh; triangle minimum 34, mode 38, maximum 42
- CUTOFF Printed wiring board, surface mounted, unspec., Pb free, at plant: 1.761 kg; triangle minimum 1.75, mode 1.763, maximum 1.77
- CUTOFF Flat glass, uncoated, at plant: 0.2045 kg; triangle minimum 0.2, mode 0.2035, maximum 0.21
- CUTOFF Cold impact extrusion, aluminium, 1 stroke: 0.425 kg; triangle minimum 0.42, mode 0.425, maximum 0.43
- CUTOFF Treatment, sewage, to wastewater treatment, class 1: 212 kg; triangle minimum 191, mode 212, maximum 233
- CUTOFF Polycarbonate, at plant: 0.539 kg; triangle minimum 0.53, mode 0.537, maximum 0.55
- CUTOFF Nylon 6, at plant: 0.121 kg; triangle minimum 0.115, mode 0.121, maximum 0.127
- CUTOFF Copper product manufacturing, average metal working: 1.094 kg; triangle minimum 1.08, mode 1.094, maximum 1.108
- Polyethylene, low density, resin, at plant: 0.274 kg; triangle minimum 0.27, mode 0.272, maximum 0.28
  original data - LDPE granulate, at plant, RER/U from Ecoinvent
- CUTOFF Injection moulding: 12.73 kg; triangle minimum 12.5, mode 12.69, maximum 13
- Packaging, production scanners: 15.766 kg; triangle minimum 15.7, mode 15.748, maximum 15.85
- CUTOFF Carbon black, at plant: 0.055 kg; triangle minimum 0.053, mode 0.055, maximum 0.057
- CUTOFF Flat glass, coated, at plant: 0.2045 kg; triangle minimum 0.2, mode 0.2035, maximum 0.21
- CUTOFF Copper, primary, at refinery: 1.094 kg; triangle minimum 1.08, mode 1.094, maximum 1.108
- CUTOFF Steel, low-alloyed, at plant: 44.263 kg; triangle minimum 44, mode 44.289, maximum 44.5

## Sampling procedure
engineering specifications, variability less than 1% for this model

## Review details
Data was reviewed to ensure in was consistent with the manufacturing process and components, was based on quality sources - primary data from design and manufacturing specifications, and secondary data was from reliable sources (largely from Ecoinvent) and data was properly documented in final report and associated appendices. Initial review was by Roy Wood, followed by an independent internal review by Jay Mathewson.

## Sources
- Roy Wood
