# Ethanol, denatured, forest residues, thermochem

Dataset: openLCA process, unit process
Category: Ethyl alcohol manufacturing
Geography: RNA
Time period: 2005-01-01 to 2009-12-31
Generated by: Daniel Inman
Published in: Hsu, D.
restrictionsDescription: All information can be accessed by everybody.
copyright: false

## Technology
modern

## Geography
North America

## Time period
2005-2009

## Reference product
- Mixed Alcohols, thermochemical process: 3787.5 kg

## By-products
- Ethanol, denatured, forest residues, thermochem: 21183 kg
- Sulfur, thermochemical process: 53.52 kg

## Inputs from technosphere
- CUTOFF Sulphite, at plant: 0.39916 kg
  boiler chemicals http://www.accepta.com/water_treatment_chemicals/boiler-water-treatment.asp
- CUTOFF Thermochemical Conversion Plant: 5.95e-6 Item(s)
- Forest residue, preprocessed, at conversion facility: 119290 t
- CUTOFF Disposal, wood ash mixture, pure, 0% water, to sanitary landfill: 1102.2 kg
  add wood, ash, and char together and olivine. calculated based on regression fit of several aspen sensitivity runs.
- CUTOFF Disposal, inert material, 0% water, to sanitary landfill: 45.359 kg
  tar reformer catalyst. assumed all goes into landfill, even though some nickel is recovered from catalyst manufacturer.
- CUTOFF Chemicals inorganic, at plant: 0.45359 kg
- Gasoline, at refinery: 832 l
  About a 0.6% impurity content in product stream (water, CO2, alcohols)
- Diesel, at refinery: 82.9 l
  No. 2 Diesel fuel, for operating equipment.
- CUTOFF Silica sand, at plant: 244.03 kg
  olivine added to make up for loss in recycle. calculated based on regression fit of several aspen sensitivity runs.
- Sodium hydroxide, production mix, at plant: 0.39916 kg
  boiler chemicals http://www.accepta.com/water_treatment_chemicals/boiler-water-treatment.asp. Proxy: Sodium hydroxide, 50% in H2O, production mix, at plant/RER with US electricity U
- Heat, indirect, heated zones, softwood, plywood veneer drying, AP-42: 41730 kg
  Use plywood drying as approximationg. area100 drying. mass is oven-dried wood mass. calculated based on regression fit of several aspen sensitivity runs.
- CUTOFF Energy, output: 11968 MJ
  From gasoline
- CUTOFF Zeolite, powder, at plant: 45.359 kg
  tar reformer catalyst
- CUTOFF Magnesium oxide, at plant: 3.1615 kg
  calculated based on regression fit of several aspen sensitivity runs.
- CUTOFF Monoethanolamine, at plant: 27.216 kg
  Amine in Aspen model
- Combustion, dry wood residue, AP-42: 390670 MJ
  char combustor emissions. use heating value for graphite. calculated based on regression fit of several aspen sensitivity runs.
- CUTOFF Treatment, sewage, unpolluted, to wastewater treatment, class 3: 0.797 m3
  streams 305. calculated based on regression fit of several aspen sensitivity runs.
- CUTOFF Hydrochloric acid, 30% in H2O, at plant: 0.39916 kg
  (same comment as for CUTOFF Sulphite, at plant)

## Inputs from nature
- Oxygen, in air: 77564 kg
  calculated based on regression fit of several aspen sensitivity runs.
- Water, process, unspecified natural origin/kg: 13336 kg
  boiler feed water makeup. calculated based on regression fit of several aspen sensitivity runs.
- Nitrogen, in air: 253560 kg
  calculated based on regression fit of several aspen sensitivity runs.
- Water, cooling, unspecified natural origin/kg: 73936 kg
  cooling tower makeup. includes only streams 618,635,710,711. calculated based on regression fit of several aspen sensitivity runs.

## Emissions to nature
- Ammonia: 0.45359 kg
  Cooling tower chemicals. Assumed all were inorganic.
- Nitrogen: 253560 kg
  calculated based on regression fit of several aspen sensitivity runs.
- Oxygen: 12020 kg
  calculated based on regression fit of several aspen sensitivity runs.
- Carbon dioxide, biogenic: 107500 kg
  calculated based on regression fit of several aspen sensitivity runs.
- Sulfur dioxide: 39.054 kg
  calculated based on regression fit of several aspen sensitivity runs.
- Nitrogen dioxide: 83.915 kg
  calculated based on regression fit of several aspen sensitivity runs.
- Water: 63049 kg
  calculated based on regression fit of several aspen sensitivity runs.

## Sources
- Hsu, D.
- Hess, J.
- Phillips, S.
