# Roundwood, softwood, national forest, gentle slope, at forest road, INW

Dataset: openLCA process, unit process
Category: Logging
Geography: RNA
Time period: 1989-01-01 to 1996-01-01
Generated by: Maureen Puetmann
Published in: Leonard R. Johnson
restrictionsDescription: All information can be accessed by everybody.
copyright: false

## General comment
FIA inventory were from 1989 to 1996 depending on jurisdiction Allocation on a mass basis.
Important note: although most of the data in the US LCI database has
undergone some sort of review, the database as a whole has not yet
undergone a formal validation process.
Please email comments to lci@nrel.gov.

## Technology
Average technology. Some data extrapolated from similar processes.

## Geography
US Inland West including Montana, Idaho, and eastern Washington

## Reference product
- Roundwood, softwood, national forest, gentle slope, at forest road, INW: 34.092 m3
  Ovendry density = 450 kg/m3

## By-products
- Pulpwood, softwood, national forest, gentle slope, at forest road, INW: 28.12 m3
  Ovendry density = 450 kg/m3
- Bark, softwood, national forest, gentle slope, at forest road, INW: 2491.6 kg
  Ovendry density = 450 kg/m3. Bark volume evaluated at 5.54 m3/ha

## Inputs from technosphere
- Skidding, wheeled skidder, 120-140 HP: 5.0869 h
  Based on a rate of 0.082 standard machine hours per m3
- Site preparation, national softwood forest, gentle slope, INW: 1 ha
- Loader operation, large, INW: 2.5424 h
  Based on a rate of 0.041 standard machine hours per m3
- Felling, feller buncher, > 200 HP, INW: 0.99715 h
  Based on a rate of 0.016 standard machine hours per m3
- Reforesting, average national softwood forest, INW: 1 ha
- Delimbing, slide boom delimber: 0.84746 h
  Based on a rate of 0.014 standard machine hours per m3

## Inputs from nature
- Wood, soft, INW, standing: 67.749 m3
- Carbon dioxide, in air: 28107 kg
  Based on carbon content of roundwood
- Carbon dioxide, in air: 4564.8 kg
  Based on carbon content of bark
- Carbon dioxide, in air: 23183 kg
  Based on carbon content of pulpwood

## Sampling procedure
Harvesting production, cost and fuel consumption rates were assimilated from existing studies of harvesting equipment typical of the systems used to harvest sites in the Inland West. These studies included both published information and personal interviews with timber harvesting contractors.
The costs, production and consumption rates were developed for equipment options within each component of the system. Harvesting systems were developed as combinations of these harvesting components. Although there are many combinations of harvesting equipment and systems that can be used for harvesting timber, this analysis assumes the use of the most common systems operating on the range of slope classifications identified for the harvested sites.

## Sources
- Maureen Puettmann
- Leonard R. Johnson
