# Transport, ocean freighter, diesel powered

Dataset: openLCA process, unit process
Category: Deep Sea Freight Transportation
Geography: US
Time period: 2001-01-01 to 2001-01-01
Generated by: Franklin Associates
Published in: Franklin Associates
restrictionsDescription: All information can be accessed by everybody.
copyright: false

## General comment
Important note: although most of the data in the US LCI database has undergone some sort of review, the database as a whole has not yet undergone a formal validation process. Please email comments to lci@nrel.gov.

## Technology
Combustion of diesel in an ocean freighter.

## Geography
United States

## Reference product
- Transport, ocean freighter, diesel powered: 1 t*km

## Inputs from technosphere
- Diesel, at refinery: 0.0049263 l

## Emissions to nature
- Particulates, < 10 um: 9.971e-6 kg
- Methane, fossil: 7.2952e-7 kg
- Sulfur oxides: 3.183e-6 kg
- Carbon monoxide, fossil: 3.9652e-5 kg
- Carbon dioxide, fossil: 0.014395 kg
- VOC, volatile organic compounds: 1.4888e-5 kg
- Nitrogen oxides: 0.00040213 kg

## Sources
- Center for Transportation Research, Argo
- unspecified
- Franklin Associates
