# Polystyrene, general purpose, at plant

Dataset: openLCA process, unit process
Category: Petrochemical Manufacturing
Geography: RNA
Time period: 2000-01-01 to 2003-01-01
Generated by: Franklin Associates
Published in: THE PLASTICS DIVISION OF THE AMERICAN C
restrictionsDescription: All information can be accessed by everybody.
copyright: false

## General comment
Scrap is produced as a coproduct during this process. A mass basis was used to partition the credit for scrap. Complete inventory data and metadata are available in full in the final report and appendices, Cradle-to-Gate Life Cycle Inventory of Nine Plastic Resins and Four Polyurethane Precursors. This report has been extensively reviewed within Franklin Associates and has undergone partial critical review by ACC Plastics Division members and is available at: www.americanchemistry.com. Quantities may vary slightly between the reference to main source and and this module due to rounding. Important note: although most of the data in the US LCI database has undergone some sort of review, the database as a whole has not yet undergone a formal validation process. Please email comments to lci@nrel.gov.

## Technology
Polymerization of styrene by mass suspension

## Geography
US

## Reference product
- Polystyrene, general purpose, at plant: 1 kg

## Inputs from technosphere
- Ethylbenzene styrene, at plant: 0.999 kg
- CUTOFF Disposal, solid waste, unspecified, to municipal incineration: 1.7e-5 kg
- Transport, barge, residual fuel oil powered: 0.805702 t*km
  Transport is specific to ethylbenzene styrene delivered to styrene producers. Values for barge transport are calculated based on average fuel consumption rates as reported in Transportation Energy Data Book: Edition 22 from Oak Ridge National Laboratory, September 2002: 22% of barges use diesel fuel in their engines, 78% use residual oil to generate steam for steam turbines, and a barge that consumes residual oil consumes 3.4 gallons per 1,000 ton-miles
- Transport, combination truck, diesel powered: 0.24499 t*km
  Transport is specific to ethylbenzene styrene delivered to styrene producers.
- Transport, barge, diesel powered: 0.242317 t*km
  (same comment as for Transport, barge, residual fuel oil powered)
- Electricity, at grid, US, 2008: 0.115079 kWh
- Transport, ocean freighter, diesel powered: 0.0250753 t*km
  Values for ocean freighter transport are calculated based on average fuel consumption rates as determined from a personal communication with Rich Sonnenschein, U.S. Department of Transportation, Maritime Administration in February 2004: 10% of ocean freighters use diesel fuel, 90% use residual fuel, and a freighter that consumes residual fuel consumes 1.9 gallons per 1,000 ton-miles
- White mineral oil, at plant: 0.00257 kg
- CUTOFF Disposal, solid waste, unspecified, to sanitary landfill: 0.00063 kg
- Transport, ocean freighter, residual fuel oil powered: 0.225678 t*km
  (same comment as for Transport, ocean freighter, diesel powered)
- Transport, train, diesel powered: 0.331789 t*km
  Transport is specific to ethylbenzene styrene delivered to styrene producers.
- Natural gas, combusted in industrial boiler: 0.0200391 m3
- CUTOFF Disposal, solid waste, unspecified, to waste-to-energy: 0.00154 kg

## Inputs from nature
- Water, process, unspecified natural origin/m3: 0.00017928 m3
  Consumptive use includes: water incorporated into the product, water evaporated during the process, and/or water used and released to a body other than that from which it was drawn.

## Emissions to nature
- Nickel: 5e-8 kg
- Methane, difluromonochloro-, HCFC-22: 1e-6 kg
  This emission was reported by fewer than three companies. To indicate known emissions while protecting the confidentiality of individual company responses, the emission is reported only by order of magnitude.
- Suspended solids, unspecified: 5e-7 kg
  (same comment as for Methane, difluromonochloro-, HCFC-22)
- Nitrogen oxides: 4.3e-5 kg
- Cyanide: 1e-9 kg
  (same comment as for Methane, difluromonochloro-, HCFC-22)
- Oil and grease, unspecified: 1e-7 kg
  (same comment as for Methane, difluromonochloro-, HCFC-22)
- Ammonia: 5e-7 kg
  (same comment as for Methane, difluromonochloro-, HCFC-22)
- Chromium, unspecified: 5e-8 kg
  (same comment as for Methane, difluromonochloro-, HCFC-22)
- Hydrocarbons, unspecified: 1e-8 kg
  (same comment as for Methane, difluromonochloro-, HCFC-22)
- Carbon monoxide: 1.9e-5 kg
- NMVOC, non-methane volatile organic compounds, unspecified: 0.00012 kg
- Zinc: 5e-8 kg
  (same comment as for Methane, difluromonochloro-, HCFC-22)
- BOD5, Biological Oxygen Demand: 1e-7 kg
  (same comment as for Methane, difluromonochloro-, HCFC-22)
- Sulfur oxides: 3.3e-7 kg
- Iron: 1e-8 kg
- Dissolved solids: 0.001 kg
  (same comment as for Methane, difluromonochloro-, HCFC-22)
- Phosphates: 1e-6 kg
  (same comment as for Methane, difluromonochloro-, HCFC-22)
- Organic substances, unspecified: 1e-5 kg
  (same comment as for Methane, difluromonochloro-, HCFC-22)
- Lead: 5e-8 kg
  (same comment as for Methane, difluromonochloro-, HCFC-22)
- Phenol compounds, unspecified: 1e-9 kg
  (same comment as for Methane, difluromonochloro-, HCFC-22)
- Particulates, unspecified: 2.4e-5 kg

## Sampling procedure
Data are from primary sources.

## Sources
- THE PLASTICS DIVISION OF THE AMERICAN C
