# Open molding, rigid composites part, at plant

Dataset: openLCA process, unit process
Category: Plastics Product Manufacturing
Geography: RNA
Time period: 2011-01-01 to 2012-01-01
Generated by: Franklin Associates
Published in: American Composites Manufacturers Assn.
restrictionsDescription: All information can be accessed by everybody.
copyright: false

## General comment
For each kilogram of composite part fabrication, the amount of incoming corrugated box material is equivalent to that coming out of the process as it is purchased to be used as shipping packaging. An average of 0.011 kg of rigid composite part scrap is produced for every kilogram of open molded parts produced; this scrap is sold for recycling. The packaging inputs in this data set represent the average reported per kilogram of output across a range of products produced at manufacturing facilities. Possible differences in the mass balance include ancillary materials, incoming packaging (including wood), and other unspecified process wastes that are thrown out but not accounted for as inputs in the LCI. Complete inventory data and metadata are shown in full in the final report, Life Cycle Inventory of Polymer Composites. The report is not publicly available. This report has been extensively reviewed within Franklin Associates by Rebe Feraldi, Anne Marie Molen, and Melissa Huff and has undergone partial critical review by ACMA members. Important note: although most of the data in the US LCI database has undergone some sort of review, the database as a whole has not yet undergone a formal validation process. Please email comments to lci@nrel.gov.

## Technology
Fabrication of rigid composite parts by open molding.

## Geography
US

## Reference product
- Open molding, rigid composites part, at plant: 1 kg

## By-products
- Corrugate packaging, from open molding, for shipping: 0.02 kg
- Plywood, from open molding, for shipping: 0.031 kg
- Surfaced dried lumber, from open molding, for shipping: 0.008 kg
- Composite scrap, from composites open molding, at plant: 0.011 kg

## Inputs from technosphere
All rows: lognormal geomSd 1
- CUTOFF Gelcoat, UPR & styrene-based, at plant: 0.015, 0.065 kg (2 entries)
- CUTOFF Continuous strand mat, glass fiber based, at plant: 0.12 kg
- CUTOFF Initiator, MEKP, at plant: 0.011 kg
- Transport, ocean freighter, average fuel mix: 1.033 t*km
- Unsaturated polyester, resin, at plant: 0.52 kg
- CUTOFF Acetone from butane, at plant. RER: 0.0046 kg
- Diesel, combusted in industrial equipment: 0.0015019 l
- Plywood, at plywood plant, US SE: 0.039 kg
- CUTOFF Converted corrugated box, with average bleaching, at plant: 0.02 kg
- Limestone, at mine: 0.2 kg
- CUTOFF Disposal, solid waste, unspecified, to municipal incineration: 0.005 kg
- Transport, combination truck, diesel powered: 1.712 t*km
- E-glass, at plant: 0.09 kg
- Electricity, at Grid, US, 2010: 1.0957 kWh
- CUTOFF Disposal, solid waste, unspecified, to waste-to-energy: 0.0025 kg
- Natural gas, combusted in industrial boiler: 0.0017542 m3
- Transport, train, diesel powered: 0.20016 t*km
- CUTOFF Ethanol, denatured, corn stover, biochemical: 0.0017522 l
- CUTOFF Disposal, solid waste, unspecified, to sanitary landfill: 0.17 kg
- Surfaced dried lumber, at planer mill, US SE: 0.01 kg
- Cold rolled sheet, steel, at plant: 0.025 kg
- Liquefied petroleum gas, combusted in industrial boiler: 0.024114 l

## Inputs from nature
- Water, process, unspecified natural origin/m3: 0.0074011 m3; lognormal geomSd 1

## Emissions to nature
- Styrene: 0.037 kg; lognormal geomSd 1
- Methacrylic acid, methyl ester: 0.00016 kg; lognormal geomSd 1
- VOC, volatile organic compounds: 0.012 kg; lognormal geomSd 1
- Particulates, < 10 um: 0.00036 kg; lognormal geomSd 1

## Sampling procedure
Data are from primary sources. The composites fabricators who provided data for this module verified that the characteristics of their plants are representative of North American composites fabrication facilities producing open molded composite parts. The representativeness of the composites fabrication processes are unknown, but estimated to be less than 10% of the US production volume.

## Sources
- American Composites Manufacturers Assn.
