# Anthracite coal, at mine

Dataset: openLCA process, unit process
Category: Anthracite Mining
Geography: RNA
Generated by: Jeff Hernbloom
Published in: Franklin Associates
restrictionsDescription: All information can be accessed by everybody.
copyright: false

## General comment
Important note: although most of the data in the US LCI database has
undergone some sort of review, the database as a whole has not yet
undergone a formal validation process.
Please email comments to lci@nrel.gov.

## Geography
North America

## Reference product
- Anthracite coal, at mine: 1 kg

## Inputs from technosphere
- Natural gas, combusted in industrial boiler: 0.000232 m3
- Electricity, at grid, US, 2000: 0.0212 kWh
- CUTOFF Disposal, solid waste, unspecified, to unspecified treatment: 0.271 kg
- Residual fuel oil, combusted in industrial boiler: 0.00134 l
- Anthracite coal, combusted in industrial boiler: 0.17 kg
- Gasoline, combusted in equipment: 0.000268 l
- Diesel, combusted in industrial boiler: 0.00364 l

## Inputs from nature
- Coal, hard, 30.7 MJ per kg: 1.27 kg

## Emissions to nature
- Iron: 2.22e-5 kg
- Manganese: 1.48e-5 kg
- Suspended solids, unspecified: 0.000259 kg
- Methane: 0.00159 kg
- VOC, volatile organic compounds: 3.18e-5 kg
- Particulates, unspecified: 0.0021 kg

## Sources
- Franklin Associates
- U.S. Census Bureau
- unspecified
- Hong, B.D
- U.S. Department of Energy
- unspecified
- Energy Information Administration
- Energy Information Administration
- unspecified
- USDA/ERS
- USDA/NCRS
- Energy Information Administration
- Energy Information Administration
- U.S. EPA
- U.S. EPA
- D.A. Kirchgessner
- J.G. Speight
