# Electricity, at eGrid, RFCM, 2008

Dataset: openLCA process, unit process
Category: Utilities
Geography: RNA
Time period: 2008-01-01 to 2008-01-01
Generated by: Alberta Carpenter
Published in: Chris Goemans, Athena Institute
restrictionsDescription: All information can be accessed by everybody.
copyright: false

## General comment
The methodology used to put together the grid information is outlined in reference 1.

## Technology
Typical

## Geography
RFC Michigan electricity grid to include most of Michigan less the upper pennisula and a small south west portion of lower peninsula.

## Reference product
- Electricity, at eGrid, RFCM, 2008: 1 kWh

## Inputs from technosphere
- CUTOFF Electricity, biomass,liquid, unspecified, at power plant: 7.20532e-7 kWh
  Liquid Renewable Fuels (Biomass) OBL – Other Biomass Liquid (Ethanol, Fish Oil, Liquid Acetonitrile Waste, Medical Waste, Tall Oil, Waste Alcohol, and other Biomass not specified)
- CUTOFF Electricity, biomass, solid, biogenic MSW, at power plant: 0.00209135 kWh
  Solid Renewable Fuels (Biomass) MSB – Municipal Solid Waste – Biogenic Component
- Electricity, bituminous coal, at power plant: 0.554564 kWh
  Subbituminous Coal
- CUTOFF Electricity, MSW, non-biogenic, at power plant: 0.0016432 kWh
  Other Fuels MSN – Municipal Solid Waste – Non-biogenic components
- CUTOFF Electricity, other fuels, unspecified, at power plant: 5.57727e-5 kWh
  Other Fuels OTH – Other (Batteries, Chemicals, Coke Breeze, Hydrogen, Pitch, Sulfur, Tar Coal, and miscellaneous technologies)
- CUTOFF Electricity, biomass, gas, landfill, at power plant: 0.00641576 kWh
  Gaseous Renewable Fuels (Biomass) LFG - landfill gas
- CUTOFF Electricity, biomass, liquid, sludge, at power plant: 1.5063e-5 kWh
  Liquid Renewable Fuels (Biomass) SLW - sludge waste
- Electricity, bituminous coal, at power plant: 0.202843 kWh
  Bituminous Coal
- CUTOFF Electricity, tire derived fuel, at power plant: 0.00159343 kWh
  Solid Renewable Fuels (Biomass) TDF - tires, tire derived fuel
- CUTOFF Electricity, at wind power plant, unspecified: 0.00162707 kWh
  Wind
- Electricity, natural gas, at power plant: 0.102724 kWh
  Natural Gas
- Electricity, residual fuel oil, at power plant: 0.00138471 kWh
  Petroleum (RFO) – Residual Fuel Oil (includes No. 5 and No. 6 Fuel Oils and Bunker C Fuel Oil)
- CUTOFF Electricity, other gases, unspecified, at power plant: 0.0030472 kWh
  Other Gases BFG - blast furnace gas
- Electricity, nuclear, at power plant: 0.110791 kWh
  Nuclear Fission NUC – Nuclear (Uranium, Plutonium, Thorium)
- CUTOFF Electricity, hydropower, at power plant, unspecified: -0.00420187 kWh
  Hydroelectric WAT – Water (Conventional, Pumped Storage)
- CUTOFF Electricity, petroleum coke, at power plant: 0.0019755 kWh
  Petroleum (Other Fossil) PC - petroleum coke
- Electricity, biomass, at power plant: 0.0119766 kWh
  Solid Renewable Fuels (Biomass) WDS – Wood/Wood Waste Solids (Paper Pellets, Railroad Ties, Utility Poles, Wood Chips, and other wood solids)
- Electricity, diesel, at power plant: 0.00145309 kWh
  Petroleum (DFO) – Distillate Fuel Oil (includes all Diesel and No. 1, No. 2, and No. 4 Fuel Oils)

## Sampling procedure
based on EIA electricity reports for all power plants in the US.

## Sources
- Chris Goemans, Athena Institute
- unspecified
- USEPA
- Statistics Canada
- Statistics Canada
- Statistics Canada
- Statistics Canada
- Statistics Canada
- Statistics Canada
- USEPA
- EIA
- EIA
- EIA
- EIA
- EIA
- EIA
- EIA
- EIA
- EIA
- EIA
- EIA
- US DOE
- International Energy Agency
- US DOE
