# Sulfur, at plant

Dataset: openLCA process, unit process
Category: All Other Basic Inorganic Chemical Manufacturing
Geography: RNA
Time period: 1984-01-01 to 2004-01-01
Generated by: Franklin Associates
Published in: THE PLASTICS DIVISION OF THE AMERICAN C
restrictionsDescription: All information can be accessed by everybody.
copyright: false

## General comment
Heat is a coproduct released from cooling during the exothermic reaction. Complete inventory data and metadata are available in full in the final report and appendices, Cradle-to-Gate Life Cycle Inventory of Nine Plastic Resins and Four Polyurethane Precursors. This report has been extensively reviewed within Franklin Associates and has undergone partial critical review by ACC Plastics Division members and is available at: www.americanchemistry.com. Quantities may vary slightly between the reference to main source and and this module due to rounding. Important note: although most of the data in the US LCI database has undergone some sort of review, the database as a whole has not yet undergone a formal validation process. Please email comments to lci@nrel.gov.

## Technology
Recovery from petroleum refining and natural gas sweetening via the Claus process

## Geography
North America (US and Canada)

## Reference product
- Sulfur, at plant: 1 kg

## By-products
- Recovered energy: 6 MJ
  Credit for steam or heat co-product sold externally.

## Inputs from technosphere
- Diesel, combusted in industrial equipment: 0.00164 l
  Includes diesel fuel and distillate oil amounts.
- Residual fuel oil, combusted in industrial boiler: 0.00101 l
- Electricity, at grid, US, 2008: 0.159 kWh
- Gasoline, combusted in equipment: 0.000866 l
- Natural gas, combusted in industrial boiler: 0.113 m3
- CUTOFF Disposal, solid waste, unspecified, to sanitary landfill: 0.0328 kg

## Emissions to nature
- Sulfur: 6.89e-7 kg
- Dodecane: 1.57e-8 kg
- Acetone: 8.31e-10 kg
- Selenium: 3.27e-9 kg
- Barium: 0.000365 kg
- Toluene: 3.06e-7 kg
- Naphthalene, 2-methyl-: 4.31e-9 kg
- Antimony: 1.68e-8 kg
- Fluorine: 1.48e-9 kg
- COD, Chemical Oxygen Demand: 5.26e-5 kg
- o-Xylene: 3.03e-9 kg
- Benzene: 3.3e-7 kg
- Phenol: 7.92e-8 kg
- Aluminum: 2.7e-5 kg
- Phenanthrene: 2.28e-10 kg
- Docosane: 8.8e-11 kg
- p-Cresol: 8.89e-9 kg
- Methyl ethyl ketone: 6.62e-12 kg
- 2-Hexanone: 1.88e-9 kg
- p-Xylene: 3.03e-9 kg
- Benzene, ethyl-: 1.83e-8 kg
- Magnesium: 0.000126 kg
- Cadmium, ion: 9.03e-9 kg
- Ammonia: 3.46e-6 kg
- Vanadium: 7.45e-9 kg
- o-Cresol: 8.78e-9 kg
- Methane: 0.00634 kg
- Beryllium: 3.65e-9 kg
- Molybdenum: 6.57e-9 kg
- Silver: 3.92e-7 kg
- Cyanide: 5.93e-12 kg
- Octadecane: 4.27e-9 kg
- Lead: 1.51e-7 kg
- Hexanoic acid: 6.02e-8 kg
- Decane: 8.27e-9 kg
- Eicosane: 4.3e-9 kg
- Cobalt: 6.34e-9 kg
- Benzene, pentamethyl-: 6.16e-12 kg
- Dibenzothiophene: 1.27e-11 kg
- Yttrium: 1.92e-9 kg
- Dissolved solids: 0.00815 kg
- Naphthalene: 5.14e-9 kg
- BOD5, Biological Oxygen Demand: 3.18e-5 kg
- Strontium: 1.56e-5 kg
- Radium-228/kg: 5.3e-17 kg
- Carbon dioxide, fossil: 0.214 kg
- Mercury: 2.96e-10 kg
- Tin: 6.66e-8 kg
- Calcium, ion: 0.000635 kg
- Boron: 8.95e-7 kg
- Phenanthrenes, alkylated, unspecified: 3.75e-10 kg
- Xylene: 1.46e-7 kg
- Benzoic acid: 2.91e-7 kg
- Iron: 5.04e-5 kg
- Zinc: 6.15e-7 kg
- Fluorenes, alkylated, unspecified: 3.19e-9 kg
- Lead-210/kg: 2.98e-17 kg
- Chromium: 7.21e-7 kg
- Naphthalenes, alkylated, unspecified: 9.03e-10 kg
- Manganese: 1.84e-7 kg
- Hexadecane: 1.72e-8 kg
- m-Xylene: 8.17e-9 kg
- Sulfate: 1.33e-5 kg
- n-Hexacosane: 5.49e-11 kg
- Copper, ion: 7.9e-8 kg
- Thallium: 3.56e-9 kg
- Benzene, 1-methyl-4-(1-methylethyl)-: 8.22e-12 kg
- Arsenic, ion: 5.88e-8 kg
- Aldehydes, unspecified: 8.9e-5 kg
- Radium-226/kg: 1.04e-14 kg
- Bromide: 3.92e-5 kg
- Oils, unspecified: 5.44e-6 kg
- Phenol, 2,4-dimethyl-: 2.07e-8 kg
- Benzenes, alkylated, unspecified: 5.51e-8 kg
- Dibenzofuran: 1.56e-11 kg
- Nickel: 6.9e-8 kg
- Surfactants: 1.54e-7 kg
- Titanium, ion: 2.6e-7 kg
- 4-Methyl-2-pentanone: 3.46e-10 kg
- Chloride: 0.00773 kg
- Biphenyl: 3.57e-9 kg
- Fluorene, 1-methyl-: 9.36e-12 kg
- Tetradecane: 6.59e-9 kg
- Suspended solids, unspecified: 0.00298 kg
- Methane, monochloro-, R-40: 3.31e-12 kg
- Lithium, ion: 2.87e-5 kg
- Sodium, ion: 0.00186 kg

## Sampling procedure
Data are from secondary sources.

## Sources
- THE PLASTICS DIVISION OF THE AMERICAN C
