# Carbon monoxide, at plant

Dataset: openLCA process, unit process
Category: Petrochemical Manufacturing
Geography: RNA
Time period: 2003-01-01 to 2004-01-01
Generated by: Franklin Associates
Published in: THE PLASTICS DIVISION OF THE ACC
restrictionsDescription: All information can be accessed by everybody.
copyright: false

## General comment
Complete inventory data and metadata are available in full in the final report and appendices, Cradle-to-Gate Life Cycle Inventory of Nine Plastic Resins and Four Polyurethane Precursors. This report has been extensively reviewed within Franklin Associates and has undergone partial critical review by ACC Plastics Division members and is available at: www.americanchemistry.com. Quantities may vary slightly between the reference to main source and and this module due to rounding. Important note: although most of the data in the US LCI database has undergone some sort of review, the database as a whole has not yet undergone a formal validation process. Please email comments to lci@nrel.gov.

## Technology
The raw materials necessary for the production of carbon monoxide are the gases resulting from steam reformation, as in the production of synthesis gas for ammonia manufacture, or from partial combustion of hydrocarbons. The feed gas must be stripped of carbon dioxide by scrubbing with ethanolamine solution and then passed through a molecular sieve to remove traces of carbon dioxide and water. Carbon monoxide and unconverted methane are condensed from the gas mixture and separated by lowering the pressure to remove entrained gases. The methane is recycled and the carbon monoxide comes out as a product after evaporation, warming, and compression.

## Geography
Representative of North America (US and Canada)

## Reference product
- Carbon monoxide, at plant: 1 kg

## Inputs from technosphere
- CUTOFF Disposal, solid waste, fuel, to municipal incineration: 0.021476 kg
- CUTOFF Disposal, solid waste, process, to sanitary landfill: 0.017184 kg

## Inputs from nature
- Uranium oxide, 332 GJ per kg, in ore: 9.3244e-7 kg
- Coal, unprocessed bituminous, in ground: 0.03805 kg
- Energy, geothermal: 0.0018811 MJ
- Energy, solar: 7.8997e-5 MJ
- Oil, crude, in ground: 0.0052926 kg
  This flow represents the amount of crude oil that is used for fuel. The energy content of the crude oil used for fuel is 43.7 MJ per kg.
- Energy, from hydro power: 0.035746 MJ
- Coal, lignite, in ground: 0.0036578 kg
- Water, consumptive use, unspecified origin/m3: 0.0029612 m3
  Franklin Associates uses a default as opposed to Egalitarian approach in collecting data for water use. During data collection, water use data were only requested and compiled in terms of 'evaporative' or consumptive use (i.e., ultimate withdraws, evaporation, or incorporation into the product). Data were not collected to determine reliable averages for non-evaporative water use. In other words, averages for water inputs and outputs are not available for this unit process. Consumptive use includes: water incorporated into the product, water evaporated during the process, and/or water used and released to a body other than that from which it was drawn.
- Energy, unspecified: 0.0025194 MJ
  Energy unspecified reflects "other fossil" fuels
- Energy, kinetic (in wind), converted: 0.0018614 MJ
- Gas, natural, in ground: 0.44352 m3
  This flow represents the amount of natural gas that is used for fuel. The energy content of the natural gas used for fuel is 36.7 MJ per m3.
- Gas, natural, in ground: 0.71375 kg
  This flow represents the amount of natural gas that is a material input for producing the resin output. The energy content of the natural gas used as EMR/feedstock is 49.8 MJ per kg. The energy content multiplied by the mass should be considered an Energy of Material Resource (EMR)/feedstock energy.
- Energy, from biomass: 0.00077516 MJ

## Emissions to nature
- Mercury: 3.3008e-9, 2.6993e-10 kg (2 entries, compartments not in this file)
- Dibenzothiophene: 3.6132e-11 kg
- Polycyclic organic matter, unspecified: 2.813e-10 kg
- Particulates, > 2.5 um, and < 10um: 3.0561e-6 kg
- Octadecane: 3.8248e-9 kg
- Surfactants: 6.1875e-10 kg
- Mercaptans, unspecified: 1.7452e-9 kg
- Dioxins, measured as 2,3,7,8-tetrachlorodibenzo-p-dioxin: 1.9886e-14 kg
- Molybdenum: 5.8885e-9 kg
- Methane, monochloro-, R-40: 4.6137e-12, 7.0841e-12 kg (2 entries, compartments not in this file)
- Hexanoic acid: 5.3877e-8 kg
- Nickel: 5.8193e-8, 4.4304e-8 kg (2 entries, compartments not in this file)
- Ammonium chloride: 4.9491e-8 kg
- Lead: 1.2856e-7, 1.1571e-8 kg (2 entries, compartments not in this file)
- Hexadecane: 1.5437e-8 kg
- Methane, chlorotrifluoro-, CFC-13: 1.1051e-10 kg
- Cadmium: 8.2667e-9 kg
- Tetradecane: 6.0783e-9 kg
- Acetophenone: 1.3058e-13 kg
- Methyl ethyl ketone: 1.4168e-11, 3.395e-12 kg (2 entries, compartments not in this file)
- Beryllium: 5.4602e-10, 3.01e-9 kg (2 entries, compartments not in this file)
- 4-Methyl-2-pentanone: 7.4295e-10 kg
- Fluorenes, alkylated, unspecified: 2.7585e-9 kg
- Benzene, chloro-: 1.9151e-13 kg
- Furan: 7.9821e-14 kg
- Copper: 6.7403e-8, 1.7004e-10 kg (2 entries, compartments not in this file)
- Methane, dichloro-, HCC-30: 7.5234e-9 kg
- Benzo(a)pyrene: 6.7789e-13 kg
- Ethane, 1,2-dichloro-: 3.482e-13 kg
- Indeno(1,2,3-cd)pyrene: 1.0882e-12 kg
- Surfactants, unspecified: 1.2417e-7 kg
- Hydrocarbons, unspecified: 2.8564e-7 kg
- Radioactive species, Nuclides, unspecified: 1.5369 Bq
- Particulates, < 2.5 um: 5.3414e-5 kg
- Styrene: 2.1763e-13 kg
- Carbon dioxide, fossil: 1.0026 kg
- Sulfur dioxide: 0.0024177 kg
- Zinc: 5.463e-7, 1.1336e-10 kg (2 entries, compartments not in this file)
- Ammonia: 0.0011, 0.00010261 kg (2 entries, compartments not in this file)
- Biphenyl: 3.082e-9, 3.0327e-11 kg (2 entries, compartments not in this file)
- Phthalate, dioctyl-: 6.3547e-13 kg
- Benzene, pentamethyl-: 1.3191e-11 kg
- Ethane, chloro-: 3.6561e-13 kg
- Cadmium, ion: 7.5275e-9 kg
- Hydrogen chloride: 2.1756e-5 kg
- Benzyl chloride: 6.0936e-12 kg
- Eicosane: 3.88e-9 kg
- Fluoranthene: 1.2666e-11 kg
- Manganese: 1.2287e-8, 4.5215e-7 kg (2 entries, compartments not in this file)
- Benzene, ethyl-: 1.4717e-8, 1.1968e-5 kg (2 entries, compartments not in this file)
- o-Xylene: 2.7783e-9 kg
- Benzo(ghi)perylene: 4.8166e-13 kg
- Vanadium: 7.1063e-9 kg
- Chloroform: 5.136e-13 kg
- Naphthalene: 4.5393e-9, 4.6709e-9 kg (2 entries, compartments not in this file)
- Antimony: 1.4105e-8, 3.3135e-10 kg (2 entries, compartments not in this file)
- Ethane, 1,2-dibromo-: 1.0446e-14 kg
- Phenols, unspecified: 7.4241e-8, 2.0562e-9 kg (2 entries, compartments not in this file)
- Phenanthrene: 2.0587e-10, 4.8166e-11 kg (2 entries, compartments not in this file)
- Sulfuric acid, dimethyl ester: 4.1784e-13 kg
- Benzenes, alkylated, unspecified: 4.7598e-8 kg
- Dodecane: 1.412e-8 kg
- Methane, tetrachloro-, CFC-10: 7.0325e-12 kg
- Acetone: 1.8071e-9 kg
- Radionuclides (Including Radon): 1.3255e-6 kg
- Ethene, tetrachloro-: 8.0567e-10 kg
- Acetaldehyde: 8.8022e-9 kg
- Bromide: 3.0201e-5 kg
- Propanal: 3.3079e-12 kg
- Selenium: 2.3979e-8, 6.5377e-9 kg (2 entries, compartments not in this file)
- Magnesium: 0.00010192, 1.9623e-7 kg (2 entries, compartments not in this file)
- Particulates, unspecified: 6.0304e-5 kg
- Chromium VI: 1.4093e-9 kg
- Dinitrogen monoxide: 1.746e-5 kg
- Titanium, ion: 2.2417e-7 kg
- Docosane: 1.8834e-10 kg
- Barium: 0.00031228 kg
- 5-methyl Chrysene: 3.9246e-13 kg
- Cyanide: 1.2702e-11, 2.1763e-11 kg (2 entries, compartments not in this file)
- Benzene, 1-methyl-4-(1-methylethyl)-: 1.7588e-11 kg
- Dissolved solids: 0.0062796 kg
- Benzo(a)anthracene: 1.4271e-12 kg
- Toluene: 2.4155e-7, 0.00014961 kg (2 entries, compartments not in this file)
- PAH, polycyclic aromatic hydrocarbons: 1.927e-9 kg
- Chromium: 1.4083e-8, 6.2311e-7 kg (2 entries, compartments not in this file)
- Methane, bromo-, Halon 1001: 1.3928e-12 kg
- Radium-226/kg: 9.2708e-15 kg
- Yttrium: 1.7236e-9 kg
- Chloride: 0.006346 kg
- Carbon monoxide: 0.0076182 kg
- Pyrene: 5.8869e-12 kg
- Sulfur oxides: 4.7655e-5 kg
- Cobalt: 5.681e-9, 4.1498e-9 kg (2 entries, compartments not in this file)
- Sulfide: 9.5441e-10 kg
- BOD5, Biological Oxygen Demand: 2.4714e-5 kg
- Benzo(b,j,k)fluoranthene: 1.9623e-12 kg
- Xylene: 8.6775e-5, 1.1279e-7 kg (2 entries, compartments not in this file)
- Formaldehyde: 5.1545e-7 kg
- Benzene: 2.6203e-7, 9.5802e-5 kg (2 entries, compartments not in this file)
- Chrysene: 1.7839e-12 kg
- Butadiene: 4.4848e-10 kg
- Fluorene: 1.6233e-11, 1.2898e-9 kg (2 entries, compartments not in this file)
- m-Xylene: 7.5712e-9 kg
- Benzoic acid: 2.6017e-7 kg
- Anthracene: 3.7463e-12 kg
- Acenaphthene: 9.0978e-12 kg
- Carbon disulfide: 1.1317e-12 kg
- Vinyl acetate: 6.6159e-14 kg
- Hydrogen fluoride: 2.6755e-6 kg
- Ammonium, ion: 1.0581e-8 kg
- Lead-210/kg: 2.6648e-17 kg
- Dibenzofuran: 3.3467e-11 kg
- Kerosene: 2.3702e-8 kg
- Organic substances, unspecified: 0.0042001 kg
- Phenol, 2,4-dimethyl-: 7.1837e-9 kg
- Fluorene, 1-methyl-: 2.0032e-11 kg
- Nitrogen oxides: 0.00079845 kg
- Arsenic, ion: 4.7685e-8 kg
- Radium-228/kg: 4.7422e-17 kg
- Bromoform: 3.395e-13 kg
- Silver: 3.0477e-7 kg
- Carbon monoxide, fossil: 0.00050908 kg
- Radioactive species, unspecified: 1010.7 Bq
- Isophorone: 5.0489e-12 kg
- COD, Chemical Oxygen Demand: 4.1704e-5 kg
- Naphthalenes, alkylated, unspecified: 7.8e-10 kg
- Suspended solids, unspecified: 0.0025789 kg
- Sulfur: 6.5209e-7 kg
- Lithium, ion: 0.00015051 kg
- Toluene, 2,4-dinitro-: 2.4374e-15 kg
- t-Butyl methyl ether: 3.0468e-13 kg
- Oils, unspecified: 4.6629e-6 kg
- Cumene: 4.6137e-14 kg
- Boron: 8.0325e-7 kg
- Ethylene dibromide: 2.16e-11 kg
- Nitrogen, total: 2.6341e-8 kg
- p-Xylene: 2.7783e-9 kg
- Phenol: 1.5256e-9, 1.3928e-13 kg (2 entries, compartments not in this file)
- Acenaphthylene: 4.4598e-12 kg
- Methacrylic acid, methyl ester: 1.741e-13 kg
- Methane: 0.00013093 kg
- Hexane: 5.8324e-13 kg
- Hydrazine, methyl-: 1.4799e-12 kg
- Fluoride: 1.721e-7, 1.4705e-9 kg (2 entries, compartments not in this file)
- p-Cresol: 7.9603e-9 kg
- VOC, volatile organic compounds: 0.00081033 kg
- Aluminum: 2.3557e-5 kg
- Ethane, 1,1,1-trichloro-, HCFC-140: 1.741e-13 kg
- Sulfate: 3.1735e-5 kg
- Phenanthrenes, alkylated, unspecified: 3.2342e-10 kg
- 2-Chloroacetophenone: 6.0936e-14 kg
- Aldehydes, unspecified: 1.7121e-8 kg
- 2-Hexanone: 1.7119e-9 kg
- Strontium: 1.3965e-5 kg
- Sodium, ion: 0.0014366 kg
- NMVOC, non-methane volatile organic compounds, unspecified origin: 5.3268e-6 kg
- Arsenic: 9.1272e-9 kg
- n-Hexacosane: 1.175e-10 kg
- Thallium: 3.0744e-9 kg
- Particulates, < 10 um: 5.5175e-5 kg
- Iron: 4.41e-5 kg
- Copper, ion: 1.0238e-8 kg
- Propene: 2.9593e-8 kg
- Naphthalene, 2-methyl-: 3.971e-9 kg
- Decane: 7.445e-9 kg
- Calcium, ion: 0.00050783 kg
- Tin: 5.8242e-8 kg
- o-Cresol: 7.378e-9 kg
- Organic acids: 1.8187e-10 kg
- Methane, fossil: 0.012866 kg

## Sampling procedure
The energy and emissions data for carbon monoxide are from secondary sources and estimates. The transportation energy was collected from an acetic acid producer and calculated using estimates.

## Sources
- THE PLASTICS DIVISION OF THE ACC
