# Coal conveyor system; Manufacture; For surface mine, at point-of-sale; 1.83 m belt width

Dataset: openLCA process, unit process
Category: Bit. Coal and Lignite Surface Mining
Geography: US
Time period: 2003-01-01 to 2003-12-29
Generated by: Timothy Skone
Owner: National Energy Technology Laboratory
Reviewer: Robert James
Published in: National Energy Technology Laboratory (NETL). 2010. Coal conveyor system; Manufacture; For surface mine, at point-of-sale; 1.83 m belt width
restrictionsDescription: Use of this dataset is not restricted, but a statement of attribution is required. Please use the following attribution statement:
National Energy Technology Laboratory's (NETL) Unit Process Library
626 Cochrans Mill Road, P.O. Box 10940
Pittsburgh, PA 15236-0940
http://www.netl.doe.gov/research/energy-analysis/life-cycle-analysis/unit-process-library
Neither the U.S. Department of Energy (DOE) National Energy Technology Laboratory (NETL) nor any person acting on behalf of these organizations:
A. Makes any warranty or representation, express or implied, with respect to the accuracy, completeness, or usefulness of the information contained in this document, or that the use of any information, apparatus, method, or process disclosed in this document may not infringe on privately owned rights; or
B. Assumes any liability with this report as to its use, or damages resulting from the use of any information, apparatus, method, or process disclosed in this document.
Reference herein to any specific commercial product, process, or service by trade name, trademark, manufacturer, or otherwise, does not necessarily constitute or imply its endorsement, recommendation, or favoring by NETL. The views and opinions of the authors expressed herein do not necessarily state or reflect those of NETL.
copyright: true

## General comment
This process is part of the NETL Unit Process Library. To access the library and the original dataset:
1) Navigate to the NETL LCA home page (http://www.netl.doe.gov/lca)
2) Then navigate to the “Unit Process Library”
3) From the library, the unit process of interest can be found either through the "Complete Listing of the Unit Process Library link" or through the link to the "Unit Process Database" spreadsheet
4) For each process, a Data Sheet (DS) and Data File (DF) are available

BRIEF DESCRIPTION
This parameterized unit process is based on manufacturer's specifications, a conveyor system, 1.83 m (72 in) width, from Sandvik to transport coal from prep facility to loading silo at a Powder River Basin coal mine. Materials include cold-rolled steel, hot-dip galvanized steel, and rubber.

GOAL AND SCOPE
The scope of this unit process covers the materials required for the construction of a single conveyor system with steel cords needed to transport Powder River Basin sub-bituminous coal from the preparation facility to the loading silo, where the coal is loaded into railcars and transported to the energy conversion facility. The process is based on the reference flow of 1 piece (pcs) of steel-cord conveyor system, as described below and shown in the associated documentation (referenced in the Citation and Associated Documentation section below). The steel-cord conveyor system is assumed to be constructed of cold-rolled steel, hot-dip galvanized steel, and rubber; quantities of other material types are assumed to be negligible.

This construction unit process for the steel-cord conveyor system is combined with other pieces of equipment used during coal preparation on site, under Life Cycle (LC) Stage #1, in an individual assembly unit process, Coal mine equipment assembly; Production mix; Surface coal mine, Powder river basin, U.S. This assembly unit process quantifies the fraction of each piece of equipment needed under LC Stage #1 to produce 1 kg of Powder River Basin coal ready for transport (LC Stage #2) to the energy conversion facility (LC Stage #3).

BOUNDARY AND DESCRIPTION
A visual representation of the boundary of this unit process is available in the associated documentation (referenced in the Citation and Associated Documentation section below). Emissions related to the physical assembly of the steel-cord conveyor system (e.g., emitted while putting together the components of the conveyor system, including transport of those components) are not considered in this study. Upstream emissions from the production of raw materials used for the construction of the steel-cord conveyor system (e.g., steels) are calculated outside the boundary of this unit process, based on proprietary profiles available in the GaBi model. As discussed above and shown in the associated documentation (referenced below), the steel-cord conveyor system constructed in this unit process is incorporated into the construction assembly for LC Stage #1.

The total weight of a steel-cord conveyor system was readily available, but reliable data for the material breakdown of steel-cord conveyor system were not. The steel-cord conveyor system is designed such that it transports the sized coal from the preparation facility to the loading silo. The specifications found for the conveyor system included information for the cold-rolled steel , hot-dip galvanized steel, and rubber.

Relevant properties and assumptions used to calculate the amount of steel plate contained in a single steel-cord conveyor system are given in the associated documentation (referenced below). Total weight for one steel-cord conveyor system was calculated to be approximately 1,064,007 kg (1,172 short tons). The associated documentation also contains additional information regarding: modeled input and output flows and calculation methods.

This process contains one or more surrogate product flows as replacements for proprietary product flows used in the NETL Unit Process Library. All surrogate flow were taken from the U.S. Life Cycle Inventory Database; a list of surrogate flows used in this process is provided below:
1) Acrylonitrile-butadiene-styrene copolymer, resin, at plant

This process contains one or more surrogate product flows as replacements for proprietary product flows used in the NETL Unit Process Library. All surrogate flow were taken from the U.S. Life Cycle Inventory Database; a list of surrogate flows used in this process is provided below:
1) Cold rolled sheet, steel, at plant
2) Galvanized steel sheet, at plant

CITATION AND ASSOCIATED DOCUMENTATION
This document should be cited as:
National Energy Technology Laboratory (NETL). 2015. NETL Life Cycle Inventory Data – Unit Process: Coal conveyor system; Manufacture; For surface mine, at point-of-sale; 1.83 m belt width. U.S. Department of Energy, National Energy Technology Laboratory. Last Updated: September 2015 (Version 01). Retrieved on [DATE] from [URL for this dataset].

This dataset is part of the NETL Unit Process Library. The Library offers additional information concerning this dataset in the form of a Detailed Spreadsheet Documentation (DS) file and a Process Documentation File (DF). The DS file is an Excel file that contains all of the parameters, inputs, and outputs for a given system as well as background data, calculations and quality scores. The DF file is a PDF document that contains major assumptions and data sources that are the basis for each unit process. The NETL Unit Process Library is located on the NETL website (netl.doe.gov) under Research / Energy Analysis / Energy Trends and Issues / Life Cycle Analysis / Unit Process Library.

This dataset was converted directly from the DS with additional supporting information provided by the DF. Full citations for the DS and DF are given below.

DS File
National Energy Technology Laboratory (NETL). 2010. NETL Life Cycle Inventory Data – Unit Process: Steel-Cord Conveyor System, 72", Construction. U.S. Department of Energy, National Energy Technology Laboratory. Last Updated: February 2010 (version 01). Retrieved on 6/30/2014 from: http://www.netl.doe.gov/File%20Library/Research/Energy%20Analysis/Life%20Cycle%20Analysis/UP_Library/DS_Stage1_C_Steel_Cord_Conveyor_72in_2010-01.xls

DF File
National Energy Technology Laboratory (NETL). 2010. NETL Life Cycle Inventory Data – Unit Process: Steel-Cord Conveyor System, 72", Construction. U.S. Department of Energy, National Energy Technology Laboratory. Last Updated: February 2010 (version 01). Retrieved on 6/30/2014 from: http://www.netl.doe.gov/File%20Library/Research/Energy%20Analysis/Life%20Cycle%20Analysis/UP_Library/DF_Stage1_C_Steel_Cord_Conveyor_72in_2010-01.pdf

## Technology
The scope of this unit process covers the materials required for the construction of a single conveyor system with steel cords needed to transport Powder River Basin sub-bituminous coal from the preparation facility to the loading silo, where the coal is loaded into railcars and transported to the energy conversion facility. A visual representation of the boundary of this unit process is available in the associated documentation (referenced in the Citation and Associated Documentation section in the Description field). The steel-cord conveyor system is designed such that it transports the sized coal from the preparation facility to the loading silo. The specifications found for the conveyor system included information for the cold-rolled steel (Steel cold rolled (St) [Metals]), hot-dip galvanized steel (Hot-dip Galvanized Steel [Metals]), and rubber (Styrene-butadiene-rubber (SBR) [Plastics]). Further information regarding the technology modeled in this unit process can be found in the associated documentation (referenced in the Citation and Associated Documentation section in the Description field).

## Geography
US

## Time period
This data set is representative of best available public data from 01/01/2008 to 12/31/2008 and is not subject to limited usability within sub-time spans (e.g. summer, winter).

## Parameters
- Tot_rubber: 182972; = Rubber_wt*Belt_length
  [kg] Total weight of rubber for conveyor belt - weight per meter times belt length
- Galv_st_wt: 83.5626
  [kg/m] Weight of hot-dip galvanized steel per meter of conveyor system, includes steel cord within b
- Tot_cold_st: 285040; = (Cold_st_wt*Belt_length)+Tail_pulley+Drive_pulley
  [kg] Total weight of cold rolled steel for conveyor system (idler rotating parts and return idler ro
- Tot_galv_st: 595995; = Galv_st_wt*Belt_length
  [kg] Total weight of hot-dip galvanized steel for conveyor system (steel cord, idler frame & bracket
- Rubber_wt: 25.6539
  [kg/m] Weight of rubber per meter of conveyor belt, calculated
- Tail_pulley: 1288
  [kg] Weight of tail pulley for conveyor system,
- Belt_length: 7132.32
  [m] Round-trip distance conveyor belt travels to transport mined coal from mine site to stockpile po
- Cold_st_wt: 39.2333
  [kg/m] Weight of cold rolled steel per meter of conveyor system, includes rotating parts of idlers a
- Drive_pulley: 3927
  [kg] Weight of drive pulley for conveyor system,

## Reference product
- Coal conveyor system; Manufacture; For surface mine, at point-of-sale; 1.83 m belt width: 1 Item(s); data quality (2,3,1,1,1)

## Inputs from technosphere
- Galvanized steel sheet, at plant: 595995 kg; = Tot_galv_st; data quality (2,3,1,1,1)
- Acrylonitrile-butadiene-styrene copolymer, resin, at plant: 182972 kg; = Tot_rubber; data quality (2,3,1,1,1)
- Cold rolled sheet, steel, at plant: 285040 kg; = Tot_cold_st; data quality (2,3,1,1,1)

## Inventory method
Attributional

## Modelling constants
All elementary and technosphere flows are calculated on a functional unit basis. Calculations involving combustion primarily to generate useful work are done using lower heating values (LHV) and calculations involving combustion primarily to generate useful heat are done using higher heating values (HHV). Unless explicitly stated in the associated reference documents applicable calculations assumed standard atmospheric temperature and pressure (SATP).

## Completeness
Individual relevant flows captured

## Data selection
Best publically available data

## Data treatment
No allocation applied

## Data collection
No primary data collected

## Intended application
This is a gate-to-gate manufacturing process and can be used for any type of LCA study.

## Project
National Energy Technology Laboratory (NETL) Unit Process Library

## Sources
- Goodyear Engineered Products. 2008b. Flexsteel Conveyor Belt
- Lexco Cable. 2006. Custom Cable Assemblies: 7x7 GAC (Galvanized Aircraft Cable)
- Goodyear Engineered Products. 2009a. Conveyor Belt - Heavyweight: Flexsteel Belt Construction
- Loos & Co., Inc. 2009. Item # GC 18877, 7x7 Preformed Galvanized Aircraft Cable
- National Energy Technology Laboratory (NETL). 2010. Coal conveyor system; Manufacture; For surface mine, at point-of-sale; 1.83 m belt width
- Sandvik. 2003. Sandvik Conveyor Components: Conveyor Pulley
- Sandvik. 2004. Pulleys, Idlers and Materials Handling Systems: Catalogue Medium to Heavy Duty Idler
- Elgin National Industries. 2009. Thunder Basin
