# Electricity, residual fuel oil, at power plant

Dataset: openLCA process, unit process
Category: Fossil Fuel Electric Power Generation
Geography: RNA
Time period: 2002-01-01 to 2003-01-01
Generated by: Franklin Associates
Published in: Franklin Associates
restrictionsDescription: All information can be accessed by everybody.
copyright: false

## General comment
Important note: although most of the data in the US LCI database has
undergone some sort of review, the database as a whole has not yet
undergone a formal validation process.
Please email comments to lci@nrel.gov.

## Technology
Electricity production by residual oil steam generation

## Geography
United States

## Reference product
- Electricity, residual fuel oil, at power plant: 1 kWh

## Inputs from technosphere
- CUTOFF Disposal, solid waste, unspecified, to unspecified treatment: 0.0003377 kg
- Residual fuel oil, at refinery: 0.26339 l
  Fuel consumption: 0.263 liter/kWh (0.07 gal/kWh)
- Transport, combination truck, average fuel mix: 0.0013815 t*km
  Represents transportation from petroleum refinery to utility combustion.
- Transport, train, diesel powered: 0.00088378 t*km
  Represents transportation from petroleum refinery to utility combustion.
- Transport, barge, average fuel mix: 0.0074867 t*km
  Represents transportation from petroleum refinery to utility combustion.

## Emissions to nature
- Cobalt: 1.9e-7 kg
- Chloride: 2.0981e-9 kg
- Naphthalene: 3.5664e-8 kg
- Radioactive species, unspecified: 0.030737 kBq
- Methane, fossil: 8.8565e-6 kg
- Copper, ion: 1.0491e-8 kg
- Hydrogen chloride: 2.2074e-5 kg
- Arsenic: 4.166e-8 kg
- Ethene, tetrachloro-: 2.5951e-9 kg
- Sulfur oxides: 0.0012617 kg
- Lead: 4.7657e-8 kg
- Selenium: 2.1556e-8 kg
- Phenols, unspecified: 1.1466e-7 kg
- Oils, unspecified: 1.5736e-7 kg
- Nickel: 2.6669e-6 kg
- Iron: 1.0491e-8 kg
- Benzene: 6.754e-9 kg
- Carbon dioxide, fossil: 0.80464 kg
- Dioxins, measured as 2,3,7,8-tetrachlorodibenzo-p-dioxin: 4.7183e-13 kg
- Methane, dichloro-, HCC-30: 1.5217e-7 kg
- Mercury: 3.5664e-9 kg
- VOC, volatile organic compounds: 2.3942e-5 kg
- Manganese: 9.4682e-8 kg
- Carbon monoxide, fossil: 0.00015766 kg
- Nitrogen oxides: 0.0010092 kg
- Particulates, < 10 um: 5.9854e-5 kg
- Dinitrogen monoxide: 3.5037e-6 kg
- Beryllium: 8.7739e-10 kg
- Suspended solids, unspecified: 3.1472e-7 kg
- Cadmium: 1.2561e-8 kg
- Chromium: 2.6669e-8 kg
- Formaldehyde: 1.0415e-6 kg

## Sources
- Center for Transportation Research, Argo
- U.S. EPA
- U.S. EPA
- EIA
- U.S. EPA
- U.S. EPA Office of Solid Waste and Emerg
- Franklin Associates
- unspecified
