# Polyethylene terephthalate, resin, at plant, CTR

Dataset: openLCA process, unit process
Category: All Other Basic Organic Chemical Manufacturing
Geography: RNA
Time period: 2001-01-01 to 2004-01-01
Generated by: Franklin Associates
Published in: THE PLASTICS DIVISION OF THE ACC
restrictionsDescription: All information can be accessed by everybody.
copyright: false

## General comment
Complete inventory data and metadata are available in full in the final report and appendices, Cradle-to-Gate Life Cycle Inventory of Nine Plastic Resins and Four Polyurethane Precursors. This report has been extensively reviewed within Franklin Associates and has undergone partial critical review by ACC Plastics Division members and is available at: www.americanchemistry.com. Quantities may vary slightly between the reference to main source and and this module due to rounding. Important note: although most of the data in the US LCI database has undergone some sort of review, the database as a whole has not yet undergone a formal validation process. Please email comments to lci@nrel.gov.

## Technology
Esterification of purified terephthalic acid (PTA) with ethylene glycol

## Geography
US

## Reference product
- Polyethylene terephthalate, resin, at plant, CTR: 1 kg

## By-products
- Recovered energy, for Polyethylene terephthalate, resin, at plant, CTR: 0.14579 MJ

## Inputs from technosphere
- CUTOFF Disposal, solid waste, process, to sanitary landfill: 0.031805 kg
- CUTOFF Disposal, solid waste,process, to municipal incineration: 0.001029 kg
- CUTOFF Disposal, solid waste, fuel, to municipal incineration: 0.12763 kg
- CUTOFF Disposal, solid waste, process, to waste-to-energy: 0.00059459 kg

## Inputs from nature
- Energy, from hydro power: 0.24755 MJ
- Gas, natural, in ground: 0.50395 m3
  This flow represents the amount of natural gas that is used for fuel. The energy content of the natural gas used for fuel is 36.7 MJ per m3.
- Energy, kinetic (in wind), converted: 0.01289 MJ
- Coal, unprocessed bituminous, in ground: 0.32637 kg
- Oil, crude, in ground: 0.15053 kg
  This flow represents the amount of crude oil that is used for fuel. The energy content of the crude oil used for fuel is 43.7 MJ per kg.
- Energy, unspecified: 0.017447 MJ
  Energy unspecified reflects "other fossil" fuels
- Energy, from biomass: 0.0053681 MJ
- Energy, solar: 0.00054707 MJ
- Coal, lignite, in ground: 0.025331 kg
- Uranium oxide, 332 GJ per kg, in ore: 6.4574e-6 kg
- Oil, crude, in ground: 0.58703 kg
  This flow represents the amount of crude oils that is a material input for producing the resin output. The energy content of the crude oil used as EMR/feedstock is 43.7 MJ per kg. The energy content multiplied by the mass should be considered an Energy of Material Resource (EMR)/feedstock energy.
- Oxygen, in air: 0.24336 kg
- Gas, natural, in ground: 0.22206 kg
  This flow represents the amount of natural gas that is a material input for producing the resin output. The energy content of the natural gas used as EMR/feedstock is 49.8 MJ per kg. The energy content multiplied by the mass should be considered an Energy of Material Resource (EMR)/feedstock energy.
- Water, consumptive use, unspecified origin/m3: 0.012108 m3
  Franklin Associates uses a default as opposed to Egalitarian approach in collecting data for water use. During data collection, water use data were only requested and compiled in terms of 'evaporative' or consumptive use (i.e., ultimate withdraws, evaporation, or incorporation into the product). Data were not collected to determine reliable averages for non-evaporative water use. In other words, averages for water inputs and outputs are not available for this unit process. Consumptive use includes: water incorporated into the product, water evaporated during the process, and/or water used and released to a body other than that from which it was drawn.
- Energy, geothermal: 0.013027 MJ

## Emissions to nature
- Phthalate, dioctyl-: 1.9821e-9 kg
- Naphthalene: 1.9291e-8, 5.4751e-9 kg (2 entries, compartments not in this file)
- Bromoform: 1.0589e-9 kg
- Dibenzofuran: 2.5233e-11 kg
- Acetic acid, methyl ester: 4e-5 kg
- Sodium, ion: 0.0018678 kg
- Benzene, chloro-: 5.9734e-10 kg
- Propene: 6.0421e-7 kg
- Cobalt: 8.4915e-8, 6.7206e-9 kg (2 entries, compartments not in this file)
- Carbon monoxide, fossil: 0.0013266 kg
- Suspended solids, unspecified: 0.0032311 kg
- TOC, Total Organic Carbon: 4.42e-5, 7.03e-5 kg (2 entries, compartments not in this file)
- Zinc: 3.0356e-10, 8.7843e-6 kg (2 entries, compartments not in this file)
- Benzyl chloride: 1.9006e-8 kg
- Fluorene: 1.3707e-10, 1.5547e-9 kg (2 entries, compartments not in this file)
- Methyl ethyl ketone: 1.0589e-8, 1.0682e-11 kg (2 entries, compartments not in this file)
- Phosphate: 5.1e-7 kg
- Chloride: 0.0079307 kg
- Titanium, ion: 2.7136e-7 kg
- Radium-228/kg: 5.611e-17 kg
- Benzene: 5.8367e-5, 3.3682e-7 kg (2 entries, compartments not in this file)
- Lithium, ion: 8.5957e-5 kg
- Bromine: 7.9e-5 kg
- Acids, unspecified: 3.552e-5 kg
- Sulfide: 1.33e-7 kg
- Radium-226/kg: 1.0969e-14 kg
- Ethane, 1,1,1-trichloro-, HCFC-140: 5.4304e-10 kg
- Metallic ions, unspecified: 4.5e-9 kg
- Particulates, unspecified: 0.00065933 kg
- Methane, chlorotrifluoro-, CFC-13: 1.54e-8 kg
- Pyrene: 4.9709e-11 kg
- Iron: 5.9335e-5 kg
- Benzo(a)pyrene: 5.724e-12 kg
- Nitrogen oxides: 0.0061812 kg
- Naphthalene, 2-methyl-: 4.6126e-9 kg
- 4-Methyl-2-pentanone: 5.5959e-10 kg
- Chromium VI: 1.19e-8 kg
- Polycyclic organic matter, unspecified: 3.9201e-8 kg
- Acetaldehyde: 2.528e-5, 1.9509e-7 kg (2 entries, compartments not in this file)
- Calcium, ion: 0.00064539 kg
- 2-Chloroacetophenone: 1.9006e-10 kg
- Carbon monoxide: 0.0062386 kg
- Lead: 1.7108e-7, 1.664e-7 kg (2 entries, compartments not in this file)
- Cadmium: 2.1322e-8 kg
- Hydrocarbons, unspecified: 1.9781e-6 kg
- Benzene, ethyl-: 6.829e-6, 2.0646e-8 kg (2 entries, compartments not in this file)
- p-Xylene: 3.2404e-9 kg
- Hydrazine, methyl-: 4.6158e-9 kg
- Phenols, unspecified: 4.5935e-8, 4.2345e-8 kg (2 entries, compartments not in this file)
- VOC, volatile organic compounds: 0.00064144 kg
- Styrene: 6.788e-10, 1.9971e-10 kg (2 entries, compartments not in this file)
- Cyanide: 9.5772e-12, 6.788e-8 kg (2 entries, compartments not in this file)
- Benzo(a)anthracene: 1.205e-11 kg
- Chloroform: 1.602e-9 kg
- Xylene: 1.4707e-7, 9.056e-5 kg (2 entries, compartments not in this file)
- Arsenic, ion: 6.2201e-8 kg
- Hydrogen: 7.9885e-7 kg
- Ethane, 1,2-dibromo-: 3.2582e-11 kg
- Mercury: 4.4665e-10, 4.9143e-8 kg (2 entries, compartments not in this file)
- Thallium: 3.7201e-9 kg
- Copper, ion: 1.1577e-7 kg
- Benzene, pentamethyl-: 9.9462e-12 kg
- Ethylene oxide: 2.4016e-5 kg
- Dioxins, measured as 2,3,7,8-tetrachlorodibenzo-p-dioxin: 2.6636e-13 kg
- 5-methyl Chrysene: 3.3139e-12 kg
- Biphenyl: 3.7308e-9, 2.5608e-10 kg (2 entries, compartments not in this file)
- Beryllium: 3.7537e-9, 3.6472e-9 kg (2 entries, compartments not in this file)
- Ethene, tetrachloro-: 7.3372e-9 kg
- COD, Chemical Oxygen Demand: 0.0016836 kg
- Particulates, < 2.5 um: 0.00027946 kg
- Manganese: 2.6343e-6, 1.0788e-7 kg (2 entries, compartments not in this file)
- Methane, monochloro-, R-40: 1.4391e-8, 5.3415e-12 kg (2 entries, compartments not in this file)
- Phenol: 4.3443e-10, 4.1592e-7 kg (2 entries, compartments not in this file)
- Nitrogen, total: 1.8242e-7 kg
- Boron: 9.4876e-7 kg
- Yttrium: 2.0349e-9 kg
- Strontium: 1.651e-5 kg
- Anthracene: 3.1633e-11 kg
- Surfactants: 8.6226e-8 kg
- Carbon dioxide, fossil: 2.4194 kg
- Sulfate: 0.0001619 kg
- Dodecane: 1.6648e-8 kg
- Tetradecane: 7.0615e-9 kg
- Organic acids: 1.2595e-9 kg
- Hexadecane: 1.8222e-8 kg
- Toluene, 2,4-dinitro-: 7.6025e-12 kg
- Aluminum: 3.0826e-5 kg
- Indeno(1,2,3-cd)pyrene: 9.1888e-12 kg
- Phenanthrene: 4.0671e-10, 2.4205e-10 kg (2 entries, compartments not in this file)
- Magnesium: 1.6569e-6, 0.00012853 kg (2 entries, compartments not in this file)
- Methacrylic acid, methyl ester: 5.4304e-10 kg
- Sulfur dioxide: 0.0057652 kg
- Bromide: 3.9319e-5 kg
- Dibenzothiophene: 2.5576e-11 kg
- PAH, polycyclic aromatic hydrocarbons: 3.9344e-8 kg
- Vanadium: 4.5767e-8 kg
- Organic substances, unspecified: 0.001113 kg
- Hydrogen fluoride: 2.1365e-5 kg
- Hexanoic acid: 6.3745e-8 kg
- Formaldehyde: 1.4021e-6 kg
- Antimony: 1.7384e-8, 4.1394e-9 kg (2 entries, compartments not in this file)
- Chromium: 5.7849e-8 kg
- Benzene, 1-methyl-4-(1-methylethyl)-: 1.3261e-11 kg
- t-Butyl methyl ether: 9.5032e-10 kg
- Methane: 0.0012832 kg
- Eicosane: 4.5671e-9 kg
- Methane, bromo-, Halon 1001: 4.3443e-9 kg
- Phenol, 2,4-dimethyl-: 8.4996e-9 kg
- Fluorenes, alkylated, unspecified: 3.3391e-9 kg
- Cumene: 1.4391e-10 kg
- Toluene: 8.5433e-5, 3.2956e-7 kg (2 entries, compartments not in this file)
- o-Xylene: 3.2404e-9 kg
- Methane, chlorodifluoro-, HCFC-22: 1.9971e-10 kg
- Copper: 3.8445e-8, 4.5533e-10 kg (2 entries, compartments not in this file)
- Arsenic: 7.6273e-8 kg
- Ethane, chloro-: 1.1404e-9 kg
- Benzo(b,j,k)fluoranthene: 1.6569e-11 kg
- Ammonium chloride: 3.4273e-7 kg
- Chlorine: 1.9971e-8 kg
- Acetone: 1.3559e-9 kg
- Benzo(ghi)perylene: 4.0671e-12 kg
- Propanal: 1.0318e-8 kg
- Fluoride: 1.2183e-6, 1.2424e-6 kg (2 entries, compartments not in this file)
- Sulfur: 7.458e-7 kg
- Particulates, > 2.5 um, and < 10um: 0.00014966 kg
- p-Cresol: 9.4181e-9 kg
- Ethane, 1,2-dichloro-: 1.0861e-9 kg
- Acenaphthene: 7.6821e-11 kg
- Radionuclides (Including Radon): 9.1791e-6 kg
- Methane, dichloro-, HCC-30: 1.0145e-7 kg
- Barium: 0.0003801 kg
- NMVOC, non-methane volatile organic compounds, unspecified origin: 0.0059967 kg
- Radioactive species, unspecified: 6998.3 Bq
- BOD5, Biological Oxygen Demand: 0.00091524 kg
- Vinyl acetate: 2.0635e-10 kg
- Particulates, < 10 um: 0.00036431 kg
- Molybdenum: 6.9604e-9 kg
- Cadmium, ion: 1.0368e-8 kg
- Tin: 6.9925e-8 kg
- Naphthalenes, alkylated, unspecified: 9.4416e-10 kg
- Fluoranthene: 1.0695e-10 kg
- Octadecane: 4.525e-9 kg
- Selenium: 3.0187e-8, 2.0499e-7 kg (2 entries, compartments not in this file)
- Antimony compounds: 9.7e-10 kg
- Ammonia: 0.00012399, 2.6191e-6 kg (2 entries, compartments not in this file)
- Furan: 5.5278e-13 kg
- o-Cresol: 8.7503e-9 kg
- m-Xylene: 8.7703e-9 kg
- Benzenes, alkylated, unspecified: 5.7616e-8 kg
- Dinitrogen monoxide: 5.5189e-5 kg
- Aldehydes, unspecified: 0.0001649 kg
- Isophorone: 1.5748e-8 kg
- Nickel: 1.0353e-6, 7.1515e-8 kg (2 entries, compartments not in this file)
- Silver: 3.9455e-7 kg
- Dissolved solids: 0.0082049 kg
- Butadiene: 9.1569e-9 kg
- Phenanthrenes, alkylated, unspecified: 3.9149e-10 kg
- Surfactants, unspecified: 7.0823e-8 kg
- Acenaphthylene: 3.7658e-11 kg
- Oils, unspecified: 1.3909e-5 kg
- Acetic acid: 5.1e-5 kg
- Methane, tetrachloro-, CFC-10: 9.8002e-10 kg
- Sulfuric acid, dimethyl ester: 1.3033e-9 kg
- Docosane: 1.4201e-10 kg
- Mercaptans, unspecified: 5.891e-6 kg
- Hexane: 1.8192e-9 kg
- Radioactive species, Nuclides, unspecified: 10.644 Bq
- Ethylene dibromide: 3.0101e-9 kg
- Hydrogen chloride: 0.00017325 kg
- 2-Hexanone: 2.0027e-9 kg
- Methane, fossil: 0.012166 kg
- Benzoic acid: 3.0779e-7 kg
- Lead-210/kg: 3.1529e-17 kg
- Ammonium, ion: 1.3733e-6 kg
- Decane: 8.78e-9 kg
- n-Hexacosane: 8.8592e-11 kg
- Chrysene: 1.5063e-11 kg
- Kerosene: 1.6414e-7 kg
- Fluorene, 1-methyl-: 1.5103e-11 kg
- Carbon disulfide: 3.5298e-9 kg
- Sulfur oxides: 0.0018238 kg
- Methanol: 1.48e-6 kg
- Acetophenone: 4.0728e-10 kg

## Sampling procedure
Data are from both primary and secondary sources. A weighted average using production amounts was calculated from the PTA production data from two plants collected from two leading producers in North America. A weighted average using production amounts was also calculated from the PET production data from two plants collected from two leading producers in North America. Data from primary sources in the early 1990’s was used for DMT and PET from DMT production. PTA and PET producers who provided data for this module verified that the characteristics of their plants are representative of a majority of North American TPA/PTA and PET production. The average TPA/PTA and PET datasets were reviewed and accepted respectively by each TPA/PTA and PET data provider.

## Sources
- THE PLASTICS DIVISION OF THE ACC
