# Crude oil, extracted

Dataset: openLCA process, unit process
Category: Petrochemical Manufacturing
Geography: RNA
Time period: 2003-01-01 to 2003-01-01
Generated by: Franklin Associates
Published in: THE PLASTICS DIVISION OF THE AMERICAN C
restrictionsDescription: All information can be accessed by everybody.
copyright: false

## General comment
This module includes data for crude oil co-extracted with natural gas and as well as crude oil produced independently. Because crude oil is frequently produced along with natural gas, a portion of the data is allocated to natural gas production. No allocation was given if the data were specific to the crude oil extraction. Complete inventory data and metadata are available in full in the final report and appendices, Cradle-to-Gate Life Cycle Inventory of Nine Plastic Resins and Four Polyurethane Precursors. This report has been extensively reviewed within Franklin Associates and has undergone partial critical review by ACC Plastics Division members and is available at: www.americanchemistry.com. Quantities may vary slightly between the reference to main source and and this module due to rounding. Important note: although most of the data in the US LCI database has undergone some sort of review, the database as a whole has not yet undergone a formal validation process. Please email comments to lci@nrel.gov.

## Technology
Onshore and offshore drilling into underground porous rock structures using natural pressure or automated pump to surface oil, followed by water removal

## Geography
North America (US and Canada)

## Reference product
- Crude oil, extracted: 1 kg

## Inputs from technosphere
- Diesel, combusted in industrial equipment: 0.00129284 l
  Includes diesel fuel and distillate oil amounts.
- Electricity, at grid, US, 2008: 0.0390078 kWh
- CUTOFF Disposal, solid waste, unspecified, to sanitary landfill: 0.0261455 kg
- Natural gas, combusted in industrial boiler: 0.0327732 m3
- Gasoline, combusted in equipment: 0.000684208 l
- Residual fuel oil, combusted in industrial boiler: 0.000798118 l

## Inputs from nature
- Oil, crude, 43.7 MJ per kg, in ground: 1.035 kg
  This weight reflects material loss at extraction.

## Emissions to nature
- Benzene, 1-methyl-4-(1-methylethyl)-: 4.55e-12 kg
- Boron: 6.913e-7 kg
- Fluorenes, alkylated, unspecified: 2.488e-9 kg
- Biphenyl: 2.78e-9 kg
- Phenanthrenes, alkylated, unspecified: 2.917e-10 kg
- Sulfur: 5.268e-7 kg
- Oils, unspecified: 4.264e-6 kg
- Manganese: 1.458e-7 kg
- Benzene, ethyl-: 1.445e-8 kg
- m-Xylene: 6.273e-9 kg
- Tetradecane: 5.065e-9 kg
- Cobalt: 4.904e-9 kg
- Beryllium: 2.87e-9 kg
- 2-Hexanone: 1.446e-9 kg
- Radium-226/kg: 8.005e-15 kg
- Sulfate: 1.056e-5 kg
- Sodium, ion: 0.001477 kg
- Hexanoic acid: 4.652e-8 kg
- Hexadecane: 1.327e-8 kg
- Thallium: 2.771e-9 kg
- Zinc: 4.787e-7 kg
- o-Cresol: 6.37e-9 kg
- Methane, monochloro-, R-40: 1.833e-12 kg
- Benzenes, alkylated, unspecified: 4.293e-8 kg
- Aluminum: 2.102e-5 kg
- Benzene, pentamethyl-: 3.413e-12 kg
- Dissolved solids: 0.006472 kg
- n-Hexacosane: 3.04e-11 kg
- Lead-210/kg: 2.301e-17 kg
- Arsenic, ion: 4.643e-8 kg
- Benzoic acid: 2.246e-7 kg
- Phenanthrene: 1.756e-10 kg
- Xylene: 1.163e-7 kg
  Additional unspeciated xylenes
- Yttrium: 1.482e-9 kg
- Chromium: 5.616e-7 kg
- Chloride: 0.006074 kg
- Decane: 6.388e-9 kg
- p-Cresol: 6.873e-9 kg
- Copper, ion: 6.165e-8 kg
- Lithium, ion: 1.56e-7 kg
- Naphthalenes, alkylated, unspecified: 7.035e-10 kg
- Titanium, ion: 2.022e-7 kg
- Vanadium: 5.731e-9 kg
- Toluene: 2.421e-7 kg
- Tin: 5.172e-8 kg
- Phenol, 2,4-dimethyl-: 6.203e-9 kg
- Antimony: 1.316e-8 kg
- Surfactants: 1.21e-7 kg
- Phenol: 7.241e-8 kg
- Naphthalene, 2-methyl-: 3.308e-9 kg
- o-Xylene: 2.333e-9 kg
- Magnesium: 9.92e-5 kg
- Silver: 3.11e-7 kg
- Eicosane: 3.317e-9 kg
- Molybdenum: 5.075e-9 kg
- 4-Methyl-2-pentanone: 1.914e-10 kg
- Fluorene: 1.154e-9 kg
- Carbon dioxide, fossil: 0.0011 kg
- p-Xylene: 2.333e-9 kg
- Dibenzothiophene: 7.01496e-12 kg
- Cyanide: 3.286e-12 kg
- Fluorene, 1-methyl-: 5.182e-12 kg
- Naphthalene: 3.958e-9 kg
- Benzene: 2.612e-7 kg
- Dibenzofuran: 8.658e-12 kg
- Methyl ethyl ketone: 3.665e-12 kg
- Ammonia: 2.779e-6 kg
- Docosane: 4.873e-11 kg
- Barium: 0.0002846 kg
- Strontium: 1.204e-5 kg
- Octadecane: 3.302e-9 kg
- Dodecane: 1.211e-8 kg
- Selenium: 2.542e-9 kg
- COD, Chemical Oxygen Demand: 4.18e-5 kg
- Bromide: 3.113e-5 kg
- Lead: 1.18e-7 kg
- Calcium, ion: 0.0005012 kg
- Nickel: 5.4e-8 kg
- Acetone: 4.553e-10 kg
- BOD5, Biological Oxygen Demand: 2.53e-5 kg
- Suspended solids, unspecified: 0.002324 kg
- Mercury: 2.308e-10 kg
- Cadmium, ion: 7.107e-9 kg
- Radium-228/kg: 4.095e-17 kg
- Methane: 0.0053 kg
- Iron: 3.932e-5 kg

## Sampling procedure
Data collected from secondary sources.

## Sources
- THE PLASTICS DIVISION OF THE AMERICAN C
