# Metal panel, insulated, at plant

Dataset: openLCA process, unit process
Category: Architectural and Structural Metals Manufacturing
Geography: RNA
Time period: 2013-08-01 to 2015-02-28
Generated by: PE INTERNATIONAL
Published in: PE INTERNATIONAL
restrictionsDescription: All information can be accessed by everybody.
copyright: false

## General comment
Continuous IMP production process entails forming the continuous metal facers while at the same time (at another point on the continuous line) injecting the foam mixture into the panel assembly. The foam then expands and fills the cavity between the metal skins as they enter a platen conveyor. Panels are then cut to length with an in-line cross cut saw. Post fabrication work, available through some manufacturers, can be performed on the product to treat the cut ends of the panels. The IMP production process includes all material and inbound transportation necessary for construction-ready products: coated steel coils, foaming agents, and packaging materials. Energy and utility inputs include electricity, natural gas, and propane. All known solid waste, air, and water emissions are captured in the output.

## Technology
Insulated metal panel (IMP) for external building surfaces. Technology based on companies identified by Metal Construction Association to be representative of industry.

## Geography
North America

## Reference product
- Metal panel, insulated, at plant: 1 m2

## Inputs from technosphere
- Plywood, at plywood plant, US PNW: 1.64156 kg
- CUTOFF Recycling, petroleum based wastes, unspecified: 9.43226e-5 kg
- CUTOFF Waste, industrial: 0.184987 kg
- Polyol ether, for rigid foam polyurethane production, at plant: 1.04916 kg
- Galvanized steel coil, coated, at plant: 11.6513 kg
- Natural gas, combusted in industrial equipment: 0.111499 m3
- Electricity, at grid, US, 2008: 13.9914 MJ
- Methylene diphenyl diisocyanate resin, at plant, US SE: 1.75918 kg
- Oriented strand board product, US SE: 0.795546 kg
- CUTOFF Thermal energy from propane (MJ): 6.21041 MJ
- Surfaced dried lumber, at planer mill, US PNW: 0.00393926 kg
- CUTOFF Recycling, Steel scrap: 0.477609 kg
- CUTOFF Lubricants, unspecified, at plant: 0.000411543 kg
- Transport, single unit truck, long-haul, diesel powered: 2798.54 kg*km
- CUTOFF Low Density Polyethylene Film: 0.0155705 kg
- CUTOFF Polypropylene-film (oriented) (PP): 0.00589972 kg
- CUTOFF Expandable polystyrene, at plant: 0.0913025 kg
- CUTOFF Pentane: 0.349728 kg
- CUTOFF Paper, woodcontaining, LWC, at plant: 0.000407158 kg
- CUTOFF Glue-adhesive(30-50% terpene,30-50% polybutene,5-10% polyolefin), at plant: 0.0568506 kg
- CUTOFF Disposal, chemical waste, unspecified, to residual materials landfill: 0.000895748 kg
- CUTOFF Tetrafluoroethane (R-134a): 0.0234438 kg
- Galvanized steel sheet, at plant: 11.8466 kg
- CUTOFF Disposal, resins, unspecified, to sanitary landfill: 0.00423623 kg
- CUTOFF Disposal, solid waste, unspecified, to unspecified treatment: 2.2607 kg
- CUTOFF Polyethylene-film (PE): 0.0871831 kg

## Emissions to nature
- Toluene: 0.000984437 kg
- Methanol: 0.000141913 kg
- Acetone: 6.6891e-5 kg
- Dust (> PM10): 0.000416822 kg
- Pentane: 0.000890658 kg
- 4,4'-Diisocyanatodiphenylmethane: 0.00255545 kg
- Diethylene glycol: 0.00523867 kg
- VOC, volatile organic compounds: 0.0144031 kg
- Ethane, 1,1,1,2-tetrafluoro-, HFC-134a: 0.0146906 kg
- Ethyl benzene: 8.87941e-6 kg
- Hazardous Air Pollutants (HAPs): 0.00117955 kg
- Particulates, > 10 um: 0.000508948 kg
- 4-Methyl-2-pentanone: 2.6599e-5 kg
- Isocyanic acid: 7.63422e-7 kg
- Xylene: 2.6599e-5 kg

## Sources
- PE INTERNATIONAL
