# Sawn lumber, hardwood, planed, kiln dried, at planer mill, NE-NC

Dataset: openLCA process, unit process
Category: Sawmills
Geography: RNA
Time period: 2005-01-01 to 2006-01-01
Generated by: Maureen Puetmann
Published in: Richard D. Bergman
restrictionsDescription: All information can be accessed by everybody.
copyright: false

## General comment
1. Allocation on a mass basis.
2. Important note: although most of the data in the US LCI database has
undergone some sort of review, the database as a whole has not yet
undergone a formal validation process.
3. Please email comments to lci@nrel.gov. 4. WRT soil carbon, what is not known, is the degree of carbon release from the decomposed fine roots in the soil and whether the net release of fine root carbon will be different over different time periods and under different treatment regimes. The results do not address soil carbon or the effect of forest management activities on total soil carbon because no reliable predictors were found that relate to the management treatments being considered.

## Technology
Average technology. Some data extrapolated from similar processes.

## Geography
NE/NC = Northeast (NE) and Northcentral (NC) United States. The 20 states are Connecticut, Delaware, Illinois, Indiana, Iowa, Maine, Maryland, Massachusetts, Michigan, Minnesota, Missouri, New Hampshire, New Jersey, New York, Ohio, Pennsylvania, Rhode Island, Vermont, West Virginia, Wisconsin.

## Reference product
- Sawn lumber, hardwood, planed, kiln dried, at planer mill, NE-NC: 1 m3
  Wood Output = 572 kg, od basis. Based on an ovendry basis density of 627 kg/m3 and a moisture content (ovendry basis) of 9.6%. Conversion to board feet: 568 nominal board feet/m3 sawn and planed lumber.

## By-products
- Mixings, hardwood, kiln-dried, at planer mill, NE-NC: 44.2 kg
  Weight reported on an ovendry basis. Moisture content (ovendry basis) = 9.6%
- Fuel wood, hardwood, kiln-dried, at planer mill, NE-NC: 27.4 kg
  Weight reported on an ovendry basis. Moisture content (ovendry basis) = 9.6%
- Shavings, hardwood, kiln-dried, at planer mill, NE-NC: 86.1 kg
  Weight reported on an ovendry basis. Moisture content (ovendry basis) = 9.6%
- Sawdust, hardwood, kiln-dried, at planer mill, NE-NC: 18.7 kg
  Weight reported on an ovendry basis. Moisture content (ovendry basis) = 9.6%

## Inputs from technosphere
- Electricity, onsite boiler, hardwood mill, average, NE-NC: 0.708 kWh
  Represents 25% of total mill consumption of electricity generated onsite.
- Diesel, combusted in industrial equipment: 1.31 l
  Diesel used for on-site transportation. Represents 20% of mill use of diesel for transport.
- Sawn lumber, hardwood, rough, kiln dried, at kiln, NE-NC: 1.37 m3
  Moisture content (ovendry basis) = 9.6%
- Gasoline, combusted in equipment: 0.114 l
  Gasoline used for on-site transportation. Represents 20% of mill use of gasoline for transport.
- Electricity, at grid, Eastern US, 2000: 41.4 kWh
  Represents 25% of total mill consumption of grid electricity.
- Natural gas, combusted in industrial equipment: 0.053 l
  Proxy for propane. Propane used for on-site transportation. Represents 20% of mill use of propane for transport.

## Sampling procedure
Questionnaires from 20 mills (17 companies) from the 20 states of Forest Service (FS) Northeastern (NE) Region. Hardwood sawmills were members of the Hardwood Manufacturer Association (HMA).

## Sources
- Richard D. Bergman
- Maureen Puettmann
- Forest Products Laboratory
- Forest Products Laboratory
- NHLA
