# Electricity, at eGrid, AKGD, 2010

Dataset: openLCA process, unit process
Category: Utilities
Geography: RNA
Time period: 2010-01-01 to 2010-01-01
Generated by: Samantha Wascavage
Published in: Chris Goemans, Athena Institute
restrictionsDescription: All information can be accessed by everybody.
copyright: false

## General comment
The methodology used to put together the grid information is outlined in reference 1.

## Technology
Typical

## Geography
Alaska

## Reference product
- Electricity, at eGrid, AKGD, 2010: 1 kWh

## Inputs from technosphere
- Electricity, diesel, at power plant: 0.010782 kWh
  Petroleum (DFO) - Distillate Fuel Oil (includes all Diesel and No. 1, No. 2, and No. 4 Fuel Oils also includes DFO, JF, KER)
- CUTOFF Electricity, hydropower, at power plant, unspecified: 0.102659 kWh
  Hydroelectric (WAT)
- Electricity, bituminous coal, at power plant: 0.071031 kWh
  subbituminous coal
- Electricity, natural gas, at power plant: 0.811905 kWh
- CUTOFF Electricity, biomass,liquid, unspecified, at power plant: 0.001383 kWh
  OBL – Other Biomass Liquid (Ethanol, Fish Oil, Liquid Acetonitrile Waste, Medical Waste, Tall Oil, Waste Alcohol, and other Biomass not specified, also consist of OBL, BLQ, SLW, WDL)
- Electricity, residual fuel oil, at power plant: 0.00224 kWh
  Petroleum (RFO) - Residual Fuel Oil (includes No. 5 and No. 6 Fuel Oils and Bunker C Fuel Oil)

## Sampling procedure
based on EIA electricity reports for all power plants in the US.

## Sources
- Chris Goemans, Athena Institute
- Statistics Canada
- unspecified
- USEPA
- Statistics Canada
- Statistics Canada
- Statistics Canada
- Statistics Canada
- USEPA
- EIA
- EIA
- EIA
- EIA
- EIA
- EIA
- EIA
- EIA
- EIA
- EIA
- US DOE
- International Energy Agency
