# Transport, transit bus, gasoline powered

Dataset: openLCA process, unit process
Category: Urban Transit Systems
Geography: RNA
Time period: 2010-01-01 to 2010-01-01
Generated by: Nathan Hardesty
Published in: U.S. Environmental Protection Agency (EP
restrictionsDescription: All information can be accessed by everybody.
copyright: false

## General comment
This dataset represents the Alaska average airborne emissions for operating a gasoline powered transit bus. The inventory includes all vehicle operation processes, including off-network and refueling activities.
The refinery-to-pump transportation and distribution data are calculated from Argonne National Laboratory's GREET 1.8d.1 model.
The vehicle operation data are calculated from EPA's MOVES2010a model, using the assumptions described in the corresponding detailed spreadsheet. Emissions factors in MOVES2010a are largely based on EPA's Mobile Source Observation Database, which in turn includes data from a variety of vehicle studies (References 6-8).
MOVES2010a acknowledges sources of uncertainty in the model structure, the population and acitivty data, and other model parameters. As of July 2011, the uncertainty calculation function of the model has not been activated.

## Technology
Combustion of gasoline in a transit bus.

## Geography
US

## Reference product
- Transport, transit bus, gasoline powered: 1 p*km

## Inputs from technosphere
- Transport, combination truck, average fuel mix: 0.00968306 t*km
- CUTOFF Transport, ocean tanker, average fuel mix: 0.0827869 t*km
- Gasoline, at refinery: 0.0332525 l
- Transport, pipeline, unspecified petroleum products: 0.0950454 t*km
- Transport, train, diesel powered: 0.0180786 t*km
- Transport, barge, average fuel mix: 0.0062734 t*km

## Emissions to nature
- Particulates, < 10 um: 1.06341e-6 kg
  PM10 from organic carbon, elemental carbon, and sulfate particulates.
- Dinitrogen monoxide: 3.72502e-6 kg
- Particulates, < 10 um: 6.47663e-7 kg
  PM10 from tirewear.
- Carbon dioxide, fossil: 0.0843265 kg
- Nitrogen dioxide: 2.37718e-5 kg
- Ammonia: 2.1972e-6 kg
- Methane: 4.54478e-6 kg
- Nitrogen oxides: 0.000301913 kg
- Particulates, < 2.5 um: 1.55315e-7 kg
  PM2.5 from tirewear.
- Particulates, < 2.5 um: 6.68059e-7 kg
  PM2.5 from brakewear.
- Particulates, < 2.5 um: 9.79204e-7 kg
  PM2.5 from organic carbon, elemental carbon, and sulfate particulates.
- Nitrogen oxide: 0.000278141 kg
- Hydrocarbons (other than methane): 0.000150312 kg
- VOC, volatile organic compounds: 0.000154173 kg
- Carbon monoxide, fossil: 0.00369724 kg
- Particulates, < 10 um: 2.55198e-6 kg
  PM10 from brakewear.
- Sulfur dioxide: 1.56821e-6 kg

## Sources
- U.S. Environmental Protection Agency (EP
- National Institute of Standards and Tech
- EPA
- U.S. Alternative Fuels and Advanced Vehi
- Eastern Research Group
- Assessment and Standards Division, Offic
- Assessment and Standards Division, Offic
- Wang, M.
- unspecified
