# Coal cleaning; Underground mine

Dataset: openLCA process, unit process
Category: Bit. Coal and Lignite Surface Mining
Geography: US
Time period: 1998-01-01 to 2002-12-31
Generated by: Timothy Skone
Owner: National Energy Technology Laboratory
Reviewer: Robert James
Published in: National Energy Technology Laboratory (NETL). 2013. Coal cleaning; Underground mine
restrictionsDescription: Use of this dataset is not restricted, but a statement of attribution is required. Please use the following attribution statement:
National Energy Technology Laboratory's (NETL) Unit Process Library
626 Cochrans Mill Road, P.O. Box 10940
Pittsburgh, PA 15236-0940
http://www.netl.doe.gov/research/energy-analysis/life-cycle-analysis/unit-process-library
Neither the U.S. Department of Energy (DOE) National Energy Technology Laboratory (NETL) nor any person acting on behalf of these organizations:
A. Makes any warranty or representation, express or implied, with respect to the accuracy, completeness, or usefulness of the information contained in this document, or that the use of any information, apparatus, method, or process disclosed in this document may not infringe on privately owned rights; or
B. Assumes any liability with this report as to its use, or damages resulting from the use of any information, apparatus, method, or process disclosed in this document.
Reference herein to any specific commercial product, process, or service by trade name, trademark, manufacturer, or otherwise, does not necessarily constitute or imply its endorsement, recommendation, or favoring by NETL. The views and opinions of the authors expressed herein do not necessarily state or reflect those of NETL.
copyright: true

## General comment
This process is part of the NETL Unit Process Library. To access the library and the original dataset:
1) Navigate to the NETL LCA home page (http://www.netl.doe.gov/lca)
2) Then navigate to the “Unit Process Library”
3) From the library, the unit process of interest can be found either through the "Complete Listing of the Unit Process Library link" or through the link to the "Unit Process Database" spreadsheet
4) For each process, a Data Sheet (DS) and Data File (DF) are available

BRIEF DESCRIPTION
The amount of electricity required to power equipment used for cleaning coal at underground and surface mines as well as accounting for coal loss during production activities.

GOAL AND SCOPE
This unit process provides a summary of relevant input and output flows associated with the amount of electricity required to power equipment used for cleaning coal at an underground mine. A centrifuge, flotation machine, screens, and magnetic separator are the pieces of equipment used to clean coal. The process also accounts for the solid wastes that are incurred during the production and processing steps to scale upstream activities for one kg of coal at the entrance to the RMT gate. Inputs are electricity, coal, and the water use and quality associated with 1 kg of cleaned coal. All of these items are also adjustable parameters to measure uncertainties. Cleaned coal and the course and fine wastes are the outputs. The unit process is based on the reference flow of one kg of coal. The relevant flows of this unit process are described below and shown the associated documentation (referenced in the Citation and Associated Documentation section below).

BOUNDARY AND DESCRIPTION
A visual representation of the boundary of this unit process is available in the associated documentation (referenced in the Citation and Associated Documentation section below). Coal cleaning is performed to separate coal from other materials (rock, dirt, clay, etc.) contained in run-of-mine (raw) coal (U.S. Department of Energy and National Mining Association, 2002). The amount and type of materials to be removed is dependent on the particular coal seam being mined, and the forms of that removed material (course or fine slurry wastes) are dependent on the type of coal cleaning processes that are used.

The cleaning process and energy requirements are based on the data provided in Chapter 2 of the Energy and Environmental Profile of the U.S. Mining Industry developed by the U.S. Department of Energy’s Energy Efficiency and Renewable Energy division and National Mining Association (U.S. Department of Energy and National Mining Association, 2002). The process therein serves as a generic coal preparation facility for an eastern U.S. underground mine and contains a centrifuge, flotation machine, screens, and magnetic separator. BCS, Incorporated (BCS) developed the data by integrating the U.S. Department of Energy’s Energy Information Administration’s 1997 Coal Industry data into the Western Mining Engineering, Inc.’s SHERPA Mine Cost Software to create 2002 estimates. BCS also used Mine and Mill Equipment Cost, An Estimator’s Guide to develop the data.

It is assumed that all equipment uses electricity, and the electricity requirement was calculated by dividing the sum of the equipments’ energy requirements, in Btu per ton, by the appropriate conversions to obtain the electricity needed in kWh per kg of cleaned coal (U.S. Department of Energy and National Mining Association, 2002). It is also assumed that these energy requirements are applicable to processing coal from a surface mine. The electricity factor is an adjustable parameter in the DS file, so the item could be adjusted to measure uncertainty. One key piece of information missing in the discussion of the energy requirements is how much solid waste is generated from processing the coal. Figure 2-3 of the report shows that waste is 15 percent of the material produced in mining (U.S. Department of Energy and National Mining Association, 2002). Due to lack of specific information, it is assumed that the energy requirements for coal cleaning are based on a run-of-mine coal containing 15 percent waste. The unit process will scale the electricity usage according to the amount of waste produced relative to the assumed 15 percent baseline.

The default course and fine waste flows are based on a “realistic” process for Illinois No. 6 coal (Bhagwat, 2009). As mentioned above, the amount of waste generated by a specific facility is highly depended on the source of the coal, so data for a specific facility should be used if at all possible, particularly if life cycle results are sensitive to the results of this process. If no other data is available it is recommended that the 15 percent baseline value is used, which is provided by the parameter base_scaler. These flows should be sent to processes to either account for the burdens to dispose of them or make use of the products, such as concrete manufacturing.

The amount of raw coal input to the process is based on producing 1 kg of cleaned coal, thus it is the sum of: 1 kg of cleaned coal and the course and fine waste flows.

Water use and emissions are accounted for separately in a Water Use and Quality unit process, which is linked through the input flow, Coal, preparation, water [Intermediate flow]. The input flow is statically defined as 1 kg to match the reference flow of this unit process of 1 kg cleaned coal; therefore, the upstream water use and quality unit process should use the same reference flow (i.e., input and output flows scaled to 1 kg of cleaned coal rather than raw coal input).

This unit process parameterizes key variables, which allow for evaluation of data uncertainty when used in a life cycle model. Additional details regarding input and output flows, including calculation methods, are contained in the associated documentation (referenced in the Citation and Associated Documentation section below).

This process contains one or more surrogate product flows as replacements for proprietary product flows used in the NETL Unit Process Library. All surrogate flow were taken from the U.S. Life Cycle Inventory Database; a list of surrogate flows used in this process is provided below:
1) Electricity, at Grid, US, 2010

CITATION AND ASSOCIATED DOCUMENTATION
This dataset should be cited as:
National Energy Technology Laboratory (NETL). 2015. NETL Life Cycle Inventory Data – Unit Process: Coal cleaning; Underground mine. U.S. Department of Energy, National Energy Technology Laboratory. Last Updated: September 2015 (version 01). Retrieved on [DATE] from [URL for this dataset].

This dataset is part of the NETL Unit Process Library. The Library offers additional information concerning this dataset in the form of a Detailed Spreadsheet Documentation (DS) file and a Process Documentation File (DF). The DS file is an Excel file that contains all of the parameters, inputs, and outputs for a given system as well as background data, calculations and quality scores. The DF file is a PDF document that contains major assumptions and data sources that are the basis for each unit process. The NETL Unit Process Library is located on the NETL website (netl.doe.gov) under Research / Energy Analysis / Energy Trends and Issues / Life Cycle Analysis / Unit Process Library.

This dataset was converted directly from the DS with additional supporting information provided by the DF. Full citations for the DS and DF are given below.

DS File
National Energy Technology Laboratory (NETL). 2013. NETL Life Cycle Inventory Data – Unit Process: Coal cleaning. U.S. Department of Energy, National Energy Technology Laboratory. Last Updated: July 2013 (version 01). Retrieved on 09/15/2015 from: http://www.netl.doe.gov/File%20Library/Research/Energy%20Analysis/Life%20Cycle%20Analysis/UP_Library/DS_Stage1_O_Coal_Cleaning_2013-02.xlsx%20Analysis/UP_Library/DS_Stage1_O_Extraction_Underground_2013-01.xlsx

DF File
National Energy Technology Laboratory (NETL). 2013. NETL Life Cycle Inventory Data – Unit Process: Coal cleaning. U.S. Department of Energy, National Energy Technology Laboratory. Last Updated: July 2013 (version 01). Retrieved on 09/15/2015 from: http://www.netl.doe.gov/File%20Library/Research/Energy%20Analysis/Life%20Cycle%20Analysis/UP_Library/DF_Stage1_O_Coal_Cleaning_2013-02.pdf

## Technology
This unit process provides a summary of relevant input and output flows associated with the amount of electricity required to power equipment used for cleaning coal at underground and surface mines. A centrifuge, flotation machine, screens, and magnetic separator are the pieces of equipment used to clean coal. Cleaned coal and the course and fine wastes are the outputs.

A visual representation of the boundary of this unit process is available in the associated documentation (referenced in the Citation and Associated Documentation section of the Description field). Coal cleaning is performed to separate coal from other materials (rock, dirt, clay, etc.) contained in run-of-mine (raw) coal (U.S. Department of Energy and National Mining Association, 2002). The amount and type of materials to be removed is dependent on the particular coal seam being mined, and the forms of that removed material (course or fine slurry wastes) are dependent on the type of coal cleaning processes that are used.

This process serves as a generic coal preparation facility for an eastern U.S. underground mine and contains a centrifuge, flotation machine, screens, and magnetic separator. It is assumed that all equipment uses electricity.

The default course and fine waste flows are based on a “realistic” process for Illinois No. 6 coal (Bhagwat, 2009). The amount of waste generated by a specific facility is highly depended on the source of the coal. Additional details regarding input and output flows, including calculation methods, are contained in the associated documentation (referenced in the Citation and Associated Documentation section of the Description field).

## Parameters
- Electricity_F: 0.000421
  [kWh/kg] Baseline coal cleaning electricity per unit of clean coal
- Waste_Base: 0.15
  [dimensionless] Fraction of mined coal that ends up as waste
- Waste_Coarse: 0.3636
  [kg/kg] Adjustable parameter - Coarse wastes from coal processing
- Waste_Fine: 0.0718
  [kg/kg] Adjustable parameter - Fine wastes from coal processing
- Electricity: 0.00103872; = Electricity_F/Base_Scaler*(Waste_Coarse+Waste_Fine)
  [kWh/kg] Coal cleaning electricity per unit of clean coal
- Base_Scaler: 0.176471; = Waste_Base/(1-Waste_Base)
  [kg/kg] Mass of waste that is generated per kg of clean coal for baseline case
- Coal_In: 1.4354; = 1+Waste_Coarse+Waste_Fine
  [kg/kg] Run-of-mine coal input to the cleaning process; Accounts for all losses during production

## Reference product
- Coal; Cleaned; Underground mine: 1 kg; data quality (2,3,4,1,1)

## Inputs from technosphere
- Coal mine tailings storage and disposal; Production mix, underground mine: 0.4354 kg; = Waste_Coarse+Waste_Fine; data quality (2,3,4,1,1)
- Electricity, at Grid, US, 2010: 0.00103872 kWh; = Electricity; data quality (2,3,4,1,1)
- Coal; Handled; From underground mine: 1.4354 kg; = Coal_In; data quality (2,3,4,1,1)

## Inventory method
Attributional

## Modelling constants
All elementary and technosphere flows are calculated on a functional unit basis. Calculations involving combustion primarily to generate useful work are done using lower heating values (LHV) and calculations involving combustion primarily to generate useful heat are done using higher heating values (HHV). Unless explicitly stated in the associated reference documents applicable calculations assumed standard atmospheric temperature and pressure (SATP).

## Completeness
Individual relevant flows captured

## Data selection
Best publically available data

## Data treatment
No allocation applied

## Data collection
No primary data collected

## Intended application
This is a gate-to-gate extraction process and can be used for any type of LCA study.

## Project
National Energy Technology Laboratory (NETL) Unit Process Library

## Sources
- National Commission on Energy Policy. 2009. Meeting Projected Coal Production Demands in the U.S.A., Chapter 4 Coal Preparation
- Bhagwat, S.B. 2009. Estimation of coal-cleaning costs
- National Energy Technology Laboratory (NETL). 2013. Coal cleaning; Underground mine
- U.S. Department of Energy (DOE) and National Mining Association (NMA). 2002. Energy and Environmental Profile of the U.S. Mining Industry: Chapter 2 Coal
