# Wheat straw, at conversion plant, 2022

Dataset: openLCA process, unit process
Category: Wheat Farming
Geography: RNA
Time period: 2010-01-01 to 2100-01-01
Generated by: Garvin Heath
Published in: Hsu, D.
restrictionsDescription: All information can be accessed by everybody.
copyright: false

## General comment
This process transports wheat straw to the conversion plant. It does so using transportation modal allocation from the USDA Ethanol Backgrounder (2007), assuming the current corn grain allocations described in the report are applicable to wheat straw and to year 2022. Distances for each mode are from a combination of references; still missing a good distance estimate for barge, but since the share of barge transportation is ~2%, the final result will not be sensititive to this parameter. Infrastructure impacts are included in this process by calling the Ecoinvent "transport" processes.
ALSO NEED TO CREATE PARAMETERS SPECIFIC TO wheat straw INSTEAD OF USING STOVER ONES (if there is reason to believe transport distances might be different amongst feedstocks).
The production of wheat straw feedstock utilized in this transport process assigns inputs to wheat straw based on activities and inputs that are required for the growth and harvest and preprocessing of wheat straw and none that of the activities or inputs that would normally be used to produce, harvest and preprocess wheat kernals (so-called "incremental allocation").

## Technology
future

## Geography
North America

## Time period
2010

## Reference product
- Wheat straw, at conversion plant, 2022: 1 t

## Inputs from technosphere
- Transport, combination truck, diesel powered: 32.2 t*km
  This is the most stringest European emission standard for lorries, though presumably considerably higher than standards in place in 2022. Assumes backhauling of gasoline (i.e., no attributable empty return trip). J Jacboson (personal comm. 12/1/08) advised modeling wheat straw following switchgrass.
- Transport, barge, diesel powered: 11.3 t*km
  assuming barge is for dry goods, barge tanker for liquid. This process relates to "average" (current) barges, even though emissions will presumably be considerably lower in 2022. Assumes backhauling of gasoline (i.e., no attributable empty return trip). J Jacboson (personal comm. 12/1/08) advised modeling wheat straw following switchgrass. No reference for SG barge distance or share, so have to use stover.
- Spring wheat straw, ground and stored, 2022: 0.5 t
- Transport, train, diesel powered: 200 t*km
  This process uses European train data extrapolated to US by ecoinvent. This process relates to "average" (current) trains, even though emissions will presumably be considerably lower in 2022. Assumes backhauling of gasoline (i.e., no attributable empty return trip). J Jacboson (personal comm. 12/1/08) advised modeling wheat straw following switchgrass. No reference for SG rail distance, so have to use stover.
- Winter wheat straw, ground and stored: 0.5 t

## Sources
- Hsu, D.
