# Softwood logs with bark, harvested at average intensity site, at mill, US PNW

Dataset: openLCA process, unit process
Category: Logging
Geography: RNA
Time period: 2003-01-01 to 2004-01-01
Generated by: Jamie Meil
Published in: Leonard R. Johnson
restrictionsDescription: All information can be accessed by everybody.
copyright: true

## General comment
Base process data presented with allocations to within process co-products noted. Refer to allocation worksheet for specifics. All allocations performed using mass or volume., use these factors to determine flows from harvesting and reforestation from the three site classes
Important note: although most of the data in the US LCI database has
undergone some sort of review, the database as a whole has not yet
undergone a formal validation process.
Please email comments to lci@nrel.gov.

## Technology
Typical

## Geography
US Pacific North West

## Reference product
- Softwood logs with bark, harvested at average intensity site, at mill, US PNW: 1 m3

## Inputs from technosphere
- Softwood logs with bark, harvested at high intensity site, at mill, US PNW: 0.12 m3
- Softwood logs with bark, harvested at medium intensity site, at mill, US PNW: 0.46 m3
- Softwood logs with bark, harvested at low intensity site, at mill, US PNW: 0.42 m3

## Sources
- Leonard R. Johnson
- Michael Milota
- Maureen Puetmann
