# Roundwood, softwood, average, High Intensity Management, NE-NC

Dataset: openLCA process, unit process
Category: Logging
Geography: RNA
Time period: 2003-01-01 to 2003-01-01
Generated by: Maureen Puetmann
Published in: Elaine Oneil
restrictionsDescription: All information can be accessed by everybody.
copyright: true

## General comment
Allocation on a mass basis.
Important note: although most of the data in the US LCI database has
undergone some sort of review, the database as a whole has not yet
undergone a formal validation process.
Please email comments to lci@nrel.gov.

## Technology
Average technology. Some data extrapolated from similar processes.

## Geography
Northeast/North Central (NE/NC) region of the US : Connecticut, Delaware, Illinois, Indiana, Iowa, Maine, Maryland, Massachusetts, Michigan, Minnesota, Missouri, New Hampshire, New Jersey, New York, Ohio, Pennsylvania, Rhode Island, Vermont, West Virginia, and Wisconsin.

## Reference product
- Roundwood, softwood, average, High Intensity Management, NE-NC: 105.236 m3
  Ovendry density = 380 kg/m3

## By-products
- Bark, softwood, average, High Intensity Management, NE-NC: 8450.99 kg
  Ovendry density = 380 kg/m3
- Pulpwood, softwood, average, High Intensity Management, NE-NC: 124.037 m3
  Ovendry density = 380 kg/m3

## Inputs from technosphere
- Skidding, grapple skidder, >140 HP: 23.5877 h
  Based on a rate of 0.103 standard machine hours per m3
- Loader operation, large, NE-NC: 17.4087 h
  Based on a rate of 0.076 standard machine hours per m3
- Chainsawing, delimbing, NE-NC: 22.3028 h
  Based on a rate of 0.097 standard machine hours per m3
- Felling, feller buncher, > 200 HP, NE-NC: 9.83159 h
  Based on a rate of 0.043 standard machine hours per m3

## Inputs from nature
- Carbon dioxide, in air: 86352.2 kg
  Based on carbon content of pulpwood
- Carbon dioxide, in air: 15482.7 kg
  Based on carbon content of bark
- Carbon dioxide, in air: 73263.7 kg
  Based on carbon content of roundwood
- Wood, soft, NE-NC, standing: 251.512 m3

## Sampling procedure
Harvesting production, cost and fuel consumption rates were assimilated from existing studies of harvesting equipment typical of the systems used to harvest sites in the region. These studies included both personal interviews with timber harvesting contractors and published information. The costs, production and consumption rates were
developed for equipment options within each component of the system. Harvesting systems were developed as combinations of these harvesting components. Although there are many combinations of harvesting equipment and systems that can be used for harvesting timber, this analysis assumes the use of the most common systems.

## Sources
- Elaine Oneil
- Maureen Puettmann
