# Dry rough lumber, at kiln, US SE

Dataset: openLCA process, unit process
Category: Sawmills
Geography: RNA
Time period: 1999-01-01 to 2003-01-01
Generated by: Jamie Meil
Published in: Michael Milota
restrictionsDescription: All information can be accessed by everybody.
copyright: true

## General comment
Base process data presented with allocations to within process co-products noted. Refer to allocation worksheet for specifics. All allocations performed using mass or volume.,
Important note: although most of the data in the US LCI database has
undergone some sort of review, the database as a whole has not yet
undergone a formal validation process.
Please email comments to lci@nrel.gov.

## Technology
typical

## Geography
US South east

## Reference product
- Dry rough lumber, at kiln, US SE: 1 kg

## Inputs from technosphere
- Electricity, at grid, Eastern US, 2000: 0.0364 kWh
- Diesel, combusted in industrial boiler: 0.000198 l
- CUTOFF Hogfuel-Biomass (50% MC), combusted in industrial boiler: 0.436 kg
- Rough green lumber, at sawmill, US SE: 1 kg

## Inputs from nature
- Water: 0.581 l

## Emissions to nature
- VOC, volatile organic compounds: 0.000963 kg

## Sampling procedure
survey method

## Sources
- Leonard R. Johnson
- Maureen Puetmann
- Michael Milota
