# Electricity, at Grid, HICC, 2008

Dataset: openLCA process, unit process
Category: Utilities
Geography: RNA
Time period: 2008-01-01 to 2008-01-01
Generated by: Alberta Carpenter
Published in: Chris Goemans, Athena Institute
restrictionsDescription: All information can be accessed by everybody.
copyright: false

## General comment
The methodology used to put together the grid information is outlined in reference 1.

## Technology
Typical

## Geography
Hawaii

## Reference product
- Electricity, at Grid, HICC, 2008: 1 kWh

## Inputs from technosphere
- CUTOFF Electricity, at wind power plant, unspecified: 0.0210984 kWh
  WND – Wind
- Electricity, bituminous coal, at power plant: 0.000425029 kWh
  WC - Waste/Other Coal (Anthracite Culm, Bituminous Gob, Fine Coal, Lignite Waste, Waste Coal) .
- Electricity, diesel, at power plant: 0.00406245 kWh
  KER – Kerosene
- CUTOFF Electricity, biomass, solid, biogenic MSW, at power plant: 0.0161743 kWh
  MSB – Municipal Solid Waste – Biogenic Component
- Electricity, bituminous coal, at power plant: 0.144401 kWh
  BIT - Anthracite Coal, and Bituminous Coal.
- CUTOFF Electricity, geothermal, unspecified: 0.0205982 kWh
  GEO – Geothermal
- CUTOFF Electricity, biomass, solid, agriculture by-products, at power plant: 0.000540203 kWh
  AB – Agriculture Crop By-products / Straw / Energy Crops
- Electricity, diesel, at power plant: 0.116386 kWh
  DFO – Distillate Fuel Oil (includes all Diesel and No. 1, No. 2, and No. 4 Fuel Oils)
- CUTOFF Electricity, hydropower, at power plant, unspecified: 0.0074139 kWh
  WAT – Water (Conventional, Pumped Storage)
- CUTOFF Electricity, biomass,solid, unspecified, at power plant: 0.00986892 kWh
  OBS – Other Biomass Solid (Animal Manure and Waste, Solid By-products, and other solid biomass not specified)
- CUTOFF Electricity, tire derived fuel, at power plant: 0.00128088 kWh
  TDF – Tired (tire derived fuel)
- Electricity, residual fuel oil, at power plant: 0.586682 kWh
  RFO – Residual Fuel Oil (includes No. 5 and No. 6 Fuel Oils and Bunker C Fuel Oil)
- CUTOFF Electricity, solar, unspecified, at power plant: 1.58222e-6 kWh
  SUN – Solar (Photovoltaic, Thermal)
- CUTOFF Electricity, petroleum, waste oil, at power plant: 0.0549687 kWh
  WO – Waste/Other Oil (including Crude Oil, Liquid Butane, Liquid Propane, Oil Waste, Re-Refined Motor Oil, Sludge Oil, Tar Oil, or other petroleum-based liquid wastes)
- CUTOFF Electricity, other gases, unspecified, at power plant: 0.00339056 kWh
  OG – Other Gas (Butane, Coal Processes, Coke-Oven, Refinery, and other processes)
- CUTOFF Electricity, MSW, non-biogenic, at power plant: 0.0127083 kWh
  MSN – Municipal Solid Waste – Non-biogenic components

## Sampling procedure
based on EIA electricity reports for all power plants in the US.

## Sources
- Chris Goemans, Athena Institute
- unspecified
- USEPA
- Statistics Canada
- Statistics Canada
- Statistics Canada
- Statistics Canada
- Statistics Canada
- Statistics Canada
- USEPA
- EIA
- EIA
- EIA
- EIA
- EIA
- EIA
- EIA
- EIA
- EIA
- EIA
- EIA
- US DOE
- International Energy Agency
- US DOE
