# Precision sand casting, aluminum

Dataset: openLCA process, unit process
Category: Aluminum Foundries (except Die-Casting)
Geography: RNA
Time period: 1996-01-01 to 2001-01-01
Generated by: James Littlefield
Published in: VRP (Vehicle Recycling Partnership)
restrictionsDescription: All information can be accessed by everybody.
copyright: false

## General comment
No co-product allocation for scrap materials that are recycled or reused; all environmental flows for scrap are included in the environmental flows for the product. A percent difference is calculated in cases when 2 plants reported the same data point; the percent difference is calculated by dividing the difference between the 2 plants by the average of the 2 plants.
Important note: although most of the data in the US LCI database has
undergone some sort of review, the database as a whole has not yet
undergone a formal validation process.
Please email comments to lci@nrel.gov.

## Technology
representative of current precision sand aluminum casting technologies

## Geography
United States

## Reference product
- Aluminum, cast, precision sand casting: 1 kg
  Average of 2 plants

## By-products
- Byproduct of aluminum casting, precision sand, liquid residuals: 0.0289 kg
  Average of 2 plants. Composition by weight: 81% sodium hydroxide and 18% sulfuric acid and spent TEA.
- Aluminum scrap, at precision sand casting: 0.648 kg
  Average of 2 plants. Composition by weight: 73% sand, 15% aluminum scrap/dross/chips/flash, 9% wood/paper/cardboard, and 3% steel/batteries/etc.

## Inputs from technosphere
- Aluminum ingot, production mix, at plant: 1.15 kg
  Average of 2 plants.
- Sodium hydroxide, production mix, at plant: 0.00081 kg
  Represents 1 plant.
- CUTOFF Sulfuric acid, at plant: 0.0137 kg
  Average of 2 plants. There is a 169% difference between the 2 plants.
- CUTOFF Release agent, unspecified, at plant: 5e-5 kg
  Represents 1 plant.
- CUTOFF Argon, liquid, at plant: 0.00329 kg
  Average of 2 plants. There is a 56% difference between the 2 plants.
- CUTOFF Shot blast, unspecified: 0.0149 kg
  Average of 2 plants. There is a 88% difference between the 2 plants.
- Electricity, at grid, US, 2000: 4.29 kWh
  Average of 2 plants. There is a 39% difference between the 2 plants. In this case, one plant is higher for both natural gas and electricity consumption.
- CUTOFF Carbon dioxide, liquid, at plant: 0.0121 kg
  Represents 1 plant. Carbon dioxide is used to clean molds.
- Natural gas, combusted in industrial boiler: 0.931 m3
  Average of 2 plants. There is a 28% difference between the 2 plants. In this case, one plant is higher for both natural gas and electricity consumption.
- CUTOFF Disposal, solid waste, unspecified, to sanitary landfill: 0.0279 kg
  Consists of 16% sand, 11% refractory, 41% oily solids, and 29% boron nitride.
- CUTOFF Refractory material, unspecified, at plant: 0.0062 kg
  Represents 1 plant.
- CUTOFF Nitrogen, at plant: 0.0464 kg
  Average of 2 plants. There is a 38% difference between the 2 plants.
- CUTOFF Disposal, liquid wastes, unspecified, to sanitary landfill: 0.0132 kg
  Consists of 26% oils/grease/petroleum distillates and 64% cleaner/waste paint.
- CUTOFF Oil, at plant: 5e-6 kg
  Represents 1 plant.
- CUTOFF Glue-adhesive(30-50% terpene,30-50% polybutene,5-10% polyolefin), at plant: 0.00015 kg
  Average of 2 plants. There is a 93% difference between the 2 plants.
- Phenol formaldehyde, at plant: 0.0775 kg
  Average of 2 plants. There is a 66% difference between the 2 plants. Resin system is A and B stage: isocyanate and phenolic.
- CUTOFF TEA-DMEA (trimethyl amine, dimethylamine), at plant: 0.00825 kg
  Average of 2 plants. There is a 45% difference between the 2 plants.

## Inputs from nature
- Water: 0.00609 m3
  Average of 2 plants. There is a 53% difference between the 2 plants.
- Sand, unspecified: 0.57 kg
  Average of 2 plants. There is a 143% difference between the 2 plants. Due to different types and grades of sand, costs and physical properties of sand differ from plant to plant.

## Emissions to nature
- Triethyl amine: 5.39e-5 kg
  Represents 1 plant. Emissions are based on published factors for process emissions.
- Aluminum, fume or dust: 3.2e-6 kg
  Represents 1 plant. Emissions are based on published factors for process emissions.
- Benzene, 1,2,4-trimethyl-: 6.51e-5 kg
  Represents 1 plant. Emissions are based on published factors for process emissions.
- Nitrogen oxides: 0.0156 kg
  Represents 1 plant. Measured values after abatement which includes both process and on-site fuel emissions.
- Naphthalene: 6e-7 kg
  Represents 1 plant. Emissions are based on published factors for process emissions.
- Copper compounds: 8.9e-6 kg
  Represents 1 plant. Emissions are based on published factors for process emissions.
- Hydrocarbons, unspecified: 0.0318 kg
  Represents 1 plant. Measured values after abatement which includes both process and on-site fuel emissions. Hydrocarbons include non-methane hydrocarbons as well as an unknown amount of methane.
- Zinc compounds: 6e-7 kg
  Represents 1 plant. Emissions are based on published factors for process emissions.
- Carbon dioxide, fossil: 1.22 kg
  (same comment as for Nitrogen oxides)
- Carbon monoxide, fossil: 0.0156 kg
  (same comment as for Nitrogen oxides)
- Dioxins, measured as 2,3,7,8-tetrachlorodibenzo-p-dioxin: 3.7e-6 kg
  Represents 1 plant. Emissions are based on published factors for process emissions.
- Sulfur oxides: 6e-6 kg
  (same comment as for Nitrogen oxides)
- Particulates, unspecified: 0.00246 kg
  (same comment as for Nitrogen oxides)

## Sources
- VRP (Vehicle Recycling Partnership)
