# Lumber, softwood, borate treated, PNW

Dataset: openLCA process, unit process
Category: Wood Preservation
Geography: RNA
Time period: 2005-01-01 to 2009-12-31
Generated by: Chris Bolin
Reviewer: Paul Cooper
Published in: Chris Bolin
restrictionsDescription: All information can be accessed by everybody.
copyright: false

## General comment
Pressure-treated borate (disodium octaborate tetrahydrate, DOT) softwood lumber. Base process data presented with allocations to within process co-products noted. Refer to allocation worksheet for specifics. All allocations performed using mass or volume., This sheet sets out each unit process in the production of one cubic meter of borate surfaced pressure treated softwood lumber as produced in the US Pacific Northwest Important note: although most of the data in the US LCI database has undergone some sort of review, the database as a whole has not yet undergone a formal validation process. Please email comments to lci@nrel.gov.; Geography: US Pacific Northwest

## Technology
typical

## Geography
US Pacific Northwest

## Time period
2005-2009

## Reference product
- Lumber, softwood, borate treated, PNW: 1 m3
  17.0 nominal BF = 1 acutal cubic feet (ft3); 1 nominal BF = 0.0588 ft3
  retention 0.3060 lb/ft3 = 4.92 kg/m3, dry basis

## Inputs from technosphere
- Diesel, combusted in industrial equipment: 0.5325 l
  Preservative Wood Treatment
- CUTOFF Sawn Lumber, softwood, planed, green, at planer, PNW: 440.06 kg
  1,616 lbs/MBF 17.067 BF/ft = 27.4720 lb/ft3
  ref. PNWLum worksheet Column D, Row 43
- Residual fuel oil, combusted in industrial boiler: 0.008613 l
  Preservative Production
- Transport, train, diesel powered: 46.92 t*km
  6% of lumber total by rail; survey data
- Electricity, at Grid, WECC, 2008: 0.5904 kWh
  Preservative Production
- Gasoline, combusted in equipment: 0.008787 l
  Preservative Production
- Transport, ocean freighter, residual fuel oil powered: 288.5 t*km
  10% of lumber total by ship; 33% of preservative by ship; survey data
- Natural gas, combusted in industrial boiler: 0.1272 m3
  Preservative Production
- Liquefied petroleum gas, combusted in industrial boiler: 0.009003 l
  Preservative Wood Treatment
- CUTOFF Disposal, solid waste, unspecified, to unspecified landfill: 5.56 kg
  Preservative Wood Treatment; Solid waste disposal associated with the mining of borax for preservative manufacture. Solid waste disposal as reported in treater surveys as chemical or process wastes, hazardous wastes, and other (normal trash or municipal waste).
  40.2 km to disposal
- Natural gas, combusted in industrial boiler: 0.0002916 m3
  Preservative Wood Treatment
- CUTOFF Disodium octaborate tetrahydrate (DOT), at plant: 4.9435 kg
  DOT Wood Preservative
- Electricity, at Grid, WECC, 2008: 4.563 kWh
  Preservative Wood Treatment
- Bituminous coal, combusted in industrial boiler: 0.06246 kg
  Preservative Production
- Diesel, combusted in industrial boiler: 0.5096 l
  Preservative Production
- Gasoline, combusted in equipment: 0.02485 l
  Preservative Wood Treatment
- Transport, combination truck, diesel powered: 211.3 t*km
  84% of lumber total by truck; 67% of preservative by truck; survey data
- CUTOFF Disposal, solid waste, unspecified, to unspecified landfill: 17.15 kg
  Preservative Production; Solid waste disposal associated with the mining of borax for preservative manufacture. Solid waste disposal as reported in treater surveys as chemical or process wastes, hazardous wastes, and other (normal trash or municipal waste).
  40.2 km to disposal

## Inputs from nature
- Water, process, unspecified natural origin/m3: 0.2048 l
  Preservative Wood Treatment
- Water, process, unspecified natural origin/m3: 4.126 l
  Preservative Production

## Emissions to nature
- Methane: 0.03947 kg
  Preservative Production
- VOC, volatile organic compounds: 0.0002543 kg
  Preservative Production
- Particulates, < 10 um: 0.01659 kg
  Preservative Production
- Boron: 0.0002765 kg
  Preservative Wood Treatment
- Boron: 0.0001275 kg
  Preservative Wood Treatment; Stormwater runoff, unspecified location.

## Sampling procedure
Industry survey

## Sources
- Chris Bolin
- Chris Bolin
