# Scanner, i1190WN desktop

Dataset: openLCA process, unit process
Category: Other material
Geography: GLO
Time period: 2015-01-01 to 2016-01-01
Generated by: Roy Wood
Reviewer: Jay Mathewson
Published in: Wood. (2016). Greenhouse Gas Life Cycle Assessment Summary Report - Kodak Alaris i710, i703EX, i940, i1150, i1150WN, i1190,i1190E, i1190WN Scanners, ISO 14044 Protocol
restrictionsDescription: All information can be accessed by everybody.
copyright: false

## General comment
This unit process represents the gate-to-gate production of one Kodak Alaris model i1190WN desktop scanner (mass = 3.65 kg). The system boundary includes: 1) the transport of raw materials to multiple manufacturing facilities where various subcomponents are produced; 2) the manufacture of subcomponents; 3) the transport of subcomponents to a different manufacturing plant for final assembly; 4) the assembly of subcomponents into a complete scanner; and 5) the transport of generated waste from the manufacturing facilities to a municipal solid waste landfill. The following processes and life cycle phases fall outside of the system boundary: 1) packaging of the completed scanner; 2) all transport downstream of the assembly plant gate; 3) sale of product; 4) product use phase; and 5) end-of-life phase (including recycling).

The use of this unit process for the analysis of similar devices requires professional judgement based on the degree of similarity.

## Technology
The manufacture of a desktop scanner that uses 2016 technology including information storage and processing and energy savings features. The manufacture includes the manufacturing of subcomponents at other facilities and assembly at the central location.

## Geography
Data is representative of a global supply chain.

## Time period
Primary data is valid from 2015 - 2016. Secondary data is valid from 2005 - 2016 (National Renewable Energy Laboratory 2016; Wernet et al. 2016).

## Reference product
- Scanner, i1190WN desktop: 1 Item(s)
  The mass of 1 Item is 3.65 kg

## Inputs from technosphere
- CUTOFF synthetic rubber: 0.04 kg; triangle minimum 0.0439, mode 0.04, maximum 0.042
  Based on market
- CUTOFF natural gas, at consumer (16% shale blend): 0.81 MJ; triangle minimum 0.61, mode 0.81, maximum 1.06
- CUTOFF nylon 6-6 - GLO: 0.043 kg; triangle minimum 0.042, mode 0.043, maximum 0.044
- CUTOFF steel, chromium steel, 18/8 - GLO: 0.29 kg; triangle minimum 0.27, mode 0.29, maximum 0.31
- CUTOFF printed wiring board, through-hole mounted, unspecified, Pb free: 0.377 kg; triangle minimum 0.36, mode 0.377, maximum 0.4
- CUTOFF petrol, unleaded: 0.19 kg; triangle minimum 0.14, mode 0.19, maximum 0.25
  Based on market
- CUTOFF cast iron - GLO: 0.045 kg; triangle minimum 0.043, mode 0.045, maximum 0.047
- CUTOFF polyurethane, rigid foam - GLO: 0.0006 kg; triangle minimum 0.00055, mode 0.0006, maximum 0.00065
- CUTOFF metal product manufacturing, average metal working: 0.88 kg; triangle minimum 0.86, mode 0.88, maximum 0.9
- Acrylonitrile-butadiene-styrene copolymer, resin, at plant: 1.62 kg; triangle minimum 1.59, mode 1.62, maximum 1.65
- Aluminum ingot, production mix, at plant: 0.0147 kg; triangle minimum 0.014, mode 0.0147, maximum 0.0155
- CUTOFF polycarbonate: 0.47 kg; triangle minimum 0.44, mode 0.47, maximum 0.5
  Based on market
- Transport, combination truck, average fuel mix: 7.06 t*km; triangle minimum 6.4, mode 7.06, maximum 7.8
  Transport of raw materials and components
- CUTOFF electricity, low voltage, at grid: 10.8 kWh; triangle minimum 8.3, mode 10.8, maximum 14
- CUTOFF copper, primary, at refinery: 0.087 kg; triangle minimum 0.085, mode 0.087, maximum 0.089
- CUTOFF injection moulding: 2.25 kg; triangle minimum 2.21, mode 2.25, maximum 2.29
- Cold rolled sheet, steel, at plant: 0.45 kg; triangle minimum 0.43, mode 0.45, maximum 0.47
- CUTOFF switch, toggle type: 0.0022 kg; triangle minimum 0.002, mode 0.0022, maximum 0.0024
- CUTOFF glass, for liquid crystal display: 0.051 kg; triangle minimum 0.049, mode 0.051, maximum 0.053
  Based on market
- Paper, freesheet, uncoated, average production, at mill: 0.0053 kg; triangle minimum 0.0051, mode 0.0053, maximum 0.0055
- Transport, combination truck, average fuel mix: 0.001 t*km; triangle minimum 0.0007, mode 0.001, maximum 0.0015
  Transport of waste
- CUTOFF polyvinyl chloride, bulk polymerised - GLO: 0.0975 kg; triangle minimum 0.095, mode 0.0975, maximum 0.1
- CUTOFF municipal solid waste landfill, operation: 0.018 kg; triangle minimum 0.013, mode 0.018, maximum 0.024
- CUTOFF polymethyl methacrylate beads: 0.0063 kg; triangle minimum 0.006, mode 0.0063, maximum 0.0066
- CUTOFF flat glass, uncoated - GLO: 0.041 kg; triangle minimum 0.039, mode 0.041, maximum 0.043
- CUTOFF transport, passenger, aircraft: 1.2 p*km; triangle minimum 1.1, mode 1.2, maximum 1.3

## Sampling procedure
BOUNDARY CONDITIONS
The system boundary includes: 1) the transport of raw materials to multiple manufacturing facilities where various subcomponents are produced; 2) the manufacture of subcomponents; 3) the transport of subcomponents to a different manufacturing plant for final assembly; 4) the assembly of subcomponents into a complete scanner; and 5) the transport of generated waste from the manufacturing facilities to a municipal solid waste landfill. The following processes and life cycle phases fall outside of the system boundary: 1) packaging of the completed scanner; 2) all transport downstream of the assembly plant gate; 3) sale of product; 4) product use phase; and 5) end-of-life phase (including recycling).

DATA COLLECTION
For material inputs, data collection was based on scanner specifications provided by the manufacturer. Other inputs (e.g. energy; waste transport and disposal) were calculated on the basis of quantity of input per kg of scanner produced.

UNCERTAINTY ESTIMATION
Uncertainty was estimated based on engineering judgment. Material inputs had less uncertainty because they were based off of precise engineering specifications. Other inputs (e.g. energy; waste transport and disposal) had more uncertainty.

## Review details
This dataset and its companion report (Wood 2016) were internally reviewed by Jay Mathewson of Kodak Alaris.

## Sources
- Institute for Environment and Sustainablility. (2011). General guide for Life Cycle Assessment - Detailed guidance.
- National Renewable Energy Laboratory (2016). U.S. Life Cycle Inventory Database.
- Wernet et al. (2016) The ecoinvent database version 3 (part I): overview and methodology.
- Wood. (2016). Greenhouse Gas Life Cycle Assessment Summary Report - Kodak Alaris i710, i703EX, i940, i1150, i1150WN, i1190,i1190E, i1190WN Scanners, ISO 14044 Protocol
- Wood. (2012). Life Cycle Assessment Summary Report - Kodak i2800, i2600, i2400 Scanners - ISO 14044 Protocol
