# Transport, intercity bus, diesel powered, Northeast

Dataset: openLCA process, unit process
Category: Interurban and Rural Bus Transportation
Geography: RNA
Time period: 2010-01-01 to 2010-01-01
Generated by: Nathan Hardesty
Published in: U.S. Environmental Protection Agency (EP
restrictionsDescription: All information can be accessed by everybody.
copyright: false

## General comment
This dataset represents the Northeastern U.S. (CT, DC, DE, ME, MD, MA, NH, NJ, NY, PA, RI, VT (Reference 10)) average airborne emissions for operating a diesel powered intercity bus. The inventory includes all vehicle operation processes, including off-network and refueling activities.
The refinery-to-pump transportation and distribution data are calculated from Argonne National Laboratory's GREET 1.8d.1 model.
The vehicle operation data are calculated from EPA's MOVES2010a model, using the assumptions described in the corresponding detailed spreadsheet. Emissions factors in MOVES2010a are largely based on EPA's Mobile Source Observation Database, which in turn includes data from a variety of vehicle studies (References 6-8).
MOVES2010a acknowledges sources of uncertainty in the model structure, the population and acitivty data, and other model parameters. As of July 2011, the uncertainty calculation function of the model has not been activated.

## Technology
Combustion of diesel in an intercity bus.

## Geography
US

## Reference product
- Transport, intercity bus, diesel powered, Northeast: 1 p*km

## Inputs from technosphere
- Transport, combination truck, average fuel mix: 0.00492809 t*km
- Transport, barge, average fuel mix: 0.00476662 t*km
- Diesel, at refinery: 0.0152876 l
- Transport, pipeline, unspecified petroleum products: 0.0496735 t*km
- Transport, ocean freighter, average fuel mix: 0.0336905 t*km
- Transport, train, diesel powered: 0.00919643 t*km

## Emissions to nature
- Particulates, < 2.5 um: 1.13744e-7 kg
  PM2.5 from tirewear.
- Particulates, < 10 um: 2.13368e-6 kg
  PM10 from brakewear.
- Nitrogen oxides: 0.000364101 kg
- VOC, volatile organic compounds: 1.64226e-5 kg
- Carbon dioxide, fossil: 0.040138 kg
- Carbon monoxide, fossil: 9.73298e-5 kg
- Nitrogen oxide: 0.00033602 kg
- Particulates, < 2.5 um: 5.58553e-7 kg
  PM2.5 from brakewear.
- Dinitrogen monoxide: 5.74964e-8 kg
- Particulates, < 2.5 um: 1.9451e-5 kg
  PM2.5 from organic carbon, elemental carbon, and sulfate particulates.
- Nitrogen dioxide: 2.80823e-5 kg
- Ammonia: 5.55521e-7 kg
- Particulates, < 10 um: 4.74311e-7 kg
  PM10 from tirewear.
- Methane: 4.1715e-7 kg
- Sulfur dioxide: 6.75926e-7 kg
- Particulates, < 10 um: 2.00519e-5 kg
  PM10 from organic carbon, elemental carbon, and sulfate particulates.
- Hydrocarbons (other than methane): 1.59344e-5 kg

## Sources
- U.S. Environmental Protection Agency (EP
- National Institute of Standards and Tech
- EPA
- U.S. Alternative Fuels and Advanced Vehi
- Eastern Research Group
- Assessment and Standards Division, Offic
- Assessment and Standards Division, Offic
- Wang, M.
- National Climatic Data Center, National
- J. Schwieterman
