# Natural gas, at extraction site

Dataset: openLCA process, unit process
Category: Crude Petroleum and Natural Gas Extraction
Geography: RNA
Time period: 1997-01-01 to 2001-01-01
Generated by: Franklin Associates
Published in: Franklin Associates
restrictionsDescription: All information can be accessed by everybody.
copyright: false

## General comment
Natural gas is commonly co-extracted with crude oil. However, there are enough differences between crude oil and natural gas extraction to merit separate data modules for each product.,
Important note: although most of the data in the US LCI database has
undergone some sort of review, the database as a whole has not yet
undergone a formal validation process.
Please email comments to lci@nrel.gov.

## Technology
Includes data for natural gas extracted from onshore and offshore wells. Includes data for natural gas co-extracted with crude oil as well as for wells that produced only natural gas.

## Geography
United States

## Reference product
- Natural gas, at extraction site: 1 m3

## Inputs from technosphere
- Natural gas, combusted in industrial boiler: 0.0241 m3
- CUTOFF Disposal, solid waste, unspecified, to unspecified treatment: 0.0192 kg
- Electricity, at grid, US, 2000: 0.0287 kWh
- Diesel, combusted in industrial boiler: 0.000953 l
- Residual fuel oil, combusted in industrial boiler: 0.000588 l
- Gasoline, combusted in equipment: 0.000507 l

## Inputs from nature
- Gas, natural: 1 m3

## Emissions to nature
- p-Cresol: 9.83e-8 kg
- Chromium, ion: 1.6e-6 kg
- Naphthalene: 5.75e-8 kg
- Yttrium: 2.13e-8 kg
- Decane: 9.23e-8 kg
- Thallium: 7.53e-9 kg
- Sodium, ion: 0.0323 kg
- Radium-226/kg: 1.15e-13 kg
  Radioactive substances in kBq in other DB and in impact assessment methods, no conversion factors found.
- Cyanide: 2.29e-10 kg
- Octadecane: 4.72e-8 kg
- Zinc: 1.56e-6 kg
- Aluminum: 5.84e-5 kg
- Benzene, ethyl-: 2.99e-7 kg
- Xylene: 6.99e-8, 2.54e-6 kg (2 entries, compartments not in this file)
- Selenium: 7.04e-9 kg
- Sulfate: 0.000233 kg
- Ammonia: 3.91e-5 kg
- Methyl ethyl ketone: 2.55e-10 kg
- Cadmium, ion: 1.02e-7 kg
- o-Cresol: 9.11e-8 kg
- Dissolved solids: 0.141 kg
- Beryllium: 3.17e-8 kg
- Calcium, ion: 0.0102 kg
- Barium: 0.000902 kg
- COD, Chemical Oxygen Demand: 0.000911 kg
- Silver: 6.64e-6 kg
- n-Hexacosane: 2.12e-9 kg
- Naphthalenes, alkylated, unspecified: 5.1e-10 kg
- Phenols, unspecified: 1.42e-6 kg
- Radium-228/kg: 5.86e-16 kg
  (same comment as for Radium-226/kg)
- Tin: 3.49e-7 kg
- Manganese: 3.22e-6 kg
- Hexanoic acid: 6.66e-7 kg
- Docosane: 3.39e-9 kg
- Mercury: 6.22e-10 kg
- Tetradecane: 7.68e-8 kg
- Eicosane: 4.82e-8 kg
- Boron: 9.94e-6 kg
- Dibenzothiophene: 4.88e-10, 6.22e-12 kg (2 entries, compartments not in this file)
- Antimony: 3.56e-8 kg
- Methane: 0.00881 kg
- Nickel: 5.54e-7 kg
- Cobalt: 7.02e-8 kg
- Fluorenes, alkylated, unspecified: 1.81e-9 kg
- Benzenes, alkylated, unspecified: 3.11e-8 kg
- Lead-210/kg: 3.29e-16 kg
  (same comment as for Radium-226/kg)
- Chloride: 0.114 kg
- Biphenyl: 2.02e-9 kg
- Sulfur: 8.39e-6 kg
- Bromide: 0.000679 kg
- Phenanthrenes, alkylated, unspecified: 2.12e-10 kg
- Toluene: 5.02e-6 kg
- Copper, ion: 4.47e-7 kg
- Methane, monochloro-, R-40: 1.28e-10 kg
- Lithium, ion: 0.0034 kg
- Detergents, oil: 3.16e-6 kg
- Iron: 0.000184 kg
- m-Xylene: 9.6e-8 kg
- Vanadium: 8.6e-8 kg
- Hexadecane: 1.91e-7 kg
- Lead: 1.01e-6 kg
- Benzene: 5.31e-6 kg
- Titanium, ion: 5.48e-7 kg
- Dibenzofuran: 6.02e-10 kg
- Magnesium: 0.00199 kg
- Strontium: 0.000173 kg
- Oils, unspecified: 6.09e-5 kg
- 2-Hexanone: 2.07e-8 kg
- Benzoic acid: 3.21e-6 kg
- Benzene, 1-methyl-4-(1-methylethyl)-: 3.17e-10 kg
- Fluorene, 1-methyl-: 3.61e-10 kg
- Phenanthrene: 4.06e-10 kg
- Benzene, pentamethyl-: 2.37e-10 kg
- Molybdenum: 7.28e-8 kg
- Pentanone, methyl-: 1.33e-8 kg
- Acetone: 3.17e-8 kg
- Dodecane: 1.75e-7 kg
- Suspended solids, unspecified: 0.00201 kg
- Arsenic, ion: 7e-7 kg
- Naphthalene, 2-methyl-: 5.02e-8 kg
- Fluorine: 1.11e-9 kg
- BOD5, Biological Oxygen Demand: 0.000552 kg
- Phenol, 2,4-dimethyl-: 8.87e-8 kg

## Sources
- unspecified
- Franklin Associates
- EPA
- NREL (National Renewable Energy Laborato
- EPA
- Energy Information Administration
- EPA
- Hydrocarbon Processing
- Energy Information Administration: Natur
- unspecified
- Energy Information Administration
- Energy Information Administration
- unspecified
