# Paper, bag and sack, unbleached kraft, average production, at mill

Dataset: openLCA process, unit process
Category: Pulp, Paper, and Paperboard Mills
Geography: RNA
Time period: 2006-01-01 to 2006-01-01
Generated by: Caroline Gaudreault
Reviewer: Martha Stevenson
Published in: AF&PA
restrictionsDescription: All information can be accessed by everybody.
copyright: false

## General comment
Unbleached Kraft Bag and Sack Paper, average North American production, at mill. By-products were allocated 0% of the impacts to enable the user to choose and apply their own allocation method more easily. All flows are production-weighted means. Data were developed for a full LCA that was critically reviewed. Reviewers were: • Martha Stevenson, Chairperson – Private Consultant to the public interest with ten years of experience in sustainability, environmental management, packaging and materials recovery; led the development of the Design Guidelines for Sustainable Packaging and the COMPASS software used to compare the environmental impacts of package designs; • Pascal Lesage – Life cycle assessment consultant, Researcher at École Polytechnique de Montréal [at the Inter-University Research Centre for the Life Cycle of Products, Processes and Services (CIRAIG) in Montreal]; and • Dale Phenicie, Environmental Affairs Consulting – Consultant with 35 years of experience in environmental protection and process consulting for the forest products industry. Has served on several U.S. EPA Task Forces dealing with water quality issues and authored several AF&PA Environmental, Health and Safety/Sustainability reports.

## Technology
current technology mix for unbleached kraft bag and sack paper

## Time period
Primary data collected from participating companies and associations for their operational activities are representative for 2006 and 2007.

## Reference product
- Paper, bag and sack, unbleached kraft, average production, at mill: 834.61 kg
  834.61 dry kg is equal to 1 market-dried short ton (8% water).

## By-products
- Tall oil, at unbleached kraft bag and sack paper mill: 25.174 kg
  Produced as byproduct of pulp production. Sold i.e., not used on site. Allocation set to 0%.
- Turpentine, at unbleached kraft bag and sack paper mill: 1.9504 kg
  (same comment as for Tall oil, at unbleached kraft bag and sack paper mill)
- Electricity, at unbleached kraft bag and sack paper mill: 65 kWh
  (same comment as for Tall oil, at unbleached kraft bag and sack paper mill)

## Inputs from technosphere
- CUTOFF Disposal, solid waste, unspecified, to unspecified incinerator: 0.45359 kg
  Typically on-site with energy recovery.
- CUTOFF Disposal, solid waste, unspecified, to unspecified land application: 0.45359 kg
  Typically off-site agricultural/silvicultural
- Containerboard, average production, at mill: 4.2139 kg
  Packaging material
- Sodium hydroxide, production mix, at plant: 1.5876 kg
- CUTOFF Sodium sulfate, at plant: 13.109 kg
  ei: Sodium sulphate, powder, production mix, at plant
- CUTOFF Old magazines: 3.792 kg
- CUTOFF Dry strengths, at plant: 0.20865 kg
- Transport, pipeline, natural gas: 83.2 t*km
  Transports of fuels. Natural gas: 33584 tkm/MMcf, Average transportation for natural gas in North America according to the US LCI database
- CUTOFF Disposal, unspecified ashes, to unspecified landfill: 20.321 kg
  Mix of wood and coal ashes. Based on typical ash contents can be assumed to be 78% from wood and 22% from coal. Typically company-owned, but some third party.
- CUTOFF Disposal, wastewater treatment plant residuals, to uns. Incinerator: 4.173 kg
  Typically on-site with energy recovery. (uns. = unspecified)
- CUTOFF Electricity, at grid, BC: 108.15 kWh
- CUTOFF Talc, at plant: 7.0307 kg
  ei: Malusil, at plant
- CUTOFF Disposal, wastewater treatment plant residuals, to uns. land application: 0.45359 kg
  Typically off-site agricultural/silvicultural. (uns. = unspecified)
- Natural gas, combusted in industrial boiler: 1.1148 m3
  Purchased steam, assumed to be natural gas.
- CUTOFF Starch, at plant: 8.2554 kg
  ei: Maize starch, at plant and/or Potato starch, at plant
- CUTOFF Disposal, wastewater treatment plant residuals, to uns. beneficial use: 0.090718 kg
  Typically off-site. (uns. = unspecified)
- CUTOFF Softwood with bark, avg.intst. harvest, at mill, US SE, in self-gen. hogged fuel: 0.17 m3
  Mass of incoming southern softwood logs intended for pulping that ends up as hogged fuel. All combusted onsite. Combustion of this fuel is important to the economic viability of all modern pulp mills. Substitution of other fuels for this fuel is not recommended. Assumed density: 450 kg/m3. US LCI: "Softwood logs with bark, harvested at average intensity site, at mill, US SE/US" can be used but transportation needs to be removed as it is already included here. "Self-generated hogged fuel, combusted in industrial boiler, at pulp and paper mill".
- CUTOFF Old corrugated containers: 209.56 kg
- CUTOFF Disposal, solid waste, unspecified, to unspecified landfill: 20.775 kg
  Typically company-owned, but some third party.
- CUTOFF Sizer, at plant: 0.55338 kg
  ei: AKD sizer, in paper production, at plant
- CUTOFF Disposal, solid waste, unspecified, to unspecified beneficial use: 2.268 kg
  Typically off-site.
- Polypropylene resin, at plant: 0.53524 kg
  Packaging material
- Transport, train, diesel powered: 3.7375 t*km
  Transport of packaging. Containerboard: 1410 km. Core board: 1276 km. Polypropylene and Polyethylene: 1806 km. Steel: 1083 km.
- Transport, train, diesel powered: 229.22 t*km
  Transportation of pulpwood and chips to pulp mill. Pulpwood: 375 km, chips: 127 km. Recycled fiber: 1794 km.
- Transport, combination truck, average fuel mix: 0.92416 t*km
  Transport of packaging. Containerboard: 201 km. Core board: 369 km. Polypropylene and Polyethylene: 417 km. Steel: 257 km.
- Polyethylene, low density, resin, at plant: 0.045813 kg
  Packaging material
- Electricity, at grid, Eastern US, 2000: 172.2 kWh
  Net purchased, National average grid, Medium voltage: <50 kV
- CUTOFF Core board, at plant: 1.7599 kg
  Packaging material
- CUTOFF Softwood with bark, avg. intst. harvest, at mill, US SE, in pulp: 0.621 m3
  Mass of incoming southern softwood logs intended for pulping that actually ends up in pulp. Assumed density: 450 kg/m3. US LCI: "Softwood logs with bark, harvested at average intensity site, at mill, US SE/US" can be used but transportation needs to be removed as it is already included here.
- CUTOFF Old news paper: 7.1668 kg
- Transport, combination truck, average fuel mix: 575.23 t*km
  Transportation of pulpwood and chips to pulp mill. Pulpwood: 200 km (rounded trip distance), chips: 254 km (rounded trip distance). Recycled fiber: 256 km.
- CUTOFF Disposal, wastewater treatment plant residuals, to uns. landfill: 10.07 kg
  Typically company-owned, but some third party. (uns. = unspecified)
- CUTOFF Pulp chips, at sawmill, US SE/kg, in black liquor: 335.45 kg
  Mass of incoming pulp chips intended for pulping that ends up as black liquor solids. Combusted onsite as part of the pulping chemical recovery process that is integral to and is essential to the economic viability of all modern pulp mills. Substitution of other fuels for this fuel is not recommended. US LCI dataset used as a proxy for a mix of chips (northern softwood chips: 66%, northern hardwood chips: 18%, southern softwood chips: 11% and southern hardwood chips: 6%).
- Fuels, burned at unbleached kraft bag sack paper, average production, at mill: 11045 MJ
  Includes all fuels burned on site
- CUTOFF Pulp chips, at sawmill, US SE/kg, in pulp: 315.9 kg
  Mass of incoming pulp chips intended for pulping that actually ends up in pulp. US LCI dataset used as a proxy for a mix of chips (northern softwood chips: 66%, northern hardwood chips: 18%, southern softwood chips: 11% and southern hardwood chips: 6%).
- Electricity, at grid, Western US, 2000: 148.05 kWh
  Net purchased, National average grid, Medium voltage: <50 kV
- Natural soda ash (Sodium carbonate), at plant: 0.13608 kg
  ei: Sodium carbonate from ammonium chloride production, at plant
- Transport, barge, average fuel mix: 2.9053 t*km
  Transportation of chemicals. Lime: 489 km. Sodium hydroxide: 776 km. Transports of fuels. Coal: 515 km. Residual fuel oil, Distillate fuel oil: 163 km. Kerosene and gasoline, Other fossil assumed to be diesel : 163 km.
- Hot rolled sheet, steel, at plant: 0.094347 kg
  Packaging material
- CUTOFF Disposal, unspecified ashes, to unspecified beneficial use: 1.1793 kg
  Mix of wood and coal ashes. Based on typical ash contents can be assumed to be 78% from wood and 22% from coal. Typically off-site.
- CUTOFF Aluminium, at plant: 6.9853 kg
  ei: Aluminium sulphate, powder, at plant
- Transport, train, diesel powered: 38.981 t*km
  Transportation of chemicals. Lime: 1088 km. Sizers, Retention aid and Dry strengths: 2438 km. Starch: 1788 km. Talc: 1204 km. Sodium hydroxide: 927 km. Transports of fuels. Coal: 653 km. Residual fuel oil, Distillate fuel oil: 1114 km. Liquefied petroleum gas: 1246 km.
- CUTOFF Retention aid, at plant: 0.48081 kg
  ei: Retention aids, in paper production, at plant
- CUTOFF Electricity, at grid, MB: 99.75 kWh
- Transport, combination truck, average fuel mix: 36.791 t*km
  Transportation of chemicals. Talc, Sodium sulfate, Alum, and Sodium carbonate: 295 km. Lime: 183 km. Sizers, Retention aid and Dry strengths: 272 km. Starch: 510 km. Sodium hydroxide: 230 km. Transports of fuels. Coal: 153 km. Residual fuel oil, Distillate fuel oil: 50 km. Liquefied petroleum gas, Kerosene and gasoline, Other fossil assumed to be diesel: 80 km.
- Transport, ocean freighter, average fuel mix: 8.643 t*km
  Transportation of chemicals. Lime: 517 km. Sodium hydroxide: 24 km. Transports of fuels. Residual fuel oil , Distillate fuel oil: 682 km. Kerosene and gasoline, Other fossil assumed to be diesel: 1183 km.
- Quicklime, at plant: 10.841 kg
- CUTOFF Sizer, at plant: 3.3112 kg
  ei: Rosin size, in paper production, at plant
- CUTOFF Softwood with bark, avg. intst. harvest, at mill, US SE, in black liquor: 0.66 m3
  Mass of incoming southern softwood logs intended for pulping that ends up as black liquor solids. Combusted onsite as part of the pulping chemical recovery process that is integral to and is essential to the economic viability of all modern pulp mills. Substitution of other fuels for this fuel is not recommended. Assumed density: 450 kg/m3. US LCI: "Softwood logs with bark, harvested at average intensity site, at mill, US SE/US" can be used but transportation needs to be removed as it is already included here.

## Inputs from nature
- Process water: 49518 kg
  Estimated based on individual mill process effluent and cooling water flows and process characteristics. Share between process and cooling estimated.
- Cooling water, non-contact: 12563 kg
  Estimated based on individual mill process effluent and cooling water flows and process characteristics. Share between process and cooling estimated. Includes evaporation and other losses (e.g., water in solid waste).

## Emissions to nature
- Copper: 0.00342 kg
  From onsite management of solid waste. All metals reported as elemental althought in most cases they are releases into metal compounds.
- Chromium: 0.00329 kg
  (same comment as for Copper)
- PAH, polycyclic aromatic hydrocarbons: 7.3095e-6 kg
  In effluent.
- Manganese: 0.0709 kg
  (same comment as for Copper)
- Phosphorus, total: 0.021964 kg
  In effluent.
- Acetaldehyde: 0.048191 kg
  In effluent.
- Zinc: 0.0227 kg
  (same comment as for Copper)
- Copper: 0.00015914 kg
  In effluent.
- Nickel: 0.000972 kg
  (same comment as for Copper)
- Ethylene glycol: 0.00041445 kg
  In effluent.
- Methanol: 0.59749 kg
  From process
- Suspended solids, unspecified: 1.8874 kg
  In effluent.
- Ammonia: 7.12e-6 kg
  (same comment as for Copper)
- Vanadium: 0.00101 kg
  (same comment as for Copper)
- PAH, polycyclic aromatic hydrocarbons: 1.79e-5 kg
  (same comment as for Copper)
- Arsenic: 0.000906 kg
  (same comment as for Copper)
- Process effluent: 49967 kg
  (same comment as for Cooling water, non-contact)
- Ammonia_toxic: 0.038163 kg
  In effluent.
- Manganese: 0.016995 kg
  In effluent.
- Cooling water, non-contact: 12563 kg
  (same comment as for Process water)
- Vanadium: 0.00027504 kg
  In effluent.
- Lead: 0.00885 kg
  (same comment as for Copper)
- Chromium: 0.00014773 kg
  In effluent.
- Nickel: 0.0001141 kg
  In effluent.
- Formaldehyde: 1.01e-5 kg
  (same comment as for Copper)
- Formaldehyde: 0.00052771 kg
  In effluent.
- Methanol: 0.0078039 kg
  In effluent.
- Lead: 0.00023901 kg
  In effluent.
- Barium: 0.0222 kg
  (same comment as for Copper)
- BOD5, Biological Oxygen Demand: 0.9831 kg
  In effluent.
- Water, evaporated: 1047 kg
  (same comment as for Cooling water, non-contact)
- Methanol: 0.0024 kg
  (same comment as for Copper)
- Acetaldehyde: 6.98e-5 kg
  (same comment as for Copper)
- Ammonia: 0.19427 kg
  From process
- Zinc: 0.0016815 kg
  In effluent.
- Phenol: 1.43e-5 kg
  (same comment as for Copper)
- Mercury: 1.0449e-7 kg
  In effluent.
- Acetaldehyde: 0.0482 kg
  From process
- Arsenic: 0.00012491 kg
  In effluent.
- Nitrogen, total: 0.2127 kg
  In effluent.
- Phenol: 1.5436e-5 kg
  In effluent.
- Mercury: 4.96e-6 kg
  (same comment as for Copper)
- Barium: 0.0024201 kg
  In effluent.

## Sampling procedure
The survey included results from 9 paper mills representing 1.17 million short tons per year (TPY), nearly 89% of 2006/2007 North American production volume.

## Sources
- AF&PA
