# Propylene oxide, at plant

Dataset: openLCA process, unit process
Category: All Other Basic Organic Chemical Manufacturing
Geography: RNA
Time period: 1993-01-01 to 2000-01-01
Generated by: Franklin Associates
Published in: THE PLASTICS DIVISION OF THE AMERICAN C
restrictionsDescription: All information can be accessed by everybody.
copyright: false

## General comment
The environmental emissions and raw materials for this module are a weighted average of the three technologies. The chlorohydrin process generates 42.1 percent of the propylene oxide, the isobutene hydroperoxidation (including MTBE hydroperoxidation) 34.6 percent, and the ethylbenzene hydroperoxidation 23.3 percent. In the two hydroperoxidation datasets, coproduct credit was given on a mass basis. This data module is a weighted average of the inventory for several technologies. An excess amount of brine water is produced during one of the technologies but is not presented as an output to nature; these output amounts would likely explain the upset in the mass balance shown for this hybrid inventory. Complete inventory data and metadata are available in full in the final report and appendices, Cradle-to-Gate Life Cycle Inventory of Nine Plastic Resins and Four Polyurethane Precursors. This report has been extensively reviewed within Franklin Associates and has undergone partial critical review by ACC Plastics Division members and is available at: www.americanchemistry.com. Quantities may vary slightly between the reference to main source and and this module due to rounding. Important note: although most of the data in the US LCI database has undergone some sort of review, the database as a whole has not yet undergone a formal validation process. Please email comments to lci@nrel.gov.

## Technology
Chlorohydrin process, isobutene hydroperoxidation (including MTBE hydroperoxidation) process, and ethylbenzene process hydroperoxidation

## Geography
North America (US and Canada)

## Reference product
- Propylene oxide, at plant: 1 kg
  This data module is a weighted average of the inventory for several technologies. An excess amount of brine water is produced during one of the technologies but is not presented as an output to nature; these output amounts would likely explain the upset in the mass balance shown for this hybrid inventory.

## Inputs from technosphere
- Transport, train, diesel powered: 0.0874106 t*km
- Electricity, at grid, US, 2008: 0.283135 kWh
- Chlorine, production mix, at plant: 0.572981 kg
- Oxygen, liquid, at plant: 0.09861 kg
- Transport, barge, diesel powered: 0.000863377 t*km
- Transport, combination truck, diesel powered: 0.273776 t*km
- Residual fuel oil, combusted in industrial boiler: 0.130917 l
- Sodium hydroxide, production mix, at plant: 0.689283 kg
- Transport, barge, residual fuel oil powered: 0.00287073 t*km
- Transport, pipeline, unspecified petroleum products: 0.389031 t*km
- Transport, pipeline, natural gas: 0.000158663 t*km
- Propylene, at plant: 0.772583 kg
- CUTOFF Disposal, solid waste, unspecified, to sanitary landfill: 0.00019968 kg
- Sodium chloride, at plant: 0.928305 kg
- Natural gas, combusted in industrial boiler: 0.145305 m3

## Emissions to nature
- Benzene, ethyl-: 0.0009553 kg
- NMVOC, non-methane volatile organic compounds, unspecified: 0.00582945 kg
- Hydrocarbons, unspecified: 0.00092268 kg
- Acid gases, unspecified: 4.427e-5 kg
- Carbon dioxide, fossil: 0.012751 kg
- Phenol compounds, unspecified: 0.00133276 kg
- Chlorine: 1.263e-6 kg
- Ammonia: 4.893e-5 kg
- Acidity, unspecified: 0.00994677 kg
- Propylene oxide: 0.00047209 kg
- Sodium hydroxide: 0.00142363 kg

## Sampling procedure
Data are from primary sources.

## Sources
- THE PLASTICS DIVISION OF THE AMERICAN C
