# Polybutadiene, at plant

Dataset: openLCA process, unit process
Category: Petrochemical Manufacturing
Geography: RNA
Time period: 1970-01-01 to 2003-01-01
Generated by: Franklin Associates
Published in: THE PLASTICS DIVISION OF THE AMERICAN C
restrictionsDescription: All information can be accessed by everybody.
copyright: false

## General comment
Complete inventory data and metadata are available in full in the final report and appendices, Cradle-to-Gate Life Cycle Inventory of Nine Plastic Resins and Four Polyurethane Precursors. This report has been extensively reviewed within Franklin Associates and has undergone partial critical review by ACC Plastics Division members and is available at: www.americanchemistry.com. Quantities may vary slightly between the reference to main source and and this module due to rounding. Important note: although most of the data in the US LCI database has undergone some sort of review, the database as a whole has not yet undergone a formal validation process. Please email comments to lci@nrel.gov.

## Technology
Polymerization of a butadiene solution using Ziegler-Natta catalysts

## Geography
US

## Reference product
- Polybutadiene, at plant: 1 kg

## Inputs from technosphere
- Natural gas, combusted in industrial boiler: 0.145455 m3
- Transport, pipeline, unspecified petroleum products: 0.146982 t*km
- Transport, combination truck, diesel powered: 0.310296 t*km
- Butadiene, at plant: 1.015 kg
- Transport, train, diesel powered: 0.310296 t*km
- CUTOFF Disposal, solid waste, unspecified, to sanitary landfill: 0.0001 kg

## Emissions to nature
- Suspended solids, unspecified: 0.00125 kg
- Oil and grease, unspecified: 7e-5 kg
- NMVOC, non-methane volatile organic compounds, unspecified: 0.013 kg
- COD, Chemical Oxygen Demand: 0.00083 kg

## Sampling procedure
Data are from both primary and secondary sources.

## Sources
- THE PLASTICS DIVISION OF THE AMERICAN C
