# Deposit containers, at collection, CRV

Dataset: openLCA process, unit process
Category: Collection of postconsumer containers
Geography: RNA
Time period: 2007-01-01 to 2008-01-01
Generated by: Franklin Associates
restrictionsDescription: All information can be accessed by everybody.
copyright: false

## General comment
Important note: although most of the data in the US LCI database has
undergone some sort of review, the database as a whole has not yet
undergone a formal validation process.
Please email comments to lci@nrel.gov.

## Technology
Typical

## Geography
United States

## Reference product
- Deposit containers, at collection, CRV: 1 kg
  Applies to one kg of any type of deposit container collected via the CRV system

## Inputs from technosphere
- Transport, combination truck, diesel powered: 1.16 t*km
  Fuel use per kg of material collected via California refund value (CRV) system
- Electricity, at grid, US, 2000: 0.0132 kWh
  For baling at intermediate processing center prior to shipment to reclaimer
- CUTOFF Mixed deposit containers, at source: 1 kg
  Includes weight of co-collected wastes later removed at reclaimer.

## Sources
- THE PLASTICS DIVISION OF THE AMERICAN CH
