# Vacuum infusion, rigid composites part, at plant

Dataset: openLCA process, unit process
Category: Plastics Product Manufacturing
Geography: US
Time period: 2011-01-01 to 2012-01-01
Generated by: Franklin Associates
Published in: American Composites Manufacturers Assn.
restrictionsDescription: All information can be accessed by everybody.
copyright: false

## General comment
An average of 0.01 kg of rigid composite part scrap is produced for every kilogram of vacuum infused parts produced; this scrap is sold for recycling. The packaging inputs in this data set represent the average reported per kilogram of output across a range of products produced at manufacturing facilities. Possible differences in the mass balance include ancillary materials (e.g. rags), incoming packaging, and trash from workers that are thrown out but not accounted for as inputs in the LCI. Complete inventory data and metadata are shown in full in the final report, Life Cycle Inventory of Polymer Composites. The report is not publicly available. This report has been extensively reviewed within Franklin Associates by Rebe Feraldi, Anne Marie Molen, and Melissa Huff and has undergone partial critical review by ACMA members. Important note: although most of the data in the US LCI database has undergone some sort of review, the database as a whole has not yet undergone a formal validation process. Please email comments to lci@nrel.gov.

## Technology
Fabrication of rigid composite parts by vacuum infusion.

## Geography
US

## Reference product
- Vacuum infusion, rigid composites part, at plant: 1 kg

## By-products
- Composite scrap, from composites vacuum infusion, at plant: 0.01 kg

## Inputs from technosphere
All rows: lognormal geomSd 1
- Electricity, at Grid, US, 2010: 0.284 kWh
- Liquefied petroleum gas, combusted in industrial boiler: 0.0035 l
- CUTOFF Expanded polystyrene foam, at plant: 0.23 kg
- CUTOFF Disposal, solid waste, unspecified, to municipal incineration: 0.001 kg
- Transport, combination truck, diesel powered: 1.065 t*km
- Limestone, at mine: 0.0028 kg
- Ethylbenzene styrene, at plant: 0.0027 kg
- Natural gas, combusted in industrial boiler: 0.036 m3
- CUTOFF Balsa wood, at plant: 0.23 kg
- CUTOFF Filler, synthetic, at plant: 0.0029 kg
- CUTOFF Disposal, solid waste, unspecified, to waste-to-energy: 0.0027 kg
- CUTOFF Gelcoat, UPR & styrene-based, at plant: 0.041 kg
- CUTOFF Disposal, solid waste, unspecified, to sanitary landfill: 0.013 kg
- Polyethylene terephthalate, resin, at plant: 0.016 kg
- E-glass, at plant: 0.007 kg
- Unsaturated polyester, resin, at plant: 0.21 kg
- CUTOFF Continuous strand mat, glass fiber based, at plant: 0.25 kg

## Emissions to nature
- Styrene: 0.0054 kg; lognormal geomSd 1
- Particulates, < 10 um: 2.6e-5 kg; lognormal geomSd 1
- VOC, volatile organic compounds: 0.0027 kg; lognormal geomSd 1

## Sampling procedure
Data are from primary sources. The composites fabricators who provided data for this module verified that the characteristics of their plants are representative of North American composites fabrication facilities producing vacuum infused composite parts. The representativeness of the composites fabrication processes are unknown, but estimated to be less than 10% of the US production volume.

## Sources
- American Composites Manufacturers Assn.
