# Electricity, anthracite coal, at power plant

Dataset: openLCA process, unit process
Category: Fossil Fuel Electric Power Generation
Geography: RNA
Generated by: Jeff Hernbloom
Published in: Franklin Associates
restrictionsDescription: All information can be accessed by everybody.
copyright: false

## General comment
Important note: although most of the data in the US LCI database has
undergone some sort of review, the database as a whole has not yet
undergone a formal validation process.
Please email comments to lci@nrel.gov.

## Geography
North America

## Reference product
- Electricity, anthracite coal, at power plant: 1 kWh

## Inputs from technosphere
- CUTOFF Disposal, anthracite coal combustion byproducts, to unspecified reuse: 0.0041479 kg
- Anthracite coal, at mine: 0.35609 kg
  Fuel consumption: 0.356 kg/kWh (0.785lbs/KWh)
- CUTOFF Disposal, solid waste, unspecified, to unspecified treatment: 0.013446 kg
- Transport, combination truck, average fuel mix: 0.091692 t*km
  Represents transportation from anthracite production/processing to utility boilers.

## Emissions to nature
- Carbon monoxide, fossil: 0.00010683 kg
- Sulfur dioxide: 0.012222 kg
- Radioactive species, unspecified: 10.07 kBq
- Phenanthrene: 1.2107e-6 kg
  Sources for PAH data are old or unverifiable. Use this PAH data with caution.
- Biphenyl: 4.4512e-6 kg
  Sources for PAH data are old or unverifiable. Use this PAH data with caution.
- Particulates, unspecified: 9.2584e-6 kg
- Nickel: 4.6292e-6 kg
- Cadmium: 1.2641e-8 kg
- Suspended solids, unspecified: 1.7074e-6 kg
- Oils, unspecified: 8.5369e-7 kg
- Dinitrogen monoxide: 6.3436e-6 kg
- Chromium: 4.9853e-6 kg
- NMVOC, non-methane volatile organic compounds, unspecified origin: 5.3414e-5 kg
- Carbon dioxide, fossil: 1.011 kg
- Beryllium: 5.5194e-8 kg
- Methane, fossil: 7.1219e-6 kg
- Manganese: 6.4097e-7 kg
- Nitrogen oxides: 0.0016016 kg
- Mercury: 2.3146e-8 kg
- Naphthalene: 2.3146e-5 kg
  Sources for PAH data are old or unverifiable. Use this PAH data with caution.
- Arsenic: 3.3829e-8 kg
- Selenium: 2.3146e-7 kg
- Sulfur oxides: 0.020888 kg
- Lead: 1.5846e-6 kg

## Sources
- U.S. EPA
- Franklin Associates
- U.S. EPA
- Energy Information Administration
- U.S. Energy Information Administration
- U.S. EPA
- unspecified
- Energy Information Administration
- Energy Information Administration
