# Harvesting, fresh fruit bunch, at farm, 2003

Dataset: openLCA process, unit process
Geography: RNA
Time period: 2003-01-01 to 2003-01-01
Generated by: Franklin Associates
Published in: THE PLASTICS DIVISION OF THE AMERICAN CH
restrictionsDescription: All information can be accessed by everybody.
copyright: false

## General comment
Important note: although most of the data in the US LCI database has undergone some sort of review, the database as a whole has not yet undergone a formal validation process. Please email comments to lci@nrel.gov.

## Technology
Harvesting of palm trees in Malaysia

## Geography
North America (US and Canada)

## Reference product
- Harvesting, fresh fruit bunch, at farm: 1 kg

## Inputs from technosphere
- CUTOFF Disposal, solid waste, unspecified, to unspecified landfill: 1.2e-5 kg
- Diesel, combusted in industrial equipment: 0.016357 l

## Inputs from nature
- Fresh fruit bunches: 1 kg

## Emissions to nature
- NMVOC, non-methane volatile organic compounds, unspecified origin: 1e-6 kg
- Carbon monoxide: 2.3e-6 kg
- Particulates, unspecified: 6.6e-5 kg
- Nitrogen oxides: 5.5e-6 kg
- Sulfur oxides: 2.3e-6 kg
- Carbon dioxide: 0.00856 kg

## Sources
- THE PLASTICS DIVISION OF THE AMERICAN CH
