# Roundwood, softwd, avg, state or private moist cold forest, at forest rd, INW

Dataset: openLCA process, unit process
Category: Logging
Geography: RNA
Time period: 1989-01-01 to 1996-01-01
Generated by: Maureen Puetmann
Published in: Leonard R. Johnson
restrictionsDescription: All information can be accessed by everybody.
copyright: false

## General comment
1. FIA inventory were from 1989 to 1996 depending on jurisdiction 2. Important note: although most of the data in the US LCI database has undergone some sort of review, the database as a whole has not yet undergone a formal validation process. Please email comments to lci@nrel.gov.

## Technology
Average technology. Some data extrapolated from similar processes.

## Geography
US Inland West including Montana, Idaho, and eastern Washington

## Reference product
- Roundwood, softwd, avg, state or private moist cold forest, at forest rd, INW: 1 m3

## Inputs from technosphere
- Roundwood, sftwd, state-private moist cold forest, gentle slope, at frst rd, INW: 0.7 m3
- Roundwood, sftwd, state-private moist cold forest, steep slope, at forest rd,INW: 0.3 m3

## Sampling procedure
Analysis of the FIA data about average slopes by forest type and owner

## Sources
- Maureen Puettmann
- Leonard R. Johnson
