# Site preparation, state or private moist cold softwood forest, gentle slope, INW

Dataset: openLCA process, unit process
Category: Logging
Geography: RNA
Time period: 1989-01-01 to 1996-01-01
Generated by: Maureen Puetmann
Published in: Leonard R. Johnson
restrictionsDescription: All information can be accessed by everybody.
copyright: false

## General comment
Important note: although most of the data in the US LCI database has undergone some sort of review, the database as a whole has not yet undergone a formal validation process. Please email comments to lci@nrel.gov.

## Technology
Average technology. Some data extrapolated from similar processes.

## Geography
US Inland West including Montana, Idaho, and eastern Washington

## Reference product
- Site preparation, state or private moist cold softwood forest, gentle slope, INW: 1 ha
  Slash piling in forest after commercial thinning

## Inputs from technosphere
- Piling, whole tree slash, at landing, gentle slope forest, INW: 1 ha
- Piling, whole tree slash, at landing, gentle slope forest, INW: 1 ha
  Slash piling in forest after previous harvest

## Sampling procedure
Region specific data on the level of resource consumption during site preparation is limited. Estimates for these values were developed using a limited set of published data and through direct inquiries of forest nursery managers.

## Sources
- Maureen Puettmann
- Leonard R. Johnson
