# Electricity, at eGrid, SRMV, 2010

Dataset: openLCA process, unit process
Category: Utilities
Geography: RNA
Time period: 2010-01-01 to 2010-01-01
Generated by: Samantha Wascavage
Published in: Chris Goemans, Athena Institute
restrictionsDescription: All information can be accessed by everybody.
copyright: false

## General comment
The methodology used to put together the grid information is outlined in reference 1.

## Technology
Typical

## Geography
SRMV Mississippi Valley electricity grid to include eastern Arkansas (less SPSO), western Mississippi (less SRTV and SRSO), most of Louisiana (less SPSO) and a small portion of Texas.

## Reference product
- Electricity, at eGrid, SRMV, 2010: 1 kWh

## Inputs from technosphere
- CUTOFF Electricity, biomass, gas, landfill, at power plant: 0.000302 kWh
  Gaseous Renewable Fuels (Biomass) LFG, OBG - landfill gas
- Electricity, diesel, at power plant: 0.000669 kWh
  Petroleum (DFO, JF, KER) – Distillate Fuel Oil (includes all Diesel and No. 1, No. 2, and No. 4 Fuel Oils)
- Electricity, nuclear, at power plant: 0.20815 kWh
  Nuclear Fission NUC – Nuclear (Uranium, Plutonium, Thorium)
- Electricity, residual fuel oil, at power plant: 0.000931 kWh
  Petroleum (RFO) – Residual Fuel Oil (includes No. 5 and No. 6 Fuel Oils and Bunker C Fuel Oil)
- CUTOFF Electricity, other gases, unspecified, at power plant: 0.011395 kWh
  Other Gases OG, BFG, PG – Other Gas (Butane, Coal Processes, Coke-Oven, Refinery, and other processes)
- CUTOFF Electricity, biomass,liquid, unspecified, at power plant: 0.017134 kWh
  Liquid Renewable Fuels (Biomass) BLQ, OBL, SLW, WDL - black liquor
- CUTOFF Electricity, petroleum coke, at power plant: 0.009156 kWh
  Petroleum (Other Fossil) PC, SG, WO - petroleum coke
- CUTOFF Electricity, hydropower, at power plant, unspecified: 0.027951 kWh
  Hydroelectric WAT – Water (Conventional, Pumped Storage)
- CUTOFF Electricity, other fuels, unspecified, at power plant: 0.002984 kWh
  Other Fuels OTH, MSN, PUR, WH – Other (Batteries, Chemicals, Coke Breeze, Hydrogen, Pitch, Sulfur, Tar Coal, and miscellaneous technologies)
- Electricity, bituminous coal, at power plant: 0.000937 kWh
  Bituminous Coal BIT, SC, SGC, WC - Anthracite Coal, and Bituminous Coal.
- Electricity, natural gas, at power plant: 0.50131 kWh
  Natural Gas
- Electricity, bituminous coal, at power plant: 0.211638 kWh
  Subbituminous Coal
- CUTOFF Electricity, biomass, solid, agriculture by-products, at power plant: 0.007443 kWh
  Solid Renewable Fuels (Biomass) AB, MSB, MSW, OBS, TDF, WDS – Agriculture Crop By-products / Straw / Energy Crops

## Sampling procedure
based on EIA electricity reports for all power plants in the US.

## Sources
- Chris Goemans, Athena Institute
- Statistics Canada
- unspecified
- USEPA
- Statistics Canada
- Statistics Canada
- Statistics Canada
- Statistics Canada
- USEPA
- EIA
- EIA
- EIA
- EIA
- EIA
- EIA
- EIA
- EIA
- EIA
- US DOE
- International Energy Agency
- EIA
