# Iron, sand casted

Dataset: openLCA process, unit process
Category: Steel Foundries (except investment)
Geography: RNA
Time period: 2004-01-01 to 2004-01-01
Generated by: James Littlefield, Franklin Associates
Published in: Franklin Associates
restrictionsDescription: All information can be accessed by everybody.
copyright: false

## General comment
No co-product allocation for scrap materials that are recycled or reused; all environmental flows for scrap are included in the environmental flows for the product.
Important note: although most of the data in the US LCI database has
undergone some sort of review, the database as a whole has not yet
undergone a formal validation process.
Please email comments to lci@nrel.gov.

## Geography
USA

## Reference product
- Iron, sand casted: 1 kg
  Represents average of 2 plants

## Inputs from technosphere
- CUTOFF Oil and grease, at plant: 0.00201 kg
  Represents average of 2 plants
- CUTOFF Recycling, rubber: 0.0368 kg
  Represents average of 2 plants
- CUTOFF Recycling, cardboard: 0.00014 kg
  Represents average of 2 plants
- CUTOFF Recycling, construction debris, unspecified: 2e-5 kg
  Represents 1 plant
- CUTOFF Recycling, refractory material: 0.00298 kg
  Represents 1 plant
- Gasoline, combusted in equipment: 0.000297 l
  Represents average of 2 plants
- CUTOFF Recycling, fluorescent tubes and other mercury-containing wastes: 1.9e-5 kg
  Represents average of 2 plants
- CUTOFF Disposal, grinding residue, to sanitary landfill: 0.0557 kg
  Represents 1 plant
- CUTOFF Disposal, refractory material, to sanitary landfill: 0.00015 kg
  Represents 1 plant
- CUTOFF Shot blast, unspecified: 0.0109 kg
  Represents average of 2 plants
- CUTOFF Disposal, sludge, to sanitary landfill: 0.197 kg
  Represents average of 2 plants
- CUTOFF Disposal, petroleum based wastes, unspecified, to sanitary landfill: 0.00207 kg
  Represents average of 2 plants
- CUTOFF Disposal, sand, to sanitary landfill: 1.28 kg
  Represents 1 plant
- CUTOFF Carbon dioxide, liquid, at plant: 0.00082 kg
  Represents average of 2 plants
- CUTOFF Recycling, biohazard waste, unspecified: 2.4e-6 kg
  Represents 1 plant
- Electricity, at grid, US, 2000: 1.2 kWh
  Represents average of 2 plants
- CUTOFF Disposal, acid pickling waste, to sanitary landfill: 0.00088 kg
  Represents 1 plant
- CUTOFF Disposal, corrosive and toxic liquids, unspecified, to sanitary landfill: 5.3e-5 kg
  Represents average of 2 plants
- CUTOFF Recycling, batteries: 0.00023 kg
  Represents average of 2 plants
- CUTOFF Metallurgical coke, combusted in industrial boiler: 0.00022 kg
  Represents average of 2 plants
- CUTOFF Disposal, empty pails and drums, to sanitary landfill: 1.2e-5 kg
  Represents average of 2 plants
- CUTOFF Recycling, petroleum based wastes, unspecified: 0.00045 kg
  Represents average of 2 plants
- CUTOFF Core additives and catalyst for iron casting: 0.00141 kg
  Represents average of 2 plants
- CUTOFF TEA gas scrubber, at plant: 0.00085 kg
  Represents average of 2 plants
- CUTOFF Recycling, baghouse dust, unspecified: 0.03 kg
  Represents average of 2 plants
- CUTOFF Clay, at mine: 0.0204 kg
  Represents average of 2 plants
- CUTOFF TEA gas, at plant: 0.0025 kg
  Represents average of 2 plants
- Oxygen, liquid, at plant: 0.164 kg
  Represents average of 2 plants
- CUTOFF Recycling, municipal solid wastes, unspecified: 0.00443 kg
  Represents average of 2 plants
- CUTOFF Release agent, unspecified, at plant: 0.00052 kg
  Represents average of 2 plants
- CUTOFF Core wash and paste for aluminum casting: 0.00988 kg
  Represents average of 2 plants
- Bituminous coal, combusted in industrial boiler: 0.0796 kg
  Represents 1 plant
- CUTOFF Disposal, baghouse dust, to sanitary landfill: 1.4e-5 kg
  Represents 1 plant
- CUTOFF Disposal, municipal solid wastes, to sanitary landfill: 0.00437 kg
  Represents average of 2 plants
- CUTOFF Disposal, contaminated carbon, to sanitary landfill: 8.5e-5 kg
  Represents 1 plant. Represents packaging wastes.
- CUTOFF Curing agent, at plant: 0.0183 kg
  Represents average of 2 plants
- CUTOFF Alloying metals and additives, at plant: 0.0666 kg
  Represents average of 2 plants
- CUTOFF Chemicals, unspecified, used for wastewater treatment: 0.0011 kg
  Represents average of 2 plants
- CUTOFF Refractory material, unspecified, at plant: 0.0252 kg
  Represents average of 2 plants
- Sodium hydroxide, production mix, at plant: 0.00297 kg
  Represents average of 2 plants
- CUTOFF Ceramic filters, at plant: 0.0003 kg
  Represents average of 2 plants
- CUTOFF Recycling, wood waste, unspecified: 0.0006 kg
  Represents average of 2 plants
- CUTOFF Disposal, resins, unspecified, to sanitary landfill: 0.00016 kg
  Represents 1 plant
- Diesel, combusted in industrial boiler: 0.000968 l
  Represents average of 2 plants. Initially expressed as kg. Converted to L using the following conversion factor: 0.8675kg/L
- Natural gas, combusted in industrial boiler: 0.000199 m3
  Represents average of 2 plants
- CUTOFF Disposal, lead containing waste, to sanitary landfill: 1e-5 kg
  Represents 1 plant
- CUTOFF Disposal, biohazard waste, to sanitary landfill: 7.2e-7 kg
  Represents 1 plant
- CUTOFF Nitrogen, at plant: 0.0156 kg
  Represents average of 2 plants
- CUTOFF Adhesives and binders, at plant: 0.00105 kg
  Represents average of 2 plants
- Iron and steel, production mix: 1.04 kg
  Represents average of 2 plants
- CUTOFF Disposal, rubber, to sanitary landfill: 7.6e-5 kg
  Represents 1 plant

## Inputs from nature
- Coal, bituminous, 24.8 MJ per kg: 0.0146 kg
  Represents average of 2 plants
- Sand, unspecified: 1.13 kg
  Represents average of 2 plants
- Limestone: 0.0767 kg
  Represents average of 2 plants

## Emissions to nature
- Ethane, 1,1,1-trichloro-, HCFC-140: 0.00013 kg
  Represents 1 plant
- Triethyl amine: 0.00029 kg
  Represents average of 2 plants
- Phenol: 5.6e-7 kg
  Represents 1 plant
- Diisocyanates: 8.6e-5 kg
  Represents 1 plant
- Toluene: 0.00013, 0.0001 kg (2 entries, compartments not in this file)
  Represents 1 plant
- Isocyanic acid: 0.0004 kg
  Represents 1 plant
- Phenylisocyanate: 0.00046 kg
  Represents 1 plant
- Nickel: 5e-5 kg
  Represents 1 plant
- Creosol: 0.00013 kg
  Represents 1 plant
- 2-Propanol: 0.00016 kg
  Represents 1 plant
- Carbon disulfide: 0.00013 kg
  Represents 1 plant
- Phosphoric acid: 2e-5 kg
  Represents average of 2 plants
- Benzene, chloro-: 0.00013 kg
  Represents 1 plant
- Nitrobenzene: 0.00013 kg
  Represents 1 plant
- Oils, unspecified: 1.2e-5 kg
  Represents 1 plant
- Manganese compounds, unspecified: 0.0065 kg
  Represents average of 2 plants
- Xylene: 7.8e-5 kg
  Represents 1 plant
- Chromium compounds: 0.00112 kg
  Represents average of 2 plants
- Phenol: 0.00024 kg
  Represents average of 2 plants
- Methanol: 0.00035 kg
  Represents 1 plant
- Sulfuric acid: 0.00042 kg
  Represents 1 plant
- Methyl ethyl ketone: 0.00126 kg
  Represents 1 plant
- Naphthalene: 0.00013 kg
  Represents 1 plant
- Nickel compounds, unspecified: 2.2e-5 kg
  Represents 1 plant
- Formaldehyde: 0.00013 kg
  Represents average of 2 plants
- Cadmium, ion: 1e-5 kg
  Represents 1 plant. Represents a permitted effluent limit, not a measurement.
- Copper compounds: 0.00057 kg
  Represents average of 2 plants
- 1-Methyl-2-pyrrolidinone: 0.00011 kg
  Represents 1 plant
- Isobutanol: 0.00013 kg
  Represents 1 plant
- Zinc compounds: 0.00099 kg
  Represents average of 2 plants
- Cyanide: 5e-5 kg
  Represents 1 plant
- Chromium VI: 5e-5 kg
  Represents 1 plant
- Cresol: 0.00013 kg
  Represents 1 plant
- Copper, ion: 9e-9 kg
  Represents 1 plant
- Cyanide, amenable: 1e-5 kg
  Represents 1 plant
- Mercury compounds, unspecified: 6.3e-9 kg
  Represents 1 plant
- Aluminum: 5e-6 kg
  Represents 1 plant
- Ethylene glycol: 8.9e-5 kg
  Represents average of 2 plants
- Methane, tetrachloro-, CFC-10: 5e-6 kg
  Represents 1 plant
- Zinc: 2.3e-7 kg
  Represents 1 plant
- Benzene: 0.00011 kg
  Represents 1 plant
- Adipate, bis(2-ethylhexyl)-: 0.00022 kg
  Represents 1 plant
- Chromium, ion: 0.00013 kg
  Represents 1 plant
- Methane, dichloro-, HCC-30: 0.00013 kg
  Represents 1 plant
- Lead compounds: 0.00022 kg
  Represents average of 2 plants
- Spent chlorofluorocarbon solvents, unspecified: 0.00013 kg
  Represents 1 plant
- Benzene, 1,2,4-trimethyl-: 0.00013 kg
  Represents 1 plant
- Lead: 5.6e-9 kg
  Represents 1 plant
- Dioxins, measured as 2,3,7,8-tetrachlorodibenzo-p-dioxin: 1.4e-9 kg
  Represents 1 plant
- Iron: 0.00025 kg
  Represents 1 plant

## Sources
- Franklin Associates
- Vehicle Recycling Partnership (VRP)
