# Transport, pipeline, unspecified petroleum products

Dataset: openLCA process, unit process
Category: Fossil Fuel Electric Power Generation
Geography: RNA
Time period: 2003-01-01 to 2003-01-01
Generated by: Franklin Associates
Published in: THE PLASTICS DIVISION OF THE AMERICAN C
restrictionsDescription: All information can be accessed by everybody.
copyright: false

## General comment
Complete inventory data and metadata are available in full in the final report and appendices, Cradle-to-Gate Life Cycle Inventory of Nine Plastic Resins and Four Polyurethane Precursors. This report has been extensively reviewed within Franklin Associates and has undergone partial critical review by ACC Plastics Division members and is available at: www.americanchemistry.com. Quantities may vary slightly between the reference to main source and and this module due to rounding. Important note: although most of the data in the US LCI database has undergone some sort of review, the database as a whole has not yet undergone a formal validation process. Please email comments to lci@nrel.gov.

## Technology
Precombustion data are based on iterative calculations for energy and material flows for all upstream fuels. Representative of boilers in United States. Emission factors are based on EPA AP42 documentation and other government sources. Emission factors represent emissions that occur after combustion emissions are managed with environmental control equipment.

## Geography
North America (US and Canada)

## Reference product
- Transport, pipeline, unspecified petroleum products: 1 t*km

## Inputs from technosphere
- Electricity, at grid, US, 2008: 0.0149 kWh
  The data for this process are based on publicly available sources (including the GREET transportation model) and represent transportation technologies used in the United States.

## Sampling procedure
Data are from secondary sources.

## Sources
- THE PLASTICS DIVISION OF THE AMERICAN C
