# Ethanol, denatured, corn stover, biochemical

Dataset: openLCA process, unit process
Category: Ethyl alcohol manufacturing
Geography: RNA
Time period: 2009-01-01 to 2009-01-01
Generated by: Daniel Inman
Published in: Hsu, D.
restrictionsDescription: All information can be accessed by everybody.
copyright: false

## Technology
current

## Geography
North America

## Time period
2009

## Reference product
- Ethanol, denatured, corn stover, biochemical: 26100 kg

## Inputs from technosphere
- Corn steep liquor: 1300 kg
- Combustion, wet wood residue, AP-42: 615570 MJ
  HHV is from GREET for corn stover. From http://www1.eere.energy.gov/biomass/docs/energy_analysis.ppt#346,8,Feedstock Potential, 37% of feed energy is in non-ethanol producing reactants.
- CUTOFF Chemicals inorganic, at plant: 1.9 kg
  cooling tower chemicals. assumed all were inorganic.
- Gasoline, at refinery: 464 l
  About a 0.6% impurity content in product stream (water, CO2, alcohols)
- Quicklime, at plant: 2440 kg
  Proxy: Lime, hydrated, packed, at plant/CH with US electricity U
- CUTOFF Disposal, inert waste, 5% water, to inert material landfill: 10500 kg
  gypsum waste. calculated based on regression fit of several aspen sensitivity runs.
- CUTOFF Sulphuric acid, liquid, at plant: 3340 kg
- Corn stover, at conversion plant, 2022: 98 t
- CUTOFF Sulphite, at plant: 0.333 kg
  boiler chemicals assumed to be divided up evenly between HCl, NaOH, and sulphite. http://www.accepta.com/water_treatment_chemicals/boiler-water-treatment.asp
- Electricity, at grid, US, 2008: 19600 kWh
  Proxy: Electricity, medium voltage, at grid/US with US electricity U
- CUTOFF Chemicals organic, at plant: 24.9 kg
  waste water chemicals. assumed 50% organic.
- Phosphorous fertilizer, production mix, at plant: 163 kg
  Proxy: Diammonium phosphate, as N, at regional storehouse/RER with US electricity U
- CUTOFF Ethanol fermentation plant: 2.97e-5 Item(s)
  plant lifetime is 20 years. only need 1 hr. 90000 tons of ethanol is about 31 Mgal/yr in the econinvent process.
- Enzyme, Cellulase, Novozyme Celluclast: 570 kg
  calculated based on regression fit of several aspen sensitivity runs.
- CUTOFF Hydrochloric acid, 30% in H2O, at plant: 0.333 kg
  (same comment as for CUTOFF Sulphite, at plant)
- CUTOFF Energy, output: 70560 MJ
  from electricity
- Sodium hydroxide, production mix, at plant: 0.333 kg
  boiler chemicals assumed to be divided up evenly between HCl, NaOH, and sulphite. http://www.accepta.com/water_treatment_chemicals/boiler-water-treatment.asp. Proxy: Sodium hydroxide, 50% in H2O, production mix, at plant/RER with US electricity U

## Inputs from nature
- Nitrogen, in air: 240000 kg
  calculated based on regression fit of several aspen sensitivity runs.
- Water, process, unspecified natural origin/kg: 6270 kg
  Water brought in with enzyme stream. calculated based on regression fit of several aspen sensitivity runs.
- Oxygen, in air: 71100 kg
  calculated based on regression fit of several aspen sensitivity runs.
- Water, cooling, well, in ground: 197000 kg
  calculated based on regression fit of several aspen sensitivity runs.

## Emissions to nature
- Phosphate: 147 kg
  diammonium phosphate. calculated based on regression fit of several aspen sensitivity runs.
- Lactic acid, methyl ester: 16.4 kg
  lactic acid. calculated based on regression fit of several aspen sensitivity runs.
- Acetic acid: 108 kg
  calculated based on regression fit of several aspen sensitivity runs.
- Nitrogen: 241000 kg
  calculated based on regression fit of several aspen sensitivity runs.
- Sulfuric acid: 1.55 kg
- Carbon monoxide, biogenic: 63.1 kg
  calculated based on regression fit of several aspen sensitivity runs.
- Carbon dioxide, biogenic: 91500 kg
  calculated based on regression fit of several aspen sensitivity runs.
- Oxygen: 18100 kg
  calculated based on regression fit of several aspen sensitivity runs.
- Nitrogen dioxide: 63.1 kg
  calculated based on regression fit of several aspen sensitivity runs.
- Organic substances, unspecified: 1420 kg
  furfural, glyceral, sccacid, csl, xylose, solslds, lgnsol, HMF, arabanose, galactose, glucoolig, cellob, xylolig, extract, protein. calculated based on regression fit of several aspen sensitivity runs.
- Methane, biogenic: 4.08 kg
  calculated based on regression fit of several aspen sensitivity runs.
- Sulfur dioxide: 100 kg
- Water: 235000 kg
  calculated based on regression fit of several aspen sensitivity runs.

## Sources
- Hsu, D.
- Hess, J.
