# Electricity, at eGrid, FRCC, 2010

Dataset: openLCA process, unit process
Category: Utilities
Geography: RNA
Time period: 2010-01-01 to 2010-01-01
Generated by: Samantha Wascavage
Published in: Chris Goemans, Athena Institute
restrictionsDescription: All information can be accessed by everybody.
copyright: false

## General comment
The methodology used to put together the grid information is outlined in reference 1.

## Technology
Typical

## Geography
Florida except for the panhandle (SRSO).

## Reference product
- Electricity, at eGrid, FRCC, 2010: 1 kWh

## Inputs from technosphere
- CUTOFF Electricity, biomass,liquid, unspecified, at power plant: 0.001722 kWh
  Liquid Renewable Fuels (Biomass) BLQ - Black liquor also includes, OBL, SLW, WDL
- CUTOFF Electricity, biomass, solid, biogenic MSW, at power plant: 0.012279 kWh
  Solid Renewable Fuels (Biomass) MSB - Municipal Solid Waste – Biogenic Component also includes AB, MSW, OBS, TDF, WDS
- Electricity, diesel, at power plant: 0.005242 kWh
  Petroleum (DFO) - Distillate Fuel Oil (includes all Diesel and No. 1, No. 2, and No. 4 Fuel Oils also includes JF, KER)
- CUTOFF Electricity, other fuels, unspecified, at power plant: 0.013448 kWh
  Other Fuels OTH - Other (Batteries, Chemicals, Coke Breeze, Hydrogen, Pitch, Sulfur, Tar Coal, and miscellaneous technologies also includes MSN, PUR,WH)
- Electricity, nuclear, at power plant: 0.115597 kWh
  Nuclear Fission
- CUTOFF Electricity, biomass, gas, landfill, at power plant: 0.000897 kWh
  Gaseous Renewable Fuels (Biomass) LFG - Landfill Gas and OBG
- Electricity, bituminous coal, at power plant: 0.248013 kWh
  Bituminous Coal, BIT - Anthracite Coal, and Bituminous Coal also includes SC, SGC, WC
- Electricity, residual fuel oil, at power plant: 0.023162 kWh
  Petroleum (RFO) - Residual Fuel Oil (includes No. 5 and No. 6 Fuel Oils and Bunker C Fuel Oil)
- CUTOFF Electricity, petroleum coke, at power plant: 0.01546 kWh
  Petroleum (Other Fossil) PC - Petroleum Coke SG, WO
- CUTOFF Electricity, hydropower, at power plant, unspecified: 0.000857 kWh
  Hydroelectric
- Electricity, natural gas, at power plant: 0.563323 kWh
  Natural Gas

## Sampling procedure
based on EIA electricity reports for all power plants in the US.

## Sources
- Chris Goemans, Athena Institute
- Statistics Canada
- unspecified
- USEPA
- Statistics Canada
- Statistics Canada
- USEPA
- EIA
- EIA
- EIA
- EIA
- EIA
- EIA
- EIA
- EIA
- US DOE
- International Energy Agency
- Statistics Canada
- Statistics Canada
- EIA
- EIA
