# Metal composite material (MCM) sheet, at plant

Dataset: openLCA process, unit process
Category: Architectural and Structural Metals Manufacturing
Geography: RNA
Time period: 2014-02-01 to 2015-02-28
Generated by: PE INTERNATIONAL
Published in: PE INTERNATIONAL
restrictionsDescription: All information can be accessed by everybody.
copyright: false

## General comment
MCM sheets are formed by bonding two metal skins to a highly engineered plastic core placed between them. This occurs under very precise conditions of temperature, pressure and tension. The result is a strong composite sheet of metal and plastic. Properly designed and installed, these metal composite panels provide a very reliable building envelope that resists the elements and protects against air and water infiltration. Producing the panels requires a five-stage process. The metal coils are introduced from two pay-off reels (1). Next the laminating rollers bond the aluminum to the continuously extruded thermoplastic core (2). The laminated material then enters the cooling chamber and is constantly moved at a steady rate by the pulling rollers (3). A protective masking film is then applied to the MCM to protect the surface finish (4). Finally, the MCM is trimmed to the required width, sheared to the required length, and stacked for inspection and final packaging (5). The MCM sheet process includes all material and inbound transportation necessary for construction-ready products: coated aluminum coils, thermoplastic core, and packaging materials. Energy and utility inputs include electricity, natural gas, process water, and propane. All known solid waste, air, and water emissions are captured in the output.

## Technology
Composite building material of aluminum skin bonded to plastic core. Technology based on companies identified by Metal Construction Association to be representative of industry.

## Geography
North America

## Reference product
- Metal composite material (MCM) sheet, at plant: 1 m2

## Inputs from technosphere
- CUTOFF Disposal, solid waste, unspecified, to inert material landfill: 0.0194322 kg
- Transport, single unit truck, long-haul, diesel powered: 1720.03 kg*km
- Natural gas, combusted in industrial equipment: 0.0633308 m3
- Polypropylene resin, at plant: 0.000621236 kg
- Electricity, at grid, US, 2008: 10.5353 MJ
- Hot rolled sheet, steel, at plant: 0.000969901 kg
- Polyethylene, low density, resin, at plant: 0.974871 kg
- Polyethylene, linear low density, resin, at plant: 1.44504 kg
- Medium density fiberboard (MDF), at MDF mill: 0.0145396 kg
- CUTOFF Lubricants, unspecified, at plant: 0.000215447 kg
- Polyethylene, high density, resin, at plant: 0.12948 kg
- Aluminum, sheet, coated, at plant: 5.82563 kg
- CUTOFF Thermal energy from propane (MJ): 0.373991 MJ
- CUTOFF Water, process: 0.128951 kg
- CUTOFF Polymers, at plant: 0.892059 kg
- Surfaced dried lumber, at planer mill, US PNW: 0.354695 kg
- CUTOFF Corrugated cardboard: 0.0246648 kg
- CUTOFF Recycling, Steel scrap: 0.000969901 kg
- Polyvinyl chloride, resin, at plant: 0.0398592 kg
- CUTOFF Disposal, wood waste, to unspecified treatment: 0.236728 kg
- CUTOFF Recycling, Aluminum scrap: 0.707902 kg

## Sources
- PE INTERNATIONAL
