# Fuels, burned at uncoated freesheet, average production, at mill

Dataset: openLCA process, unit process
Category: Pulp, Paper, and Paperboard Mills
Geography: RNA
Time period: 2006-01-01 to 2006-01-01
Generated by: Caroline Gaudreault
Reviewer: Martha Stevenson
Published in: AF&PA
restrictionsDescription: All information can be accessed by everybody.
copyright: false

## General comment
Uncoated Freesheet, average North American production, at mill. All flows are production-weighted means. Data were developed for a full LCA that was critically reviewed. Reviewers were: • Martha Stevenson, Chairperson – Private Consultant to the public interest with ten years of experience in sustainability, environmental management, packaging and materials recovery; led the development of the Design Guidelines for Sustainable Packaging and the COMPASS software used to compare the environmental impacts of package designs; • Pascal Lesage – Life cycle assessment consultant, Researcher at École Polytechnique de Montréal [at the Inter-University Research Centre for the Life Cycle of Products, Processes and Services (CIRAIG) in Montreal]; and • Dale Phenicie, Environmental Affairs Consulting – Consultant with 35 years of experience in environmental protection and process consulting for the forest products industry. Has served on several U.S. EPA Task Forces dealing with water quality issues and authored several AF&PA Environmental, Health and Safety/Sustainability reports.

## Technology
current technology mix for uncoated freesheet

## Time period
Primary data collected from participating companies and associations for their operational activities are representative for 2006 and 2007.

## Reference product
- Fuels, burned at uncoated freesheet, average production, at mill: 13563 MJ

## Inputs from technosphere
- RFO, combusted in industrial boiler, at pulp and paper mill (EXCL.): 30.187 l
  All combusted on site. Actually received at supplier, not refinery.
- Diesel, combusted in industrial boiler, at pulp and paper mill (EXCL.): 2.5259 l
  Other fossil fuels assumed to be diesel.
- LPG, combusted in industrial boiler, at pulp and paper mill (EXCL.): 0.28401 l
- Bituminous coal, combusted in industrial boiler, at pulp and paper mill (EXCL.): 114.07 kg
- Natural gas, combusted in industrial boiler, at pulp and paper mill (EXCL.): 103.12 m3
- Hog fuel, self-gen., combusted in ind. boiler, at pulp and paper mill (EXCL.): 143.64 kg
  Combustion of self-generated hogged fuel from pulpwood. Wood inputs are accounted for in the process named Uncoated freesheet, average production, at mill
- Gasoline, combusted in equipment, at pulp and paper mill (EXCL.): 0.046087 l
  Gasoline and kerosene, assumed to be gasoline.
- Diesel, combusted in industrial boiler, at pulp and paper mill (EXCL.): 1.776 l
  Proxy for light fuel oil.
- Hog fuel, pur., combusted in industrial boiler, at pulp and paper mill (EXCL.): 82.686 kg
  Purchased hogged fuel. Typically from wood products manufacturing.
- TDF, combusted in industrial boiler, at pulp and paper mill (EXCL.): 5.7658 kg
  All combusted. Not present in any database.

## Emissions to nature
- Naphthalene: 8.0344e-5 kg
  From black liquor recovery, non-recyclable paper combustion and wastewater residuals combustion
- Arsenic: 1.6012e-6 kg
  (same comment as for Naphthalene)
- Lead: 6.0607e-6 kg
  (same comment as for Naphthalene)
- Ethane, 1,1,2-trichloro-: 1.6393e-5 kg
  (same comment as for Naphthalene)
- Benzene, 1,2,4-trichloro-: 7.5366e-5 kg
  (same comment as for Naphthalene)
- Acrolein: 0.00017422 kg
  (same comment as for Naphthalene)
- Aldehydes, C3: 0.003063 kg
  (same comment as for Naphthalene)
- Silver: 5.8719e-5 kg
  (same comment as for Naphthalene)
- Methane, tetrachloro-, CFC-10: 2.4137e-5 kg
  (same comment as for Naphthalene)
- Phenol: 0.0067627 kg
  (same comment as for Naphthalene)
- Hydrogen fluoride: 0.00061044 kg
  (same comment as for Naphthalene)
- Chromium: 1.807e-5 kg
  (same comment as for Naphthalene)
- Vanadium: 8.2471e-7 kg
  (same comment as for Naphthalene)
- Carbon disulfide: 0.00030997 kg
  (same comment as for Naphthalene)
- Cresol: 0.0020051 kg
  (same comment as for Naphthalene)
- Hydrogen chloride: 0.040074 kg
  (same comment as for Naphthalene)
- Dioxin, 2,3,7,8 Tetrachlorodibenzo-p-: 1.638e-13 kg
  (same comment as for Naphthalene)
- Methanol: 0.072335 kg
  (same comment as for Naphthalene)
- Hydrogen sulfide: 0.091626 kg
  Total reduced sulfur assumed to be hydrogen sulfide. From all combustion processes at pulp and paper mill.
- Nitrogen dioxide: 2.4828 kg
  From all combustion processes at pulp and paper mill.
- TSP: 0.037401 kg
  (same comment as for Naphthalene)
- Dinitrogen monoxide: 0.026502 kg
  (same comment as for Naphthalene)
- Hexane: 0.00025474 kg
  (same comment as for Naphthalene)
- Sulfuric acid: 0.013758 kg
  (same comment as for Naphthalene)
- Selenium: 0.00092977 kg
  (same comment as for Naphthalene)
- Beryllium: 0.00082244 kg
  (same comment as for Naphthalene)
- Benzo(ghi)perylene: 1.8308e-6 kg
  (same comment as for Naphthalene)
- Methane: 0.033851 kg
  (same comment as for Naphthalene)
- Sulfur dioxide: 3.6982 kg
  From all combustion processes at pulp and paper mill.
- 4-Methyl-2-pentanone: 0.00024064 kg
  (same comment as for Naphthalene)
- Toluene: 0.00034524 kg
  (same comment as for Naphthalene)
- Barium: 0.00022602 kg
  (same comment as for Naphthalene)
- Xylene: 0.00050859 kg
  (same comment as for Naphthalene)
- Formaldehyde: 0.0036929 kg
  (same comment as for Naphthalene)
- Polycyclic organic matter, unspecified: 0.00015142 kg
  (same comment as for Naphthalene)
- Manganese: 0.00011404 kg
  (same comment as for Naphthalene)
- Chloroform: 1.5289e-5 kg
  (same comment as for Naphthalene)
- Ethene, trichloro-: 1.3877e-5 kg
  (same comment as for Naphthalene)
- Cadmium: 4.3222e-5 kg
  (same comment as for Naphthalene)
- Styrene: 0.00012491 kg
  (same comment as for Naphthalene)
- Benzene, hexachloro-: 3.4277e-10 kg
  (same comment as for Naphthalene)
- Mercury: 1.6176e-6 kg
  (same comment as for Naphthalene)
- Zinc: 5.6137e-5 kg
  (same comment as for Naphthalene)
- Antimony: 4.7056e-5 kg
  (same comment as for Naphthalene)
- Nickel: 1.2539e-5 kg
  (same comment as for Naphthalene)
- Copper: 2.21e-5 kg
  (same comment as for Naphthalene)
- Ethene, tetrachloro-: 1.9941e-6 kg
  (same comment as for Naphthalene)
- Acetaldehyde: 0.0079412 kg
  (same comment as for Naphthalene)
- Ethane, 1,1,1-trichloro-, HCFC-140: 2.6038e-5 kg
  (same comment as for Naphthalene)
- Cumene: 0.00044219 kg
  (same comment as for Naphthalene)
- Methane, dichloro-, HCC-30: 0.00011899 kg
  (same comment as for Naphthalene)
- Methane, monochloro-, R-40: 0.012069 kg
  (same comment as for Naphthalene)
- Carbon monoxide: 0.11567 kg
  (same comment as for Naphthalene)
- Biphenyl: 8.4992e-5 kg
  (same comment as for Naphthalene)
- Carbon dioxide, biogenic: 1157.6 kg
  (same comment as for Naphthalene)
- Benzene: 0.00042375 kg
  (same comment as for Naphthalene)

## Sampling procedure
The survey included results from 31 paper mills representing 10.6 million short tons per year (TPY), nearly 75% of 2006/2007 North American production volume.

## Sources
- AF&PA
