# Phenol resorcinol formaldehyde hardener, at plant

Dataset: openLCA process, unit process
Category: Plastics Material and Resin Manufacturing
Geography: RNA
Generated by: Jamie Meil
restrictionsDescription: All information can be accessed by everybody.
copyright: true

## General comment
Base process data presented with allocations to within process co-products noted. Refer to allocation worksheet for specifics. All allocations performed using mass or volume. To take profile back to cradle the user must add LCI profile information for PNW dry and rough green lumber from PNW dry lumber LCI module. Cradle-to-gate LCI information presented for PRF and MUF resins and hardeners which were derived from secondary source., information from secondary source
Important note: although most of the data in the US LCI database has
undergone some sort of review, the database as a whole has not yet
undergone a formal validation process.
Please email comments to lci@nrel.gov.

## Technology
Typical

## Geography
US Pacific North West

## Reference product
- Phenol resorcinol formaldehyde hardener, at plant: 1 kg

## Inputs from technosphere
- CUTOFF Disposal, formaldehyde, to unspecified treatment: 7.01e-7, 2e-6 kg (2 entries)
- CUTOFF Disposal, inert solid waste, to unspecified treatment: 0.07334 kg

## Inputs from nature
- Iron ore, in ground: 0.0002 kg
- Copper ore, in ground: 0.00072 kg
- Phosphate ore, in ground: 0.00012 kg
- Nitrogen, in air: 0.00524 kg
- Gas, natural, in ground: 1.101 m3
- Sodium chloride, in ground: 0.02812 kg
- Coal, bituminous, 24.8 MJ per kg, in ground: 0.491 kg
- Calcium carbonate, in ground: 0.00181 kg
- Uranium, in ground: 0.00042 kg
- Sulfur, in ground: 0.00474 kg
- Oil, crude, in ground: 0.46331 kg
  The original data was in terms of volume. This was changed to mass using a conversion factor of 850 kg/m3

## Emissions to nature
- Mercury: 3e-6 kg
- VOC, volatile organic compounds: 2e-5 kg
- Carbon dioxide: 1.75 kg
- Aromatics, unspecified: 1e-5 kg
- Carbon monoxide: 0.000921 kg
- Dimethyl ether: 4e-6 kg
- Benzene: 1.05e-5 kg
- COD, Chemical Oxygen Demand: 0.000543 kg
- Propylene glycol: 0.0107 kg
- Phenol: 3e-7, 3e-7 kg (2 entries, compartments not in this file)
- Ethene: 0.00028 kg
- Methane: 0.00474 kg
- Hydrocarbons, unspecified: 0.00415 kg
- Nitrogen oxides: 0.0077 kg
- Sodium, ion: 3.3e-5 kg
- Oils, unspecified: 2.3e-5 kg
- TOC, Total Organic Carbon: 0.000218 kg
- Dissolved organic matter: 1.3e-5 kg
- PAH, polycyclic aromatic hydrocarbons: 2e-5 kg
- Suspended solids, unspecified: 0.000888 kg
- Methanol: 0.000671 kg
- Nitrogen, total: 8.01e-6 kg
- Dissolved solids: 0.000206 kg
- Chloride: 0.0004 kg
- BOD5, Biological Oxygen Demand: 4e-6 kg
- Dinitrogen monoxide: 3e-6 kg
- Particulates, unspecified: 0.000961 kg
- Sulfur dioxide: 0.00546 kg

## Sources
- Maureen E. Puettman
