# Ethylene dichloride-vinyl chloride monomer, at plant

Dataset: openLCA process, unit process
Category: Petrochemical Manufacturing
Geography: RNA
Time period: 2003-01-01 to 2004-01-01
Generated by: Franklin Associates
Published in: THE PLASTICS DIVISION OF THE ACC
restrictionsDescription: All information can be accessed by everybody.
copyright: false

## General comment
Reaction of ethylene and chlorine using a ferric chloride catalyst, followed by purification to yield ethylene dichloride which can be thermally cleaved to produce vinyl chloride monomer. Ethylene dichloride data was collected with VCM data and are included within the VCM dataset. Unreacted EDC can be sold off as a coproduct from VCM production, but this depends on the producer. Hydrochloric acid is also an input to this process; however, it is created internally as a byproduct from the combustion of emissions produced. A mass basis was used to partition the credit for this coproduct. This process has net water outputs. The mass imbalance is due to unavailability of the weight of water inputs to production and outputs to nature. Complete inventory data and metadata are available in full in the final report and appendices, Cradle-to-Gate Life Cycle Inventory of Nine Plastic Resins and Four Polyurethane Precursors. This report has been extensively reviewed within Franklin Associates by Rebe Feraldi and Melissa Huff and has undergone partial critical review by ACC Plastics Division members and is available at: www.americanchemistry.com. Quantities may vary slightly between the reference to main source and this module due to rounding. Important note: although most of the data in the US LCI database has undergone some sort of review, the database as a whole has not yet undergone a formal validation process. Please email comments to lci@nrel.gov.

## Technology
Ethylene dichloride is produced from the reaction of ethylene and chlorine. Vinyl chloride monomer (VCM) is produced almost exclusively by thermal cleavage (dehydrochlorination) of ethylene dichloride.

## Geography
US

## Reference product
- Ethylene dichloride-vinyl chloride monomer, at plant: 1 kg
  This process has net water outputs. The mass imbalance is due to unavailability of the weight of water inputs to production and outputs to nature.

## Inputs from technosphere
- Transport, pipeline, unspecified petroleum products: 0.092491 t*km
  Individual amounts of each incoming material were multiplied by the incoming distance travelled. These are totaled weighted averages of the primary incoming transport data from each participating open mold caster.
- Electricity, at cogen, for natural gas turbine: 0.20922 kWh
- Chlor-alkali electrolysis, chlorine for PVC, at plant: 0.535 kg
- Electricity, at grid, US, 2008: 0.15123 kWh
- Oxygen, liquid, at plant: 0.144 kg
- Transport, train, diesel powered: 0.11449 t*km
  (same comment as for Transport, pipeline, unspecified petroleum products)
- CUTOFF Disposal, solid waste, unspecified, to sanitary landfill: 0.00036 kg
  Solid Wastes consists of sludge and undisclosed process wastes.
- Ethylene, at plant: 0.453 kg
- Transport, pipeline, natural gas: 0.0002317 t*km
  (same comment as for Transport, pipeline, unspecified petroleum products)
- CUTOFF Disposal, solid waste, unspecified, to municipal incineration: 0.00332 kg
  Solid Wastes consists of light ends/heavy ends and hazardous wastes.
- Transport, combination truck, diesel powered: 0.042352 t*km
  (same comment as for Transport, pipeline, unspecified petroleum products)
- CUTOFF Disposal, solid waste, unspecified, to waste-to-energy: 0.0217 kg
  Solid Wastes consists of light ends/heavy ends and hazardous wastes.
- Natural gas, combusted in industrial boiler: 0.12523 m3

## Inputs from nature
- Water, process, unspecified natural origin/m3: 0.00086778 m3
  Franklin Associates uses a default as opposed to Egalitarian approach in collecting data for water use. During data collection, water use data were only requested and compiled in terms of 'evaporative' or consumptive use (i.e., ultimate withdraws, evaporation, or incorporation into the product). Data were not collected to determine reliable averages for non-evaporative water use. In other words, averages for water inputs and outputs are not available for this unit process. Consumptive use includes: water incorporated into the product, water evaporated during the process, and/or water used and released to a body other than that from which it was drawn.

## Emissions to nature
- Hydrogen chloride: 2.6e-6 kg
- Ethene, chloro-: 4.25e-9 kg
  This vinyl chloride emission was provided by the Vinyl Institute, based on 2011 Vinyl Chloride TRI reported values and 2011 PVC production reported by ACC Resin Statistic Report. This value was used to represent a more industry wide average value to account for facilities that did not participate in the LCI inventory. Actual reported figures were lower than the industry average.
- Particulates, unspecified: 1e-5 kg
  This emission was reported by fewer than three companies. To indicate known emissions while protecting the confidentiality of individual company responses, the emission is reported only by order of magnitude.
- Carbon dioxide, fossil: 0.0373 kg
- Particulates, > 2.5 um, and < 10um: 1e-6 kg
  (same comment as for Particulates, unspecified)
- Copper: 1e-10 kg
  (same comment as for Particulates, unspecified)
- Chlorine: 1e-6 kg
  (same comment as for Particulates, unspecified)
- Nitrogen oxides: 3.2e-5 kg
- Particulates, < 2.5 um: 1e-6 kg
  (same comment as for Particulates, unspecified)
- Organic substances, unspecified: 6.9e-6 kg
  This category contains small amounts of EDC and VCM as well as other hydrocarbons which were not separated out by the data providers. These amounts may be overcounting the VCM emissions as the Vinyl Institute provided atmospheric VCM emissions for the production of EDC/VCM/PVC as shown in this dataset.
- Carbon monoxide: 1.1e-5 kg
- Chlorides, unspecified: 1e-8 kg
  (same comment as for Particulates, unspecified)

## Sampling procedure
Data are from primary sources. Data for the production of EDC/VCM were provided by three leading producers (3 plants) in North America. At the time this data was collected, there were 8 companies and 12 plants producing VCM. The companies that provided data were the 3 largest producers of VCM at the time. Due to this, we are estimating that these companies produced greater than 50% of the VCM market share. The EDC/VCM producers who provided data for this module verified that the characteristics of their plants are representative of a majority of North American EDC/VCM production.

## Sources
- THE PLASTICS DIVISION OF THE ACC
