# Roundwood, softwood, average, at forest road, INW

Dataset: openLCA process, unit process
Category: Logging
Geography: RNA
Time period: 1989-01-01 to 1996-01-01
Generated by: Maureen Puetmann
Published in: Leonard R. Johnson
restrictionsDescription: All information can be accessed by everybody.
copyright: false

## General comment
1. FIA inventory were from 1989 to 1996 depending on jurisdiction 2. Important note: although most of the data in the US LCI database has undergone some sort of review, the database as a whole has not yet undergone a formal validation process. 3. Please email comments to lci@nrel.gov. 4. WRT soil carbon, what is not known, is the degree of carbon release from the decomposed fine roots in the soil and whether the net release of fine root carbon will be different over different time periods and under different treatment regimes. The results do not address soil carbon or the effect of forest management activities on total soil carbon because no reliable predictors were found that relate to the management treatments being considered.

## Technology
Average technology. Some data extrapolated from similar processes.

## Geography
US Inland West including Montana, Idaho, and eastern Washington

## Reference product
- Roundwood, softwood, average, at forest road, INW: 1 m3

## Inputs from technosphere
- Roundwood, softwood, national forest, average, at forest road, INW: 0.0657 m3
- Roundwood, softwood, average, state or private dry forest, at forest road, INW: 0.311 m3
- Roundwood, softwd, avg, state or private moist cold forest, at forest rd, INW: 0.624 m3

## Sampling procedure
Average is calculated based on harvested areas and the specific yield for each type of forest.
Thirty year average harvest rates by owner group and sub-region (1970-2000) were applied to existing inventory data and simulated forward at the harvest intensity that has occurred in the past.

## Sources
- Maureen Puettmann
- Leonard R. Johnson
