# Soy-based polyol, at plant

Dataset: openLCA process, unit process
Category: All Other Basic Organic Chemical Manufacturing
Geography: RNA
Time period: 2009-01-01 to 2009-01-01
Generated by: Anne Landfield Greig
Published in: Omni Tech International
restrictionsDescription: All information can be accessed by everybody.
copyright: false

## General comment
1. CARBON SEQUESTRATION should be accounted for after the product is built in its LCA model, and should be included depending on the use of end of life fate of that product.
REFINED SOY OIL: 80.6% C--> 2.955 kg CO2/kg refined soy oil
2. This system is part cradle-to-gate, part unit process. The study (Main Data Source) underwent external peer review prior to this submission to the US LCI database.

## Technology
Data from 1 company but represents current technology

## Geography
US

## Reference product
- Soy-based polyol, at plant: 1 kg

## Inputs from technosphere
- Electricity, at grid, US, 2000: 414 kWh
- Soy oil, refined, at plant: 909 kg
- CUTOFF Disposal, solid waste, unspecified, to unspecified landfill: 9.26 kg
- Natural gas, combusted in industrial boiler: 58.2 m3

## Inputs from nature
- Calcium carbonate: 0.0312 kg
- Natural gas, at extraction site: 54.1 kg
- Clay, unspecified: 0.0822 kg
- Uranium ore: 1.5 kg
- Oil, crude: 33.4 kg
- Coal, bituminous, 24.8 MJ per kg: 29.2 kg
- Sodium Chloride: 0.369 kg
- Lignite coal, at surface mine: 8.69 kg
- Water: 19000 l

## Emissions to nature
- Metals, unspecified: 0.00207, 0.00861 kg (2 entries, compartments not in this file)
- Aldehyde: 0.00114 kg
- Carbon dioxide, fossil: 231 kg
- Hydrocarbons, unspecified: 0.231 kg
  82% excludes methane
- Iron: 0.0442 kg
- Particulates, > 10 um: 0.0124 kg
- Particulates, unspecified: 0.0945 kg
- Sulfur dioxide: 1.55 kg
- Methanol: 0.134, 0.134 kg (2 entries, compartments not in this file)
- Barium: 0.164 kg
- Carbon monoxide: 0.839 kg
  CO
- Mercaptans, unspecified: 0.000164 kg
- Nitrate: 0.0132 kg
  NO3-
- TOC, Total Organic Carbon: 0.0308 kg
- Chloride: 9.26 kg
- Hydrogen chloride: 0.0184 kg
  HCl
- Magnesium: 0.000116, 0.151 kg (2 entries, compartments not in this file)
- Dinitrogen monoxide: 0.00234 kg
- Xylene: 0.00287 kg
  C6H4(CH3)2
- Hydrogen fluoride: 0.00221 kg
  HF
- Acetic acid: 0.265, 7 kg (2 entries, compartments not in this file)
- Calcium: 0.775 kg
- Aluminum: 0.00413 kg
- Dissolved substances, unspecified: 10.7 kg
- Ammonia: 0.000656 kg
  NH3
- Suspended solids, unspecified: 0.542 kg
  SS from soybean crushing is sent to a WWTP; SS from agriculture is discharged to surface water.
- Sulfate: 0.182 kg
- Hydrogen: 0.0436 kg
- Sodium, ion: 2.46 kg
- Ethyl benzene: 0.00287 kg
  C6H5C2H5
- Toluene: 0.00287 kg
  C6H5CH3
- Nitrogen dioxide: 0.721 kg
- BOD5, Biological Oxygen Demand: 0.0617 kg
- Phosphate: 0.00352 kg
- Aromatics, unspecified: 0.0129 kg
- Methane: 1.14 kg
  CH4
- Ammonia, as N: 0.06 kg
- COD, Chemical Oxygen Demand: 0.305 kg
- Benzene: 0.00335 kg
  C6H6

## Sources
- Omni Tech International
- BioBased Technologies
