# Natural soda ash (Sodium carbonate), at plant

Dataset: openLCA process, unit process
Category: Chemical Manufacturing
Geography: US
Time period: 2012-12-31 to 2012-12-31
Generated by: Cara Watson
Reviewer: Sustainble Solutions Corporation
Published in: Sustainable Solutions Corporation. (2015). IMA-NA Soda Ash Life Cycle Assessment
restrictionsDescription: All information can be accessed by everybody.
copyright: false

## General comment
The monohydrate process is the dominant process to produce soda ash but a weighted average of all natural soda ash production is accounted for. The collected datasets were weighted based on total annual production. Complete inventory data and metadata are available in full in the final report and appendices, IMA-NA Soda Ash Life Cycle Assessment. This report has been extensively reviewed within Sustainable Solutions Corporation by Tad Radzinski, Jim Mellentine and Cara Watson, as well as IMA-NA soda ash producers. This report has undergone a full critical review by Dennis S. Kostick, Lyle Nehls and Andrew Swanson. Quantities may vary slightly between the reference to main source and this module due to rounding. Important note: although most of the data in the US LCI database has undergone some sort of review, the database as a whole has not yet undergone a formal validation process. Please email comments to lci@nrel.gov.

Includes material and energy requirements and environmental emissions for one tonne of soda ash production from trona extracted from dry and solution mining. Soda ash is produced using either of two processes - the monohydrate process or the sesquicarbonate process. The monohydrate process is the dominant process The mined ore is screened and crushed, then the crushed ore is calcined to decompose the sodium sesquicarbonate in the trona ore, releasing carbon dioxide and water and leaving anhydrous sodium carbonate and insoluble impurities. The calcined trona is dissolved in water where the insoluble material settles out, leaving a sodium carbonate solution which is filtered and sent to multistage evaporative crystallizers. The settled and filtered insolubles are sent to tailings waste ponds. The crystallizers produce soda ash as monohydrate crystals which are recovered in centrifuges and then dried to remove the water, producing granular dense soda ash. The sesquicarbonate process dissolves trona in water and that solution is settled to remove insolubles and filtered to a clean solution. That solution is then sent to multistage crystallizers where sesquicarbonate crystals are formed. The sesquicarbonate crystals are recovered in centrifuges and sent to a calciner, where water and carbon dioxide are driven off by heat to form medium density granular soda ash. Several of the US soda ash producers make a portion of their soda ash by dissolving trona in water below the surface, bringing the solution to the surface through wells, and then recovering the sodium carbonate on the surface. One facility recovers trona from a shallow mixed salt deposits by injecting lake water into the formation and recovering via wells as a saturated brine.

## Technology
There are multiple processes for the prodcution of soda ash: (1) the monohydrate process, (2) the sesquicarbonate process, (3) ELDM process, and (4) solution process. These technologies are represented in this average mix.

## Geography
US

## Reference product
- Natural soda ash (Sodium carbonate), at plant: 1 t

## Inputs from technosphere
- Natural gas, processed, at plant: 58.05 m3
- CUTOFF Dipropylene glycol monomethyl ether, at plant: 0.00115 kg
- Lignite coal, at surface mine: 149.69 kg
- Transport, combination truck, average fuel mix: 33.7, 0.0105 t*km (2 entries)
- CUTOFF Carbon dioxide, liquid, at plant: 0.10614 kg
- Quicklime, at plant: 8.49, 12.4 kg (2 entries)
- CUTOFF Disposal, hard coal ash, 0% water, to residual material landfill: 6.75 kg
- Iron and steel, production mix: 0.000105, 2.2861 kg (2 entries)
- Polyol ether, for rigid foam polyurethane production, at plant: 0.029211 kg
- Liquefied petroleum gas, combusted in industrial boiler: 0.001412 l
- CUTOFF Biocides, for paper production, unspecified, at plant: 0.0013336 kg
- Diesel, combusted in industrial equipment: 0.28277, 0.00112 l (2 entries)
- CUTOFF Disposal, hazardous waste, 25% water, to hazardous waste incineration: 0.107 kg
- Polystyrene, general purpose, at plant: 0.0016647 kg
- Portland cement, at plant: 0.616, 2.18e-5 kg (2 entries)
- Propylene oxide, at plant: 0.26, 7.37e-5 kg (2 entries)
- Sodium chloride, at plant: 0.000925 kg
- CUTOFF Disposal, non-sulfidic tailings, off-site: 160 kg
- Methylene diphenyl diisocyanate resin, at plant, US SE: 0.043817 kg
- CUTOFF Urea, as n, at regional storehouse: 0.0557 kg
- CUTOFF Sodium silicate, spray powder 80%, at plant: 6.8946e-5 kg
- Polyvinyl chloride, resin, at plant: 0.0010251 kg
- Diesel, at refinery: 0.0255 l
- Electricity, at Grid, WECC, 2010: 121 kWh
- CUTOFF Water, at user: 0.0006441 kg
- Residual fuel oil, at refinery: 0.061324 l
- CUTOFF Silicone product, at plant: 0.0006441 kg
- Gasoline, combusted in equipment: 0.061702 l
- CUTOFF Activated carbon, at plant: 0.205 kg
- Transport, train, diesel powered: 0.357 t*km
- CUTOFF Gravel, unspecified, at mine: 0.0357 kg
- CUTOFF Sodium perborate, monohydrate, powder, at plant: 7.5e-5 kg
- CUTOFF Guar, at plant: 0.0481 kg
- CUTOFF Expanded perlite, at plant: 0.6 kg
- Chlorine, production mix, at plant: 0.0364 kg
- CUTOFF Process-specific burdens, residual material landfill: 57.9 kg
- Polyethylene, high density, resin, at plant: 0.018098 kg
- Acrylonitrile-butadiene-styrene copolymer resin, at plant, CTR: 0.027987 kg
- CUTOFF Diethanolamine, at plant: 0.044724 kg
- CUTOFF Copper, at regional storage: 0.0021591 kg
- Transport, barge, average fuel mix: 0.0945 t*km

## Inputs from nature
- Water, river: 4.1261 m3
- Natural gas, at extraction site: 114 kg

## Emissions to nature
- Hazardous waste, DK: 0.107 kg
- Benzene: 0.00475 kg
- Butadiene: 0.0032 kg
- Particulates: 0.073, 0.0012, 0.0288, 0.187 kg (4 entries, compartments not in this file)
- Hydrogen sulfide: 0.000221 kg
- Fluoride: 0.000979 kg
- Waste in inert landfill: 57.9 kg
- Nitrogen oxides: 0.672 kg
- Tailings, unspecified: 160 kg
- Carbon dioxide: 565 kg
- Dinitrogen monoxide: 0.00277 kg
- Hexane: 0.00137 kg
- Fly ash: 6.75 kg
- Methyl ethyl ketone: 0.000913 kg
- VOC, volatile organic compounds: 0.3 kg
- Sulfur dioxide: 0.643 kg
- Styrene: 0.000822 kg
- Water: 893.58 kg
- Methane, fossil: 0.0179 kg
- Heavy metals, unspecified: 8.93e-6 kg
- Sulfuric acid: 0.00571 kg
- Benzene, ethyl-: 0.000548 kg
- Carbon monoxide: 0.592 kg
- Toluene: 0.00256 kg
- Lead: 3.14e-6 kg
- Xylene: 0.00242 kg
- Acrolein: 0.000274 kg

## Sampling procedure
Data are from primary sources. The data collected for this module represent all 5 producers and 5 plants in the U.S.

## Review details
The peer review board for this dataset:

Dennis S. Kostick
Formerly Mineral Commodiry Specialist dor Soda Ash
US Geological Survey

Lyle Nehls
Former Director of Technology
FMC Alkali Chemicals

Andrew Swanson
Managing Director
IHS Chemical Consulting

## Sources
- Sustainable Solutions Corporation. (2015). IMA-NA Soda Ash Life Cycle Assessment
