# Acrylonitrile-butadiene-styrene copolymer resin, at plant, CTR

Dataset: openLCA process, unit process
Category: All Other Basic Organic Chemical Manufacturing
Geography: RNA
Time period: 2003-01-01 to 2004-01-01
Generated by: Franklin Associates
Published in: THE PLASTICS DIVISION OF THE ACC
restrictionsDescription: All information can be accessed by everybody.
copyright: false

## General comment
Scrap and heat are produced as coproducts during this process. A mass basis was used to partition the credit for scrap, while the energy amount for the heat is reported separately as recovered energy. Complete inventory data and metadata are available in full in the final report and appendices, Cradle-to-Gate Life Cycle Inventory of Nine Plastic Resins and Four Polyurethane Precursors. This report has been extensively reviewed within Franklin Associates and has undergone partial critical review by ACC Plastics Division members and is available at: www.americanchemistry.com. Quantities may vary slightly between the main source and this module due to rounding. Important note: although most of the data in the US LCI database has undergone some sort of review, the database as a whole has not yet undergone a formal validation process. Please email comments to lci@nrel.gov.

## Technology
Suspension and mass polymerization

## Geography
US and Mexico

## Reference product
- Acrylonitrile-butadiene-styrene copolymer resin, at plant, CTR: 1 kg

## By-products
- Recovered energy, for Acrylonitrile-butadiene-styrene copolymer, CTR: 0.4791 MJ

## Inputs from technosphere
- CUTOFF Disposal, solid waste, process, to waste-to-energy: 0.0008073 kg
- CUTOFF Disposal, solid waste,process, to municipal incineration: 0.0072447 kg
- CUTOFF Disposal, solid waste, process, to sanitary landfill: 0.048271 kg
- CUTOFF Disposal, solid waste, fuel, to municipal incineration: 0.17186 kg

## Inputs from nature
- Gas, natural, in ground: 0.57483 kg
  This flow represents the amount of natural gas that is a material input for producing the resin output. The energy content of the natural gas used as EMR/feedstock is 49.8 MJ per kg. The energy content multiplied by the mass should be considered an Energy of Material Resource (EMR)/feedstock energy.
- Oil, crude, in ground: 0.16037 kg
  This flow represents the amount of crude oil that is used for fuel. The energy content of the crude oil used for fuel is 43.7 MJ per kg.
- Energy, from hydro power: 0.33254 MJ
- Oil, crude, in ground: 0.62342 kg
  This flow represents the amount of crude oils that is a material input for producing the resin output. The energy content of the crude oil used as EMR/feedstock is 43.7 MJ per kg. The energy content multiplied by the mass should be considered an Energy of Material Resource (EMR)/feedstock energy.
- Gas, natural, in ground: 0.88069 m3
  This flow represents the amount of natural gas that is used for fuel. The energy content of the natural gas used for fuel is 36.7 MJ per m3.
- Nitrogen, in air: 0.082589 kg
- Water, consumptive use, unspecified origin/m3: 0.018106 m3
- Oxygen, in air: 0.2618 kg
- Coal, unprocessed bituminous, in ground: 0.4329 kg
- Energy, kinetic (in wind), converted: 0.017316 MJ
- Uranium oxide, 332 GJ per kg, in ore: 8.6744e-6 kg
- Energy, from biomass: 0.0072112 MJ
- Energy, unspecified: 0.023438 MJ
  Energy unspecified reflects "other fossil" fuels
- Energy, geothermal: 0.0175 MJ
- Energy, solar: 0.0007349 MJ
- Coal, lignite, in ground: 0.034028 kg

## Emissions to nature
- Fluorene: 1.8197e-10, 2.3841e-9 kg (2 entries, compartments not in this file)
- Oils, unspecified: 0.00014685 kg
- Vinyl acetate: 2.5913e-10 kg
- Dodecane: 2.5707e-8 kg
- Manganese: 3.5407e-6, 1.1743e-7 kg (2 entries, compartments not in this file)
- 5-methyl Chrysene: 4.3993e-12 kg
- Nitrogen oxides: 0.0079764 kg
- Selenium: 4.0881e-8, 2.6618e-7 kg (2 entries, compartments not in this file)
- Phenol, 2,4-dimethyl-: 1.311e-8 kg
- Chloroform: 2.0116e-9 kg
- Iron: 8.9423e-5 kg
- Tin: 1.0736e-7 kg
- Hydrocarbons, unspecified: 2.6573e-6 kg
- Butadiene: 2.1784e-9 kg
- Phenol: 9.6042e-7, 5.4553e-10 kg (2 entries, compartments not in this file)
- NMVOC, non-methane volatile organic compounds, unspecified origin: 0.002678 kg
- Dinitrogen monoxide: 1.0096e-6, 7.2238e-5 kg (2 entries, compartments not in this file)
- Benzyl chloride: 2.3867e-8 kg
- Methane, chlorodifluoro-, HCFC-22: 1.0073e-7 kg
- Cyanide: 8.5239e-8, 1.741e-11 kg (2 entries, compartments not in this file)
- Benzene, ethyl-: 1.4081e-5, 7.0751e-7 kg (2 entries, compartments not in this file)
- Nitrogen, total: 2.4505e-7 kg
- Octadecane: 6.9795e-9 kg
- Radium-228/kg: 8.6543e-17 kg
- Nickel: 6.2491e-7, 1.0902e-7 kg (2 entries, compartments not in this file)
- Propanal: 1.2956e-8 kg
- Tetradecane: 1.0955e-8 kg
- Ammonium chloride: 4.604e-7 kg
- Lead: 2.5165e-7, 2.0841e-7 kg (2 entries, compartments not in this file)
- Naphthalene, 2-methyl-: 7.156e-9 kg
- Bromoform: 1.3297e-9 kg
- Acetaldehyde: 6.2166e-8 kg
- Copper: 6.369e-10, 7.9281e-8 kg (2 entries, compartments not in this file)
- Hexane: 2.2844e-9 kg
- Benzo(ghi)perylene: 5.3992e-12 kg
- Fluoride: 1.5305e-6, 1.6011e-6 kg (2 entries, compartments not in this file)
- Mercury: 6.465e-10, 6.2284e-8 kg (2 entries, compartments not in this file)
- Ethane, 1,1,1-trichloro-, HCFC-140: 6.8191e-10 kg
- o-Cresol: 1.3486e-8 kg
- Formaldehyde: 1.3759e-6 kg
- Benzo(a)anthracene: 1.5997e-11 kg
- Cobalt: 1.0366e-8, 5.9311e-8 kg (2 entries, compartments not in this file)
- Vanadium: 5.2516e-8 kg
- Sulfur dioxide: 0.0083936 kg
- Benzene: 5.1231e-7, 0.00011698 kg (2 entries, compartments not in this file)
- Chromium: 1.1571e-6, 7.1569e-8 kg (2 entries, compartments not in this file)
- Magnesium: 2.1997e-6, 0.0001944 kg (2 entries, compartments not in this file)
- Ethane, chloro-: 1.432e-9 kg
- Ethane, 1,2-dibromo-: 4.0915e-11 kg
- Surfactants: 9.1632e-8 kg
- Dissolved solids: 0.013306 kg
- Decane: 1.3556e-8 kg
- Hydrogen cyanide: 1.034e-5 kg
- Surfactants, unspecified: 1.4605e-7 kg
- Phosphate: 1e-5 kg
- Carbon disulfide: 4.4324e-9 kg
- Naphthalene: 1.6549e-8, 8.4749e-9 kg (2 entries, compartments not in this file)
- Chlorine: 1.1145e-7 kg
- Chloride: 0.012028 kg
- Phenanthrenes, alkylated, unspecified: 5.9956e-10 kg
- Benzene, chloro-: 7.501e-10 kg
- Boron: 1.4642e-6 kg
- Ethylene dibromide: 3.1988e-9 kg
- Ammonia: 0.00019945, 0.0001281 kg (2 entries, compartments not in this file)
- Phthalate, dioctyl-: 2.489e-9 kg
- Acetophenone: 5.1143e-10 kg
- Metallic ions, unspecified: 1e-7 kg
- Zinc: 4.246e-10, 1.2365e-6 kg (2 entries, compartments not in this file)
- Cadmium, ion: 1.5511e-8 kg
- 4-Methyl-2-pentanone: 1.0177e-9 kg
- Strontium: 2.5472e-5 kg
- Polycyclic organic matter, unspecified: 4.1658e-8 kg
- Methane: 0.0014896 kg
- Silver: 5.9213e-7 kg
- Particulates, > 2.5 um, and < 10um: 0.00024163 kg
- Methyl ethyl ketone: 1.9419e-11, 1.3297e-8 kg (2 entries, compartments not in this file)
- Phenols, unspecified: 2.8793e-8, 8.7324e-8 kg (2 entries, compartments not in this file)
- Methane, fossil: 0.01934 kg
- Copper, ion: 1.3994e-7 kg
- Benzoic acid: 4.7475e-7 kg
- Mercaptans, unspecified: 7.3974e-6 kg
- Propene: 1.4374e-7 kg
- Methane, chlorotrifluoro-, CFC-13: 1.6366e-8 kg
- Particulates, < 2.5 um: 0.00023613 kg
- Cumene: 1.8071e-10 kg
- Molybdenum: 1.0739e-8 kg
- Styrene: 8.5239e-10, 6.7273e-7 kg (2 entries, compartments not in this file)
- Indeno(1,2,3-cd)pyrene: 1.2198e-11 kg
- Aluminum: 4.6661e-5 kg
- Organic substances, unspecified: 0.00023899, 1e-7 kg (2 entries, compartments not in this file)
- p-Cresol: 1.4527e-8 kg
- Radium-226/kg: 1.6919e-14 kg
- Benzene, pentamethyl-: 1.808e-11 kg
- Titanium, ion: 4.1558e-7 kg
- 2-Chloroacetophenone: 2.3867e-10 kg
- Methane, dichloro-, HCC-30: 9.1959e-8 kg
- Chromium VI: 1.5797e-8 kg
- Biphenyl: 5.7136e-9, 3.3995e-10 kg (2 entries, compartments not in this file)
- Ethene, tetrachloro-: 9.1206e-9 kg
- Barium: 0.00058112 kg
- Sodium, ion: 0.0027996 kg
- Benzo(b,j,k)fluoranthene: 2.1997e-11 kg
- Lead-210/kg: 4.8631e-17 kg
- Toluene: 5.3944e-7, 0.000176 kg (2 entries, compartments not in this file)
- Sulfide: 6.6752e-7 kg
- Hexadecane: 2.8126e-8 kg
- Methane, monochloro-, R-40: 9.7096e-12, 1.8071e-8 kg (2 entries, compartments not in this file)
- Sulfur: 1.1628e-6 kg
- Fluorene, 1-methyl-: 2.7455e-11 kg
- Xylene: 0.00010208, 2.2078e-7 kg (2 entries, compartments not in this file)
- Nitrate: 1e-5 kg
- Naphthalenes, alkylated, unspecified: 1.446e-9 kg
- Carbon dioxide, fossil: 3.3048 kg
- Chrysene: 1.9997e-11 kg
- TOC, Total Organic Carbon: 7.3975e-7 kg
- Antimony: 2.6477e-8, 5.117e-9 kg (2 entries, compartments not in this file)
- Dibenzothiophene: 4.7758e-11 kg
- Acenaphthene: 1.0198e-10 kg
- Radioactive species, unspecified: 9393.9 Bq
- Arsenic, ion: 9.3594e-8 kg
- Anthracene: 4.1994e-11 kg
- Particulates, unspecified: 0.00083376 kg
- Furan: 7.4256e-13 kg
- Methacrylic acid, methyl ester: 6.8191e-10 kg
- Carbon monoxide: 0.0010645 kg
- 2-Hexanone: 3.0999e-9 kg
- BOD5, Biological Oxygen Demand: 0.00040114 kg
- m-Xylene: 1.3618e-8 kg
- p-Xylene: 5.0206e-9 kg
- Acetone: 2.475e-9 kg
- Yttrium: 3.1408e-9 kg
- Particulates, < 10 um: 0.00029207 kg
- o-Xylene: 5.0206e-9 kg
- Radionuclides (Including Radon): 1.2331e-5 kg
- Pyrene: 6.599e-11 kg
- Kerosene: 2.205e-7 kg
- Benzo(a)pyrene: 7.5989e-12 kg
- Sulfate: 0.00021957 kg
- Hydrogen fluoride: 2.8452e-5 kg
- VOC, volatile organic compounds: 0.0011291 kg
- Fluoranthene: 1.4198e-10 kg
- Phenanthrene: 5.3992e-10, 3.7408e-10 kg (2 entries, compartments not in this file)
- Calcium, ion: 0.00097392 kg
- PAH, polycyclic aromatic hydrocarbons: 9.36e-9 kg
- Carbon monoxide, fossil: 0.0016253 kg
- Bromide: 5.891e-5 kg
- Dibenzofuran: 4.5869e-11 kg
- Hexanoic acid: 9.8321e-8 kg
- Methane, bromo-, Halon 1001: 5.4553e-9 kg
- Docosane: 2.5814e-10 kg
- Beryllium: 4.6409e-9, 5.6966e-9 kg (2 entries, compartments not in this file)
- Sulfur oxides: 0.0021463 kg
- Radioactive species, Nuclides, unspecified: 14.298 Bq
- Aldehydes, unspecified: 1.5927e-7 kg
- Dioxins, measured as 2,3,7,8-tetrachlorodibenzo-p-dioxin: 2.2253e-13 kg
- Benzenes, alkylated, unspecified: 8.8239e-8 kg
- Arsenic: 8.9997e-8 kg
- Methane, tetrachloro-, CFC-10: 1.0415e-9 kg
- Isophorone: 1.9775e-8 kg
- n-Hexacosane: 1.6104e-10 kg
- Suspended solids, unspecified: 0.0060284 kg
- COD, Chemical Oxygen Demand: 0.0039011 kg
- Benzene, 1-methyl-4-(1-methylethyl)-: 2.4106e-11 kg
- Sulfuric acid, dimethyl ester: 1.6366e-9 kg
- Hydrogen chloride: 0.00022495 kg
- Cadmium: 2.6497e-8 kg
- Hydrazine, methyl-: 5.7963e-9 kg
- Fluorenes, alkylated, unspecified: 5.1138e-9 kg
- Eicosane: 7.0557e-9 kg
- Lithium, ion: 0.00017715 kg
- Organic acids: 1.6919e-9 kg
- t-Butyl methyl ether: 1.1933e-9 kg
- Acenaphthylene: 4.9993e-11 kg
- Hydrogen: 2.8382e-6 kg
- Ethane, 1,2-dichloro-: 1.3638e-9 kg
- Ammonium, ion: 9.8437e-8 kg
- Toluene, 2,4-dinitro-: 9.5468e-12 kg
- Thallium: 5.698e-9 kg

## Sampling procedure
Data are from both primary and secondary sources. Data for the production of ABS were provided by three leading producers (5 plants) in North America. The ABS producers who provided data for this module verified that the characteristics of their plants are representative of a majority of North American ABS production.

## Sources
- THE PLASTICS DIVISION OF THE ACC
