# Coal conveyor system; Manufacture; For underground mine, at point-of-sale; 1.22 m belt width

Dataset: openLCA process, unit process
Category: Bit. Coal and Lignite Surface Mining
Geography: US
Time period: 2003-01-01 to 2003-12-31
Generated by: Timothy Skone
Owner: National Energy Technology Laboratory
Reviewer: Robert James
Published in: National Energy Technology Laboratory (NETL). 2010. Coal conveyor system; Manufacture; For underground mine, at point-of-sale; 1.22 m belt width
restrictionsDescription: Use of this dataset is not restricted, but a statement of attribution is required. Please use the following attribution statement:
National Energy Technology Laboratory's (NETL) Unit Process Library
626 Cochrans Mill Road, P.O. Box 10940
Pittsburgh, PA 15236-0940
http://www.netl.doe.gov/research/energy-analysis/life-cycle-analysis/unit-process-library
Neither the U.S. Department of Energy (DOE) National Energy Technology Laboratory (NETL) nor any person acting on behalf of these organizations:
A. Makes any warranty or representation, express or implied, with respect to the accuracy, completeness, or usefulness of the information contained in this document, or that the use of any information, apparatus, method, or process disclosed in this document may not infringe on privately owned rights; or
B. Assumes any liability with this report as to its use, or damages resulting from the use of any information, apparatus, method, or process disclosed in this document.
Reference herein to any specific commercial product, process, or service by trade name, trademark, manufacturer, or otherwise, does not necessarily constitute or imply its endorsement, recommendation, or favoring by NETL. The views and opinions of the authors expressed herein do not necessarily state or reflect those of NETL.
copyright: true

## General comment
This process is part of the NETL Unit Process Library. To access the library and the original dataset:
1) Navigate to the NETL LCA home page (http://www.netl.doe.gov/lca)
2) Then navigate to the “Unit Process Library”
3) From the library, the unit process of interest can be found either through the "Complete Listing of the Unit Process Library link" or through the link to the "Unit Process Database" spreadsheet
4) For each process, a Data Sheet (DS) and Data File (DF) are available

BRIEF DESCRIPTION
This parameterized unit process encompasses the materials necessary for the construction of one steel cord conveyor belt with rubber facing (1.21 m wide), pulleys, and idlers based on manufacturers’ specifications for a 1.22 m (48 inches) conveyor system.

GOAL AND SCOPE
The scope of this unit process encompasses the materials and weights of those materials necessary to construct a single, 1.22 m (48 in) conveyor system, used to carry coal from an underground coal mine to the surface during extraction of Illinois No. 6 bituminous coal. The unit process is based on the reference flow of 1 piece of conveyor system, 1.22 m (48 in), as described below and shown in the associated documentation (referenced in the Citation and Associated Documentation section below). The conveyor system is assumed to be constructed of cold-rolled steel, hot-dip galvanized steel, and natural rubber. Other materials are assumed to be negligible.

This unit process is combined with other coal mine equipment construction unit processes in an assembly unit process for Illinois No. 6 bituminous coal, Coal mine equipment assembly; Production mix; Underground coal mine, Illinois No. 6 Coal, U.S. The assembly unit process quantifies the fraction of each piece of equipment needed under Life Cycle (LC) Stage #1 to produce 1 kg of Illinois No. 6 bituminous coal ready for transport (LC Stage #2). See the associated documentation (referenced in the Citation and Associated Documentation section below) for more information.

BOUNDARY AND DESCRIPTION
Construction of the conveyor system is based on manufacturer specifications for a single conveyor system, having a 1,554.48-m long and 1.2192 m-wide steel-cord belt (Roberts & Schaefer Company 2007). Extraction of coal biomass from the Illinois No. 6 bituminous underground coal mine requires conveyor systems, which are used to carry coal from underground longwall mine operation to a coal stockpile on the surface during the coal extraction process.

An overview of the boundary of this unit process can be found in the associated documentation (referenced in the Citation and Associated Documentation section below). Emissions related to the physical assembly of the conveyor system (e.g., emitted while assembling and transporting conveyor components) are not included in the study boundary. As shown in the associated documentation, the conveyor system constructed in this unit process is incorporated into the coal mine construction assembly processes for LC Stage #1 for coal biomass.

The major components of the conveyor belt system are the conveyor frame, the brackets on which the belt is carried, the rotating parts (rollers) on which the belt travels, the drive and tail pulleys that move the belt, the steel cord inside the belt, and the rubber compound that surrounds the belt cord and provides a surface to carry loaded coal. There are two individual idler systems in this conveyor system: the main idlers that carry the belt and the coal from the mine to the surface, and a return idler system that loops below the idlers and carries the belt back to the underground mine.

The total weight of major components in a conveyor system is readily available but reliable data for the materials breakdown of subcomponents were not. Therefore, the conveyor system was assumed to be composed of three main materials: cold-rolled steel, hot-dip galvanized steel, and natural rubber. The life cycle emissions of raw materials used for the construction of the conveyor system (e.g., cold-rolled steel) are calculated outside the boundary of this unit process, based on proprietary profiles available within the life cycle inventory (LCI) databases.

Relevant properties and assumptions used to calculate the amount of materials used to construct the conveyor system can be found in the associated documentation. The idler system used is a three-roll, inline, carry-and-impact system. The rollers have a diameter of 152 millimeters (mm) and a bearing size of 6,306. There are two separate aspects to the idler system: the rotating parts (rollers), which are manufactured from cold-rolled steel, and the frame and brackets, which are manufactured from hot-dip galvanized steel. These two aspects of the conveyor system weigh a combined 58.3 kilograms (kg). The rotating parts make up 24.3 kg, while the frame and brackets make up 34.0 kg (Sandvik 2004). The idler systems are assumed to be spaced one meter apart along the entire length of the conveyor belt.

The return idler system consists of a single roller manufactured from cold-rolled steel, and the frame and brackets, which are manufactured from galvanized steel. The rollers have a diameter of 152 mm and a bearing size of 6,306. The return idler system weighs 33.9 kg, with the rotating parts being 20.6 kg and the frame and brackets being 13.3 kg (Sandvik 2004). The return idler systems are assumed to be spaced every 3 meters, running along the same path as the idler systems. Based on this assumption, the rotating parts weigh 6.87 kg/m and the frame and brackets weigh 4.43 kg/m.

This conveyor belt requires both a drive pulley to power the belt and a tail pulley for the belt to return to the mine to carry more coal to the surface. Both the drive and tail pulleys are assumed to be constructed of 100 percent cold rolled steel. The tail pulley has a weight of 1,023 kg, and the drive pulley weighs 1,044 kg (Sandvik 2003).

The conveyor belt consists of hot-dip galvanized-steel cords of a nominal 5.2-mm diameter running the entire length of the belt (Goodyear Engineered Products 2008a and 2008b). Based on manufacturers’ instructions, the cords are assumed to be spaced every 11.4 mm on center and for each, seven thin steel cables were grouped together; seven bundles of these cables were then wound together to form a 7x7 cord. The nearest representative cable diameter was 3/16”, or approximately 4.76 mm, and each cord has a weight of approximately 9.23 kg/100 m, which was converted to 0.0923 kg/m (Lexco 2006, Loos & Co. 2009). Spread evenly over the entire 1.2192-m width of the belt, there will be 106 cords running the length of the belt. To get the weight of the steel cord per meter of belt, the weight of a single cord (0.0923 kg/m) was multiplied by the number of cords based on the belt width for a value of 9.78 kg/m.

The total weight of the conveyor belt was taken from Goodyear’s Flexsteel Belt (Goodyear Engineered Products 2008b). The belt is constructed of a series of steel cords surrounded by an insulating layer of rubber, which is itself surrounded by a top and bottom cover of rubber. A diagram is available in the associated documentation (referenced in the Citation and Associated Documentation section below).

The top rubber cover is assumed to be 4.5-mm thick and the bottom cover 1.5-mm thick. The nominal diameter of the steel cables is 5.2 mm, for a total belt thickness of 11.2 mm. The belt weight is the cover weight (7.5 kg/m2) plus the carcass weight (14.6 kg/m2), which comes out to 22.1 kg/m2. The weight of the belt was multiplied by the width of the belt, 1.2192 m, to obtain a value of 26.94 kg/m of belt. The weight of steel cord was subtracted from this value, for a total of 17.16 kg of rubber per meter of belt. (Goodyear Engineered Products 2008b).

The materials manufactured from hot-dip galvanized steel include the steel cord, the idler frame and brackets, and the return idler frame and brackets. The steel cord weighs 9.78 kg/m, the idler frame 34.0 kg/m, and the return idler frame 4.43 kg/m. Summed, this gives a total of 48.21 kg/m of hot-dip galvanized steel.

The third material in the conveyor system is cold-rolled steel for the idler and return idler rotating parts, the tail pulley, and the drive pulley. Since there is only one of each type of pulley, their weights will be added to the total cold-rolled steel value at the end of the calculations. The idler rotating parts weigh 24.3 kg/m, while the return idler rotating parts weigh 6.87 kg/m – a total of 31.17 kg/m of cold-rolled steel. The idlers are assumed to be spaced 1 meter apart, and the return idlers are assumed to be spaced 3 meters apart.

Finally, the weight of each material was multiplied by the length of the belt to obtain a total weight. The belt has a given length of 1,554.48 m, which was doubled to 3,108.96 m to account for the fact that the belt actually makes a large loop to return to the underground mine. The total weight of rubber for the belt was 53,362.52 kg. The weight for hot-dip galvanized steel was 149,893.99 kg. The weight of cold-rolled steel was 31.17 kg/m times 3,108.96 m added to the weights of the drive and tail pulleys, for a total weight of 98,962.92 kg. A summary of modeled input and output flows and additional details regarding those flows, including calculation methods, are contained in the associated documentation.

This process contains one or more surrogate product flows as replacements for proprietary product flows used in the NETL Unit Process Library. All surrogate flow were taken from the U.S. Life Cycle Inventory Database; a list of surrogate flows used in this process is provided below:
1) Acrylonitrile-butadiene-styrene copolymer, resin, at plant
2) Cold rolled sheet, steel, at plant
3) Galvanized steel sheet, at plant

CITATION AND ASSOCIATED DOCUMENTATION
This document should be cited as:
National Energy Technology Laboratory (NETL). 2015. NETL Life Cycle Inventory Data – Unit Process: Coal conveyor system; Manufacture; For underground mine, at point-of-sale; 1.22 m belt width. U.S. Department of Energy, National Energy Technology Laboratory. Last Updated: September 2015 (Version 01). Retrieved on [DATE] from [URL for this dataset].

This dataset is part of the NETL Unit Process Library. The Library offers additional information concerning this dataset in the form of a Detailed Spreadsheet Documentation (DS) file and a Process Documentation File (DF). The DS file is an Excel file that contains all of the parameters, inputs, and outputs for a given system as well as background data, calculations and quality scores. The DF file is a PDF document that contains major assumptions and data sources that are the basis for each unit process. The NETL Unit Process Library is located on the NETL website (netl.doe.gov) under Research / Energy Analysis / Energy Trends and Issues / Life Cycle Analysis / Unit Process Library.

This dataset was converted directly from the DS with additional supporting information provided by the DF. Full citations for the DS and DF are given below.

DS File
National Energy Technology Laboratory (NETL). 2010. NETL Life Cycle Inventory Data – Unit Process: Conveyor System, 48 Inches, Construction. U.S. Department of Energy, National Energy Technology Laboratory. Last Updated: January 2010 (version 01). Retrieved on 6/30/2014 from: http://www.netl.doe.gov/File%20Library/Research/Energy%20Analysis/Life%20Cycle%20Analysis/UP_Library/DS_Stage1_C_Conveyor_System_48_Inch_2010-01.xls

DF File
National Energy Technology Laboratory (NETL). 2010. NETL Life Cycle Inventory Data – Unit Process: Conveyor System, 48 Inches, Construction. U.S. Department of Energy, National Energy Technology Laboratory. Last Updated: January 2010 (version 01). Retrieved on 6/30/2014 from: http://www.netl.doe.gov/File%20Library/Research/Energy%20Analysis/Life%20Cycle%20Analysis/UP_Library/DF_Stage1_C_Conveyor_System_48_Inch_2010-01.pdf

## Technology
The 1.22 m (48 in) conveyor system in this unit process is used to carry coal from an underground coal mine to the surface during extraction of Illinois No. 6 bituminous coal. Construction of the conveyor system is based on manufacturer specifications for a single conveyor system, having a 1,554.48-m long and 1.2192 m-wide steel-cord belt (Roberts & Schaefer Company 2007). Extraction of coal biomass from the Illinois No. 6 bituminous underground coal mine requires conveyor systems, which are used to carry coal from underground longwall mine operation to a coal stockpile on the surface during the coal extraction process. The major components of the conveyor belt system are the conveyor frame, the brackets on which the belt is carried, the rotating parts (rollers) on which the belt travels, the drive and tail pulleys that move the belt, the steel cord inside the belt, and the rubber compound that surrounds the belt cord and provides a surface to carry loaded coal. There are two individual idler systems in this conveyor system: the main idlers that carry the belt and the coal from the mine to the surface, and a return idler system that loops below the idlers and carries the belt back to the underground mine. The idler system used is a three-roll, inline, carry-and-impact system. There are two separate aspects to the idler system: the rotating parts (rollers), and the frame and brackets. The return idler system consists of a single roller and the frame and brackets. This conveyor belt requires both a drive pulley to power the belt and a tail pulley for the belt to return to the mine to carry more coal to the surface.

## Time period
This data set is representative of best available public data from 01/01/2003 to 12/31/2003 and is not subject to limited usability within sub-time spans (e.g. summer, winter).

## Parameters
- Tot_belt_length: 3108.96; = Belt_Lgth*2
  [m] Total length of conveyor belt - distance is doubled because belt must be long enough to return t
- Galv_st_wt: 48.2135
  [kg/m] Weight of hot-dip galvanized steel per meter of conveyor system, includes steel cord within b
- Tot_cold_st: 98962.9; = (Cold_st_wt*Tot_belt_length)+Tail_pulley+Drive_pulley
  [kg] Total weight of cold rolled steel for conveyor system (idler rotating parts and return idler ro
- Tot_rubber: 53362.5; = Rubber_wt*Tot_belt_length
  [kg] Total weight of rubber for conveyor belt - weight per meter times belt length.
- Belt_Lgth: 1554.48
  [m] Adjustable parameter; distance conveyor belt travels to transport mined coal from underground to
- Cold_st_wt: 31.1667
  [kg/m] Weight of cold rolled steel per meter of conveyor system, includes rotating parts of idlers a
- Drive_pulley: 1044
  [kg] Weight of drive pulley for conveyor system.
- Rubber_wt: 17.1641
  [kg/m] Weight of rubber per meter of conveyor belt.
- Tail_pulley: 1023
  [kg] Weight of tail pulley for conveyor system.
- Tot_galv_st: 149894; = Galv_st_wt*Tot_belt_length
  [kg] Total weight of hot-dip galvanized steel for conveyor system (steel cord, idler frame & bracket

## Reference product
- Coal conveyor system; Manufacture; For underground mine, at point-of-sale; 1.22 m belt width: 1 Item(s); data quality (2,3,3,2,3)

## Inputs from technosphere
- Galvanized steel sheet, at plant: 149894 kg; = Tot_galv_st; data quality (2,3,3,2,3)
- Acrylonitrile-butadiene-styrene copolymer, resin, at plant: 53362.5 kg; = Tot_rubber; data quality (2,3,3,2,3)
- Cold rolled sheet, steel, at plant: 98962.9 kg; = Tot_cold_st; data quality (2,3,3,2,3)

## Inventory method
Attributional

## Modelling constants
All elementary and technosphere flows are calculated on a functional unit basis. Calculations involving combustion primarily to generate useful work are done using lower heating values (LHV) and calculations involving combustion primarily to generate useful heat are done using higher heating values (HHV). Unless explicitly stated in the associated reference documents applicable calculations assumed standard atmospheric temperature and pressure (SATP).

## Completeness
Individual relevant flows captured

## Data selection
Best publically available data

## Data treatment
No allocation applied

## Data collection
No primary data collected

## Intended application
This is a gate-to-gate basic process and can be used for any type of LCA study.

## Project
National Energy Technology Laboratory (NETL) Unit Process Library

## Sources
- Goodyear Engineered Products. 2008b. Flexsteel Conveyor Belt
- Lexco Cable. 2006. Custom Cable Assemblies: 7x7 GAC (Galvanized Aircraft Cable)
- Roberts & Schaefer Company. 2007. Slope Conveyor: Kerr McGee Coal Corporation Slope Conveyor for the Galatia Mine
- Goodyear Engineered Products. 2008a. Conveyor Belt - Heavyweight: Flexsteel
- Loos & Co., Inc. 2009. Item # GC 18877, 7x7 Preformed Galvanized Aircraft Cable
- Sandvik. 2003. Sandvik Conveyor Components: Conveyor Pulley
- Sandvik. 2004. Pulleys, Idlers and Materials Handling Systems: Catalogue Medium to Heavy Duty Idler
- National Energy Technology Laboratory (NETL). 2010. Coal conveyor system; Manufacture; For underground mine, at point-of-sale; 1.22 m belt width
