# Aluminum, sheet, coated, at plant

Dataset: openLCA process, unit process
Category: Architectural and Structural Metals Manufacturing
Geography: RNA
Time period: 2013-08-01 to 2015-02-28
Generated by: PE INTERNATIONAL
Published in: PE INTERNATIONAL
restrictionsDescription: All information can be accessed by everybody.
copyright: false

## General comment
The coil coating process includes all known cradle-to-gate processes necessary for the treatment of metallic sheets. This process includes aluminum sheet as the metal feedstock. Raw materials include all known pre-treatments, cleaners, paints, and packaging materials to protect the finished sheets--as well as inbound transport. Manufacturing processes require electricity, heat from natural gas, and process water. Air and water emissions are captured in the output of the process.

## Technology
Coil coating of aluminum sheet. Technology based on companies identified by Metal Construction Association to be representative of industry.

## Geography
North America

## Reference product
- Aluminum, sheet, coated, at plant: 5.82563 kg

## Inputs from technosphere
- Coil, coating, m2, at plant: 1 m2
- CUTOFF Recycling, Aluminum scrap: 0.15687 kg
- CUTOFF Aluminum sheet: 5.82563 kg

## Sources
- PE INTERNATIONAL
