# Wood Combusted, at boiler, at cellulosic fiberboard mill

Dataset: openLCA process, unit process
Category: Reconstituted Wood Product Manufacturing
Geography: RNA
Time period: 2010-01-01 to 2010-12-31
Generated by: Maureen Puetmann
Reviewer: Maureen Puetmann
Published in: Maureen Puett
restrictionsDescription: All information can be accessed by everybody.
copyright: false

## General comment
This process is for the combustion of 1 kg of oven dry wood, combusted in the wood boilers commonly used at wood production facilities. Data is from primary industry data from the softwood lumber, softwood plywood, and oriented strandboard industries located in the US.

This process documents the inputs and outputs associated with wood combustion boilers onsite at wood product producing mills in the U.S. The data were obtained through a scientifically sound and consistent process established by the Consortium for Research on Renewable Industrial Materials (CORRIM), following ISO14040/140444 standards (ISO 2006) and Product Category Rules (PCR) for North American Structural and Architectural Wood Products (FPInnovations 2011). Lumber, plywood, and oriented strandboard production facilities were surveyed asking details regarding onsite energy generation. Regional differences did not exist between the Pacific Northwest and southeast regions to warrant separate boilers based on geographical regions. There was also a potential for emission differences based on biomass type and quality. Plywood and oriented strandboard industries could have boiler inputs likely containing resins. There could be a potential difference in regions, based on wood species, moisture contents, and wood quality. Differences found are reported in this report.

Important note: although most of the data in the US LCI database has undergone some sort of review, the database as a whole has not yet undergone a formal validation process. Please email comments to lci@nrel.gov

## Technology
Average technology

## Geography
North America

## Time period
2010 and after

## Reference product
- Wood Combusted, at boiler, at cellulosic fiberboard mill: 1 kg
  combustion of OD wood in onsite boiler. 20.93 MJ/kg.

## By-products
- Wood ash, at boiler, at cellulosic fiberboard mill: 0.0190969 kg
  Sold for fertilizer; transported 43 miles

## Inputs from technosphere
- CUTOFF Electricity, hydropower, at power plant, unspecified: 0.028126 kWh
  34%
- Gasoline, at refinery: 5.18903e-5 l
  Hydraulic Oil: boiler maintenance
  MEP change process 12/2014; denisty of lubricants from Johnson et al 7.2054 lb/gal. change based on:
  Athena Institute: 2012. A Cradle-to-Gate Life Cycle Assessment of Canadian Oriented Strand Board. Downloaded November 24, 2014 from: http://www.athenasmi.org/wp-content/uploads/2013/10/CtoG-LCA-of-Canadian-OSB-Update.pdf
- Natural gas, combusted in industrial boiler, at pulp and paper mill (EXCL.): 0.00137967 m3
  Boiler startup
- Ethylene glycol, at plant: 1.07e-6 kg; uniform minimum 0, maximum 9.68417
  Antifreeze @ 50% dilution: on site transportation and maintenance; density 1.1132 kg/L. 1.92202363849093E-06 L x 1.1132 kg/L = 2.14E-06 kg / 2 = 1.07E-06 kg
- Gasoline, at refinery: 4.8136e-7 l; uniform minimum 0, maximum 7.62363
  Transmission fluid: on site transportation and maintenance
  MEP change process 12/2014; denisty of lubricants from Johnson et al 7.2054 lb/gal. change based on:
  Athena Institute: 2012. A Cradle-to-Gate Life Cycle Assessment of Canadian Oriented Strand Board. Downloaded November 24, 2014 from: http://www.athenasmi.org/wp-content/uploads/2013/10/CtoG-LCA-of-Canadian-OSB-Update.pdf
- Gasoline, at refinery: 5.9361e-6 l; uniform minimum 0, maximum 2.61042e-5
  Engine Oil; on site transportation and maintenance
  MEP change process 12/2014; denisty of lubricants from Johnson et al 7.2054 lb/gal. change based on:
  Athena Institute: 2012. A Cradle-to-Gate Life Cycle Assessment of Canadian Oriented Strand Board. Downloaded November 24, 2014 from: http://www.athenasmi.org/wp-content/uploads/2013/10/CtoG-LCA-of-Canadian-OSB-Update.pdf
- Transport, combination truck, diesel powered: 0.00138247 t*km
  assumed 80% moisture content, od basis. 0.96/1000 x 1.8 x 0.8km =
- Electricity, biomass, at power plant: 0.000984 kWh
  1.2%
- Culled boards, wood fuel, at cellulosic fiberboard plant: 0.04 kg
- Gasoline, combusted in equipment, at pulp and paper mill (EXCL.): 3.96e-5 l
  on site transportation
- CUTOFF Disposal, metal, to recycling: 3.96e-8 kg
  metal to recycling; transported 55 miles (88.51392 km)
- Electricity, bituminous coal, at power plant: 0.028946 kWh
  35%
- CUTOFF Water treatment, at plant: 0.0001225 kg
  Water treatment at boiler
- Electricity, natural gas, at power plant: 0.009594 kWh
  12%
- Diesel, combusted in industrial equipment: 0.000805448 l; uniform minimum 0, maximum 0.00281037
  on site transportation
- CUTOFF Electricity, at wind power plant, unspecified: 0.001066 kWh
  1.30%
- CUTOFF Electricity, from renewable source, unspecified: 0.000164 kWh
  0.20%
- CUTOFF Disposal, solid waste, unspecified, to unspecified landfill: 7.26421e-6 kg
  other inorganics; Transported 5 miles (8.04672 km)
- Electricity, residual fuel oil, at power plant: 0.000328 kWh
  0.40%
- Gasoline, at refinery: 2.12e-6 l; uniform minimum 0, maximum 3.4992e-6
  on site transportation and maintenance; 0.96 kg/L
  MEP change process 12/2014; denisty of lubricants from Johnson et al 7.2054 lb/gal. change based on:
  Athena Institute: 2012. A Cradle-to-Gate Life Cycle Assessment of Canadian Oriented Strand Board. Downloaded November 24, 2014 from: http://www.athenasmi.org/wp-content/uploads/2013/10/CtoG-LCA-of-Canadian-OSB-Update.pdf
- Electricity, nuclear, at power plant: 0.012792 kWh
  16%
- CUTOFF Boiler streamline treatment: 3.66755e-6 kg
  Boiler streamline treatment
- CUTOFF Solvent, at plant: 6.707e-7 kg
  density of solvent=0.65 kg/L (hexane); boiler maintenance; 1.031E-6 L x 0.65 kg/L = 6.701e-07 kg
- CUTOFF Urea, at regional store house: 0.00314799 kg
  1.32 g/cm3 density
- Gasoline, at refinery: 2.21792e-5 l
  Engine oil: boiler maintenance
  MEP change process 12/2014; denisty of lubricants from Johnson et al 7.2054 lb/gal. change based on:
  Athena Institute: 2012. A Cradle-to-Gate Life Cycle Assessment of Canadian Oriented Strand Board. Downloaded November 24, 2014 from: http://www.athenasmi.org/wp-content/uploads/2013/10/CtoG-LCA-of-Canadian-OSB-Update.pdf
- CUTOFF Disposal, ash, to unspecified landfill: 0.00758618 kg
  Ash from boiler; Transported 2 miles (3.218688 km)
- Wood fuel, unspecified: 0.96 kg
  Purchased wood fuel
- CUTOFF Solvent, at plant: 4.617e-8 kg; uniform minimum 0, maximum 1.43097
  density of solvent=0.65 kg/L (hexane); on site transportation and maintenance; 7.103E-08 L x 0.65 kg/L = 4.618e-08
- Liquefied petroleum gas, combusted in industrial boiler: 1.20748e-5 l; uniform minimum 0, maximum 8.15646e-5
  on site transportation
- Gasoline, at refinery: 8.29142e-6 l; uniform minimum 0, maximum 2.6413e-5
  Hydraulic Oil: on site transportation and maintenance
  MEP change process 12/2014; denisty of lubricants from Johnson et al 7.2054 lb/gal. change based on:
  Athena Institute: 2012. A Cradle-to-Gate Life Cycle Assessment of Canadian Oriented Strand Board. Downloaded November 24, 2014 from: http://www.athenasmi.org/wp-content/uploads/2013/10/CtoG-LCA-of-Canadian-OSB-Update.pdf
- Gasoline, at refinery: 1.10307e-5 l
  Boiler maintenance
  MEP change process 12/2014; denisty of lubricants from Johnson et al 7.2054 lb/gal. change based on:
  Athena Institute: 2012. A Cradle-to-Gate Life Cycle Assessment of Canadian Oriented Strand Board. Downloaded November 24, 2014 from: http://www.athenasmi.org/wp-content/uploads/2013/10/CtoG-LCA-of-Canadian-OSB-Update.pdf

## Inputs from nature
- Water, process: 0.31 kg
  1 liter water = 1 kg water
- Water, process, well: 0.24 kg
  1 liter water = 1 kg water
- Water, process, well: 0.24 kg
  Municipal; 1 liter water = 1 kg water
- Wood and wood waste, 20.9 MJ per kg, ovendry basis: 1 kg
  combustion of OD wood in onsite boiler. 20.93 MJ/kg.
- Water, process: 0.79 kg
  Municipal; 1 liter water = 1 kg water

## Emissions to nature
- Methane, biogenic: 2.2277e-5 kg
- Carbon dioxide, biogenic: 1.76 kg
- BOD5, Biological Oxygen Demand: 2.10073e-6 kg
- Particulates, < 2.5 um: 0.00013897 kg
- Suspended solids, unspecified: 8.35054e-7 kg
- Nitrogen oxides: 0.0010955 kg
- HAPs: 6.2743e-6 kg
  "dummy substance", not in substance list and will not be part of any impact assessment
- Other Organic: 2.11305e-7 kg
  "dummy substance", not in substance list and will not be part of any impact assessment
- Dinitrogen monoxide: 2.92651e-6 kg
  N2O; MEP field change 11/22/2014
- Particulates, < 10 um: 0.00047134 kg
- Sulfur dioxide: 7.7096e-5 kg
- Phenol: 6.2147e-7 kg
- Methanol: 7.9521e-6 kg
- Mercury: 1.834e-9 kg
- Wood (dust): 0.00056242 kg
  I assumed wood dust (DK)
- Benzene: 1.6889e-7 kg
- Propanal: 5.14237e-8 kg
  Propionaldehyde
- VOC, volatile organic compounds: 0.0008755 kg
- Carbon monoxide, biogenic: 0.0032276 kg
- Acrolein: 8.0699e-7 kg
- Naphthalene: 5.77424e-8 kg
- Acetaldehyde: 1.0513e-6 kg
- Formaldehyde: 1.264e-5 kg
- Hydrogen chloride: 1.1658e-6 kg
- Lead: 1.7459e-7 kg

## Sources
- Maureen Puett
