# Corn, whole plant, at field

Dataset: openLCA process, unit process
Category: Corn Farming
Geography: RNA
Time period: 1998-01-01 to 2001-01-01
Generated by: Olivier Muller
Published in: USDA/National Agricultural Statistics Se
restrictionsDescription: All information can be accessed by everybody.
copyright: false

## General comment
Agricultural Crop Production, Harvested acres represent 91% of the planted acres (1998-2000 US average).
1 bu (corn) = 56 lbs.
The impacts of producing 1 kg of seed are assumed equal to those of producing 1kg of grain.
For water, only consumptive use is taken into account (i.e. 60.7% of the total water consumption).
Important note: although most of the data in the US LCI database has
undergone some sort of review, the database as a whole has not yet
undergone a formal validation process.
Please email comments to lci@nrel.gov.

## Technology
US average

## Geography
USA

## Reference product
- Corn stover, at field: 1 kg
  Residue to Crop Ratio (4), C N content of residues (4). Initially considered an output to nature. Changed to an unvalued coproduct by Pascal Lesage (12/07)

## By-products
- Corn, at field: 1 kg
  Planted surface (1), Production (1), Seed consumption (2)

## Inputs from technosphere
- CUTOFF Potash Fertilizer (K2O), at plant: 0.00718 kg
  Fertilizers NPK (8)
- Transport, single unit truck, diesel powered: 0.0165 t*km
  Transportation of fertilizers (200 km).
- Natural gas, combusted in industrial boiler: 0.00305 m3
  Energy consumption (7). Initially reported as MJ. Converted using the following factor: 38.0 MJ/m3.
- Quicklime, at plant: 0.0305 kg
  Fertilizers Ca (9)
- Nitrogen fertilizer, production mix, at plant: 0.0169 kg
  Fertilizers NPK (8). Manure - N, P brought to the field (9,3), Manure - composition N P (10),
- Liquefied petroleum gas, combusted in industrial boiler: 0.00487 l
  Energy consumption (7). Was initially reported as MJ. Converted using following factors: 50.3 MJ/kg, 1.85L/kg
- Gasoline, combusted in equipment: 0.00188 l
  Farm tractor. Energy consumption (7).
- Electricity, at grid, US, 2000: 0.0122 kWh
  Energy consumption (7)
- CUTOFF Agrochemicals, at plant: 0.000288 kg
  Pesticides - consumption (8)
- CUTOFF Phosphorous Fertilizer (TSP as P2O5), at plant: 0.00584 kg
  Fertilizers NPK (8)
- Transport, train, diesel powered: 0.044 t*km
  Transportation of fertilizers (400km)
- Diesel, combusted in industrial equipment: 0.00686 l
  Farm Tractor. Energy consumption (7)

## Inputs from nature
- Occupation, arable, reduced tillage: 0.287 m2*a
  Planted surface (1), Tillage practices (3)
- Water, well: 27.8 l
  Water consumption - consumptive use for irrigation (5), Water consumption - area irrigated and depth of irrigation water applied and ratio surface/ground water (3),
- Occupation, arable, conventional tillage: 0.468 m2*a
  Planted surface (1), Tillage practices (3)
- Water: 4.8 l
  (same comment as for Water, well)
- Carbon dioxide: 1.49 kg
  Carbon fixation through plant growth
- Occupation, arable, conservation tillage: 0.427 m2*a
  Planted surface (1), Tillage practices (3)

## Emissions to nature
- Chlorpyrifos: 1.03e-7 kg
  Pesticides - consumption (8), Pesticides - application method (11), Runoff of pesticide (14)
- Dinitrogen monoxide: 0.000526 kg
  N2O and NH3 and NOx air emissions (4)
- Acetochlor: 2.1e-5 kg
  Pesticides - consumption (8), Pesticides - application method (11), Pesticides - air emission factors (12), Pesticides - vapor pressure (13)
- Bromoxynil: 3.65e-7 kg
  (same comment as for Acetochlor)
- Hydrocarbons, unspecified: 0.000173 kg
  (same comment as for Acetochlor)
- Nitrogen oxides: 0.00297 kg
  N2O and NH3 and NOx air emissions (4)
- Cyanazine: 1.54e-8 kg
  (same comment as for Chlorpyrifos)
- Disulfoton: 5.3e-9 kg
  (same comment as for Chlorpyrifos)
- Parathion, methyl: 2.53e-7 kg
  (same comment as for Acetochlor)
- Dicamba: 9.09e-8 kg
  (same comment as for Chlorpyrifos)
- Suspended solids, unspecified: 0.822 kg
  Erosion (6)
- Ammonia: 0.0011 kg
  N2O and NH3 and NOx air emissions (4)
- Alachlor: 8.84e-8 kg
  (same comment as for Chlorpyrifos)
- Acetochlor: 8.98e-7 kg
  (same comment as for Chlorpyrifos)
- Permethrin: 6.63e-9 kg
  (same comment as for Chlorpyrifos)
- Dimethenamid: 5.01e-6 kg
  (same comment as for Acetochlor)
- Metolachlor: 7.1e-7 kg
  (same comment as for Chlorpyrifos)
- Alachlor: 2.06e-6 kg
  (same comment as for Acetochlor)
- Particulates, unspecified: 3.45e-7 kg
  Particulate emissions (16)
- MCPA: 2.82e-8 kg
  (same comment as for Acetochlor)
- Dipropylthiocarbamic acid S-ethyl ester: 8.87e-8 kg
  (same comment as for Chlorpyrifos)
- Carbofuran: 3.12e-7 kg
  (same comment as for Acetochlor)
- Bentazone: 7.14e-9 kg
  (same comment as for Chlorpyrifos)
- Pendimethalin: 1.72e-6 kg
  (same comment as for Acetochlor)
- Parathion, methyl: 1.09e-8 kg
  (same comment as for Chlorpyrifos)
- Dipropylthiocarbamic acid S-ethyl ester: 3.43e-6 kg
  (same comment as for Acetochlor)
- Bromoxynil: 9.45e-9 kg
  (same comment as for Chlorpyrifos)
- Terbufos: 2.71e-6 kg
  (same comment as for Acetochlor)
- Paraquat: 1.44e-8 kg
  (same comment as for Chlorpyrifos)
- Carbofuran: 1.34e-8 kg
  (same comment as for Chlorpyrifos)
- Permethrin: 1.55e-7 kg
  (same comment as for Acetochlor)
- Bentazone: 1.67e-7 kg
  (same comment as for Acetochlor)
- Simazine: 1.09e-6 kg
  (same comment as for Acetochlor)
- Metolachlor: 1.66e-5 kg
  (same comment as for Acetochlor)
- Metribuzin: 7.67e-8 kg
  (same comment as for Acetochlor)
- Glyphosate: 4.51e-6 kg
  (same comment as for Acetochlor)
- Dimethenamid: 2.15e-7 kg
  (same comment as for Chlorpyrifos)
- Dicamba: 2.12e-6 kg
  (same comment as for Acetochlor)
- Pendimethalin: 7.38e-8 kg
  (same comment as for Chlorpyrifos)
- Simazine: 4.66e-8 kg
  (same comment as for Chlorpyrifos)
- Cyanazine: 3.6e-7 kg
  (same comment as for Acetochlor)
- Glyphosate: 1.93e-7 kg
  (same comment as for Chlorpyrifos)
- Phorate: 2.05e-9 kg
  (same comment as for Chlorpyrifos)
- Phosphorus compounds, unspecified: 3.8e-5 kg
  Runoff/leaching of fertilizers (15)
- Nitrogen, total: 0.0021 kg
  Runoff/leaching of fertilizers (15)
- Paraquat: 3.35e-7 kg
  (same comment as for Acetochlor)
- Diuron: 1.49e-9 kg
  (same comment as for Chlorpyrifos)
- Phorate: 7.94e-8 kg
  (same comment as for Acetochlor)
- 2,4-D: 1.51e-6 kg
  (same comment as for Acetochlor)
- Atrazine: 4.08e-5 kg
  (same comment as for Acetochlor)
- Atrazine: 1.75e-6 kg
  (same comment as for Chlorpyrifos)
- MCPA: 1.21e-9 kg
  (same comment as for Chlorpyrifos)
- Metribuzin: 3.29e-9 kg
  (same comment as for Chlorpyrifos)
- Chlorpyrifos: 2.4e-6 kg
  (same comment as for Acetochlor)
- 2,4-D: 6.48e-8 kg
  (same comment as for Chlorpyrifos)
- Terbufos: 7e-8 kg
  (same comment as for Chlorpyrifos)

## Sources
- USDA/National Agricultural Statistics Se
- USDA/ERS
- Conservation Technology Information Cent
- U.S. EPA
- USGS
- USDA/NRI
- USDA/ERS
- USDA/ERS
- USDA/ERS
- USDA/NCRS
- USDA/ERS
- U.S. EPA
- U.S. EPA
- USDA/NCRS
- USGS
- U.S. EPA
