# Soybeans, at field, 1998-2001

Dataset: openLCA process, unit process
Category: Soybean Farming
Geography: RNA
Time period: 1998-01-01 to 2001-01-01
Generated by: Olivier Muller
Published in: USDA/National Agricultural Statistics Se
restrictionsDescription: All information can be accessed by everybody.
copyright: false

## General comment
Agricultural Crop Production, Harvested acres represent 98% of the planted acres (1998-2000 US average).
1 bu (soybean) = 60 lbs.
The impacts of producing 1 kg of seed are assumed equal to those of producing 1kg of grain.
For water, only consumptive use is taken into account (i.e. 60.7% of the total water consumption).
Important note: although most of the data in the US LCI database has
undergone some sort of review, the database as a whole has not yet
undergone a formal validation process.
Please email comments to lci@nrel.gov.

## Technology
US average

## Geography
USA

## Reference product
- Soybean residues, at field, 1998-2001: 2.1 kg
  Residue to Crop Ratio (4), C N content of residues (4). Initially an output to natur (category "Others"). Changed to unvalued coproduct by Pascal Lesage, 12/07

## By-products
- Soybeans, at field, 1998-2001: 3.1 kg
  Product Output added for EcoSpold Semantic validation.
- Soybean grains, at field, 1998-2001: 1 kg
  Planted surface (1), Production (1), Seed consumption (2), N in above-ground biomass (4), C content soybeans (5), Dry matter content soybeans (6).

## Inputs from technosphere
- Gasoline, combusted in equipment: 0.00796 l
  Energy consumption (10)
- Liquefied petroleum gas, combusted in industrial boiler: 0.00071 l
  Energy consumption (10). Initially reported as MJ. Converted using following factors: 50.3 MJ/kg, 1.85L/kg
- CUTOFF Potash Fertilizer (K2O), at plant: 0.00769 kg
  Fertilizers NPK (11)
- CUTOFF Agrochemicals, at plant: 0.000411 kg
  Pesticide consumption (11)
- Transport, train, diesel powered: 0.0464 t*km
  Transportation of fertilizers (400km)
- Transport, single unit truck, diesel powered: 0.0174 t*km
  Transportation of fertilizers (200 km)
- Diesel, combusted in industrial equipment: 0.0171 l
  Farm Tractor. Energy consumption (10)
- Quicklime, at plant: 0.0836 kg
  Fertilizers Ca (12)
- Nitrogen fertilizer, production mix, at plant: 0.00114 kg
  Fertilizers NPK (11)
- CUTOFF Phosphorous Fertilizer (TSP as P2O5), at plant: 0.00377 kg
  Fertilizers NPK (11)
- Electricity, at grid, US, 2000: 0.00531 kWh
  Energy consumption (10)
- Natural gas, combusted in industrial boiler: 0.000502 m3
  Energy consumption (10). Initially reported as MJ. Converted using the following factor: 38.0 MJ/m3.

## Inputs from nature
- Carbon dioxide: 1.56 kg
  Carbon fixation through plant growth
- Occupation, arable, conservation tillage: 2.28 m2*a
  Planted surface (1), Tillage practices (3)
- Occupation, arable, conventional tillage: 0.957 m2*a
  Planted surface (1), Tillage practices (3)
- Water: 26.1 l
  Water consumption - consumptive use for irrigation and percent of water from surface/ground (7), Water consumption - area irrigated and depth of irrigation water applied (8)
- Water, well: 15.2 l
  (same comment as for Water)
- Occupation, arable, reduced tillage: 0.814 m2*a
  Planted surface (1), Tillage practices (3)

## Emissions to nature
- Ammonia: 6.86e-5 kg
  N2O and NH3 and NOx air emissions (4)
- Hydrocarbons, unspecified: 0.000246 kg
  Pesticide consumption (11), Pesticide application method (13)
- Metribuzin: 3.09e-8 kg
  Pesticide consumption (11), Pesticide application method (13), Runoff of pesticides (16)
- Metolachlor: 2.95e-6 kg
  Pesticide consumption (11), Pesticide application method (13), Pesticide air emission factors (14), Pesticide vapor pressure (15), Runoff of pesticides (16)
- Suspended solids, unspecified: 2.82 kg
  Erosion (9)
- Alachlor: 6.48e-8 kg
  Pesticide consumption (11), Pesticide application method (13), Runoff of pesticides (16)
- Trifluralin: 1.63e-5 kg
  (same comment as for Metolachlor)
- Clomazone: 1.24e-8 kg
  Pesticide consumption (11), Pesticide application method (13), Runoff of pesticides (16)
- Nitrogen, total: 0.000139 kg
  Runoff/leaching of fertilizers (17),
- Nitrogen oxides: 0.000186 kg
  N2O and NH3 and NOx air emissions (4)
- Bentazone: 1.26e-6 kg
  (same comment as for Metolachlor)
- Metribuzin: 7.21e-7 kg
  (same comment as for Metolachlor)
- Glyphosate-trimesium: 8.21e-6 kg
  (same comment as for Metolachlor)
- Glyphosate-trimesium: 3.52e-7 kg
  Pesticide consumption (11), Pesticide application method (13), Runoff of pesticides (16)
- Dinitrogen monoxide: 0.00247 kg
  N2O and NH3 and NOx air emissions (4)
- Chlorpyrifos: 2.38e-8 kg
  Pesticide consumption (11), Pesticide application method (13), Runoff of pesticides (16)
- Phosphorus compounds, unspecified: 2.11e-5 kg
  Runoff/leaching of fertilizers (17),
- 2,4-D: 9.03e-8 kg
  Pesticide consumption (11), Pesticide application method (13), Runoff of pesticides (16)
- Glyphosate: 0.0001 kg
  (same comment as for Metolachlor)
- Pendimethalin: 1.63e-5 kg
  (same comment as for Metolachlor)
- Trifluralin: 4.21e-7 kg
  Pesticide consumption (11), Pesticide application method (13), Runoff of pesticides (16)
- Particulates, unspecified: 1.18e-6 kg
  Particulate emissions (18)
- Pendimethalin: 6.97e-7 kg
  Pesticide consumption (11), Pesticide application method (13), Runoff of pesticides (16)
- 2,4-D: 2.11e-6 kg
  (same comment as for Metolachlor)
- Chlorpyrifos: 5.56e-7 kg
  (same comment as for Metolachlor)
- Metolachlor: 1.26e-7 kg
  Pesticide consumption (11), Pesticide application method (13), Runoff of pesticides (16)
- Alachlor: 1.51e-6 kg
  (same comment as for Metolachlor)
- Bromoxynil: 1.7e-6 kg
  (same comment as for Metolachlor)
- Clomazone: 2.9e-7 kg
  (same comment as for Metolachlor)
- Bentazone: 5.41e-8 kg
  Pesticide consumption (11), Pesticide application method (13), Runoff of pesticides (16)
- Glyphosate: 4.3e-6 kg
  Pesticide consumption (11), Pesticide application method (13), Runoff of pesticides (16)

## Sources
- USDA/National Agricultural Statistics Se
- USDA/ERS
- Conservation Technology Information Cent
- U.S. EPA
- USGS
- USDA/NRI
- USDA/ERS
- USDA/ERS
- USDA/ERS
- U.S. EPA
- U.S. EPA
- USDA/NCRS
- USGS
- U.S. EPA
- USDA/ERS
- USDA/NRCS
- Steve St. Martin, Dept. of Horticulture
- USDA/ERS
