# Fertilizer, winter wheat straw, 2022

Dataset: openLCA process, unit process
Category: Wheat Farming
Geography: RNA
Time period: 2010-01-01 to 2100-12-31
Generated by: Daniel Inman
Published in: Hsu, D.
restrictionsDescription: All information can be accessed by everybody.
copyright: false

## General comment
Fertilizer input for on hectare of average US winter wheat projected for the year 2022. Considers only the amount of fertilizers attributable to straw removal. Transportation from the factory to the regional storehouse is included. Transport from the storehouse to the outlet and farm is not included.

## Technology
Modern technology

## Geography
North America

## Time period
2010 and after

## Reference product
- Fertilizer, winter wheat straw, 2022: 1 ha

## Inputs from technosphere
- CUTOFF Potassium chloride, as K2O, at regional storehouse: 12.2 kg
  Additon of N lost with straw removal. Assuming straw is 1.25% K.ISU 1688
- Nitrogen fertilizer, production mix, at plant: 2.2 kg
  Additon of N lost with straw removal. Assuming straw is 0.5% N.Phyllis database. proxy: Urea, as N, at regional storehouse/RER with US electricity U
- Phosphorous fertilizer, production mix, at plant: 0.668 kg
  Additon of N lost with straw removal. Assuming straw is 0.2% P. ISU 1688. Proxy: Triple superphosphate, as P2O5, at regional storehouse/RER with US electricity U
- Transport, combination truck, diesel powered: 1.05 t*km
  transport to field of K2O
- Ammonia, steam reforming, liquid, at plant: 2.69 kg
  Additon of N lost with straw removal. Assuming straw is 0.5% N.Phyllis database. proxy: Ammonia, liquid, at regional storehouse/RER with US electricity U

## Emissions to nature
- Ammonia: 0.522 kg
- Dinitrogen monoxide: 0.0691 kg

## Sources
- Hsu, D.
- ECN, Phyllis
- NASS
- Klein, C. D
- Sawyer, J. E.
- Hoeft, R. L.
