# Ethylene, at plant

Dataset: openLCA process, unit process
Category: All Other Basic Organic Chemical Manufacturing
Geography: RNA
Time period: 2003-01-01 to 2003-01-01
Generated by: Franklin Associates
Published in: THE PLASTICS DIVISION OF THE AMERICAN C
restrictionsDescription: All information can be accessed by everybody.
copyright: false

## General comment
Numerous coproduct streams are produced during this process. Fuel gas and off-gas are two coproducts produced that are exported to another process for fuel use. When the fuel coproducts are exported from the hydrocracker, they carry with them the allocated share of the inputs and outputs for their production. The ratio of the mass of the exported fuel over the total mass output is removed from the total inputs and outputs of the hydrocracker, and the remaining inputs and outputs are allocated over the material hydrocracker products. No energy credit is applied for the exported fuels, since both the inputs and outputs for the exported fuels have been removed from the data set. Complete inventory data and metadata are available in full in the final report and appendices, Cradle-to-Gate Life Cycle Inventory of Nine Plastic Resins and Four Polyurethane Precursors. This report has been extensively reviewed within Franklin Associates and has undergone partial critical review by ACC Plastics Division members and is available at: www.americanchemistry.com. Quantities may vary slightly between the reference to main source and and this module due to rounding. Important note: although most of the data in the US LCI database has undergone some sort of review, the database as a whole has not yet undergone a formal validation process. Please email comments to lci@nrel.gov.

## Technology
Steam cracking of hydrocarbons (including natural gas liquids and petroleum liquids)

## Geography
North America (US and Canada)

## Reference product
- Ethylene, at plant: 1 kg

## By-products
- Recovered energy: 0.0288412 MJ
  Credit for steam or heat co-product sold externally.

## Inputs from technosphere
- Natural gas, processed, for olefins production, at plant: 0.1189 kg
  A portion of the material feed combusts within the hydrocracker and produces an offgas, which provides an internal energy source. INTERNAL OFFGAS USE
- Natural gas, processed, for olefins production, at plant: 0.830472 kg
  Specific raw materials from oil refining and natural gas processing include ethane, propane, liquid feed, heavy raffinate, and DNG. MATERIAL USE
- Diesel, combusted in industrial equipment: 7.94019e-5 l
  Includes diesel fuel and distillate oil amounts.
- Electricity, at grid, US, 2008: 0.0787753 kWh
- CUTOFF Disposal, solid waste, unspecified, to sanitary landfill: 0.000282402 kg
- Transport, pipeline, natural gas: 1.52696 t*km
- Transport, train, diesel powered: 0.00325359 t*km
- Transport, combination truck, diesel powered: 0.02459 t*km
- Natural gas, combusted in industrial boiler, at hydrocracker, for ethylene: 0.141842 m3
- CUTOFF Disposal, solid waste, unspecified, to waste-to-energy: 2.33576e-5 kg
- CUTOFF Disposal, solid waste, unspecified, to municipal incineration: 0.00361862 kg
- Petroleum refining, for olefins production, at plant: 0.0261 kg
  (same comment as for Natural gas, processed, for olefins production, at plant)
- Electricity, at cogen, for natural gas turbine: 0.0673916 kWh
- Petroleum refining, for olefins production, at plant: 0.186087 kg
  (same comment as for Natural gas, processed, for olefins production, at plant)
- Transport, pipeline, unspecified petroleum products: 0.0731515 t*km
- Gasoline, combusted in equipment: 9.14325e-5 l

## Inputs from nature
- Water, process, unspecified natural origin/m3: 0.000738162 m3
  Consumptive use includes: water incorporated into the product, water evaporated during the process, and/or water used and released to a body other than that from which it was drawn.

## Emissions to nature
- Chlorine: 1e-7 kg
  This emission was reported by fewer than three companies. To protect confidentiality emission is reported only by order of magnitude.
- Acetone: 1e-11 kg
  (same comment as for Chlorine)
- Suspended solids, unspecified: 4.46745e-6 kg
- COD, Chemical Oxygen Demand: 1e-5 kg
  (same comment as for Chlorine)
- Xylene: 1e-9 kg
  (same comment as for Chlorine)
- Hydrogen chloride: 1e-9 kg
  (same comment as for Chlorine)
- Organic substances, unspecified: 1e-6 kg
  (same comment as for Chlorine)
- VOC, volatile organic compounds: 1e-5 kg
  (same comment as for Chlorine)
- BOD5, Biological Oxygen Demand: 6.71941e-7 kg
- Naphthalene: 1e-11 kg
  (same comment as for Chlorine)
- Benzene, ethyl-: 1e-8 kg
  (same comment as for Chlorine)
- TOC, Total Organic Carbon: 1e-6 kg
  (same comment as for Chlorine)
- Sulfur oxides: 4.12265e-6 kg
- NMVOC, non-methane volatile organic compounds, unspecified: 9.14771e-5 kg
- Toluene: 1e-7 kg
  (same comment as for Chlorine)
- Methane, difluromonochloro-, HCFC-22: 1e-9 kg
  (same comment as for Chlorine)
- Particulates, > 2.5 um, and < 10um: 0.0001 kg
  (same comment as for Chlorine)
- Benzene: 1e-8 kg
  (same comment as for Chlorine)
- Hydrogen: 3.95111e-6 kg
- Phenol compounds, unspecified: 1e-6 kg
  (same comment as for Chlorine)
- Carbon monoxide: 1e-6 kg
  (same comment as for Chlorine)
- Styrene: 1e-9 kg
  (same comment as for Chlorine)
- Particulates, unspecified: 8.43803e-6 kg
- Methane: 1e-6 kg
  (same comment as for Chlorine)

## Sampling procedure
Data collected from primary sources.

## Sources
- THE PLASTICS DIVISION OF THE AMERICAN C
