# Electricity, at eGrid, CAMX, 2008

Dataset: openLCA process, unit process
Category: Utilities
Geography: RNA
Time period: 2008-01-01 to 2008-01-01
Generated by: Alberta Carpenter
Published in: Chris Goemans, Athena Institute
restrictionsDescription: All information can be accessed by everybody.
copyright: false

## General comment
The methodology used to put together the grid information is outlined in reference 1.

## Technology
Typical

## Geography
California (except for small portions in the north and south that are part of the NWPP and AZNM grids repsectively. )

## Reference product
- Electricity, at eGrid, CAMX, 2008: 1 kWh

## Inputs from technosphere
- CUTOFF Electricity, other fuels, unspecified, at power plant: 0.000695444 kWh
  Other Fuels OTH - Other (Batteries, Chemicals, Coke Breeze, Hydrogen, Pitch, Sulfur, Tar Coal, and miscellaneous technologies)
- CUTOFF Electricity, tire derived fuel, at power plant: 9.72934e-5 kWh
  Solid Renewable Fuels (Biomass) TDF - tires, tire derived fuel
- CUTOFF Electricity, other gases, unspecified, at power plant: 3.48102e-6 kWh
  Other Gases PG - propane
- Electricity, biomass, at power plant: 0.0150979 kWh
  Solid Renewable Fuels (Biomass) WDS - Wood/Wood Waste Solids (Paper Pellets, Railroad Ties, Utility Poles, Wood Chips, and other wood solids)
- CUTOFF Electricity, petroleum, waste oil, at power plant: 0.000352737 kWh
  Petroleum (Other Fossil) WO - Waste/Other Oil (including Crude Oil, Liquid Butane, Liquid Propane, Oil Waste, Re-Refined Motor Oil, Sludge Oil, Tar Oil, or other petroleum-based liquid wastes)
- CUTOFF Electricity, biomass, solid, biogenic MSW, at power plant: 0.00112011 kWh
  Solid Renewable Fuels (Biomass) MSB - Municipal Solid Waste – Biogenic Component
- Electricity, diesel, at power plant: 0.000379149 kWh
  Petroleum (DFO) - Distillate Fuel Oil (includes all Diesel and No. 1, No. 2, and No. 4 Fuel Oils)
- CUTOFF Electricity, biomass, solid, agriculture by-products, at power plant: 0.000942157 kWh
  Solid Renewable Fuels (Biomass) AB - Agriculture Crop By-products /Straw /Energy Crops
- Electricity, natural gas, at power plant: 0.590081 kWh
- Electricity, residual fuel oil, at power plant: 2.15647e-5 kWh
  Petroleum (RFO) - Residual Fuel Oil (includes No. 5 and No. 6 Fuel Oils and Bunker C Fuel Oil)
- CUTOFF Electricity, at wind power plant, unspecified: 0.0260463 kWh
- CUTOFF Electricity, other gases, unspecified, at power plant: 0.00832346 kWh
  Other Gases OG - Other Gas (Butane, Coal Processes, Coke-Oven, Refinery, and other processes)
- CUTOFF Electricity, biomass, gas, landfill, at power plant: 0.00736588 kWh
  Gaseous Renewable Fuels (Biomass) LFG - Landfill Gas
- CUTOFF Electricity, other fuels, unspecified, at power plant: 0.00114577 kWh
  Other Fuels WH - waste heat
- Electricity, nuclear, at power plant: 0.160534 kWh
- CUTOFF Electricity, solar, unspecified, at power plant: 0.00331365 kWh
  Solar (Photovoltaic, Thermal)
- CUTOFF Electricity, geothermal, unspecified: 0.0445195 kWh
- CUTOFF Electricity, petroleum coke, at power plant: 0.00779552 kWh
  Petroleum (Other Fossil) PC - petroleum coke
- Electricity, bituminous coal, at power plant: 0.0112702 kWh
- CUTOFF Electricity, hydropower, at power plant, unspecified: 0.117722 kWh
- CUTOFF Electricity, MSW, non-biogenic, at power plant: 0.000880085 kWh
  Other Fuels MSN - Municipal Solid Waste – Non-biogenic components
- Electricity, diesel, at power plant: 4.66867e-5 kWh
  Petroleum (DFO) JF - Jet Fuel
- CUTOFF Electricity, biomass, gas, unspecified, at power plant: 0.00224507 kWh
  Gaseous Renewable Fuels (Biomass) OBG - Other Biomass Gases (Digester Gas, Methane, and other biomass gases)

## Sampling procedure
based on EIA electricity reports for all power plants in the US.

## Sources
- Chris Goemans, Athena Institute
- unspecified
- USEPA
- Statistics Canada
- Statistics Canada
- Statistics Canada
- Statistics Canada
- Statistics Canada
- Statistics Canada
- USEPA
- EIA
- EIA
- EIA
- EIA
- EIA
- EIA
- EIA
- EIA
- EIA
- EIA
- EIA
- US DOE
- International Energy Agency
- US DOE
