# Phosphorous fertilizer, production mix, at plant

Dataset: openLCA process, unit process
Category: Phosphatic Fertilizer Manufacturing
Geography: RNA
Generated by: Jamie Meil
Published in: Maureen Puetmann
restrictionsDescription: All information can be accessed by everybody.
copyright: false

## General comment
Base process data presented with allocations to within process co-products noted. Refer to allocation worksheet for specifics. All allocations performed using mass or volume., adapted from European data (IDEMAT 2001) in SimaPro
Important note: although most of the data in the US LCI database has
undergone some sort of review, the database as a whole has not yet
undergone a formal validation process.
Please email comments to lci@nrel.gov.

## Technology
Typical

## Geography
US South East

## Reference product
- Phosphorous fertilizer, production mix, at plant: 1 kg

## Inputs from technosphere
- Transport, train, diesel powered: 2.25 t*km
- Transport, combination truck, average fuel mix: 0.121 t*km
- Electricity, at grid, US, 2000: 0.16 kWh
- Natural gas, combusted in industrial boiler: 0.0862 m3

## Emissions to nature
- Copper, ion: 2.1e-5 kg
- Lead: 1.5e-5 kg
- Arsenic, ion: 3e-5 kg
- Mercury: 4.5e-7 kg
- Fluoride: 3.5e-5, 0.089 kg (2 entries, compartments not in this file)
- Nickel: 1.5e-5 kg
- Cadmium, ion: 1e-5 kg
- Sulfur dioxide: 0.015 kg
- Phosphate: 1.6e-5, 0.067 kg (2 entries, compartments not in this file)
- Chromium: 4.5e-5 kg
- Zinc: 1e-5 kg
- Dust, unspecified: 0.0001 kg

## Sources
- Leonard R. Johnson
- Maureen Puetmann
- Michael Milota
