# Xylenes, mixed, at plant

Dataset: openLCA process, unit process
Category: All Other Basic Organic Chemical Manufacturing
Geography: RNA
Time period: 2000-01-01 to 2005-01-01
Generated by: Franklin Associates
Published in: THE PLASTICS DIVISION OF THE AMERICAN C
restrictionsDescription: All information can be accessed by everybody.
copyright: false

## General comment
Total energy data for mixed xylenes were provided for this analysis by a confidential source. The mix of fuels for the dataset was calculated using statistics from a U.S. Department of Energy report. No environmental emissions data were available. Complete inventory data and metadata are available in full in the final report and appendices, Cradle-to-Gate Life Cycle Inventory of Nine Plastic Resins and Four Polyurethane Precursors. This report has been extensively reviewed within Franklin Associates and has undergone partial critical review by ACC Plastics Division members and is available at: www.americanchemistry.com. Quantities may vary slightly between the reference to main source and and this module due to rounding. Important note: although most of the data in the US LCI database has undergone some sort of review, the database as a whole has not yet undergone a formal validation process. Please email comments to lci@nrel.gov.

## Technology
Catalytic reforming of paraffinic hydrocarbon streams

## Geography
US

## Reference product
- Xylenes, mixed, at plant: 1 kg
  MATERIAL USE

## Inputs from technosphere
- Petroleum refining, for olefins production, at plant: 1 kg
- Transport, combination truck, diesel powered: 0.0439 t*km
- Bituminous coal, combusted in industrial boiler: 0.00702 kg
- Transport, train, diesel powered: 0.028 t*km
- Liquefied petroleum gas, combusted in industrial boiler: 0.00209 l
- Transport, barge, residual fuel oil powered: 0.182 t*km
- Natural gas, combusted in industrial boiler: 0.0416 m3
- Electricity, at grid, US, 2008: 0.0355 kWh
- Transport, barge, diesel powered: 0.0548 t*km
- Transport, pipeline, unspecified petroleum products: 0.345 t*km

## Sampling procedure
Data are from primary sources

## Sources
- THE PLASTICS DIVISION OF THE AMERICAN C
