# Thermoforming, rigid polypropylene part, at plant

Dataset: openLCA process, unit process
Category: Plastics Product Manufacturing
Geography: RNA
Time period: 2010-01-01 to 2010-01-01
Generated by: Franklin Associates
Published in: THE RIGID PLASTICS PROCESSING GROUP (RPPG) OF THE AMERICAN CHEMISTRY COUNCIL
restrictionsDescription: All information can be accessed by everybody.
copyright: false

## General comment
The amount of incoming corrugated box material is equivalent to that coming out of the process as it is purchased to be used as shipping packaging for finished thermoformed items. An average of 0.149 pounds of rigid plastic part scrap is produced for every kilogram of thermoformed parts produced; this scrap is sold for recycling. The remaining solid waste generated from the facilities surveyed in this analysis is landfilled. For every kilogram of thermoformed product, 0.210 kg of solid waste is sent to landfill. Of this solid waste, an average of 96 percent by mass is process waste such as contaminated resin scrap, hydraulic oil, and/or inks; while, five percent is packaging waste from incoming materials. The small (<2%) mass imbalance is due to variability in data availability for, and weighting of, amounts of ancillary inputs and waste outputs. The packaging inputs and printing emissions in this data set represent the average reported per kilogram of output across a range of procucts produced at manufacturing facilities. When using this data to represent a specific molded product, users should adjust the amount of packaging and printing emissions as needed based on the actual materials and processes used. Complete inventory data and metadata are available in full in the final report and appendices, Life Cycle Inventory of Plastic Fabrication Processes: Injection Molding and Thermoforming. This report has been extensively reviewed within Franklin Associates and has undergone partial critical review by ACC Rigid Plastics Processing Group (RPPG) members and is available at: www.americanchemistry.com. Quantities may vary slightly between the reference to main source and and this module due to rounding. Important note: although most of the data in the US LCI database has undergone some sort of review, the database as a whole has not yet undergone a formal validation process. Please email comments to lci@nrel.gov.

## Technology
Fabrication of rigid plastic parts by thermoforming. Thermoformed products generated by facilities providing data for this analysis were produced using sheet manufacturing equipment in combination with either vacuum form (VF) or pressure form (PF) equipment. All participating facilities use continuous thermoforming techniques.

## Geography
US

## Reference product
- Thermoforming, rigid polypropylene part, at plant: 1 kg

## By-products
- Corrugate packaging, from PP thermoforming, for shipping: 0.1 kg
- Polypropylene scrap, from PP thermoforming, at plant: 0.149 kg

## Inputs from technosphere
All rows: lognormal geomSd 1
- Polypropylene resin, at plant: 1.16 kg
- Natural gas, combusted in industrial boiler: 0.0099266 m3
- Transport, combination truck, diesel powered: 0.27 t*km
- Transport, train, diesel powered: 2.37 t*km
- Liquefied petroleum gas, combusted in industrial boiler: 0.0083453 l
- CUTOFF Converted corrugated box, with average bleaching, at plant: 0.1 kg
- Diesel, combusted in industrial equipment: 0.00083453 l
- CUTOFF Colorant, at plant: 0.01 kg
- Gasoline, combusted in equipment: 8.3453e-5 l
- CUTOFF Disposal, solid waste, unspecified, to sanitary landfill: 0.0021 kg
- Electricity, at grid, US, 2008: 2.9014 kWh

## Inputs from nature
- Water, process, unspecified natural origin/m3: 0.00083453 m3; lognormal geomSd 1

## Emissions to nature
- Particulates, unspecified: 1e-6 kg; lognormal geomSd 1

## Sampling procedure
Data are from primary sources.

## Sources
- THE RIGID PLASTICS PROCESSING GROUP (RPPG) OF THE AMERICAN CHEMISTRY COUNCIL
