# Lignite coal, combusted in industrial boiler

Dataset: openLCA process, unit process
Category: Steam and Air-Conditioning Supply
Geography: RNA
Time period: 1997-01-01 to 2003-01-01
Generated by: Franklin Associates
Published in: Franklin Associates
restrictionsDescription: All information can be accessed by everybody.
copyright: false

## General comment
In cases where industrial boiler data were not available, utility boiler data were adjusted accordingly.,
Important note: although most of the data in the US LCI database has
undergone some sort of review, the database as a whole has not yet
undergone a formal validation process.
Please email comments to lci@nrel.gov.

## Technology
Lignite coal combustion in average industrial boiler.

## Geography
United States

## Reference product
- Lignite coal, combusted in industrial boiler: 1 kg

## Inputs from technosphere
- Transport, train, diesel powered: 0.00103 t*km
  Represents transportation from lignite mining to industrial boiler.
- Transport, combination truck, average fuel mix: 0.011008 t*km
  Represents transportation from lignite mining to industrial boiler.
- CUTOFF Disposal, lignite coal combustion byproducts, to unspecified reuse: 0.0239 kg
- Lignite coal, at surface mine: 1 kg
- CUTOFF Disposal, solid waste, unspecified, to unspecified treatment: 0.061585 kg

## Emissions to nature
- Acetaldehyde: 2.85e-7 kg
- Lead: 6.8588e-5 kg
- Cadmium: 4.4278e-8 kg
- 2-Chloroacetophenone: 3.5e-9 kg
- t-Butyl methyl ether: 1.75e-8 kg
- Cobalt: 5e-8 kg
- Propanal: 1.9e-7 kg
- Fluorene: 4.55e-10 kg
  Sources for PAH data are old or unverifiable. Use this PAH data with caution.
- Antimony: 9e-9 kg
- Benzene, chloro-: 1.1e-8 kg
- VOC, volatile organic compounds: 3.1513e-5 kg
- Indeno(1,2,3-cd)pyrene: 3.05e-11 kg
  Sources for PAH data are old or unverifiable. Use this PAH data with caution.
- Pyrene: 1.65e-10 kg
  Sources for PAH data are old or unverifiable. Use this PAH data with caution.
- Toluene: 1.2e-7 kg
- Benzo(a)anthracene: 4e-11 kg
  Sources for PAH data are old or unverifiable. Use this PAH data with caution.
- Benzo(ghi)perylene: 1.35e-11 kg
  Sources for PAH data are old or unverifiable. Use this PAH data with caution.
- Methane, bromo-, Halon 1001: 8e-8 kg
- Chrysene, 5-methyl-: 1.1e-11 kg
  Sources for PAH data are old or unverifiable. Use this PAH data with caution.
- Organic substances, unspecified: 3.2267e-6 kg
- Sulfuric acid, dimethyl ester: 2.4e-8 kg
- Phthalate, dioctyl-: 3.65e-8 kg
- Manganese: 1.7876e-7 kg
- Styrene: 1.25e-8 kg
- Nickel: 1.741e-7 kg
- Chrysene: 5e-11 kg
  Sources for PAH data are old or unverifiable. Use this PAH data with caution.
- Hydrogen fluoride: 7.5e-5 kg
- Particulates, > 2.5 um, and < 10um: 0.00036566 kg
- Naphthalene: 6.5e-9 kg
  Sources for PAH data are old or unverifiable. Use this PAH data with caution.
- Sulfur dioxide: 0.012889 kg
- Acetophenone: 7.5e-9 kg
- Nitrogen oxides: 0.0059743 kg
- Ethane, chloro-: 2.1e-8 kg
- Chromium VI: 3.95e-8 kg
- Formaldehyde: 3.383e-6 kg
- Vinyl acetate: 3.8e-9 kg
- Selenium: 6.5e-7 kg
- Bromoform: 1.95e-8 kg
- Toluene, 2,4-dinitro-: 1.4e-10 kg
- Ethane, 1,2-dichloro-: 2e-8 kg
- Chromium: 9.9038e-8 kg
- Benzene, ethyl-: 4.7e-8 kg
- Benzo(b,j,k)fluoranthene: 5.5e-11 kg
  Sources for PAH data are old or unverifiable. Use this PAH data with caution.
- Biphenyl: 8.5e-10 kg
  Sources for PAH data are old or unverifiable. Use this PAH data with caution.
- Xylene: 1.85e-8 kg
- Methacrylic acid, methyl ester: 1e-8 kg
- Acrolein: 7.4696e-8 kg
- Arsenic: 1.5756e-7 kg
- Acenaphthene: 2.55e-10 kg
  Sources for PAH data are old or unverifiable. Use this PAH data with caution.
- Methyl ethyl ketone: 1.95e-7 kg
- Isophorone: 2.9e-7 kg
- Benzo(a)pyrene: 1.9e-11 kg
  Sources for PAH data are old or unverifiable. Use this PAH data with caution.
- Beryllium: 7.7597e-9 kg
- Benzene: 4.7668e-5 kg
- Methane, dichloro-, HCC-30: 1.45e-7 kg
- Cumene: 2.65e-9 kg
- Chloroform: 2.95e-8 kg
- Methane, fossil: 2e-5 kg
- Carbon dioxide, fossil: 2.3 kg
- Phenanthrene: 1.35e-9 kg
  Sources for PAH data are old or unverifiable. Use this PAH data with caution.
- Carbon monoxide, fossil: 0.00040495 kg
- Phenols, unspecified: 8e-9 kg
- Hydrazine, methyl: 8.5e-8 kg
- Phenol: 8e-9 kg
- Ethene, tetrachloro-: 2.15e-8 kg
- Anthracene: 1.05e-10 kg
  Sources for PAH data are old or unverifiable. Use this PAH data with caution.
- Mercury: 6.5409e-7 kg
- Carbon disulfide: 6.5e-8 kg
- Ethane, 1,2-dibromo-: 6e-10 kg
- Suspended solids, unspecified: 1.6008e-6 kg
- Methane, monochloro-, R-40: 2.65e-7 kg
- Particulates, unspecified: 0.0085919 kg
- Benzyl chloride: 3.5e-7 kg
- Hydrogen chloride: 0.0006 kg
- Hexane: 3.35e-8 kg
- Ethane, 1,1,1-trichloro-, HCFC-140: 1e-8 kg
- Fluoranthene: 3.55e-10 kg
  Sources for PAH data are old or unverifiable. Use this PAH data with caution.
- Oils, unspecified: 8.0038e-7 kg
- Acenaphthylene: 1.25e-10 kg
  Sources for PAH data are old or unverifiable. Use this PAH data with caution.
- Magnesium: 5.5e-6 kg
- Cyanide: 1.25e-6 kg

## Sources
- EPA
- EPA
- unspecified
- Franklin Associates
- unspecified
- Franklin Associates
- U.S. EPA
- EIA
- DOE
- U.S. Energy Information Administration
- EPA
- USGS
- unspecified
- Speight
- U.S. Energy Information Administration
- U.S. Energy Information Administration
