# Sulfuric acid, at plant

Dataset: openLCA process, unit process
Category: All Other Basic Inorganic Chemical Manufacturing
Geography: RNA
Time period: 1992-01-01 to 2008-01-01
Generated by: Franklin Associates
Published in: THE PLASTICS DIVISION OF THE AMERICAN C
restrictionsDescription: All information can be accessed by everybody.
copyright: false

## General comment
During sulfuric acid production, the burning of sulfur produces heat, which in turn is used to generate steam. This steam is usually used in adjacent processing plants and supplies energy to the sulfuric acid plant. The exported steam is given a credit and shown as recovered energy. Complete inventory data and metadata are available in full in the final report and appendices, Cradle-to-Gate Life Cycle Inventory of Nine Plastic Resins and Four Polyurethane Precursors. This report has been extensively reviewed within Franklin Associates and has undergone partial critical review by ACC Plastics Division members and is available at: www.americanchemistry.com. Quantities may vary slightly between the reference to main source and and this module due to rounding. Important note: although most of the data in the US LCI database has undergone some sort of review, the database as a whole has not yet undergone a formal validation process. Please email comments to lci@nrel.gov.

## Technology
Contact process via stepwise oxidation of sulfur followed by reaction with a sulfuric acid solution

## Geography
North America (US and Canada)

## Reference product
- Sulfuric acid, at plant: 1 kg

## By-products
- Recovered energy: 1.97707 MJ
  Credit for steam or heat co-product sold externally.

## Inputs from technosphere
- Transport, ocean freighter, diesel powered: 0.161521 t*km
  Values for ocean freighter transport are calculated based on average fuel consumption rates as determined from a personal communication with Rich Sonnenschein, U.S. Department of Transportation, Maritime Administration in February 2004: 10% of ocean freighters use diesel fuel, 90% use residual fuel, and a freighter that consumes residual fuel consumes 1.9 gallons per 1,000 ton-miles
- CUTOFF Disposal, solid waste, unspecified, to sanitary landfill: 0.0005 kg
- Sulfur, at plant: 0.33 kg
- Electricity, at grid, US, 2008: 0.0661376 kWh
- Transport, train, diesel powered: 0.00141238 t*km
- Transport, pipeline, natural gas: 0.141238 t*km
- Transport, combination truck, diesel powered: 0.0256989 t*km
- Transport, ocean freighter, residual fuel oil powered: 1.45369 t*km
  (same comment as for Transport, ocean freighter, diesel powered)
- Transport, pipeline, unspecified petroleum products: 0.215574 t*km

## Emissions to nature
- Acidity, unspecified: 0.0003 kg
- Nitrogen oxides: 5e-5 kg
- Sulfur oxides: 0.00259 kg
- BOD5, Biological Oxygen Demand: 0.0001 kg
- Particulates, unspecified: 0.001 kg
- Suspended solids, unspecified: 0.0003 kg

## Sampling procedure
Data are from secondary sources.

## Sources
- THE PLASTICS DIVISION OF THE AMERICAN C
