# Polypropylene, resin, at plant

Dataset: openLCA process, unit process
Category: Petrochemical Manufacturing
Geography: RNA
Time period: 2003-01-01 to 2003-01-01
Generated by: Franklin Associates
Published in: THE PLASTICS DIVISION OF THE AMERICAN C
restrictionsDescription: All information can be accessed by everybody.
copyright: false

## General comment
Steam and/or heat are coproducts produced that were exported to another process for energy use. Transportation amounts for propylene were calculated using a weighted average of data collected from the polypropylene producers. Numerous coproduct streams are produced during this process. Fuel gas and off-gas were two of the coproducts produced that were exported to another process for fuel use. When the fuel coproducts are exported from the hydrocracker, they carry with them the allocated share of the inputs and outputs for their B17production. The ratio of the mass of the exported fuel over the total mass output was removed from the total inputs and outputs of the hydrocracker, and the remaining inputs and outputs are allocated over the material hydrocracker products. No energy credit is applied for the exported fuels, since both the inputs and outputs for the exported fuels have been removed from the data set. Complete inventory data and metadata are available in full in the final report and appendices, Cradle-to-Gate Life Cycle Inventory of Nine Plastic Resins and Four Polyurethane Precursors. This report has been extensively reviewed within Franklin Associates and has undergone partial critical review by ACC Plastics Division members and is available at: www.americanchemistry.com. Quantities may vary slightly between the reference to main source and and this module due to rounding. Important note: although most of the data in the US LCI database has undergone some sort of review, the database as a whole has not yet undergone a formal validation process. Please email comments to lci@nrel.gov.

## Technology
Polymerization of propylene using Ziegler-Natta catalysts via a combination of the liquid monomer and gas phase processes

## Geography
North America (US and Canada)

## Reference product
- Polypropylene resin, at plant: 1 kg

## Inputs from technosphere
- Transport, barge, residual fuel oil powered: 0.00091199 t*km
  Values for barge transport are calculated based on average fuel consumption rates as reported in Transportation Energy Data Book: Edition 22 from Oak Ridge National Laboratory, September 2002: 22% of barges use diesel fuel in their engines, 78% use residual oil to generate steam for steam turbines, and a barge that consumes residual oil consumes 3.4 gallons per 1,000 ton-miles
- Transport, barge, diesel powered: 0.00027428 t*km
  (same comment as for Transport, barge, residual fuel oil powered)
- Electricity, at cogen, for natural gas turbine: 0.15079 kWh
- CUTOFF Disposal, solid waste, unspecified, to municipal incineration: 0.00206 kg
- CUTOFF Disposal, solid waste, unspecified, to sanitary landfill: 0.00011 kg
- Natural gas, combusted in industrial boiler: 0.019352 m3
- Transport, pipeline, unspecified petroleum products: 0.064224 t*km
- Transport, train, diesel powered: 0.00014005 t*km
- Propylene, at plant: 0.996 kg
- Transport, combination truck, diesel powered: 0.00021963 t*km
- Petroleum refining, for olefins production, at plant: 0.005 kg
  This amount of refinery material represents the amount of propane used. The unit process module, Petroleum refining, for olefins production, at plant, material use, is used to represent production of propane. MATERIAL USE.
- Residual fuel oil, combusted in industrial boiler: 0.0043389 l
- Electricity, at grid, US, 2008: 0.16314 kWh

## Inputs from nature
- Water, process, unspecified natural origin/m3: 0.00060961 m3
  Consumptive use includes: water incorporated into the product, water evaporated during the process, and/or water used and released to a body other than that from which it was drawn.

## Emissions to nature
- NMVOC, non-methane volatile organic compounds, unspecified: 0.00015 kg
- Organic substances, unspecified: 1e-5 kg
  This emission was reported by fewer than three companies. To indicate known emissions while protecting the confidentiality of individual company responses, the emission is reported only by order of magnitude.
- BOD5, Biological Oxygen Demand: 1e-6 kg
  (same comment as for Organic substances, unspecified)
- Zinc: 1e-8, 1e-9 kg (2 entries, compartments not in this file)
  (same comment as for Organic substances, unspecified)
- COD, Chemical Oxygen Demand: 1e-5 kg
  (same comment as for Organic substances, unspecified)
- Nitrogen oxides: 1.4e-5 kg
- Carbon dioxide, fossil: 0.01929 kg
- Lead: 1e-15 kg
  (same comment as for Organic substances, unspecified)
- Sulfur oxides: 1e-7 kg
  (same comment as for Organic substances, unspecified)
- Dinitrogen monoxide: 4.5e-6 kg
- Suspended solids, unspecified: 2e-5 kg
  (same comment as for Organic substances, unspecified)
- Particulates, > 2.5 um, and < 10um: 1e-6 kg
- Carbon monoxide: 0.00012 kg
- Dissolved solids: 1e-5 kg
  (same comment as for Organic substances, unspecified)
- Particulates, < 2.5 um: 1e-8 kg
  (same comment as for Organic substances, unspecified)
- Particulates, unspecified: 2.3e-5 kg
  (same comment as for Organic substances, unspecified)

## Sampling procedure
Data are from primary sources.

## Sources
- THE PLASTICS DIVISION OF THE AMERICAN C
