# Sawn lumber, softwood, planed, kiln dried, at planer, NE-NC

Dataset: openLCA process, unit process
Category: Sawmills
Geography: RNA
Time period: 2006-01-01 to 2007-01-01
Generated by: Maureen Puetmann
Published in: Richard D. Bergman
restrictionsDescription: All information can be accessed by everybody.
copyright: false

## General comment
1. Allocation on a mass basis.
2. Important note: although most of the data in the US LCI database has
undergone some sort of review, the database as a whole has not yet
undergone a formal validation process.
3. Please email comments to lci@nrel.gov. 4. WRT soil carbon, what is not known, is the degree of carbon release from the decomposed fine roots in the soil and whether the net release of fine root carbon will be different over different time periods and under different treatment regimes. The results do not address soil carbon or the effect of forest management activities on total soil carbon because no reliable predictors were found that relate to the management treatments being considered.

## Technology
Average technology. Some data extrapolated from similar processes.

## Geography
NE/NC = Northeast (NE) and Northcentral (NC) United States. Some states are however omitted: Connecticut, Delaware, Illinois, Iowa, New Jersey, and Ohio.

## Reference product
- Sawn lumber, softwood, planed, kiln dried, at planer, NE-NC: 1 m3
  Based on an ovendry basis density of 420 kg/m3 and a moisture content (ovendry basis) of 16%. Conversion to board feet: 625 nominal board feet/m3 sawn and planed lumber.

## By-products
- Shavings, softwood, kiln dried, NE-NC: 80.6 kg
  Weight reported on an ovendry basis. Moisture content (ovendry basis) = 16%
- Wood fuel, softwood, kiln dried, NE-NC: 22.9 kg
  Weight reported on an ovendry basis. Moisture content (ovendry basis) = 16%

## Inputs from technosphere
- Electricity, at grid, Eastern US, 2000: 16.75 kWh
  Represents 19.8% of total mill consumption of grid electricity.
- Diesel, combusted in industrial equipment: 0.408 l
  Diesel used for on-site transportation. Represents 20% of mill use of diesel for transport.
- Gasoline, combusted in equipment: 0.0076 l
  Gasoline used for on-site transportation. Represents 20% of mill use of gasoline for transport.
- Sawn lumber, softwood, rough, kiln dried, at kiln, NE-NC: 1.27 m3
  Moisture content (ovendry basis) = 16%
- Electricity, onsite boiler, softwood mill, average, NE-NC: 2.81 kWh
  Represents 19.8% of total mill consumption of electricity generated onsite.

## Sampling procedure
Questionnaires from 6 mills member of the Northeastern Lumber Manufacturer’s Association (NeLMA). Mills of the NeLMA are assumed to be representative of the softwood industry in the NE/NC region.

## Sources
- Forest Products Laboratory
- Maureen Puettmann
- Andrew J. Baker
- Richard D. Bergman
- Forest Products Laboratory
- USDC
- M. A. Fosenca
- W.T. Simpson
- CORRIM Reports on Enviornmental Performa
