# Methanol, at plant

Dataset: openLCA process, unit process
Category: All Other Basic Organic Chemical Manufacturing
Geography: RNA
Time period: 1975-01-01 to 2009-01-01
Generated by: Franklin Associates
Published in: THE PLASTICS DIVISION OF THE AMERICAN C
restrictionsDescription: All information can be accessed by everybody.
copyright: false

## General comment
Complete inventory data and metadata are available in full in the final report and appendices, Cradle-to-Gate Life Cycle Inventory of Nine Plastic Resins and Four Polyurethane Precursors. This report has been extensively reviewed within Franklin Associates and has undergone partial critical review by ACC Plastics Division members and is available at: www.americanchemistry.com. Quantities may vary slightly between the reference to main source and and this module due to rounding. Important note: although most of the data in the US LCI database has undergone some sort of review, the database as a whole has not yet undergone a formal validation process. Please email comments to lci@nrel.gov.

## Technology
Steam reformation of light hydrocarbons followed by low pressure synthesis

## Geography
North America (US and Canada)

## Reference product
- Methanol, at plant: 1 kg

## Inputs from technosphere
- Transport, pipeline, natural gas: 0.998 t*km
- Electricity, at grid, US, 2008: 0.00805 kWh
- Natural gas, combusted in industrial boiler: 0.13 m3
- Natural gas, processed, for olefins production, at plant: 0.62 kg
  MATERIAL USE
- Transport, combination truck, diesel powered: 0.00997 t*km
- Transport, train, diesel powered: 0.00997 t*km
- CUTOFF Disposal, solid waste, unspecified, to sanitary landfill: 0.0005 kg

## Inputs from nature
- Water, process, unspecified natural origin/m3: 0.000539 m3
  Consumptive use includes: water incorporated into the product, water evaporated during the process, and/or water used and released to a body other than that from which it was drawn.
- Oxygen, in air: 0.38 kg

## Emissions to nature
- BOD5, Biological Oxygen Demand: 5.8e-5 kg
- NMVOC, non-methane volatile organic compounds, unspecified: 0.005 kg
- Carbon dioxide, fossil: 0.53 kg
- Suspended solids, unspecified: 8.8e-5 kg

## Sampling procedure
Data are from primary sources.

## Sources
- THE PLASTICS DIVISION OF THE AMERICAN C
