# Soy biodiesel, production, at plant

Dataset: openLCA process, unit process
Category: Biodiesel
Geography: RNA
Time period: 2008-01-01 to 2008-01-01
Generated by: Anne Landfield Greig
Published in: Omni Tech International
restrictionsDescription: All information can be accessed by everybody.
copyright: false

## General comment
1. CARBON SEQUESTRATION should be accounted for after the product is built in its LCA model, and should be included depending on the use of end of life fate of that product.
BIODIESEL: 77% C --> 2.823 kg CO2/kg biodiesel.
2. The study (Main Data Source) underwent external peer review prior to this submission to the US LCI database.

## Technology
Current technologies (mix of older and newer)

## Geography
US

## Reference product
- Soy biodiesel, production, at plant: 3.36 kg
  Methyl soyate, 7.4 pounds per gallon

## By-products
- Glycerin, at biodiesel plant: 0.403 kg

## Inputs from technosphere
- Sodium hydroxide, production mix, at plant: 0.00327 kg
  NaOH
- CUTOFF Citric Acid, at plant: 0.00245 kg
  from 2001 Bioprocess Design, Demetri Petrides
- Soybean oil, crude, degummed, at plant: 3.32 kg
- Electricity, at grid, US, 2000: 0.12 kWh
- Methanol, at plant: 0.305 kg
- CUTOFF Phosphoric Acid, at plant: 0.00213 kg
  available at EcoInvent
- Transport, combination truck, diesel powered: 1.24 t*km
- CUTOFF Sodium Methylate, at plant: 0.0777 kg
  from 1998 Biodiesel project
- Natural gas, combusted in industrial boiler: 0.0762 m3
- CUTOFF Hydrochloric Acid, at plant: 0.146 kg
  HCl; available at EcoInvent

## Inputs from nature
- Water: 1.14 l

## Emissions to nature
- Fatty acids: 0.00694 kg

## Sources
- Omni Tech International
