# Transport, intercity bus, diesel powered

Dataset: openLCA process, unit process
Category: Interurban and Rural Bus Transportation
Geography: RNA
Time period: 2010-01-01 to 2010-01-01
Generated by: Nathan Hardesty
Published in: U.S. Environmental Protection Agency (EP
restrictionsDescription: All information can be accessed by everybody.
copyright: false

## General comment
This dataset represents the U.S. average airborne emissions for operating a diesel powered intercity bus. The inventory includes all vehicle operation processes, including off-network and refueling activities.
The refinery-to-pump transportation and distribution data are calculated from Argonne National Laboratory's GREET 1.8d.1 model.
The vehicle operation data are calculated from EPA's MOVES2010a model, using the assumptions described in the corresponding detailed spreadsheet. Emissions factors in MOVES2010a are largely based on EPA's Mobile Source Observation Database, which in turn includes data from a variety of vehicle studies (References 6-8).
MOVES2010a acknowledges sources of uncertainty in the model structure, the population and acitivty data, and other model parameters. As of July 2011, the uncertainty calculation function of the model has not been activated.

## Technology
Combustion of diesel in an intercity bus.

## Geography
US

## Reference product
- Transport, intercity bus, diesel powered: 1 p*km

## Inputs from technosphere
- Transport, train, diesel powered: 0.00916631 t*km
- Transport, ocean freighter, average fuel mix: 0.0335801 t*km
- Transport, barge, average fuel mix: 0.004751 t*km
- Transport, combination truck, average fuel mix: 0.00491195 t*km
- Diesel, at refinery: 0.0152376 l
- Transport, pipeline, unspecified petroleum products: 0.0495108 t*km

## Emissions to nature
- Nitrogen dioxide: 2.72387e-5 kg
- Particulates, < 10 um: 4.63719e-7 kg
  PM10 from tirewear.
- Particulates, < 10 um: 1.95715e-5 kg
  PM10 from organic carbon, elemental carbon, and sulfate particulates.
- Sulfur dioxide: 6.29768e-7 kg
- Carbon dioxide, fossil: 0.0394891 kg
- Carbon monoxide, fossil: 9.45469e-5 kg
- Particulates, < 2.5 um: 5.17886e-7 kg
  PM2.5 from brakewear.
- Ammonia: 5.51222e-7 kg
- Methane: 3.84575e-7 kg
- Nitrogen oxide: 0.000326371 kg
- Particulates, < 2.5 um: 1.11204e-7 kg
  PM2.5 from tirewear.
- VOC, volatile organic compounds: 1.57865e-5 kg
- Particulates, < 2.5 um: 1.8985e-5 kg
  PM2.5 from organic carbon, elemental carbon, and sulfate particulates.
- Dinitrogen monoxide: 5.53295e-8 kg
- Hydrocarbons (other than methane): 1.54183e-5 kg
- Nitrogen oxides: 0.000353609 kg
- Particulates, < 10 um: 1.97833e-6 kg
  PM10 from brakewear.

## Sources
- U.S. Environmental Protection Agency (EP
- National Institute of Standards and Tech
- EPA
- U.S. Alternative Fuels and Advanced Vehi
- Eastern Research Group
- Assessment and Standards Division, Offic
- Assessment and Standards Division, Offic
- Wang, M.
- J. Schwieterman
