# Palm kernel oil, processed, at plant

Dataset: openLCA process, unit process
Category: All Other Basic Organic Chemical Manufacturing
Geography: RNA
Time period: 1989-01-01 to 1989-01-01
Generated by: Franklin Associates
Published in: THE PLASTICS DIVISION OF THE AMERICAN C
restrictionsDescription: All information can be accessed by everybody.
copyright: false

## General comment
Complete inventory data and metadata are available in full in the final report and appendices, Cradle-to-Gate Life Cycle Inventory of Nine Plastic Resins and Four Polyurethane Precursors. This report has been extensively reviewed within Franklin Associates and has undergone partial critical review by ACC Plastics Division members and is available at: www.americanchemistry.com. Quantities may vary slightly between the reference to main source and and this module due to rounding. Important note: although most of the data in the US LCI database has undergone some sort of review, the database as a whole has not yet undergone a formal validation process. Please email comments to lci@nrel.gov.

## Technology
Refining, bleaching, and deodorizing of palm kernel oil

## Geography
North America (US and Canada)

## Reference product
- Palm kernel oil, processed, at plant: 1 kg

## Inputs from technosphere
- Diesel, combusted in industrial equipment: 0.0267 l
  Includes diesel fuel and distillate oil amounts.
- Transport, ocean freighter, diesel powered: 0.493 t*km
  Values for ocean freighter transport are calculated based on average fuel consumption rates as determined from a personal communication with Rich Sonnenschein, U.S. Department of Transportation, Maritime Administration in February 2004: 10% of ocean freighters use diesel fuel, 90% use residual fuel, and a freighter that consumes residual fuel consumes 1.9 gallons per 1,000 ton-miles
- Electricity, at grid, US, 2008: 0.00948 kWh
- CUTOFF Palm kernel oil, crude, at plant: 1.02 kg
- Transport, ocean freighter, residual fuel oil powered: 4.44 t*km
  (same comment as for Transport, ocean freighter, diesel powered)
- Transport, single unit truck, diesel powered: 0.0203 t*km
- CUTOFF Disposal, solid waste, unspecified, to sanitary landfill: 0.0209 kg

## Emissions to nature
- Suspended solids, unspecified: 0.00054 kg
- Dissolved solids: 0.001 kg
- NMVOC, non-methane volatile organic compounds, unspecified: 2e-6 kg
- BOD5, Biological Oxygen Demand: 0.00044 kg
- Carbon monoxide: 7e-6 kg
- Oil and grease, unspecified: 5.7e-5 kg
- COD, Chemical Oxygen Demand: 0.00087 kg

## Sampling procedure
Data are from secondary sources.

## Sources
- THE PLASTICS DIVISION OF THE AMERICAN C
