# Heat, onsite boiler, softwood mill, average, NE-NC

Dataset: openLCA process, unit process
Category: Steam and Air-Conditioning Supply
Geography: RNA
Time period: 2005-01-01 to 2006-01-01
Generated by: Pascal Lesage
Published in: Richard D. Bergman
restrictionsDescription: All information can be accessed by everybody.
copyright: false

## General comment
Allocation on an energy basis (HHV).
Important note: although most of the data in the US LCI database has
undergone some sort of review, the database as a whole has not yet
undergone a formal validation process.
Please email comments to lci@nrel.gov.

## Technology
Average technology.

## Geography
NE/NC = Northeast (NE) and Northcentral (NC) United States. Some states are however omitted: Connecticut, Delaware, Illinois, Iowa, New Jersey, and Ohio.

## Reference product
- Heat, onsite boiler, softwood mill, average, NE-NC: 1 MJ

## By-products
- Electricity, onsite boiler, softwood mill, average, NE-NC: 0.00632 kWh
  Net electricity output.

## Inputs from technosphere
- Electricity, diesel, at power plant: 0.00149 kWh
  Proxy for distilate fuel oil combusted in back-up generator
- Wood fuel, softwood, purchased, combusted in industrial boiler, NE-NC: 0.02045 kg
  Oven-dry mass
- Diesel, combusted in industrial boiler: 0.004 l
  Proxy for both Fuel oil #1 and #2 combusted in the onsite boiler
- Wood fuel, softwood, gen at lumber mill, combusted in industrial boiler, NE-NC: 0.0304 kg
  Oven-dry mass

## Sampling procedure
Questionnaires from 6 mills member of the Northeastern Lumber Manufacturer’s Association (NeLMA). Mills of the NeLMA are assumed to be representative of the softwood industry in the NE/NC region.

## Sources
- Richard D. Bergman
- Maureen Puettmann
