# Bituminous coal, combusted in industrial boiler

Dataset: openLCA process, unit process
Category: Steam and Air-Conditioning Supply
Geography: RNA
Time period: 1997-01-01 to 2003-01-01
Generated by: Franklin Associates
Published in: Franklin Associates
restrictionsDescription: All information can be accessed by everybody.
copyright: false

## General comment
In cases where industrial boiler data were not available, utility boiler data were adjusted accordingly., 100% inputs from technosphere and elementary flows allocated to the combustion of coal, and 0% to the production of ash and flue gas desulfurization sludge
Important note: although most of the data in the US LCI database has
undergone some sort of review, the database as a whole has not yet
undergone a formal validation process.
Please email comments to lci@nrel.gov.

## Technology
Surface mining is used to extract 58 percent of the U.S. supply of coal, while underground mining extracts 42 percent

## Geography
United States

## Reference product
- Bituminous coal, combusted in industrial boiler: 1 kg

## Inputs from technosphere
- Bituminous coal, at mine: 1 kg
- CUTOFF Disposal, solid waste, unspecified, to unspecified treatment: 0.06208 kg
- CUTOFF Transport, pipeline, coal slurry: 0.0050212 t*km
  Represents transportation from bituminous production/processing to industrial boiler.
- CUTOFF Disposal, ash and flue gas desulfurization sludge, to unspecified reuse: 0.079 kg
- Transport, combination truck, diesel powered: 0.0067592 t*km
  Represents transportation from bituminous production/processing to industrial boiler.
- Transport, barge, average fuel mix: 0.12662 t*km
  Represents transportation from bituminous production/processing to industrial boiler.
- Transport, train, diesel powered: 1.043 t*km
  Represents transportation from bituminous production/processing to industrial boiler.

## Emissions to nature
- Beryllium: 7.7597e-9 kg
- Chrysene, 5-methyl-: 1.1e-11 kg
  Sources for PAH data are old or unverifiable. Use this PAH data with caution.
- Pyrene: 1.65e-10 kg
  Sources for PAH data are old or unverifiable. Use this PAH data with caution.
- Cadmium: 4.4278e-8 kg
- Benzene, ethyl-: 4.7e-8 kg
- Benzo(a)anthracene: 4e-11 kg
  Sources for PAH data are old or unverifiable. Use this PAH data with caution.
- Acetophenone: 7.5e-9 kg
- Acrolein: 7.4696e-8 kg
- Particulates, < 10 um: 0.002003 kg
- Methyl ethyl ketone: 1.95e-7 kg
- Phenol: 8e-9 kg
- Isophorone: 2.9e-7 kg
- Styrene: 1.25e-8 kg
- Methane, bromo-, Halon 1001: 8e-8 kg
- Ethane, 1,2-dibromo-: 6e-10 kg
- 2-Chloroacetophenone: 3.5e-9 kg
- Arsenic: 1.5756e-7 kg
- Mercaptans, unspecified: 0.0001085 kg
- Magnesium: 5.5e-6 kg
- Xylene: 1.85e-8 kg
- Ethane, chloro-: 2.1e-8 kg
- Phenols, unspecified: 8e-9 kg
- t-Butyl methyl ether: 1.75e-8 kg
- Methane, monochloro-, R-40: 2.65e-7 kg
- Manganese: 1.7876e-7 kg
- Fluoride: 2.2297e-5 kg
- Carbon dioxide, fossil: 2.634 kg
- Selenium: 6.5e-7 kg
- Carbon monoxide, fossil: 0.0028911 kg
- VOC, volatile organic compounds: 0.00014006 kg
- Vinyl acetate: 3.8e-9 kg
- Dinitrogen monoxide: 0.000368 kg
- Benzene, chloro-: 1.1e-8 kg
- Organic substances, unspecified: 3.0287e-6 kg
- Methane, fossil: 0.00011543 kg
- Benzo(a)pyrene: 1.9e-11 kg
  Sources for PAH data are old or unverifiable. Use this PAH data with caution.
- Naphthalene: 6.5e-9 kg
  Sources for PAH data are old or unverifiable. Use this PAH data with caution.
- Chromium: 9.9038e-8 kg
- Benzene: 4.7668e-5 kg
- Hexane: 3.35e-8 kg
- Benzo(b,j,k)fluoranthene: 5.5e-11 kg
  Sources for PAH data are old or unverifiable. Use this PAH data with caution.
- Indeno(1,2,3-cd)pyrene: 3.05e-11 kg
  Sources for PAH data are old or unverifiable. Use this PAH data with caution.
- Antimony: 9e-9 kg
- Hydrogen fluoride: 5.2357e-5 kg
- Suspended solids, unspecified: 2.0108e-6 kg
- Chromium VI: 3.95e-8 kg
- Biphenyl: 8.5e-10 kg
  Sources for PAH data are old or unverifiable. Use this PAH data with caution.
- Toluene: 1.2e-7 kg
- Cobalt: 5e-8 kg
- Bromoform: 1.95e-8 kg
- Fluoranthene: 3.55e-10 kg
  Sources for PAH data are old or unverifiable. Use this PAH data with caution.
- Hydrogen chloride: 0.00030654 kg
- Chloroform: 2.95e-8 kg
- Cyanide: 1.25e-6 kg
- Ethene, tetrachloro-: 2.15e-8 kg
- Methacrylic acid, methyl ester: 1e-8 kg
- Anthracene: 1.05e-10 kg
  Sources for PAH data are old or unverifiable. Use this PAH data with caution.
- Carbon disulfide: 6.5e-8 kg
- Acetaldehyde: 2.85e-7 kg
- Hydrazine, methyl: 8.5e-8 kg
- Sulfur dioxide: 0.016585 kg
- Sulfuric acid, dimethyl ester: 2.4e-8 kg
- Ethane, 1,1,1-trichloro-, HCFC-140: 1e-8 kg
- Acenaphthylene: 1.25e-10 kg
  Sources for PAH data are old or unverifiable. Use this PAH data with caution.
- Benzo(ghi)perylene: 1.35e-11 kg
  Sources for PAH data are old or unverifiable. Use this PAH data with caution.
- Fluorene: 4.55e-10 kg
  Sources for PAH data are old or unverifiable. Use this PAH data with caution.
- Lead: 1.7862e-6 kg
- Benzyl chloride: 3.5e-7 kg
- Ethane, 1,2-dichloro-: 2e-8 kg
- Toluene, 2,4-dinitro-: 1.4e-10 kg
- Cumene: 2.65e-9 kg
- Propanal: 1.9e-7 kg
- Nitrogen oxides: 0.0057524 kg
- Formaldehyde: 3.383e-6 kg
- Phenanthrene: 1.35e-9 kg
  Sources for PAH data are old or unverifiable. Use this PAH data with caution.
- Nickel: 1.741e-7 kg
- Chrysene: 5e-11 kg
  Sources for PAH data are old or unverifiable. Use this PAH data with caution.
- Acenaphthene: 2.55e-10 kg
  Sources for PAH data are old or unverifiable. Use this PAH data with caution.
- Oils, unspecified: 1.0054e-6 kg
- Methane, dichloro-, HCC-30: 1.45e-7 kg
- Mercury: 6.5409e-7 kg
- Phthalate, dioctyl-: 3.65e-8 kg

## Sources
- EPA
- EIA
- EPA
- DOE
- unspecified
- unspecified
- Franklin Associates
- unspecified
- Minerals Yearbook
- unspecified
- Speight
- Franklin Associates
- EPA
- EPA
