# Electricity, at eGrid, SRTV, 2008

Dataset: openLCA process, unit process
Category: Utilities
Geography: RNA
Time period: 2008-01-01 to 2008-01-01
Generated by: Alberta Carpenter
Published in: Chris Goemans, Athena Institute
restrictionsDescription: All information can be accessed by everybody.
copyright: false

## General comment
The methodology used to put together the grid information is outlined in reference 1.

## Technology
Typical

## Geography
SRTV Tennessee Valley electricity grid to includes Tennessee, most of Kentucky (less RFCW) and a small portions of West Virginia, North Carolina, Georgia, Alabama and Mississippi.

## Reference product
- Electricity, at eGrid, SRTV, 2008: 1 kWh

## Inputs from technosphere
- CUTOFF Electricity, petroleum coke, at power plant: 0.0115604 kWh
  Petroleum (Other Fossil) PC - petroleum coke
- CUTOFF Electricity, at wind power plant, unspecified: 0.000211206 kWh
  Wind
- CUTOFF Electricity, tire derived fuel, at power plant: 7.13009e-5 kWh
  Solid Renewable Fuels (Biomass) TDF - tires, tire derived fuel
- CUTOFF Electricity, biomass,liquid, unspecified, at power plant: 0.00606538 kWh
  Liquid Renewable Fuels (Biomass) BLQ - black liquor
- Electricity, nuclear, at power plant: 0.218927 kWh
  Nuclear Fission NUC – Nuclear (Uranium, Plutonium, Thorium)
- CUTOFF Electricity, biomass, gas, landfill, at power plant: 0.000373721 kWh
  Gaseous Renewable Fuels (Biomass) LFG - landfill gas
- Electricity, bituminous coal, at power plant: 0.584592 kWh
  Bituminous Coal BIT - Anthracite Coal, and Bituminous Coal.
- Electricity, lignite coal, at power plant: 0.0111335 kWh
  Lignite Coal
- CUTOFF Electricity, other gases, unspecified, at power plant: 8.47091e-5 kWh
  Other Gases OG – Other Gas (Butane, Coal Processes, Coke-Oven, Refinery, and other processes)
- CUTOFF Electricity, hydropower, at power plant, unspecified: 0.0448088 kWh
  Hydroelectric WAT – Water (Conventional, Pumped Storage)
- Electricity, residual fuel oil, at power plant: 4.71947e-6 kWh
  Petroleum (RFO) – Residual Fuel Oil (includes No. 5 and No. 6 Fuel Oils and Bunker C Fuel Oil)
- Electricity, biomass, at power plant: 0.00206349 kWh
  Solid Renewable Fuels (Biomass) WDS – Wood/Wood Waste Solids (Paper Pellets, Railroad Ties, Utility Poles, Wood Chips, and other wood solids)
- Electricity, diesel, at power plant: 0.00155551 kWh
  Petroleum (DFO) – Distillate Fuel Oil (includes all Diesel and No. 1, No. 2, and No. 4 Fuel Oils)
- CUTOFF Electricity, petroleum, waste oil, at power plant: 2.66628e-5 kWh
  Petroleum (Other Fossil) WO – Waste/Other Oil (including Crude Oil, Liquid Butane, Liquid Propane, Oil Waste, Re-Refined Motor Oil, Sludge Oil, Tar Oil, or other petroleum-based liquid wastes)
- Electricity, bituminous coal, at power plant: 0.0648786 kWh
  Subbituminous Coal
- CUTOFF Electricity, other gases, unspecified, at power plant: 1.61598e-5 kWh
  Other Gases PG - propane
- CUTOFF Electricity, biomass, liquid, sludge, at power plant: 6.89828e-5 kWh
  Liquid Renewable Fuels (Biomass) SLW - sludge waste
- Electricity, natural gas, at power plant: 0.0535579 kWh
  Natural Gas

## Sampling procedure
based on EIA electricity reports for all power plants in the US.

## Sources
- Chris Goemans, Athena Institute
- unspecified
- USEPA
- Statistics Canada
- Statistics Canada
- Statistics Canada
- Statistics Canada
- Statistics Canada
- Statistics Canada
- USEPA
- EIA
- EIA
- EIA
- EIA
- EIA
- EIA
- EIA
- EIA
- EIA
- EIA
- EIA
- US DOE
- International Energy Agency
- US DOE
