# Dragline; Manufacture; For surface coal mine, at plant; 7,439 metric tonne working weight

Dataset: openLCA process, unit process
Category: Bit. Coal and Lignite Surface Mining
Geography: US
Time period: 2008-01-01 to 2008-12-31
Generated by: Timothy Skone
Owner: National Energy Technology Laboratory
Reviewer: Robert James
Published in: National Energy Technology Laboratory (NETL). 2010. Dragline; Manufacture; For surface coal mine, at plant; 7,439 metric tonne working weight
restrictionsDescription: Use of this dataset is not restricted, but a statement of attribution is required. Please use the following attribution statement:
National Energy Technology Laboratory's (NETL) Unit Process Library
626 Cochrans Mill Road, P.O. Box 10940
Pittsburgh, PA 15236-0940
http://www.netl.doe.gov/research/energy-analysis/life-cycle-analysis/unit-process-library
Neither the U.S. Department of Energy (DOE) National Energy Technology Laboratory (NETL) nor any person acting on behalf of these organizations:
A. Makes any warranty or representation, express or implied, with respect to the accuracy, completeness, or usefulness of the information contained in this document, or that the use of any information, apparatus, method, or process disclosed in this document may not infringe on privately owned rights; or
B. Assumes any liability with this report as to its use, or damages resulting from the use of any information, apparatus, method, or process disclosed in this document.
Reference herein to any specific commercial product, process, or service by trade name, trademark, manufacturer, or otherwise, does not necessarily constitute or imply its endorsement, recommendation, or favoring by NETL. The views and opinions of the authors expressed herein do not necessarily state or reflect those of NETL.
copyright: true

## General comment
This process is part of the NETL Unit Process Library. To access the library and the original dataset:
1) Navigate to the NETL LCA home page (http://www.netl.doe.gov/lca)
2) Then navigate to the “Unit Process Library”
3) From the library, the unit process of interest can be found either through the "Complete Listing of the Unit Process Library link" or through the link to the "Unit Process Database" spreadsheet
4) For each process, a Data Sheet (DS) and Data File (DF) are available

BRIEF DESCRIPTION
This unit process is based on manufacturer specifications for a Bucyrus 8750, 8,200 short ton (7,439 metric tonne) dragline used in mining for a surface mine. This unit process quantifies the amount of steel plate needed to produce the dragline.

GOAL AND SCOPE
The scope of this process encompasses the materials and weights of those materials necessary to construct a single 7,439 metric tonne ( 8,200 short ton) working weight dragline to be used for the extraction of coal from a surface mine. The process is based on the reference flow of 1 piece of dragline, 7,439 metric tonnes ( 8,200 short ton), as described below, and as shown in the associated documentation (see Citation and Associated Documentation section below). The dragline is assumed to be constructed entirely of steel plate; therefore steel plate is assumed to be the only material required for dragline construction. Other materials are assumed to be negligible.

This process is used during LC Stage #1 to assist in the mining of coal from surface mines (such as Powder River Basin sub-bituminous coal). It is combined with other coal mining equipment construction unit processes in individual assembly unit process for coal, Coal mine equipment assembly; Production mix; Surface coal mine, Powder river basin, U.S. This assembly unit process quantifies the fraction of each piece of equipment needed under LC Stage #1 to produce 1 kg of coal ready for transport (LC Stage #2) to the energy conversion facility (LC Stage #3). For more information, see the Associated Documentation (referenced below).

BOUNDARY AND DESCRIPTION
Construction of the dragline is based on manufacturer specifications for a Bucyrus model 8750, 8,200 ton (7,439 metric tonne) dragline. The dragline is used to physically remove the overburden of overlaying the coal to be extracted, following blasting.

An overview of the boundary of this unit process is available in the associated documentation (referenced below). Emissions related to the physical assembly of the dragline (e.g., that are emitted while putting together the components of a dragline, including transport of those components) are not considered in this study. Upstream emissions from the production of raw materials used for the construction of the dragline (e.g., steel plate) are calculated outside the boundary of this unit process, based on proprietary profiles available within the GaBi model. As discussed above and shown in the associated documentation (see Citation and Associated Documentation section below), the dragline constructed in this unit process is incorporated into the surface mine assembly unit process for LC Stage #1 for surface mined Powder River Basin sub-bituminous coal.

The total weight of a dragline was readily available but reliable data for the material breakdown of dragline subcomponents were not. Therefore, the dragline was assumed to be composed entirely of steel plate (Steel plate, BF (85% Recovery Rate) [Metals]).

Relevant properties and assumptions used to calculate the amount of steel plate contained in a single dragline are available in the Associated Documentation (referenced below). Total weight for one dragline is estimated by subtracting the rated standard load (the weight of material that the dragline can carry) from the total working weight (rated standard load plus dragline weight), resulting in a total weight of approximately 7,146,347 kg (15,754,998 lbs) (Bucyrus International 2008d). Based on the assumption that the dragline is constructed entirely out of steel plate, the total weight is assigned to this material. The Associated Documentation (referenced below) provides a summary and additional details of modeled input and output flows, including calculation methods.

CITATION AND ASSOCIATED DOCUMENTATION
This document should be cited as:
National Energy Technology Laboratory (NETL). 2015. NETL Life Cycle Inventory Data – Unit Process: Dragline; Manufacture; For surface coal mine, at plant; 7,439 metric tonne working weight. U.S. Department of Energy, National Energy Technology Laboratory. Last Updated: September 2015 (Version 01). Retrieved on [DATE] from [URL for the ILCD version of this unit process]. Retrieved on [DATE] from [URL for this dataset].

This dataset is part of the NETL Unit Process Library. The Library offers additional information concerning this dataset in the form of a Detailed Spreadsheet Documentation (DS) file and a Process Documentation File (DF). The DS file is an Excel file that contains all of the parameters, inputs, and outputs for a given system as well as background data, calculations and quality scores. The DF file is a PDF document that contains major assumptions and data sources that are the basis for each unit process. The NETL Unit Process Library is located on the NETL website (netl.doe.gov) under Research / Energy Analysis / Energy Trends and Issues / Life Cycle Analysis / Unit Process Library.

This dataset was converted directly from the DS with additional supporting information provided by the DF. Full citations for the DS and DF are given below.

DS File
National Energy Technology Laboratory (NETL). 2010. NETL Life Cycle Inventory Data – Unit Process: Dragline, 8,200 ton, Construction. U.S. Department of Energy, National Energy Technology Laboratory. Last Updated: February 2010 (version 01). Retrieved on 06/20/2014 from: http://www.netl.doe.gov/File%20Library/Research/Energy%20Analysis/Life%20Cycle%20Analysis/UP_Library/DS_RMA_Petroleum_Domestic_2011-02.xls

DF File
National Energy Technology Laboratory (NETL). 2010. NETL Life Cycle Inventory Data – Unit Process: Dragline, 8,200 ton, Construction. U.S. Department of Energy, National Energy Technology Laboratory. Last Updated: February 2010 (version 01). Retrieved on 06/20/2014 from: http://www.netl.doe.gov/File%20Library/Research/Energy%20Analysis/Life%20Cycle%20Analysis/UP_Library/DF_Stage1_C_Dragline_8200ton_2010-01.pdf

## Technology
The process is based on the reference flow of 1 piece of dragline, 7,439 metric tonnes ( 8,200 short ton), as described below, and as shown in the associated documentation (see Citation and Associated Documentation section in the Description field). Construction of the dragline is based on manufacturer specifications for a Bucyrus model 8750, 8,200 ton (7,439 metric tonne) dragline. The dragline is used to physically remove the overburden of overlaying the coal to be extracted, following blasting.

## Geography
Powder River Basin

## Time period
This data set is representative of best available public data from 01/01/2008 to 12/31/2008 and is not subject to limited usability within sub-time spans (e.g. summer, winter).

## Reference product
- Dragline; Manufacture; For surface coal mine, at plant; 7,439 metric tonne working weight: 1 Item(s); data quality (2,3,1,1,1)

## Inputs from technosphere
- Steel plate; Blast furnace route; Production mix; 85% recovery rate: 7.14635e6 kg; data quality (2,3,1,1,1)

## Inventory method
Attributional

## Modelling constants
All elementary and technosphere flows are calculated on a functional unit basis. Calculations involving combustion primarily to generate useful work are done using lower heating values (LHV) and calculations involving combustion primarily to generate useful heat are done using higher heating values (HHV). Unless explicitly stated in the associated reference documents applicable calculations assumed standard atmospheric temperature and pressure (SATP).

## Completeness
Individual relevant flows captured

## Data selection
Best publically available data

## Data treatment
No allocation applied

## Data collection
No primary data collected

## Intended application
This is a gate-to-gate manufacturing process and can be used for any type of LCA study.

## Project
National Energy Technology Laboratory (NETL) Unit Process Library

## Sources
- Bucyrus International. 2008d. Walking Draglines: The range
- National Energy Technology Laboratory (NETL). 2010. Dragline; Manufacture; For surface coal mine, at plant; 7,439 metric tonne working weight
