# Pesticide, corn, 2022

Dataset: openLCA process, unit process
Category: Corn Farming
Geography: RNA
Time period: 2010-01-01 to 2100-12-31
Generated by: Daniel Inman
Published in: Hsu, D.
restrictionsDescription: All information can be accessed by everybody.
copyright: false

## General comment
Application of pesticides (herbicides and insecticides) to one hectare of corn. Data are based on USDA 2006 Agricultural chemical use survey. Extrapolation of existing data to 2022 estimates.

Process has been reviewed by Dr. Dwayne Westfall, Dept Soil and Crop Sciences, Colorado State University. Date of review Sept 10 - 30 2008.

## Technology
modern

## Geography
North America

## Time period
2010-2100

## Reference product
- Pesticide, corn, 2022: 1 ha

## Inputs from technosphere
- CUTOFF Atrazine, at regional storehouse: 0.957 kg
  Total atrazine applied, kg ai. Assumeing 66% corn acres planted recieved atrazine. Data from: USDA NASS 2006. Agricultural Chemical Usage 2005 Field Crops Summary. Pages 19-20.
- CUTOFF [sulfonyl]urea-compounds, at regional storehouse: 0.024 kg
  This class includes nicosulfuron. Data from: USDA NASS 2006. Agricultural Chemical Usage 2005 Field Crops Summary. Pages 19-20.
- CUTOFF Organophosphorus-compounds, at regional storehouse: 0.00768 kg
  This class includes Tebupirimphos. Data from: USDA NASS 2006. Agricultural Chemical Usage 2005 Field Crops Summary. Pages 19-20.
- CUTOFF Pyretroid-compounds, at regional storehouse: 0.00056 kg
  This class includes both Tefluthrin and Cyfluthrin. Data from: USDA NASS 2006. Agricultural Chemical Usage 2005 Field Crops Summary. Pages 19-20.
- CUTOFF Metolachlor, at regional storehouse: 0.347 kg
  Total metolochlor applied, kg ai. Assuming 23% of corn acres received metolochlor. Data from: USDA NASS 2006. Agricultural Chemical Usage 2005 Field Crops Summary. Pages 19-20.
- CUTOFF Application of plant protection products, by field sprayer: 2 ha
  Assuming field is covered twice during season
- Transport, combination truck, diesel powered: 1.09 t*km
  Transport of pesticides and seed to the field assuming 80.6km round trip distance. Value is estimated.
- CUTOFF Glyphosate, at regional storehouse: 0.332 kg
  Total glyphosate applied, kg ai. Assuming 31% of corn acres planted recieved glyphosate. Data from: USDA NASS 2006. Agricultural Chemical Usage 2005 Field Crops Summary. Pages 19-20.
- CUTOFF Alachlor, at regional storehouse: 0.428 kg
  Alochlor and Acetochlor are in the same chemical class (chloroacetanilide) and are produced similarly. Data from: USDA NASS 2006. Agricultural Chemical Usage 2005 Field Crops Summary. Pages 19-20.
- CUTOFF 2,4-D, at regional storehouse: 0.0162 kg
  Total 2,4-D applied, kg ai. Assumeing 3% corn acres planted recieved 2,4-D. Data from: USDA NASS 2006. Agricultural Chemical Usage 2005 Field Crops Summary. Pages 19-20.

## Emissions to nature
- Metolachlor, (S): 0.347 kg
  Total metolochlor applied, kg ai. Assuming 23% of corn acres received metolochlor. Adjusted to 1 kg of corn. Data from: USDA NASS 2006. Agricultural Chemical Usage 2005 Field Crops Summary. Pages 19-20.
- Nicosulfuron: 0.024 kg
  Total nicosulfuron applied, kg ai. Assuming 10% of corn acres received application. Adjusted to 1 kg of corn. Data from: USDA NASS 2006. Agricultural Chemical Usage 2005 Field Crops Summary. Pages 19-20.
- Mesotrione: 0.0266 kg
  Total mesotrione applied, kg ai. Assuming 20% of corn acres received mesotrione. Adjusted to 1 kg of corn. Data from: USDA NASS 2006. Agricultural Chemical Usage 2005 Field Crops Summary. Pages 19-20.
- Glyphosate: 0.332 kg
  Total glyphosate applied, kg ai. Assuming 31% of corn acres planted recieved glyphosate. Adjusted to 1 kg of corn.Data from: USDA NASS 2006. Agricultural Chemical Usage 2005 Field Crops Summary. Pages 19-20.
- Atrazine: 0.957 kg
  Total atrazine applied, kg ai. Assumeing 66% corn acres planted recieved atrazine. Adjusted to 1 kg of corn. Data from: USDA NASS 2006. Agricultural Chemical Usage 2005 Field Crops Summary. Pages 19-20.
- 2,4-D: 0.0162 kg
  Total 2,4-D applied, kg ai. Assumeing 3% corn acres planted recieved 2,4-D. Adjusted to 1 kg of corn.Data from: USDA NASS 2006. Agricultural Chemical Usage 2005 Field Crops Summary. Pages 19-20.
- Tebupirimphos: 0.00768 kg
  Total tebupirimphos applied, kg ai. Assuming 6% ofcorn acres received application. Adjusted to 1 kg of corn. Data from: USDA NASS 2006. Agricultural Chemical Usage 2005 Field Crops Summary. Pages 19-20.
- Tefluthrin: 0.00924 kg
  Total tefluthrin applied, kg ai. Assuming 7% of corn acres received application. Adjusted to 1 kg of corn.Data from: USDA NASS 2006. Agricultural Chemical Usage 2005 Field Crops Summary. Pages 19-20.
- Cyfluthrin: 0.00056 kg
  Total cyfluthrin applied, kg ai. Assuming 7% of corn acres received appication. Adjusted to 1 kg of corn. Data from: USDA NASS 2006. Agricultural Chemical Usage 2005 Field Crops Summary. Pages 19-20.
- Atrazine: 0.067 kg
  Amount of total atrazine applied, kg. that leaches below the root zone. Assumeing 66% corn acres planted recieved atrazine. Fraction of atrazine applied that has been documented to leach below the root zone. Assuming approximately 7% of applied atrazine is lost. From: Persicani, D., G. Gasparetti, P. Siro, M. Bonvini. 1995. Journal of Contaminant Hydrology 19:127-144. Page 137.
- Acetochlor: 0.428 kg
  Total acetochlor applied, kg ai. Assumeing 23% corn acres planted recieved acetochlor. Adjusted to 1 kg of corn. Data from: USDA NASS 2006. Agricultural Chemical Usage 2005 Field Crops Summary. Pages 19-20.

## Sources
- Hsu, D.
- Nemecek, T.
- USDA NASS
