# Transport, light commercial truck, gasoline powered, East North Central

Dataset: openLCA process, unit process
Category: General Freight Trucking
Geography: RNA
Time period: 2010-01-01 to 2010-01-01
Generated by: Nathan Hardesty
Published in: U.S. Environmental Protection Agency (EP
restrictionsDescription: All information can be accessed by everybody.
copyright: false

## General comment
This dataset represents the East North Central U.S. (IA, MI, MN, WI (Reference 10)) average airborne emissions for operating a gasoline powered light commercial truck. The inventory includes all vehicle operation processes, including off-network and refueling activities.
The refinery-to-pump transportation and distribution data are calculated from Argonne National Laboratory's GREET 1.8d.1 model.
The vehicle operation data are calculated from EPA's MOVES2010a model, using the assumptions described in the corresponding detailed spreadsheet. Emissions factors in MOVES2010a are largely based on EPA's Mobile Source Observation Database, which in turn includes data from a variety of vehicle studies (References 6-8).
MOVES2010a acknowledges sources of uncertainty in the model structure, the population and acitivty data, and other model parameters. As of July 2011, the uncertainty calculation function of the model has not been activated.

## Technology
Combustion of gasoline in a light commercial truck.

## Geography
US

## Reference product
- Transport, light commercial truck, gasoline powered, East North Central: 1 t*km

## Inputs from technosphere
- Transport, combination truck, average fuel mix: 0.066962 t*km
- Gasoline, at refinery: 0.229954 l
- Transport, train, diesel powered: 0.12502 t*km
- Transport, ocean freighter, average fuel mix: 0.572503 t*km
- Transport, pipeline, unspecified petroleum products: 0.657275 t*km
- Transport, barge, average fuel mix: 0.0433829 t*km

## Emissions to nature
- Nitrogen dioxide: 0.00017477 kg
- Dinitrogen monoxide: 4.05808e-5 kg
- Particulates, < 10 um: 3.8047e-5 kg
  PM10 from organic carbon, elemental carbon, and sulfate particulates.
- Hydrocarbons (other than methane): 0.00129281 kg
- Carbon monoxide, fossil: 0.0167498 kg
- Ammonia: 3.94034e-5 kg
- Particulates, < 10 um: 1.95674e-5 kg
  PM10 from brakewear.
- Methane: 7.46541e-5 kg
- Particulates, < 2.5 um: 1.44605e-6 kg
  PM2.5 from tirewear.
- Nitrogen oxides: 0.00177413 kg
- Particulates, < 10 um: 6.03004e-6 kg
  PM10 from tirewear.
- Particulates, < 2.5 um: 5.12236e-6 kg
  PM2.5 from brakewear.
- Sulfur dioxide: 1.04387e-5 kg
- Nitrogen oxide: 0.00159936 kg
- Carbon dioxide, fossil: 0.534718 kg
- VOC, volatile organic compounds: 0.00133779 kg
- Particulates, < 2.5 um: 3.50341e-5 kg
  PM2.5 from organic carbon, elemental carbon, and sulfate particulates.

## Sources
- U.S. Environmental Protection Agency (EP
- National Institute of Standards and Tech
- EPA
- U.S. Alternative Fuels and Advanced Vehi
- Transportation Characteristics Branch, U
- Eastern Research Group
- Assessment and Standards Division, Offic
- Assessment and Standards Division, Offic
- Wang, M.
- National Climatic Data Center, National
