# Chainsawing, hand felling and delimbing, INW

Dataset: openLCA process, unit process
Category: Logging
Geography: RNA
Time period: 1989-01-01 to 1996-01-01
Generated by: Maureen Puetmann
Published in: Leonard R. Johnson
restrictionsDescription: All information can be accessed by everybody.
copyright: false

## General comment
Important note: although most of the data in the US LCI database has undergone some sort of review, the database as a whole has not yet undergone a formal validation process. Please email comments to lci@nrel.gov.

## Technology
Average technology. Some data extrapolated from similar processes.

## Geography
US Inland West including Montana, Idaho, and eastern Washington

## Reference product
- Chainsawing, hand felling and delimbing, INW: 1 h

## Inputs from technosphere
- Diesel, combusted in industrial equipment: 0.7579 l
- CUTOFF Lubricants, unspecified, at plant: 0.0122085 kg

## Sampling procedure
Fuel consumption data for the selected harvesting systems is generally based on the horsepower of the machines used within those systems. The fuel consumption calculations show consistency across the range of equipment used and should have a fairly high degree of reliability. Lubricant consumption was calculated as a percent of fuel consumption. This assumption generalizes the consumption rate and fails to distinguish between individual equipment characteristics.

## Sources
- Maureen Puettmann
- Leonard R. Johnson
