# Coal mine equipment assembly; Production mix, surface mine

Dataset: openLCA process, unit process
Category: Bit. Coal and Lignite Surface Mining
Geography: US
Time period: 2006-01-01 to 2006-12-31
Generated by: Timothy Skone
Owner: National Energy Technology Laboratory
Reviewer: Robert James
Published in: National Energy Technology Laboratory (NETL). 2010. Coal mine equipment assembly; Production mix, surface mine
restrictionsDescription: Use of this dataset is not restricted, but a statement of attribution is required. Please use the following attribution statement:
National Energy Technology Laboratory's (NETL) Unit Process Library
626 Cochrans Mill Road, P.O. Box 10940
Pittsburgh, PA 15236-0940
http://www.netl.doe.gov/research/energy-analysis/life-cycle-analysis/unit-process-library
Neither the U.S. Department of Energy (DOE) National Energy Technology Laboratory (NETL) nor any person acting on behalf of these organizations:
A. Makes any warranty or representation, express or implied, with respect to the accuracy, completeness, or usefulness of the information contained in this document, or that the use of any information, apparatus, method, or process disclosed in this document may not infringe on privately owned rights; or
B. Assumes any liability with this report as to its use, or damages resulting from the use of any information, apparatus, method, or process disclosed in this document.
Reference herein to any specific commercial product, process, or service by trade name, trademark, manufacturer, or otherwise, does not necessarily constitute or imply its endorsement, recommendation, or favoring by NETL. The views and opinions of the authors expressed herein do not necessarily state or reflect those of NETL.
copyright: true

## General comment
This process is part of the NETL Unit Process Library. To access the library and the original dataset:
1) Navigate to the NETL LCA home page (http://www.netl.doe.gov/lca)
2) Then navigate to the “Unit Process Library”
3) From the library, the unit process of interest can be found either through the "Complete Listing of the Unit Process Library link" or through the link to the "Unit Process Database" spreadsheet
4) For each process, a Data Sheet (DS) and Data File (DF) are available

BRIEF DESCRIPTION
This parameterized system process calculates the quantity of each piece of equipment needed to extract and produce coal at a large surface mine, mining PRB sub-bituminous coal, over the lifetime of the plant. Inputs and outputs are reported on the basis of 1 kg of coal.

GOAL AND SCOPE
This system process assembles the types and pieces of equipment required for the construction of a surface coal mine used to extract and produce Powder River Basin (PRB) sub-bituminous coal under Life Cycle (LC) Stage #1. The coal produced is transported by rail (LC Stage #2) to an energy conversion facility (LC Stage #3) over a 30 year study period, as described below and visually represented in the associated documentation (referenced in the Citation and Associated Documentation section below). Draglines, shovels, loaders, a conveyor system, drills, crushers, silos, and trucks are the included input flows for the assembly of a single PRB coal surface mine. This assembly process sums the necessary equipment for construction of the surface mine by using the expected equipment lifetimes in comparison to the 30 year study period. Inputs calculated in this way are scaled to produce 1 kg of PRB sub-bituminous coal.

Construction data, including the mass of raw materials required to construct a single piece of each type of equipment, are calculated in separate unit processes. Therefore, the following unit processes are considered to be embedded in this assembly unit process:
- Dragline; Manufacture; At plant; 7,439 metric tonne working weight
- Electric shovel; Manufacture; At plant; 109 metric tonne payload
- Track loader; Manufacture; At point-of-sale, U.S.; 178 kW
- Coal conveyor system; Manufacture; At point-of-sale, for surface mine; 1.83 m belt width
- Blasthole drill; Manufacture; At plant, For surface coal mine
- Tractor-propelled coal crusher; Manufacture; At plant, Powder River Basin coal
- Coal loading silo; Manufacture; For railcar loading of coal at mine
- Mining truck; Manufacture; For surface mine, At plant; Gross machine operating weight 623,690 kg

For a discussion of environmental emissions associated with the manufacture of raw materials used in the construction of PRB coal surface mine components, as well as other pertinent information, please refer to these separate unit processes.

BOUNDARY AND DESCRIPTION
A visual representation of the boundary of this unit process is available in the associated documentation (referenced in the Citation and Associated Documentation section below). The total annual production of the representative PRB coal surface mine was taken from the average of the top four producing surface mines in the Powder River Basin during 2008, North Antelope-Rochelle, Black Thunder, Jacobs Ranch, and Cordero Rojo (NMA 2009). This average, 60,804,057,198.5 kg/year, was multiplied by the length of the study period (default value of 30 years) for a total of 1,824,121,715,955 kg over the life of the mine.

Data for the bucket capacity, PRB coal density, and PRB coal seam thickness near the representative mine site were used to determine the amount of overburden needed to be moved by a single dragline annually (Miners Midweek 2006, Bucyrus International 2008d, McCartney and Williams 2009, EPA 2004). The total amount of overburden removed by draglines was divided by the removal capacity of a single dragline for an estimate of 3 draglines required to be in operation at the mine site at one time. An individual dragline was assumed to have a life expectancy of 30 years, or one study period.

The number of electric shovels required at the mine site was calculated by using specifications for the number of shovels in use at Black Thunder Mine (Thunder Basin Coal Company 2009) and Cordero Rojo (MiningTechnology.com 2009), and the amount of coal extracted annually at those mines (NMA 2009). The average amount of coal mined per shovel, per year was 6,378,470,888 kg/shovel/year. The average amount of PRB coal mined per year at the representative mine (NMA 2009) was divided by this amount for a total of 10 shovels in operation at the mine. Once again, the life expectancy of a single shovel was assumed to be 30 years.

For the track loader, it was assumed that 10 pieces were required at the mine. Each loader was assumed to have a 30 year life expectancy. Specifications for a Goodyear conveyor belt stated that their belts could be expected to last 20 years (Goodyear Engineered Products 2009b), so that was assumed to be the lifetime of the entire conveyor system. The conveyor system itself was sized from specifications for a system in use at a PRB mine, so it was assumed that there would only be a single conveyor system constructed.

The SME Mining Engineering Handbook stated that three rotary drills were required during cast blasting of overburden, so it was assumed that the study mine would also require three pieces (SMME 1992). Each of the drills is assumed to have a 30 year lifetime. Manufacturer specifications gave a capacity of 10,000 short tons of coal per hour for a Gundlach coal crusher (Gundlach Equipment Corporation 2009). This value was converted to kg coal/year, and then the estimated annual mine production was divided by the total, which came out to be a single crusher. This single crusher was assumed to be the only one required to crush coal at the mine, and was also assumed to have a 30 year life expectancy.

BNSF publications listed the number of coal loading silos in use at each of the 4 PRB mines used to determine the coal production rate of the study mine (BNSF 2009). Records for 3 of the 4 stated that some additional slot storage capacity was unaccounted for in the number of silos, and this was taken into account when calculating the number of silos at the study mine. The number of silos averaged out to 5.5, so this number was rounded up to 6 total silos to account for additional slot storage capacity. Each of the silos was assumed to last the entire length of the 30 year study period.

The final type of equipment in use at the PRB coal surface mine was mining trucks. Each truck has a hauling capacity of 345,000 kg (Caterpillar 2003). The estimated mine production per year was converted to kg/hour. It was assumed that each truck could make 2 round trips from being loaded to a coal stockpile location each hour. The mine production (in kg/hour) was divided by an individual truck’s haul capacity, and then divided by two trips/hour, for a total of 10 trucks at the mine. The trucks were assumed to have a life expectancy of 10 years.

For each type of equipment, the replacement rate was calculated by dividing the mine lifetime (default value of 30 years) by the expected lifetime of that type of equipment. This resulted in replacement rates of 1.0 pieces/study-period for the draglines, shovels, loaders, drills, crushers, and silos; 1.5 pieces for the conveyor system, and 3.0 pieces for the trucks. The final calculation was to multiply the number of each type of equipment required by the replacement rate for the same type of equipment, then divide that value by the estimated total production of the mine over the duration of the study period. These values, in pcs/kg coal produced, are for the fraction of a single piece of each type of equipment required over the life of the study to produce 1 kg of PRB sub-bituminous coal.

The annual mine production adjustable parameter is the total amount of PRB sub-bituminous coal estimated to be produced at the mine over the life of the mine. This parameter was based on the average yearly production of the top four producing PRB surface mines in 2008. This variable can be adjusted to reflect a larger or smaller scale surface mine.

The mine lifetime adjustable parameter indicates the temporal boundary of the study. In this case, the default value is 30 years, which can be adjusted to reflect a longer or shorter study period based on mine life expectancy.

The equipment lifetime adjustable parameters give the estimated or assumed life expectancy of a single piece of a given type of equipment. The default values for the draglines, shovels, loaders, drills, crusher, and silo were all assumed to be 30 years. The conveyor system was assumed to have a lifetime of 20 years, based on manufacturer specifications for the belt. The mining trucks were assumed to have a default lifetime of 10 years. Each of these values was assumed, and can be adjusted to reflect longer or shorter equipment life expectancies.

The final group of adjustable parameters was for the number of each type of equipment required to be in operation at the mine at any given point in time. The default number of track loaders and conveyor systems were assumed values. The number of other pieces of equipment was based on equipment capacity, mine size, and the mine production rate. The number of any type of equipment can be adjusted to reflect assumptions reflecting larger or smaller scale mine operations.

Additional details regarding input and output flows, calculation methods and other relevant information are available in the associated documentation (referenced in the Citation and Associated Documentation section below).

CITATION AND ASSOCIATED DOCUMENTATION
This document should be cited as:
National Energy Technology Laboratory (NETL). 2015. NETL Life Cycle Inventory Data – Unit Process: Coal mine equipment assembly; Production mix, surface mine. U.S. Department of Energy, National Energy Technology Laboratory. Last Updated: September 2015 (version 01). Retrieved on [DATE] from [URL for this dataset].

This dataset is part of the NETL Unit Process Library. The Library offers additional information concerning this dataset in the form of a Detailed Spreadsheet Documentation (DS) file and a Process Documentation File (DF). The DS file is an Excel file that contains all of the parameters, inputs, and outputs for a given system as well as background data, calculations and quality scores. The DF file is a PDF document that contains major assumptions and data sources that are the basis for each unit process. The NETL Unit Process Library is located on the NETL website (netl.doe.gov) under Research / Energy Analysis / Energy Trends and Issues / Life Cycle Analysis / Unit Process Library.

This dataset was converted directly from the DS with additional supporting information provided by the DF. Full citations for the DS and DF are given below.

DS File
National Energy Technology Laboratory (NETL). 2010. NETL Life Cycle Inventory Data – Unit Process: PRB Coal Surface Mine Assembly, Construction. U.S. Department of Energy, National Energy Technology Laboratory. Last Updated: February 2010 (version 01). Retrieved on 6/30/2014 from: http://www.netl.doe.gov/File%20Library/Research/Energy%20Analysis/Life%20Cycle%20Analysis/UP_Library/DS_Stage1_C_Assembly_PRB_Coal_Surface_Mine_2010-01.xls

DF File
National Energy Technology Laboratory (NETL). 2010. NETL Life Cycle Inventory Data – Unit Process: PRB Coal Surface Mine Assembly, Construction. U.S. Department of Energy, National Energy Technology Laboratory. Last Updated: February 2010 (version 01). Retrieved on 6/30/2014 from: http://www.netl.doe.gov/File%20Library/Research/Energy%20Analysis/Life%20Cycle%20Analysis/UP_Library/DF_Stage1_C_Assembly_PRB_Coal_Surface_Mine_2010-01.pdf

## Technology
This system process assembles the types and pieces of equipment required for the construction of a surface coal mine used to extract and produce Powder River Basin (PRB) sub-bituminous coal under Life Cycle (LC) Stage #1. The coal produced is transported by rail (LC Stage #2) to an energy conversion facility (LC Stage #3) over a 30 year study period, as described below and visually represented in the associated documentation (referenced in the Citation and Associated Documentation section in the Description field). Draglines, shovels, loaders, a conveyor system, drills, crushers, silos, and trucks are the included input flows for the assembly of a single PRB coal surface mine.

The following unit processes are considered to be embedded in this system process:
- DF_Stage1_C_Dragline_8200ton_2010.01.doc
- DF_Stage1_C_Electric_Shovel_120_Tons_Payload_2010.01.doc
- DF_Stage1_C_Track_Loader_239_HP_2010.01.doc
- DF_Stage1_C_Steel_Cord_Conveyor_System_72in_2010.01.doc
- DF_Stage1_C_Blasthole_Drill_250000lb_2010.01.doc
- DF_Stage1_C_Coal_Crusher_254000lb_2010.01.doc
- DF_Stage1_C_Steel_Coal_Loading_Silo_PRB_2010.01.doc
- DF_Stage1_C_Mining_Truck_623690kg_2010.01.doc

A visual representation of the boundary of this unit process is available in the associated documentation (referenced in the Citation and Associated Documentation section in the Description field). Data, calculations and assumptions for this system process were based on information from the top four producing surface mines in the Powder River Basin during 2008, North Antelope-Rochelle, Black Thunder, Jacobs Ranch, and Cordero Rojo (NMA 2009).

Additional details regarding mining technologies incorporated into this system process are available in the associated documentation for this system process (referenced in the Citation and Associated Documentation section in the Description field) and in the associated documentation for the unit processes embedded within the system.

## Time period
This data set is representative of best available public data from 01/01/2006 to 12/31/2006 and is not subject to limited usability within sub-time spans (e.g. summer, winter).

## Parameters
- total_prod: 1.82412e12; = mine_prod_yr*mine_life
  [kg] Total amount of coal produced by the mine over the study period
- convey_repl: 1.5; = mine_life/convey_life
  [conveyors] Replacement rate of conveyors needed over lifetime of mine, based on lifetimes of convey
- convey_pcs: 8.22314e-13; = conveyors*convey_repl/total_prod
  [conveyors/kg coal produced] Fraction of one conveyor constructed per kg coal produced by mine over
- drills: 3
  [drills] Adjustable parameter; estimated number of drills required at the mine
- loaders: 10
  [loaders] Adjustable parameter; estimated number of loaders required at the mine
- silo_life: 30
  [years] Adjustable parameter; estimated life expectancy of a single silo. See Assumption #1
- silo_pcs: 3.28925e-12; = silos*silo_repl/total_prod
  [silos/kg coal produced] Fraction of one silo constructed per kg coal produced by mine over study pe
- drag_life: 30
  [years] Adjustable parameter; estimated life expectancy of a single dragline. See Assumption #1
- mine_life: 30
  [years] Adjustable parameter; estimated life of the mine, same as lifetime of the energy conversion
- conveyors: 1
  [conveyors] Adjustable parameter; estimated number of conveyor systems required at the mine
- truck_pcs: 1.80909e-11; = trucks*truck_repl/total_prod
  [trucks/kg coal produced] Fraction of one truck constructed per kg coal produced by mine over study
- drill_life: 30
  [years] Adjustable parameter; estimated life expectancy of a single drill. See Assumption #1
- trucks: 11
  [trucks] Adjustable parameter; estimated number of trucks required at the mine
- convey_life: 20
  [years] Adjustable parameter; estimated life expectancy of a single conveyor system
- shovel_life: 30
  [years] Adjustable parameter; estimated life expectancy of a single shovel. See Assumption #1
- silos: 6
  [silos] Adjustable parameter; estimated number of silos required at the mine
- truck_repl: 3; = mine_life/truck_life
  [trucks] Replacement rate of trucks needed over lifetime of mine, based on lifetimes of truck and mi
- crusher_repl: 1; = mine_life/crusher_life
  [crushers] Replacement rate of crushers needed over lifetime of mine, based on lifetimes of crusher
- drag_pcs: 1.64463e-12; = draglines*drag_repl/total_prod
  [draglines/kg coal produced] Fraction of one dragline constructed per kg coal produced by mine over
- draglines: 3
  [draglines] Adjustable parameter; estimated number of draglines required at the mine
- loader_repl: 1; = mine_life/loader_life
  [loader] Replacement rate of loaders needed over lifetime of mine, based on lifetimes of loader and
- loader_life: 30
  [years] Adjustable parameter; estimated life expectancy of a single loader. See Assumption #1
- drag_repl: 1; = mine_life/drag_life
  [draglines] Replacement rate of draglines needed over lifetime of mine, based on lifetimes of dragli
- crushers: 1
  [crushers] Adjustable parameter; estimated number of crushers required at the mine
- crusher_pcs: 5.48209e-13; = crushers*crusher_repl/total_prod
  [crushers/kg coal produced] Fraction of one crusher constructed per kg coal produced by mine over st
- silo_repl: 1; = mine_life/silo_life
  [silos] Replacement rate of silos needed over lifetime of mine, based on lifetimes of silo and mine
- shovel_repl: 1; = mine_life/shovel_life
  [shovels] Replacement rate of shovels needed over lifetime of mine, based on lifetimes of shovel and
- loader_pcs: 5.48209e-12; = loaders*loader_repl/total_prod
  [loaders/kg coal produced] Fraction of one loader constructed per kg coal produced by mine over stud
- shovels: 10
  [shovels] Adjustable parameter; estimated number of shovels required at the mine
- mine_prod_yr: 6.08041e10
  [kg/yr] Adjustable parameter; estimated amount of PRB coal produced by mine over a single year
- shovel_pcs: 5.48209e-12; = shovels*shovel_repl/total_prod
  [shovels/kg coal produced] Fraction of one shovel constructed per kg coal produced by mine over stud
- truck_life: 10
  [years] Adjustable parameter; estimated life expectancy of a single truck. See Assumption #6
- drill_pcs: 1.64463e-12; = drills*drill_repl/total_prod
  [drills/kg coal produced] Fraction of one drill constructed per kg coal produced by mine over study
- crusher_life: 30
  [years] Adjustable parameter; estimated life expectancy of a single crusher. See Assumption #1
- drill_repl: 1; = mine_life/drill_life
  [drills] Replacement rate of drills needed over lifetime of mine, based on lifetimes of drill and mi

## Reference product
- Coal mine equipment assembly; Production mix, surface mine: 1 Item(s); data quality (2,4,2,3,2)

## Inputs from technosphere
All rows: data quality (2,4,2,3,2)
- Tractor-propelled coal crusher; Manufacture; For surface mine, at plant: 5.48209e-13 Item(s); = crusher_pcs
- Mining truck; Manufacture; For surface mine, at plant; Gross machine operating weight 623,690 kg: 1.80909e-11 Item(s); = truck_pcs
- Coal loading silo; Manufacture; For railcar loading of coal, surface mine: 3.28925e-12 Item(s); = silo_pcs
- Blasthole drill; Manufacture; For surface coal mine, at plant: 1.64463e-12 Item(s); = drill_pcs
- Coal conveyor system; Manufacture; For surface mine, at point-of-sale; 1.83 m belt width: 8.22314e-13 Item(s); = convey_pcs
- Dragline; Manufacture; For surface coal mine, at plant; 7,439 metric tonne working weight: 1.64463e-12 Item(s); = drag_pcs
- Track loader; Manufacture; At point-of-sale; 178 kW: 5.48209e-12 Item(s); = loader_pcs
- Electric shovel; Manufacture; For surface coal mine, at plant; 109 metric tonne payload: 5.48209e-12 Item(s); = shovel_pcs

## Inventory method
Attributional

## Modelling constants
All elementary and technosphere flows are calculated on a functional unit basis. Calculations involving combustion primarily to generate useful work are done using lower heating values (LHV) and calculations involving combustion primarily to generate useful heat are done using higher heating values (HHV). Unless explicitly stated in the associated reference documents applicable calculations assumed standard atmospheric temperature and pressure (SATP).

## Completeness
Individual relevant flows captured

## Data selection
Best publically available data

## Data treatment
No allocation applied

## Data collection
No primary data collected

## Intended application
This is a gate-to-gate auxillary process and can be used for any type of LCA study.

## Project
National Energy Technology Laboratory (NETL) Unit Process Library

## Sources
- National Energy Technology Laboratory (NETL). 2010. Coal mine equipment assembly; Production mix, surface mine
- Miners Midweek. 2006. Dragline is a step closer
- Bucyrus International. 2008d. Walking Draglines: The range
- Goodyear Engineered Products. 2009b. Flexsteel Conveyor Belt
- National Mining Association (NMA). 2009. 2008 Coal Producer Survey
- Society for Mining, Metallurgy, and Exploration, Inc. (SMME). 1992. SME Mining Engineering Handbook
- Caterpillar. 2003. 797B Mining Truck
- McCarthney, R.H. and Williams Jr., R.L. 2010. Fuel Blending with PRB Coal
- U.S. Environmental Protection Agency (EPA). 2004. Evaluation of Impacts to Underground Sources of Drinking Water by Hydraulic Fracturing of Coalbed Methane Reservoirs, Attachment 5: The Powder River Basin
- BNSF Railway. 2009. Guide to Coal Mines: Mines Served by BNSF Railway
- Bucyrus International. 2008c. Electric Mining Shovels: The range
- Gundlach Equipment Corporation. 2009. Gundlach Breakers
- MiningTechnology.com. 2009. Cordero Rojo Coal Mine, WY, USA
- Thunder Basin Coal Company. 2009. Black Thunder Mine…Delivering Energy to America
