# Transport, combination truck, long-haul, diesel powered, Northeast

Dataset: openLCA process, unit process
Category: General Freight Trucking
Geography: RNA
Time period: 2010-01-01 to 2010-01-01
Generated by: Nathan Hardesty
Published in: U.S. Environmental Protection Agency (EP
restrictionsDescription: All information can be accessed by everybody.
copyright: false

## General comment
This dataset represents the Northeast U.S. (ME, NH, VT, MA, CT, RI, NY, PA, NJ, MD, DE, DC (Reference 11)) average airborne emissions for operating a diesel powered, combination truck in a long-haul manner (trips greater than 200 miles [322 km]). The inventory includes all vehicle operation processes, including off-network and refueling activities.
The refinery-to-pump transportation and distribution data are calculated from Argonne National Laboratory's GREET 1.8d.1 model.
The vehicle operation data are calculated from EPA's MOVES2010a model, using the assumptions described in the corresponding detailed spreadsheet. Emissions factors in MOVES2010a are largely based on EPA's Mobile Source Observation Database, which in turn includes data from a variety of vehicle studies (References 7-9).
MOVES2010a acknowledges sources of uncertainty in the model structure, the population and acitivty data, and other model parameters. As of July 2011, the uncertainty calculation function of the model has not been activated.

## Technology
Combustion of diesel in a combination, long-haul truck.

## Geography
US

## Reference product
- Transport, combination truck, long-haul, diesel powered, Northeast: 1 t*km

## Inputs from technosphere
- Diesel, at refinery: 0.0297281 l
- Transport, pipeline, unspecified petroleum products: 0.0965943 t*km
- Transport, ocean freighter, average fuel mix: 0.065514 t*km
- Transport, train, diesel powered: 0.0178832 t*km
- Transport, combination truck, average fuel mix: 0.0095831 t*km
- Transport, barge, average fuel mix: 0.00926909 t*km

## Emissions to nature
- Nitrogen oxide: 0.000519842 kg
- Ammonia: 9.53892e-7 kg
- Particulates, < 10 um: 2.41794e-6 kg
  PM10 from brakewear.
- Particulates, < 2.5 um: 1.58707e-7 kg
  PM2.5 from tirewear.
- Particulates, < 2.5 um: 2.49776e-5 kg
  PM2.5 from organic carbon, elemental carbon, and sulfate particulates.
- Methane: 3.99582e-6 kg
- Dinitrogen monoxide: 7.83319e-8 kg
- Carbon monoxide, fossil: 0.000152958 kg
- Particulates, < 10 um: 2.57491e-5 kg
  PM10 from organic carbon, elemental carbon, and sulfate particulates.
- Nitrogen dioxide: 5.19796e-5 kg
- Carbon dioxide, fossil: 0.0780518 kg
- Hydrocarbons (other than methane): 3.76045e-5 kg
- Nitrogen oxides: 0.000571822 kg
- Particulates, < 10 um: 6.61806e-7 kg
  PM10 from tirewear.
- Particulates, < 2.5 um: 6.32969e-7 kg
  PM2.5 from brakewear.
- Sulfur dioxide: 1.30338e-6 kg
- VOC, volatile organic compounds: 3.87737e-5 kg

## Sources
- U.S. Environmental Protection Agency (EP
- National Institute of Standards and Tech
- EPA
- U.S. Alternative Fuels and Advanced Vehi
- EPA
- Transportation Characteristics Branch, U
- Eastern Research Group
- Assessment and Standards Division, Offic
- Assessment and Standards Division, Offic
- Wang, M.
- National Climatic Data Center, National
