# Loader operation, large, NE-NC

Dataset: openLCA process, unit process
Category: Logging
Geography: RNA
Time period: 2003-01-01 to 2003-01-01
Generated by: Maureen Puetmann
Published in: Elaine Oneil
restrictionsDescription: All information can be accessed by everybody.
copyright: true

## General comment
Important note: although most of the data in the US LCI database has
undergone some sort of review, the database as a whole has not yet
undergone a formal validation process.
Please email comments to lci@nrel.gov.

## Technology
Average technology. Some data extrapolated from similar processes.

## Geography
Northeast/North Central (NE/NC) region of the US : Connecticut, Delaware, Illinois, Indiana, Iowa, Maine, Maryland, Massachusetts, Michigan, Minnesota, Missouri, New Hampshire, New Jersey, New York, Ohio, Pennsylvania, Rhode Island, Vermont, West Virginia, and Wisconsin.

## Reference product
- Loader operation, large, NE-NC: 1 h
  Large log Loader

## Inputs from technosphere
- CUTOFF Lubricants, unspecified, at plant: 0.295645 kg
  Hydraulic oils for transmission, per smhr
- Diesel, combusted in industrial equipment: 18.9253 l
  fuel per smhr

## Sampling procedure
Fuel consumption data for the selected harvesting systems is generally based on the horsepower of the machines used within those systems. The fuel consumption calculations show consistency across the range of equipment used and should have a fairly high degree of reliability. Lubricant consumption was calculated as a percent of fuel consumption. This assumption generalizes the consumption rate and fails to distinguish between individual equipment characteristics.

## Sources
- Elaine Oneil
- Maureen Puettmann
