# Electricity, at Grid, RFC, 2008

Dataset: openLCA process, unit process
Category: Utilities
Geography: RNA
Time period: 2008-01-01 to 2008-01-01
Generated by: Alberta Carpenter
Published in: Chris Goemans, Athena Institute
restrictionsDescription: All information can be accessed by everybody.
copyright: false

## General comment
The methodology used to put together the grid information is outlined in reference 1.

## Technology
Typical

## Geography
Delaware, District of Columbia, Indiana, Maryland, New Jersey, Ohio, Pennsylvania and West Virginia and parts of Kentucky, Michigan, Tennessee, Virginia and Wisconsin.

## Reference product
- Electricity, at Grid, RFC, 2008: 1 kWh

## Inputs from technosphere
- CUTOFF Electricity, biomass,solid, unspecified, at power plant: 9.46824e-6 kWh
  OBS – Other Biomass Solid (Animal Manure and Waste, Solid By-products, and other solid biomass not specified)
- CUTOFF Electricity, biomass, gas, landfill, at power plant: 0.0027297 kWh
  LFG – Landfill Gas
- Electricity, natural gas, at power plant: 0.0650016 kWh
  NG – Natural Gas
- CUTOFF Electricity, biomass,liquid, unspecified, at power plant: 0.00110143 kWh
  BLQ – Black Liquor
- Electricity, residual fuel oil, at power plant: 0.000798231 kWh
  RFO – Residual Fuel Oil (includes No. 5 and No. 6 Fuel Oils and Bunker C Fuel Oil)
- Electricity, bituminous coal, at power plant: 0.0122399 kWh
  WC - Waste/Other Coal (Anthracite Culm, Bituminous Gob, Fine Coal, Lignite Waste, Waste Coal) .
- Electricity, nuclear, at power plant: 0.267504 kWh
  NUC – Nuclear (Uranium, Plutonium, Thorium)
- CUTOFF Electricity, tire derived fuel, at power plant: 0.000262113 kWh
  TDF – Tired (tire derived fuel)
- CUTOFF Electricity, solar, unspecified, at power plant: 2.82885e-6 kWh
  SUN – Solar (Photovoltaic, Thermal)
- Electricity, diesel, at power plant: 0.00175648 kWh
  DFO – Distillate Fuel Oil (includes all Diesel and No. 1, No. 2, and No. 4 Fuel Oils)
- CUTOFF Electricity, biomass, liquid, sludge, at power plant: 1.96498e-5 kWh
  SLW – Sludge Waste
- CUTOFF Electricity, other fuels, unspecified, at power plant: 0.000335774 kWh
  WH – Waste heat not directly attributed to a fuel source. Note that WH should only be reported where the fuel source for the waste heat is undetermined, and for combined cycle steam turbines that are not supplementary fired
- CUTOFF Electricity, biomass, solid, biogenic MSW, at power plant: 0.00210095 kWh
  MSB – Municipal Solid Waste – Biogenic Component
- CUTOFF Electricity, other gases, unspecified, at power plant: 0.00163968 kWh
  OG – Other Gas (Butane, Coal Processes, Coke-Oven, Refinery, and other processes)
- Electricity, biomass, at power plant: 0.00176126 kWh
  WDS – Wood/Wood Waste Solids (Paper Pellets, Railroad Ties, Utility Poles, Wood Chips, and other wood solids)
- CUTOFF Electricity, hydropower, at power plant, unspecified: 0.00634425 kWh
  WAT – Water (Conventional, Pumped Storage)
- Electricity, diesel, at power plant: 1.20372e-7 kWh
  JF – Jet Fuel
- Electricity, bituminous coal, at power plant: 0.17125 kWh
  SUB – Subbituminous Coal
- Electricity, diesel, at power plant: 0.000144816 kWh
  KER – Kerosene
- CUTOFF Electricity, petroleum coke, at power plant: 0.00151893 kWh
  PC – Petroleum Coke
- CUTOFF Electricity, other gases, unspecified, at power plant: 0.00291564 kWh
  BFG – Blast Furnace Gas
- CUTOFF Electricity, biomass, gas, unspecified, at power plant: 2.28925e-6 kWh
  OBG – Other Biomass Gases (Digester Gas, Methane, and other biomass gases)
- CUTOFF Electricity, other gases, unspecified, at power plant: 9.40406e-7 kWh
  PG – Propane
- Electricity, bituminous coal, at power plant: 0.000130982 kWh
  SC - Coal Synfuel. Coal-based solid fuel that has been processed by a coal synfuel plant, and coal-based fuels such as briquettes, pellets, or extrusions, which are formed from fresh or recycled coal and binding materials.
- Electricity, bituminous coal, at power plant: 0.454456 kWh
  BIT - Anthracite Coal, and Bituminous Coal.
- CUTOFF Electricity, biomass,liquid, unspecified, at power plant: 9.40125e-7 kWh
  OBL – Other Biomass Liquid (Ethanol, Fish Oil, Liquid Acetonitrile Waste, Medical Waste, Tall Oil, Waste Alcohol, and other Biomass not specified)
- CUTOFF Electricity, petroleum, waste oil, at power plant: 7.63697e-5 kWh
  WO – Waste/Other Oil (including Crude Oil, Liquid Butane, Liquid Propane, Oil Waste, Re-Refined Motor Oil, Sludge Oil, Tar Oil, or other petroleum-based liquid wastes)
- CUTOFF Electricity, MSW, non-biogenic, at power plant: 0.00165075 kWh
  MSN – Municipal Solid Waste – Non-biogenic components
- CUTOFF Electricity, other fuels, unspecified, at power plant: 0.000130886 kWh
  OTH – Other (Batteries, Chemicals, Coke Breeze, Hydrogen, Pitch, Sulfur, Tar Coal, and miscellaneous technologies)
- CUTOFF Electricity, at wind power plant, unspecified: 0.00411452 kWh
  WND – Wind

## Sampling procedure
based on EIA electricity reports for all power plants in the US.

## Sources
- Chris Goemans, Athena Institute
- unspecified
- USEPA
- Statistics Canada
- Statistics Canada
- Statistics Canada
- Statistics Canada
- Statistics Canada
- Statistics Canada
- USEPA
- EIA
- EIA
- EIA
- EIA
- EIA
- EIA
- EIA
- EIA
- EIA
- EIA
- EIA
- US DOE
- International Energy Agency
- US DOE
