# Electricity, at eGrid, ERCT, 2010

Dataset: openLCA process, unit process
Category: Utilities
Geography: RNA
Time period: 2010-01-01 to 2010-01-01
Generated by: Samantha Wascavage
Published in: Chris Goemans, Athena Institute
restrictionsDescription: All information can be accessed by everybody.
copyright: false

## General comment
The methodology used to put together the grid information is outlined in reference 1.

## Technology
Typical

## Geography
Texas except for small portions in the panhandle (SPSO), western Texas (AZNM) and eastern Texas (SRMV).

## Reference product
- Electricity, at eGrid, ERCT, 2010: 1 kWh

## Inputs from technosphere
- Electricity, nuclear, at power plant: 0.15065 kWh
- CUTOFF Electricity, biomass, gas, landfill, at power plant: 0.000747 kWh
  Gaseous Renewable Fuels (Biomass) LFG - landfill gas and OBG
- Electricity, lignite coal, at power plant: 0.067324 kWh
- CUTOFF Electricity, petroleum coke, at power plant: 0.000483 kWh
  Petroleum (Other Fossil) PC - petroleum coke also includes SG, WO
- Electricity, natural gas, at power plant: 0.481102 kWh
- CUTOFF Electricity, at wind power plant, unspecified: 0.065732 kWh
- CUTOFF Electricity, biomass,liquid, unspecified, at power plant: 0.000205 kWh
  BLQ – Black Liquor also includes, OBL, SLW, WDL
- Electricity, diesel, at power plant: 0.000305 kWh
  Petroleum (DFO) - Distillate Fuel Oil (includes all Diesel and No. 1, No. 2, and No. 4 Fuel Oils also includes JF, KER)
- CUTOFF Electricity, other fuels, unspecified, at power plant: 0.001219 kWh
  Other Fuels OTH - Other (Batteries, Chemicals, Coke Breeze, Hydrogen, Pitch, Sulfur, Tar Coal, and miscellaneous technologies also includes MSN, PUR, WH)
- CUTOFF Electricity, hydropower, at power plant, unspecified: 0.004599 kWh
- CUTOFF Electricity, other gases, unspecified, at power plant: 0.009003 kWh
  Other Gases OG - Other Gas (Butane, Coal Processes, Coke-Oven, Refinery, and other processes also includes BFG, PG)
- Electricity, bituminous coal, at power plant: 0.218664 kWh
  subbituminous coal

## Sampling procedure
based on EIA electricity reports for all power plants in the US.

## Sources
- Chris Goemans, Athena Institute
- Statistics Canada
- unspecified
- USEPA
- Statistics Canada
- Statistics Canada
- Statistics Canada
- Statistics Canada
- USEPA
- EIA
- EIA
- EIA
- EIA
- EIA
- EIA
- EIA
- EIA
- EIA
- US DOE
- International Energy Agency
- EIA
