# Electricity, at Grid, RFC, 2010

Dataset: openLCA process, unit process
Category: Utilities
Geography: RNA
Time period: 2010-01-01 to 2010-01-01
Generated by: Samantha Wascavage
Published in: Chris Goemans, Athena Institute
restrictionsDescription: All information can be accessed by everybody.
copyright: false

## General comment
The methodology used to put together the grid information is outlined in reference 1.

## Technology
Typical

## Geography
Delaware, District of Columbia, Indiana, Maryland, New Jersey, Ohio, Pennsylvania and West Virginia and parts of Kentucky, Michigan, Tennessee, Virginia and Wisconsin.

## Reference product
- Electricity, at Grid, RFC, 2010: 1 kWh

## Inputs from technosphere
- CUTOFF Electricity, solar, unspecified, at power plant: 1e-6 kWh
  SUN – Solar (Photovoltaic, Thermal)
- CUTOFF Electricity, biomass, gas, landfill, at power plant: 0.002636 kWh
  LFG, OBG – Landfill Gas
- Electricity, bituminous coal, at power plant: 0.156007 kWh
  SUB – Subbituminous Coal
- CUTOFF Electricity, hydropower, at power plant, unspecified: 0.005882 kWh
  WAT – Water (Conventional, Pumped Storage)
- CUTOFF Electricity, petroleum coke, at power plant: 0.001429 kWh
  PC, SG, WO – Petroleum Coke
- Electricity, diesel, at power plant: 0.015288 kWh
  DFO, JF, KER – Distillate Fuel Oil (includes all Diesel and No. 1, No. 2, and No. 4 Fuel Oils)
- Electricity, bituminous coal, at power plant: 0.412241 kWh
  BIT, SC, SGC, WC - Anthracite Coal, and Bituminous Coal.
- Electricity, nuclear, at power plant: 0.267741 kWh
  NUC – Nuclear (Uranium, Plutonium, Thorium)
- Electricity, residual fuel oil, at power plant: 0.000394 kWh
  RFO – Residual Fuel Oil (includes No. 5 and No. 6 Fuel Oils and Bunker C Fuel Oil)
- CUTOFF Electricity, other fuels, unspecified, at power plant: 0.003686 kWh
  OTH, MSN, PUR, WH – Other (Batteries, Chemicals, Coke Breeze, Hydrogen, Pitch, Sulfur, Tar Coal, and miscellaneous technologies)
- Electricity, biomass, at power plant: 0.013815 kWh
  WDS, AB, MSB, MSW, OBS, TDF – Wood/Wood Waste Solids (Paper Pellets, Railroad Ties, Utility Poles, Wood Chips, and other wood solids)
- CUTOFF Electricity, other gases, unspecified, at power plant: 0.003828 kWh
  OG, BFG, PG – Other Gas (Butane, Coal Processes, Coke-Oven, Refinery, and other processes)
- Electricity, natural gas, at power plant: 0.108673 kWh
  NG – Natural Gas
- CUTOFF Electricity, biomass,liquid, unspecified, at power plant: 0.001182 kWh
  BLQ, OBL, SLW, WDL – Black Liquor
- CUTOFF Electricity, at wind power plant, unspecified: 0.007197 kWh
  WND – Wind

## Sampling procedure
based on EIA electricity reports for all power plants in the US.

## Sources
- Chris Goemans, Athena Institute
- Statistics Canada
- unspecified
- USEPA
- Statistics Canada
- Statistics Canada
- Statistics Canada
- Statistics Canada
- USEPA
- EIA
- EIA
- EIA
- EIA
- EIA
- EIA
- EIA
- EIA
- EIA
- US DOE
- International Energy Agency
- EIA
