# Roundwood, softwood, average, at forest road, NE-NC

Dataset: openLCA process, unit process
Category: Logging
Geography: RNA
Time period: 2003-01-01 to 2003-01-01
Generated by: Maureen Puetmann
Published in: Elaine Oneil
restrictionsDescription: All information can be accessed by everybody.
copyright: true

## General comment
Important note: although most of the data in the US LCI database has
undergone some sort of review, the database as a whole has not yet
undergone a formal validation process.
Please email comments to lci@nrel.gov.

## Technology
Average technology. Some data extrapolated from similar processes.

## Geography
Northeast/North Central (NE/NC) region of the US : Connecticut, Delaware, Illinois, Indiana, Iowa, Maine, Maryland, Massachusetts, Michigan, Minnesota, Missouri, New Hampshire, New Jersey, New York, Ohio, Pennsylvania, Rhode Island, Vermont, West Virginia, and Wisconsin.

## Reference product
- Roundwood, softwood, average, at forest road, NE-NC: 1 m3

## Inputs from technosphere
- Roundwood, softwood, average, High Intensity Management, NE-NC: 0.142846 m3
- Roundwood, softwood, average, Low Intensity Management, NE-NC: 0.488988 m3
- Roundwood, softwood, average, Med Intensity Management, NE-NC: 0.368167 m3

## Sampling procedure
Average is calculated based on harvested areas and the specific yield for each type of management intensity.

## Sources
- Elaine Oneil
- Maureen Puettmann
