# Gasoline, combusted in equipment, at pulp and paper mill (EXCL.)

Dataset: openLCA process, unit process
Category: Pulp, Paper, and Paperboard Mills
Geography: RNA
Time period: 1996-01-01 to 2003-01-01
Generated by: Caroline Gaudreault
Reviewer: Martha Stevenson
Published in: Franklin Associates
restrictionsDescription: All information can be accessed by everybody.
copyright: false

## General comment
This process was built to be used within the processes named "Fuels burned at bleached kraft market pulp mill", "Fuels burned at uncoated freesheet paper mill", "Fuels burned at coated freesheet paper mill", "Fuels burned at uncoated mechanical paper mill", "Fuels burned at coated mechanical paper mill" and "Fuels burned at bag and sack paper mill". It was built from the process named "Gasoline, combusted in equipment" v.1.6 available in the US LCI database. Transport and waste processes were removed. The following emissions to air were excluded (excl.): Sulfur oxidesand Nitrogen oxides.

## Technology
Gasoline combustion in equipment such as mobile refrigeration units, generators, pumps, and portable well-drilling equipment.

## Geography
United States

## Reference product
- Gasoline, combusted in equipment, at pulp and paper mill (EXCL.): 1 l

## Inputs from technosphere
- Gasoline, at refinery: 1 l

## Emissions to nature
- Butadiene: 5.8565e-7 kg
- Toluene: 6.1261e-6 kg
- Acetaldehyde: 1.1488e-5 kg
- VOC, volatile organic compounds: 0.0028351 kg
- Particulates, > 2.5 um, and < 10um: 0.00026521 kg
- Methane, fossil: 0.00092063 kg
- Benzene: 1.3975e-5 kg
- Carbon dioxide, fossil: 2.085 kg
- Xylene: 4.2688e-6 kg
- PAH, polycyclic aromatic hydrocarbons: 2.5164e-6 kg
- Propene: 3.8644e-5 kg
- Carbon monoxide, fossil: 0.13535 kg
- Dinitrogen monoxide: 6.0969e-5 kg
- Acrolein: 1.3855e-6 kg
- Formaldehyde: 1.7674e-5 kg

## Sources
- AF&PA
- Center for Transportation Research, Argo
- EPA
- Franklin Associates
