# Longwall mining system; Equipment assembly; Production mix, at underground coal mine

Dataset: openLCA process, unit process
Category: Bit. Coal and Lignite Surface Mining
Geography: US
Time period: 2008-01-01 to 2008-12-28
Generated by: Timothy Skone
Owner: National Energy Technology Laboratory
Reviewer: Robert James
Published in: National Energy Technology Laboratory (NETL). 2010. Longwall mining system; Equipment assembly; Production mix, at underground coal mine
restrictionsDescription: Use of this dataset is not restricted, but a statement of attribution is required. Please use the following attribution statement:
National Energy Technology Laboratory's (NETL) Unit Process Library
626 Cochrans Mill Road, P.O. Box 10940
Pittsburgh, PA 15236-0940
http://www.netl.doe.gov/research/energy-analysis/life-cycle-analysis/unit-process-library
Neither the U.S. Department of Energy (DOE) National Energy Technology Laboratory (NETL) nor any person acting on behalf of these organizations:
A. Makes any warranty or representation, express or implied, with respect to the accuracy, completeness, or usefulness of the information contained in this document, or that the use of any information, apparatus, method, or process disclosed in this document may not infringe on privately owned rights; or
B. Assumes any liability with this report as to its use, or damages resulting from the use of any information, apparatus, method, or process disclosed in this document.
Reference herein to any specific commercial product, process, or service by trade name, trademark, manufacturer, or otherwise, does not necessarily constitute or imply its endorsement, recommendation, or favoring by NETL. The views and opinions of the authors expressed herein do not necessarily state or reflect those of NETL.
copyright: true

## General comment
This process is part of the NETL Unit Process Library. To access the library and the original dataset:
1) Navigate to the NETL LCA home page (http://www.netl.doe.gov/lca)
2) Then navigate to the “Unit Process Library”
3) From the library, the unit process of interest can be found either through the "Complete Listing of the Unit Process Library link" or through the link to the "Unit Process Database" spreadsheet
4) For each process, a Data Sheet (DS) and Data File (DF) are available

BRIEF DESCRIPTION
This unit process calculates the number of each piece of equipment included in a longwall mining system needed to mine coal at an underground, Illinois No.6 bituminous coal mine. Equipment includes shearer, shields, head and tail drives, stage loader, and line pans.

GOAL AND SCOPE
The scope of this unit process covers the elements required for the construction of a single longwall mining system used to extract Illinois No. 6 bituminous coal from the mine face of an underground longwall coal mine in Life Cycle (LC) Stage #1. After being conveyed to the surface, the coal will be crushed and cleaned, then loaded into railcars for transport (LC Stage #2) to the power plant (LC Stage #3), as described below and in the associated documentation (referenced in the Citation and Associated Documentation section below). Input flows for the longwall mining system construction include shields, line pans, head drives, tail drives, shearers, and stage loaders. This unit process calculates the total number of each type of equipment needed as inputs to construct a single longwall mining system.

Construction data, including the mass of raw materials required to construct a single shield, line pan, head drive, tail drive, shearer, and stage loader, are calculated in separate unit processes. Therefore, the following unit processes are considered to be embedded in this assembly unit process:

- DF_Stage1_C_Hydraulic_Shield_28.2_Tons_2_Meter_2010.01.doc
- DF_Stage1_C_Line_Pan_2.5_Tons_2010.01.doc
- DF_Stage1_C_Electric_Head_Drive_65_Tons_2010.01.doc
- DF_Stage1_C_Electric_Tail_Drive_45_Tons_2010.01.doc
- DF_Stage1_C_Electric_Shearer_62.5_Tons_2010.01.doc
- DF_Stage1_C_Electric_Stage_Loader_90_Tons_2010.01.doc

For a discussion of environmental emissions associated with the manufacture of raw materials used in the construction of longwall mining system components, as well as other pertinent information, please refer to these separate unit processes.

BOUNDARY AND DESCRIPTION
An overview of the boundary of this unit process is available in the associated documentation (referenced in the Citation and Associated Documentation section below). The total number of shields was taken from an article describing a longwall mining system installed at the Mountain Laurel complex in southern West Virginia. The longwall system began producing coal on October 1, 2007. The article stated that there were 176 shields included in the longwall miner (Joy Mining Machinery 2008).

The same article stated that the line pans used in the longwall system were 39 inches (1 meter). Based on the assumption that 2-meter shields were used, there were assumed to be twice as many line pans required as shields (a total of 352).

Each longwall mining system has one head drive, tail drive, electric shearer, and stage loader. The article describing the Mountain Laurel complex stated that there was a single shearer and stage loader (Joy Mining Machinery 2008), and it was assumed there would be a single head drive and single tail drive, one at each end of the line pans.

Relevant properties of a single longwall mining system used for the calculation of input and output flows for this unit process are shown in the associated documentation (referenced in the Citation and Associated Documentation section below).

CITATION AND ASSOCIATED DOCUMENTATION
This document should be cited as:
National Energy Technology Laboratory (NETL). 2015. NETL Life Cycle Inventory Data – Unit Process:Longwall mining system; Equipment assembly; Production mix, at underground coal mine. U.S. Department of Energy, National Energy Technology Laboratory. Last Updated: September 2015 (Version 01). Retrieved on [DATE] from [URL for this dataset].

This dataset is part of the NETL Unit Process Library. The Library offers additional information concerning this dataset in the form of a Detailed Spreadsheet Documentation (DS) file and a Process Documentation File (DF). The DS file is an Excel file that contains all of the parameters, inputs, and outputs for a given system as well as background data, calculations and quality scores. The DF file is a PDF document that contains major assumptions and data sources that are the basis for each unit process. The NETL Unit Process Library is located on the NETL website (netl.doe.gov) under Research / Energy Analysis / Energy Trends and Issues / Life Cycle Analysis / Unit Process Library.

This dataset was converted directly from the DS with additional supporting information provided by the DF. Full citations for the DS and DF are given below.

DS File
National Energy Technology Laboratory (NETL). 2010. NETL Life Cycle Inventory Data – Unit Process: Longwall Mining System Assembly, Construction. U.S. Department of Energy, National Energy Technology Laboratory. Last Updated: January 2010 (version 01). Retrieved on 6/30/2014 from: http://www.netl.doe.gov/File%20Library/Research/Energy%20Analysis/Life%20Cycle%20Analysis/UP_Library/DS_Stage1_C_Assembly_Longwall_Mining_System_2010-01.xls

DF File
National Energy Technology Laboratory (NETL). 2010. NETL Life Cycle Inventory Data – Unit Process: Longwall Mining System Assembly, Construction. U.S. Department of Energy, National Energy Technology Laboratory. Last Updated: January 2010 (version 01). Retrieved on 6/30/2014 from: http://www.netl.doe.gov/File%20Library/Research/Energy%20Analysis/Life%20Cycle%20Analysis/UP_Library/DF_Stage1_C_Assembly_Longwall_Mining_System_2010-01.pdf

## Technology
The scope of this unit process covers the elements required for the construction of a single longwall mining system used to extract Illinois No. 6 bituminous coal from the mine face of an underground longwall coal mine in Life Cycle (LC) Stage #1. After being conveyed to the surface, the coal will be crushed and cleaned, then loaded into railcars for transport (LC Stage #2) to the power plant (LC Stage #3), as described in the associated documentation (referenced in the Citation and Associated Documentation section in the Description field). Input flows for the longwall mining system construction include shields, line pans, head drives, tail drives, shearers, and stage loaders.

The following unit processes are considered to be embedded in this assembly unit process:
- DF_Stage1_C_Hydraulic_Shield_28.2_Tons_2_Meter_2010.01.doc, DF_Stage1_C_Line_Pan_2.5_Tons_2010.01.doc,
- DF_Stage1_C_Electric_Head_Drive_65_Tons_2010.01.doc, DF_Stage1_C_Electric_Tail_Drive_45_Tons_2010.01.doc,
- DF_Stage1_C_Electric_Shearer_62.5_Tons_2010.01.doc, and - DF_Stage1_C_Electric_Stage_Loader_90_Tons_2010.01.doc.

An overview of the boundary of this unit process is available in the associated documentation (referenced in the Citation and Associated Documentation section in the Description field). The technology was modeled based on a longwall mining system installed at the Mountain Laurel complex in southern West Virginia which began operation on October 1, 2007 (Joy Mining Machinery 2008).

Each longwall mining system has one head drive, tail drive, electric shearer, and stage loader. The article describing the Mountain Laurel complex stated that there was a single shearer and stage loader (Joy Mining Machinery 2008), and it was assumed there would be a single head drive and single tail drive, one at each end of the line pans.

For more information, please see the associated documentation (referenced in the Citation and Associated Documentation section in the Description field).

## Time period
This data set is representative of best available public data from 01/01/2008 to 12/31/2008 and is not subject to limited usability within sub-time spans (e.g. summer, winter).

## Reference product
- Longwall mining system; Equipment assembly; Production mix, at underground coal mine: 1 Item(s); data quality (2,4,2,3,1)

## Inputs from technosphere
All rows: data quality (2,4,2,3,1)
- Electric stage loader; Manufacture; For underground coal mine, at plant: 1 Item(s)
- Electric head drive; Manufacture; For underground coal mine, at plant: 1 Item(s)
- Electric shearer; Manufacture; For underground coal mine, at plant: 1 Item(s)
- Hydraulic shield; Manufacture; For underground coal mine, at plant; 2 m width: 176 Item(s)
- Electric tail drive; Manufacture; For underground coal mine, at plant: 1 Item(s)
- Line pan; Manufacture; For underground coal mine, at plant: 352 Item(s)

## Inventory method
Attributional

## Modelling constants
All elementary and technosphere flows are calculated on a functional unit basis. Calculations involving combustion primarily to generate useful work are done using lower heating values (LHV) and calculations involving combustion primarily to generate useful heat are done using higher heating values (HHV). Unless explicitly stated in the associated reference documents applicable calculations assumed standard atmospheric temperature and pressure (SATP).

## Completeness
Individual relevant flows captured

## Data selection
Best publically available data

## Data treatment
No allocation applied

## Data collection
No primary data collected

## Intended application
This is a gate-to-gate basic process and can be used for any type of LCA study.

## Project
National Energy Technology Laboratory (NETL) Unit Process Library

## Sources
- Joy Mining Machinery. 2008. New Mountain Laurel Complex Successfully Installs State-of-the-Art JOY Longwall System
- National Energy Technology Laboratory (NETL). 2010. Longwall mining system; Equipment assembly; Production mix, at underground coal mine
