# Debarking, at plywood plant, US PNW

Dataset: openLCA process, unit process
Category: Sawmills
Geography: RNA
Time period: 2000-01-01 to 2000-01-01
Generated by: Jamie Meil
Published in: Eric T. Sackimoto
restrictionsDescription: All information can be accessed by everybody.
copyright: true

## General comment
Base process data presented with allocations to within process co-products noted. Refer to allocation worksheet for specifics. All allocations performed using mass or volume., processing 65.5 cu ft of logs
Important note: although most of the data in the US LCI database has
undergone some sort of review, the database as a whole has not yet
undergone a formal validation process.
Please email comments to lci@nrel.gov.

## Technology
typical

## Geography
US Pacific North West

## Reference product
- Bark, at plywood plant, US PNW: 0.0598 kg

## By-products
- Debarked wood, at plywood plant, US PNW: 1 kg

## Inputs from technosphere
- Softwood logs with bark, harvested at average intensity site, at mill, US PNW: 0.00248 m3
- Electricity, at grid, Western US, 2000: 0.0212 kWh
- Diesel, combusted in industrial boiler: 0.00184 l

## Emissions to nature
- Bark: 0.0258 kg

## Sources
- Leonard R. Johnson
- Eric T. Sackimoto
- Maureen Puetmann
