# Calcium carbonate, ground, fine treated, 3 micron, at plant

Dataset: openLCA process, unit process
Category: Lime and Gypsum Product Manufacturing
Geography: US
Time period: 2013-12-31 to 2015-12-30
Generated by: Sustainble Solutions Corporation
Reviewer: Industrial Ecology Consultants
Published in: Sustainable Solutions Corporation. (2016). IMA-NA Calcium Carbonate Life Cycle Assessment
restrictionsDescription: All information can be accessed by everybody.
copyright: false

## General comment
This unit process represents the gate-to-gate production of 1 kg of calcium carbonate (fine treated, 3 micron) from calcium carbonate rock (i.e., marble, limestone, or chalk) using average technologies for the contiguous United States in 2014-2015. Additional details on the technologies used in this process are available in the Technology description field at the bottom of this section.

The system boundary includes: 1) quarry operations at the mine/quarry; 2) raw material transport from quarry operations to plant processing; 3) plant processing; 4) overhead energy consumption (e.g., lighting, heating, cooling, etc.) at quarry operations and plant processing; and 5) manufacturing waste and emissions. The following processes and life cycle phases fall outside of the system boundary: 1) construction of capital equipment; 2) maintenance of operation and support equipment; 3) Human labor and employee commute; 4) final product shipping; 5) packaging; 6) product use; and 7) product disposal. Additional details regarding system boundaries are available in the Modeling and validation section in the Sampling Procedure field.

## Technology
The technologies described in this process are representative of average technologies in use in the United States from 2014-2015.

Quarry operations include mechanical extraction, primary crushing, screening, and intermediate storage of calcium carbonate rock (marble, limestone, or chalk). The output of quarry operations is then transported via barge, train, or truck to plant processing which includes washing, wet milling, flotation, cycloning, a second wet milling or thickening, mixing, wet fine grinding, drying, and final treatment.

## Geography
This unit process is reflective of U.S. production.

## Time period
This unit process is representative of operations from 2014-2015.

## Reference product
- Calcium carbonate, ground, fine treated, 3 micron, at plant: 1 t

## Inputs from technosphere
- Polyol ether, for rigid foam polyurethane production, at plant, CTR: 0.000606271 kg
  Urethane screen
- Methylene diphenyl diisocyanate resin, at plant, CTR: 0.000903895 kg
  Urethane screen
- CUTOFF Water, process: 275 kg
  Used for slurry operations
- CUTOFF Oil and grease, at plant: 0.0809096 kg
  Materials for quarrying equipment
- Electricity, at Grid, US, 2010: 339.512 kWh
- CUTOFF Naphtha, at regional storage: 0.0167419 l
  Assumed density of 0.665 kg/l, Materials for quarrying equipment
- Acetic acid, at plant: 0.448641 kg
  Flotation agent
- Gasoline, combusted in equipment: 0.0199518 l
- Transport, barge, diesel powered: 300.931 t*km
  Raw material transport to processing plant
- CUTOFF Disposal, municipal solid wastes, to sanitary landfill: 0.27778 kg
- Polypropylene, resin, at plant, CTR: 0.000540133 kg
  Filter sock
- Alumina, at plant: 0.36707 kg
  Proxy for grinding media
- CUTOFF Textile, woven cotton, at plant: 0.00368172 kg
  Materials for quarrying equipment
- Transport, combination truck, diesel powered: 25.9043 t*km
  Raw material, accessory material and fuel transport to quarry and processing plant
- CUTOFF Lubricating oil: 0.000440925 kg
- Steel, stainless 304, quarto plate: 0.0111333 kg
  Materials for quarrying equipment and materials for screens
- Glycerine, at plant: 0.244713 kg
  Flotation agent
- Ethylene glycol, at plant: 0.0192904 kg
  Antifreeze for quarrying equipment
- CUTOFF Benzimidazole-compounds, at regional storehouse: 0.203928 kg
  Flotation agent
- CUTOFF Silica sand, at plant: 0.0274476 kg
  Proxy for grinding media
- Ethylene glycol, at plant: 0.00583123 kg
  Heat transfer oil
- Sodium hydroxide, production mix, at plant: 0.00679024 kg
  Suspension aid
- CUTOFF Lead, at regional storage: 0.000628317 kg
  Battery proxy for quarrying equipment
- CUTOFF Acrylic acid, at plant: 0.0106153 kg
  Suspension aid
- Kerosene, at refinery: 0.0310852 l
  Materials for quarrying equipment
- Transport, train, diesel powered: 243.611 t*km
  Raw material transport to processing plant
- CUTOFF Biocide, at plant: 0.0261248 kg
- Polyethylene terephthalate, resin, at plant, CTR: 0.0165347 kg
  Filter bags
- CUTOFF Blasting: 0.924839 kg
  Explosives for quarrying
- CUTOFF Fatty acids, from palm oil, at plant: 12.1748 kg
- CUTOFF Conveyor belt, at plant: 0.00035274 m
- Polybutadiene, at plant: 0.0153221 kg
  Materials for quarrying equipment
- Residual fuel oil, combusted in industrial boiler: 0.402344 l
- CUTOFF Polycarboxylates, 40% active substance, at plant: 3.45484 kg
  Proxy for dispersants
- CUTOFF Disposal, mineral waste, underground deposit: 1653.47 kg
- Mixed recyclables, at collection, curbside, weight basis: 0.00675 kg
- Diesel, combusted in industrial equipment: 2.30383 l
- Natural gas, combusted in industrial equipment: 0.0304238 m3
- CUTOFF Sulfuric acid, at plant: 0.000947988 kg
  Battery proxy for quarrying equipment

## Inputs from nature
- Calcium carbonate: 3.09368 t

## Emissions to nature
- Particulates, < 2.5 um: 0.000694456 kg
  Direct emissions from quarry operations and plant processing
- Water (evapotranspiration): 275 kg
- Particulates, unspecified: 0.0313056 kg
  Direct emissions from quarry operations and plant processing
- Particulates, < 10 um: 0.00677921 kg
  Direct emissions from quarry operations and plant processing

## Sampling procedure
BOUNDARY CONDITIONS
The system boundary includes: 1) quarry operations at the mine/quarry; 2) raw material transport from quarry operations to plant processing; 3) plant processing; 4) overhead energy consumption (e.g., lighting, heating, cooling, etc.) at quarry operations and plant processing; and 5) manufacturing waste and emissions.

Quarry operations include mechanical extraction, primary crushing, screening, and intermediate storage of calcium carbonate rock (marble, limestone, or chalk). Plant processing includes washing, wet milling, flotation, cycloning, a second wet milling or thickening, mixing, wet fine grinding, drying, and final treatment. Both quarry operations and plant processing include inputs of energy/fuel, water, and support materials and outputs of waste and emissions.

The following processes and life cycle phases fall outside of the system boundary: 1) construction of capital equipment; 2) maintenance of operation and support equipment; 3) human labor and employee commute; 4) final product shipping; 5) Packaging; 6) product use; and 7) product disposal.

DATA COLLECTION
Primary data were collected for both quarry operations and plant processing. These data represent 2014-2015 weighted industry averages based on production from multiple U.S. locations. Quarry operations data were collected from four companies and five locations. Plant processing data were collected from three companies and three locations.

Secondary data were taken from the ecoinvent 3.2 database (Wernet et al., 2016) and the U.S. Life Cycle Inventory Database (National Renewable Energy Laboratory, 2016). The data were global except where otherwise specified.

UNCERTAINTY ESTIMATION
Uncertainty was not quantified.

## Review details
The life cycle assessment study which produced this unit process was critically reviewed per ISO 14040 and 14044 standards by Dr. Thomas Gloria of Industrial Ecology Consultants.

## Sources
- Institute for Environment and Sustainablility. (2011). General guide for Life Cycle Assessment - Detailed guidance.
- National Renewable Energy Laboratory (2016). U.S. Life Cycle Inventory Database.
- Wernet et al. (2016) The ecoinvent database version 3 (part I): overview and methodology.
- Sustainable Solutions Corporation. (2016). IMA-NA Calcium Carbonate Life Cycle Assessment
