# Wood waste, unspecified, combusted in industrial boiler

Dataset: openLCA process, unit process
Category: Steam and Air-Conditioning Supply
Geography: RNA
Generated by: James Littlefield, Franklin Associates
Published in: Franklin Associates
restrictionsDescription: All information can be accessed by everybody.
copyright: false

## General comment
Converted previous version from the assumption of 50% MC green basis; 100% MC od basis to OD basis to align with CORRIM calculations. Important note: although most of the data in the US LCI database has
undergone some sort of review, the database as a whole has not yet
undergone a formal validation process.
Please email comments to lci@nrel.gov.

## Technology
Typical

## Geography
US

## Reference product
- Wood waste, unspecified, combusted in industrial boiler: 1 kg

## Inputs from technosphere
- CUTOFF Disposal, solid waste, unspecified, to unspecified treatment: 0.0882 kg; lognormal geomSd 1
- CUTOFF Wood waste, unspecified: 1 kg; lognormal geomSd 1

## Emissions to nature
All rows: lognormal geomSd 1
- Beryllium: 9.9e-9 kg
- Methane, dichloro-, HCC-30: 2.61e-6 kg
- Lead: 4.32e-7 kg
- Acetaldehyde: 7.47e-6 kg
- Sulfur oxides: 0.000225 kg
- Formaldehyde: 3.96e-5 kg
- Carbon dioxide, biogenic: 1.755 kg
- Manganese: 1.44e-5 kg
- Selenium: 2.52e-8 kg
- Particulates, < 10 um: 0.0045 kg
- Methane: 0.000189 kg
- Naphthalene: 8.73e-7 kg
- Antimony: 7.11e-8 kg
- Metals, unspecified: 0.00038494 kg
- TOC, Total Organic Carbon: 3.681e-5 kg
- Nickel: 2.97e-7 kg
- Dioxins, measured as 2,3,7,8-tetrachlorodibenzo-p-dioxin: 1.50298e-8 kg
- Hydrogen chloride: 0.000171 kg
- Carbon monoxide: 0.0054 kg
- Benzene: 3.78e-5 kg
- Nitrogen oxides: 0.00198, 0.000117 kg (2 entries, compartments not in this file)
- Cadmium: 3.69e-8 kg
- Phenols, unspecified: 4.59e-7 kg
- Chromium: 1.89e-7 kg
- Arsenic: 1.98e-7 kg
- Cobalt: 5.85e-8 kg
- Acrolein: 3.6e-5 kg
- BOD5, Biological Oxygen Demand: 0.0175 kg
- Methane, tetrachloro-, CFC-10: 4.05e-7 kg
- Chlorine: 7.11e-6 kg
- Mercury: 3.15e-8 kg

## Sources
- Franklin Associates
- U.S. EPA
- Combustion Engineering Inc.
- Kaminski, Paul
- Argonne National Laboratory
- Sassenrath, Charles P
- U.S. DoE
