# Enzyme, Alpha-amylase, Novozyme Liquozyme

Dataset: openLCA process, unit process
Category: All Other Basic Organic Chemical Manufacturing
Geography: RER
Time period: 2004-01-01 to 2004-01-01
Generated by: Daniel Inman
Published in: P.H. Nielsen
restrictionsDescription: All information can be accessed by everybody.
copyright: false

## General comment
from Figure 3 - values recieved from Novozyme.

## Technology
current

## Time period
2004

## Reference product
- Enzyme, Alpha-amylase, Novozyme Liquozyme: 1 kg

## Inputs from nature
- Transformation, from pasture and meadow: 0.3 m2
- Energy, from coal: 14 MJ
  Data is fossil energy. Assumed it was all coal. This number does not affect the GHG emissions. This number is just for energy.
- Transformation, to industrial area: 0.3 m2
- Water, unspecified natural origin/m3: 0.012 m3

## Emissions to nature
- Carbon dioxide, fossil: 1.2 kg
  CO2 eq
- Sulfur dioxide: 0.0014 kg
  SO2 eq
- Phosphate: 0.0066 kg
  phosphate equiv.
- Ethene: 0.0005 kg
  C2H4 eq

## Sources
- Hsu, D.
- P.H. Nielsen
