# Melamine urea formaldehyde hardener, at plant

Dataset: openLCA process, unit process
Category: Plastics Material and Resin Manufacturing
Geography: RNA
Generated by: Jamie Meil
Published in: Maureen E. Puettman
restrictionsDescription: All information can be accessed by everybody.
copyright: true

## General comment
Base process data presented with allocations to within process co-products noted. Refer to allocation worksheet for specifics. All allocations performed using mass or volume. To take profile back to cradle the user must add LCI profile information for PNW dry and rough green lumber from PNW dry lumber LCI module. Cradle-to-gate LCI information presented for PRF and MUF resins and hardeners which were derived from secondary source., information from secondary source
Important note: although most of the data in the US LCI database has
undergone some sort of review, the database as a whole has not yet
undergone a formal validation process.
Please email comments to lci@nrel.gov.

## Technology
Typical

## Geography
US Southeast

## Reference product
- Melamine urea formaldehyde hardener, at plant: 1 kg

## Inputs from technosphere
- CUTOFF Disposal, chemical waste, unspecified, to unspecified treatment: 0.0134 kg
- CUTOFF Disposal, inert solid waste, to unspecified treatment: 0.19749 kg

## Inputs from nature
- Uranium, in ground: 0.00127 kg
- Wood, unspecified, standing/kg: 0.01121 kg
- Copper ore, in ground: 0.00157 kg
- Sodium chloride, in ground: 0.2296 kg
- Nitrogen, in air: 0.0084 kg
- Calcium carbonate, in ground: 0.00078 kg
- Coal, bituminous, 24.8 MJ per kg, in ground: 0.53948 kg
- Oil, crude, in ground: 0.45035 kg
  The original data was in terms of volume. This was changed to mass using a conversion factor of 850 kg/m3
- Gas, natural, in ground: 0.7617 m3
- Iron ore, in ground: 0.00021 kg

## Emissions to nature
- PAH, polycyclic aromatic hydrocarbons: 1.6e-5 kg
- Hydrocarbons, unspecified: 0.00465, 5.8e-5 kg (2 entries, compartments not in this file)
- Sodium, ion: 0.000492 kg
- Dinitrogen monoxide: 2.3e-5 kg
- Carbon monoxide: 0.00303 kg
- Metallic ions, unspecified: 0.00018 kg
- Dissolved solids: 0.00649 kg
- Sulfur dioxide: 0.00754 kg
- Methane: 0.00252 kg
- BOD5, Biological Oxygen Demand: 1.8e-5 kg
- VOC, volatile organic compounds: 0.000565 kg
- Carbon dioxide: 1.35 kg
- Cadmium, ion: 4e-6 kg
- Nitrogen oxides: 0.00906 kg
- COD, Chemical Oxygen Demand: 0.00124 kg
- Nitrogen, total: 9e-6 kg
- Mercury: 5e-6 kg
- Ammonium, ion: 1e-6 kg
- Phosphate: 1e-6 kg
- Particulates, unspecified: 0.00142 kg
- Methanol: 0.0024 kg

## Sources
- Maureen E. Puettman
