# Electricity, at Grid, NPCC, 2010

Dataset: openLCA process, unit process
Category: Utilities
Geography: RNA
Time period: 2010-01-01 to 2010-01-01
Generated by: Samantha Wascavage
Published in: Chris Goemans, Athena Institute
restrictionsDescription: All information can be accessed by everybody.
copyright: false

## General comment
The methodology used to put together the grid information is outlined in reference 1.

## Technology
Typical

## Geography
Connecticut, Maine, Massachusetts, New Brunswick, New Hampshire, New York, Nova Scotia, Ontario, Prince Edward Island, Quebec, Rhode Island and Vermont.

## Reference product
- Electricity, at Grid, NPCC, 2010: 1 kWh

## Inputs from technosphere
- CUTOFF Electricity, petroleum coke, at power plant: 0.001569 kWh
  PC, SG, WO – Petroleum Coke
- Electricity, lignite coal, at power plant: 0.000759 kWh
  LIG – Lignite Coal
- CUTOFF Electricity, biomass, gas, landfill, at power plant: 0.001318 kWh
  LFG, OBG – Landfill Gas
- Electricity, bituminous coal, at power plant: 0.020031 kWh
  SUB – Subbituminous Coal
- Electricity, diesel, at power plant: 0.040037 kWh
  DFO, JF, KER – Distillate Fuel Oil (includes all Diesel and No. 1, No. 2, and No. 4 Fuel Oils)
- Electricity, bituminous coal, at power plant: 0.05027 kWh
  BIT, SC, SGC, WC - Anthracite Coal, and Bituminous Coal.
- CUTOFF Electricity, other gases, unspecified, at power plant: 2.2e-5 kWh
  OG, BFG, PG – Other Gas (Butane, Coal Processes, Coke-Oven, Refinery, and other processes)
- Electricity, residual fuel oil, at power plant: 0.005073 kWh
  RFO – Residual Fuel Oil (includes No. 5 and No. 6 Fuel Oils and Bunker C Fuel Oil)
- CUTOFF Electricity, biomass,liquid, unspecified, at power plant: 0.002258 kWh
  BLQ, OBL, SLW, WDL – Black Liquor
- CUTOFF Electricity, at wind power plant, unspecified: 0.013141 kWh
  WND – Wind
- CUTOFF Electricity, hydropower, at power plant, unspecified: 0.409072 kWh
  WAT – Water (Conventional, Pumped Storage)
- Electricity, nuclear, at power plant: 0.251479 kWh
  NUC – Nuclear (Uranium, Plutonium, Thorium)
- CUTOFF Electricity, solar, unspecified, at power plant: 1e-6 kWh
  SUN – Solar (Photovoltaic, Thermal)
- CUTOFF Electricity, other fuels, unspecified, at power plant: 0.003686 kWh
  PUR, OTH, MSN, WH – Purchased Steam
- Electricity, natural gas, at power plant: 0.201284 kWh
  NG – Natural Gas

## Sampling procedure
based on EIA electricity reports for all power plants in the US.

## Sources
- Chris Goemans, Athena Institute
- Statistics Canada
- unspecified
- USEPA
- Statistics Canada
- Statistics Canada
- Statistics Canada
- Statistics Canada
- USEPA
- EIA
- EIA
- EIA
- EIA
- EIA
- EIA
- EIA
- EIA
- EIA
- US DOE
- International Energy Agency
- EIA
