# Fuels, burned at coated mechanical paper, average production, at mill

Dataset: openLCA process, unit process
Category: Pulp, Paper, and Paperboard Mills
Geography: RNA
Time period: 2006-01-01 to 2006-01-01
Generated by: Caroline Gaudreault
Reviewer: Martha Stevenson
Published in: AF&PA
restrictionsDescription: All information can be accessed by everybody.
copyright: false

## General comment
Coated mechanical paper, average North American production, at mill. All flows are production-weighted means. Data were developed for a full LCA that was critically reviewed. Reviewers were: • Martha Stevenson, Chairperson – Private Consultant to the public interest with ten years of experience in sustainability, environmental management, packaging and materials recovery; led the development of the Design Guidelines for Sustainable Packaging and the COMPASS software used to compare the environmental impacts of package designs; • Pascal Lesage – Life cycle assessment consultant, Researcher at École Polytechnique de Montréal [at the Inter-University Research Centre for the Life Cycle of Products, Processes and Services (CIRAIG) in Montreal]; and • Dale Phenicie, Environmental Affairs Consulting – Consultant with 35 years of experience in environmental protection and process consulting for the forest products industry. Has served on several U.S. EPA Task Forces dealing with water quality issues and authored several AF&PA Environmental, Health and Safety/Sustainability reports.

## Technology
current technology mix for coated mechanical

## Time period
Primary data collected from participating companies and associations for their operational activities are representative for 2006 and 2007.

## Reference product
- Fuels, burned at coated mechanical paper, average production, at mill: 10691 MJ

## Inputs from technosphere
- Gasoline, combusted in equipment, at pulp and paper mill (EXCL.): 0.19681 l
  Gasoline and kerosene, assumed to be gasoline.
- LPG, combusted in industrial boiler, at pulp and paper mill (EXCL.): 0.37175 l
- RFO, combusted in industrial boiler, at pulp and paper mill (EXCL.): 28.99 l
  All combusted on site. Actually received at supplier, not refinery.
- TDF, combusted in industrial boiler, at pulp and paper mill (EXCL.): 10.209 kg
  All combusted. Not present in any database.
- Natural gas, combusted in industrial boiler, at pulp and paper mill (EXCL.): 58.529 m3
- Hog fuel, pur., combusted in industrial boiler, at pulp and paper mill (EXCL.): 54.337 kg
  Purchased hogged fuel. Typically from wood products manufacturing.
- Hog fuel, self-gen., combusted in ind. boiler, at pulp and paper mill (EXCL.): 134.19 kg
  Combustion of self-generated hogged fuel from pulpwood. Wood inputs are accounted for in the process named Coated mechanical paper, average production, at mill
- Diesel, combusted in industrial boiler, at pulp and paper mill (EXCL.): 0.48484 l
  Proxy for light fuel oil.
- Bituminous coal, combusted in industrial boiler, at pulp and paper mill (EXCL.): 99.057 kg

## Emissions to nature
- Cadmium: 1.9357e-5 kg
  From spent liquor recovery, non-recyclable paper combustion and wastewater residuals combustion
- Zinc: 5.4854e-5 kg
  (same comment as for Cadmium)
- Methane, dichloro-, HCC-30: 6.4101e-5 kg
  (same comment as for Cadmium)
- Styrene: 5.5973e-5 kg
  (same comment as for Cadmium)
- Chromium: 1.8063e-5 kg
  (same comment as for Cadmium)
- Lead: 4.1462e-6 kg
  (same comment as for Cadmium)
- Benzene: 0.00019068 kg
  (same comment as for Cadmium)
- Aldehydes, C3: 0.0013163 kg
  (same comment as for Cadmium)
- Copper: 1.8083e-5 kg
  (same comment as for Cadmium)
- Carbon monoxide: 0.071995 kg
  (same comment as for Cadmium)
- Chloroform: 7.873e-6 kg
  (same comment as for Cadmium)
- Dinitrogen monoxide: 0.011709 kg
  (same comment as for Cadmium)
- Hydrogen sulfide: 0.01075 kg
  Total reduced sulfur assumed to be hydrogen sulfide. From all combustion processes at pulp and paper mill.
- Naphthalene: 3.7262e-5 kg
  (same comment as for Cadmium)
- Hydrogen chloride: 0.017386 kg
  (same comment as for Cadmium)
- Methane, monochloro-, R-40: 0.0051827 kg
  (same comment as for Cadmium)
- Xylene: 0.00021957 kg
  (same comment as for Cadmium)
- 4-Methyl-2-pentanone: 0.00011986 kg
  (same comment as for Cadmium)
- Benzene, 1,2,4-trichloro-: 3.6448e-5 kg
  (same comment as for Cadmium)
- Biphenyl: 3.6491e-5 kg
  (same comment as for Cadmium)
- Barium: 0.00027845 kg
  (same comment as for Cadmium)
- Ethene, trichloro-: 6.6791e-6 kg
  (same comment as for Cadmium)
- Nickel: 6.5045e-6 kg
  (same comment as for Cadmium)
- Nitrogen dioxide: 1.8762 kg
  From all combustion processes at pulp and paper mill.
- Carbon disulfide: 0.00013313 kg
  (same comment as for Cadmium)
- Ethane, 1,1,1-trichloro-, HCFC-140: 1.264e-5 kg
  (same comment as for Cadmium)
- Acrolein: 7.5976e-5 kg
  (same comment as for Cadmium)
- Acetaldehyde: 0.00341 kg
  (same comment as for Cadmium)
- Sulfuric acid: 0.0059072 kg
  (same comment as for Cadmium)
- Ethane, 1,1,2-trichloro-: 1.596e-5 kg
  (same comment as for Cadmium)
- Cumene: 0.00019051 kg
  (same comment as for Cadmium)
- Phenol: 0.0029043 kg
  (same comment as for Cadmium)
- Hexane: 0.00012008 kg
  (same comment as for Cadmium)
- Selenium: 0.00039923 kg
  (same comment as for Cadmium)
- Benzene, hexachloro-: 4.2596e-10 kg
  (same comment as for Cadmium)
- Hydrogen fluoride: 0.00026209 kg
  (same comment as for Cadmium)
- Toluene: 0.000149 kg
  (same comment as for Cadmium)
- Dioxin, 2,3,7,8 Tetrachlorodibenzo-p-: 2.0229e-13 kg
  (same comment as for Cadmium)
- Ethene, tetrachloro-: 2.2761e-6 kg
  (same comment as for Cadmium)
- Antimony: 2.0337e-5 kg
  (same comment as for Cadmium)
- Formaldehyde: 0.0016146 kg
  (same comment as for Cadmium)
- Arsenic: 8.0034e-7 kg
  (same comment as for Cadmium)
- Carbon dioxide, biogenic: 469.01 kg
  (same comment as for Cadmium)
- Manganese: 0.00012176 kg
  (same comment as for Cadmium)
- Methane, tetrachloro-, CFC-10: 1.0832e-5 kg
  (same comment as for Cadmium)
- Polycyclic organic matter, unspecified: 6.5194e-5 kg
  (same comment as for Cadmium)
- TSP: 0.036131 kg
  (same comment as for Cadmium)
- Cresol: 0.00086088 kg
  (same comment as for Cadmium)
- Sulfur dioxide: 3.0664 kg
  From all combustion processes at pulp and paper mill.
- Methanol: 0.031076 kg
  (same comment as for Cadmium)
- Beryllium: 0.00035369 kg
  (same comment as for Cadmium)
- Benzo(ghi)perylene: 7.8951e-7 kg
  (same comment as for Cadmium)
- Mercury: 7.203e-7 kg
  (same comment as for Cadmium)
- Silver: 2.5242e-5 kg
  (same comment as for Cadmium)
- Vanadium: 3.7603e-7 kg
  (same comment as for Cadmium)
- Methane: 0.01552 kg
  (same comment as for Cadmium)

## Sampling procedure
The survey included results from 18 mills representing 5 million short tons per year (TPY), nearly 95% of 2006/2007 North American production volume.

## Sources
- AF&PA
