# Aluminum, secondary, rolled

Dataset: openLCA process, unit process
Category: Other Aluminum Rolling and Drawing
Geography: RNA
Time period: 1998-01-01 to 1998-01-01
Generated by: James Littlefield, Franklin Associates
Published in: Franklin Associates
restrictionsDescription: All information can be accessed by everybody.
copyright: false

## General comment
Separate unit processes are shown for automotive and UBC (used beverage container) scrap; however, it was determined that the recovery rates and processing requirements for these 2 markets are similar, and thus the results for the 2 markets are the same. Atmospheric, waterborne, and solid waste emissions represent process emissions only, not fuel combustion emissions.,
Important note: although most of the data in the US LCI database has
undergone some sort of review, the database as a whole has not yet
undergone a formal validation process.
Please email comments to lci@nrel.gov.

## Geography
North America

## Reference product
- Aluminum, secondary, rolled: 1 kg

## Inputs from technosphere
- Electricity, at grid, US, 2000: 2.19 kWh
- CUTOFF Lube oil, at plant: 4.05e-7 kg
- CUTOFF Chemicals, unspecified, used for wastewater treatment: 0.004 kg
- Quicklime, at plant: 1.08e-5 kg
- CUTOFF Treatment salts, unspecified, at plant: 0.004 kg
- CUTOFF Filter media, at plant: 2.21e-5 kg
- Aluminum, secondary, ingot, at plant: 0.991 kg
- CUTOFF Treatment gases, unspecified, at plant: 0.001 kg
- Natural gas, combusted in industrial boiler: 0.19488 m3
- CUTOFF Alloying additives, at plant: 0.009 kg
- CUTOFF Disposal, solid waste, unspecified, to sanitary landfill: 0.023165 kg
- CUTOFF Packaging, unspecified, at plant: 7.6e-6 kg
- CUTOFF Grain refiners, at plant: 0.0001 kg

## Emissions to nature
- Heavy metals, unspecified: 3.3e-5 kg
- Dissolved solids: 1.1e-8 kg
- Acids, unspecified: 0.0005859 kg
- BOD5, Biological Oxygen Demand: 4.4665e-7 kg
- NMVOC, non-methane volatile organic compounds: 0.000895 kg
- Carbon monoxide: 4.26e-5 kg
- Suspended solids, unspecified: 2.46e-5 kg
- Lead: 9.9e-8 kg
- Organic substances, unspecified: 4.421e-5 kg
- Sulfur oxides: 5.72e-6 kg
- COD, Chemical Oxygen Demand: 4.1e-7 kg
- Particulates, unspecified: 0.00020283 kg
- Nitrogen oxides: 0.0188 kg
- Carbon dioxide: 0.0283 kg

## Sources
- Franklin Associates
- The Aluminum Association
- unspecified
- unspecified
