# Paper, mechanical, coated, average production, at mill

Dataset: openLCA process, unit process
Category: Pulp, Paper, and Paperboard Mills
Geography: RNA
Time period: 2006-01-01 to 2006-01-01
Generated by: Caroline Gaudreault
Reviewer: Martha Stevenson
Published in: AF&PA
restrictionsDescription: All information can be accessed by everybody.
copyright: false

## General comment
Coated Mechanical Paper, average North American production, at mill. By-products were allocated 0% of the impacts to enable the user to choose and apply their own allocation method more easily. All flows are production-weighted means. Data were developed for a full LCA that was critically reviewed. Reviewers were: • Martha Stevenson, Chairperson – Private Consultant to the public interest with ten years of experience in sustainability, environmental management, packaging and materials recovery; led the development of the Design Guidelines for Sustainable Packaging and the COMPASS software used to compare the environmental impacts of package designs; • Pascal Lesage – Life cycle assessment consultant, Researcher at École Polytechnique de Montréal [at the Inter-University Research Centre for the Life Cycle of Products, Processes and Services (CIRAIG) in Montreal]; and • Dale Phenicie, Environmental Affairs Consulting – Consultant with 35 years of experience in environmental protection and process consulting for the forest products industry. Has served on several U.S. EPA Task Forces dealing with water quality issues and authored several AF&PA Environmental, Health and Safety/Sustainability reports.

## Technology
current technology mix for coated mechanical paper

## Time period
Primary data collected from participating companies and associations for their operational activities are representative for 2006 and 2007.

## Reference product
- Paper, mechanical, coated, average production, at mill: 861.83 kg
  861.83 dry kg is equal to 1 market-dried short ton (5% water).

## By-products
- Tall oil, at coated mechanical paper mill: 7.0307 kg
  Produced as byproduct of pulp production. Sold i.e., not used on site. Allocation set to 0%.
- Turpentine, at coated mechanical paper mill: 0.54431 kg
  (same comment as for Tall oil, at coated mechanical paper mill)
- Electricity, at coated mechanical paper mill: 65 kWh
  (same comment as for Tall oil, at coated mechanical paper mill)
- Steam, at coated mechanical paper mill: 66.2 MJ
  (same comment as for Tall oil, at coated mechanical paper mill)

## Inputs from technosphere
- Containerboard, average production, at mill: 8.0286 kg
  Packaging material
- Transport, combination truck, average fuel mix: 294.91 t*km
  Transportation of pulpwood and chips to pulp mill. Pulpwood: 200 km (rounded trip distance), chips: 254 km (rounded trip distance).
- CUTOFF Disposal, wastewater treatment plant residuals, to uns. landfill: 22.952 kg
  Typically company-owned, but some third party. (uns. = unspecified)
- CUTOFF Disposal, wastewater treatment plant residuals, to uns. Incinerator: 4.1912 kg
  Typically on-site with energy recovery. (uns. = unspecified)
- CUTOFF Pulp chips, at sawmill, US: 412.77 kg
  Mass of incoming pulp chips intended for pulping. US LCI: "Pulp chips, at sawmill,US SE/kg" can be used as a proxy. The actual mix of chips is: northern softwood chips: 66%, northern hardwood chips: 18%, southern softwood chips: 11% and southern hardwood chips: 6%. Pulp chips usage in the process is distrubuted as follows: 67% ends up in pulp and 33% in black liquor. Combusted onsite as part of the pulping chemical recovery process that is integral to and is essential to the economic viability of all modern pulp mills. Substitution of other fuels for this fuel is not recommended.
- CUTOFF Disposal, solid waste, unspecified, to unspecified beneficial use: 5.9511 kg
  Typically off-site.
- CUTOFF Ground calcium carbonate, at plant: 45.813 kg
  ei. Limestone, milled, loose, at plant
- Natural gas, combusted in industrial boiler: 23.495 m3
  Purchased steam, assumed to be natural gas.
- CUTOFF Hydrogen peroxide, at plant: 8.4368 kg
  ei: Hydrogen peroxide, 50% in H2O, at plant
- Quicklime, at plant: 5.8753 kg
  For production of precipitated calcium carbonate on site
- Transport, pipeline, natural gas: 69.5 t*km
  Transports of fuels. Natural gas: 33584 tkm/MMcf, Average transportation for natural gas in North America according to the US LCI database
- CUTOFF Titanium dioxide, at plant: 14.243 kg
  ei: titanium dioxide, production mix, at plant
- Transport, train, diesel powered: 5.6647 t*km
  Transport of packaging. Containerboard: 1410 km. Core board: 1276 km. Polypropylene and Polyethylene: 1806 km. Steel: 1083 km.
- CUTOFF Disposal, unspecified ashes, to unspecified landfill: 17.69 kg
  Mix of wood and coal ashes. Based on typical ash contents can be assumed to be 78% from wood and 22% from coal. Typically company-owned, but some third party.
- Transport, barge, average fuel mix: 70.892 t*km
  Transportation of chemicals. Kaolin, Starch and Latex: 0 km. Titanium dioxide, Ground calcium carbonate, Precipitated calcium carbonate, Sulfur dioxide, Dithonite and Hydrogen peroxide : 489 km. Transports of fuels. Coal: 515 km. Residual fuel oil, Distillate fuel oil: 163 km. Kerosene and gasoline, Other fossil assumed to be diesel : 163 km. Tire derived fuel: 315 km.
- CUTOFF Disposal, solid waste, unspecified, to unspecified incinerator: 0.24494 kg
  Typically on-site with energy recovery.
- Transport, combination truck, average fuel mix: 54.374 t*km
  Transportation of chemicals. Kaolin: 295 km. Titanium dioxide, Ground calcium carbonate, Precipitated calcium carbonate, Sulfur dioxide, Dithonite and Hydrogen peroxide: 183 km. Latex: 312 km. Starch: 510 km. Transports of fuels. Coal: 153 km. Residual fuel oil, Distillate fuel oil: 50 km. Liquefied petroleum gas, Kerosene and gasoline, Other fossil assumed to be diesel: 80 km. Tire derived fuel: 98 km.
- Hot rolled sheet, steel, at plant: 0.17962 kg
  Packaging material
- Pulp, kraft market, bleached, average production, at mill: 108.86 kg
- CUTOFF Disposal, unspecified ashes, to unspecified beneficial use: 7.4117 kg
  Mix of wood and coal ashes. Based on typical ash contents can be assumed to be 78% from wood and 22% from coal. Typically off-site.
- CUTOFF Sodium hydrosulfite, at plant: 1.4152 kg
  ei: dithionite
- CUTOFF Pulpwood, softwood, average, at forest road, US S: 0.1159 m3
  Mass of incoming southern softwood logs intended for pulping. Assumed density: 450 kg/m3. US LCI: "Softwood logs with bark, harvested at average intensity site, at mill, US SE/US" can be used but transportation needs to be removed as it is already included here. Wood usage in the process is distrubuted as follows: 42% ends up in pulp, 37% in self-generated hogged fuel and 21% in black liquor. All the hogged fuel is combusted onsite. Combustion of this fuel is important to the economic viability of all modern pulp mills. Substitution of other fuels for this fuel is not recommended. Need to be paired with "Self-generated hogged fuel, combusted in industrial boiler, at pulp and paper mill". Black liquor solides are combusted onsite as part of the pulping chemical recovery process that is integral to and is essential to the economic viability of all modern pulp mills. Substitution of other fuels for this fuel is not recommended.
- CUTOFF Disposal, wastewater treatment plant residuals, to uns. beneficial use: 13.426 kg
  Typically off-site. (uns. = unspecified)
- Transport, train, diesel powered: 268.73 t*km
  Transportation of chemicals. Kaolin: 1204 km. Titanium dioxide, Ground calcium carbonate, Precipitated calcium carbonate, Sulfur dioxide, Dithonite and Hydrogen peroxide: 1088 km. Latex: 985 km. Starch: 1788 km. Transports of fuels. Coal: 653 km. Residual fuel oil, Distillate fuel oil: 1114 km. Liquefied petroleum gas: 1246 km. Tire derived fuel: 1156 km.
- CUTOFF Disposal, unspecified ashes, to unspecified land application: 2.3224 kg
  Mix of wood and coal ashes. Based on typical ash contents can be assumed to be 78% from wood and 22% from coal. Typically off-site agricultural/silvicultural.
- CUTOFF Latex, at plant: 25.945 kg
  ei. Latex, at plant
- CUTOFF Electricity, at grid, QC: 297.74 kWh
- Transport, train, diesel powered: 52.851 t*km
  Transportation of pulpwood and chips to pulp mill. Pulpwood: 375 km, chips: 127 km.
- CUTOFF Electricity from hydro: 27.722 kWh
  Generation at company facilities. Ei: Electricity, hydropower, at run-of-river power plant
- Electricity, at grid, Eastern US, 2000: 538.99 kWh
  Net purchased, National average grid, Medium voltage: <50 kV
- CUTOFF Precipitated calcium carbonate, at plant: 1.1657 kg
- CUTOFF Disposal, wastewater treatment plant residuals, to uns. land application: 9.8883 kg
  Typically off-site agricultural/silvicultural. (uns. = unspecified)
- Fuels, burned at coated mechanical paper, average production, at mill: 10691 MJ
  Includes all fuels burned on site
- Pulpwood, hardwood, average, at forest road, NE-NC: 0.1549 m3
  Mass of incoming northern hardwood logs intended for pulping. Assumed density: 650 kg/m3. Wood usage in the process is distrubuted as follows: 42% ends up in pulp, 37% in self-generated hogged fuel and 21% in black liquor. All the hogged fuel is combusted onsite. Combustion of this fuel is important to the economic viability of all modern pulp mills. Substitution of other fuels for this fuel is not recommended. Need to be paired with "Self-generated hogged fuel, combusted in industrial boiler, at pulp and paper mill". Black liquor solides are combusted onsite as part of the pulping chemical recovery process that is integral to and is essential to the economic viability of all modern pulp mills. Substitution of other fuels for this fuel is not recommended.
- CUTOFF Electricity, at grid, BC: 135.34 kWh
- CUTOFF Core board, at plant: 3.3475 kg
  Packaging material
- Pulpwood, softwood, average, at forest road, NE-NC: 0.2868 m3
  Mass of incoming northern softwood logs (assumed 63.5% East/Central based on mill location) intended for pulping. Assumed density: 450 kg/m3. Wood usage in the process is distrubuted as follows: 42% ends up in pulp, 37% in self-generated hogged fuel and 21% in black liquor. All the hogged fuel is combusted onsite. Combustion of this fuel is important to the economic viability of all modern pulp mills. Substitution of other fuels for this fuel is not recommended. Need to be paired with "Self-generated hogged fuel, combusted in industrial boiler, at pulp and paper mill". Black liquor solides are combusted onsite as part of the pulping chemical recovery process that is integral to and is essential to the economic viability of all modern pulp mills. Substitution of other fuels for this fuel is not recommended.
- Pulpwood, softwood, average, at forest road, INW: 0.1783 m3
  Mass of incoming northern softwood logs (assumed 36.5% West based on mill location) intended for pulping. Assumed density: 450 kg/m3. Wood usage in the process is distrubuted as follows: 42% ends up in pulp, 37% in self-generated hogged fuel and 21% in black liquor. All the hogged fuel is combusted onsite. Combustion of this fuel is important to the economic viability of all modern pulp mills. Substitution of other fuels for this fuel is not recommended. Need to be paired with "Self-generated hogged fuel, combusted in industrial boiler, at pulp and paper mill". Black liquor solides are combusted onsite as part of the pulping chemical recovery process that is integral to and is essential to the economic viability of all modern pulp mills. Substitution of other fuels for this fuel is not recommended.
- CUTOFF Disposal, solid waste, unspecified, to unspecified land application: 0.9979 kg
  Typically off-site agricultural/silvicultural
- CUTOFF Starch, at plant: 10.297 kg
  ei: Maize starch, at plant and/or Potato starch, at plant
- CUTOFF Pulp, refiner market, bleached, average production, at mill: 16.057 kg
- Electricity, at grid, Western US, 2000: 204.77 kWh
  Net purchased, National average grid, Medium voltage: <50 kV
- CUTOFF Sulfur dioxide, at plant: 7.575 kg
  ei: sulfur dioxide liquid, at plant
- Transport, ocean freighter, average fuel mix: 4.0003 t*km
  Transportation of chemicals. Kaolin, Starch and Latex: 0 km. Titanium dioxide, Ground calcium carbonate, Precipitated calcium carbonate, Sulfur dioxide, Dithonite and Hydrogen peroxide: 517 km. Transports of fuels. Residual fuel oil , Distillate fuel oil: 682 km. Kerosene and gasoline, Other fossil assumed to be diesel: 1183 km.
- Transport, combination truck, average fuel mix: 17.374 t*km
  Transport market pulp. Bleached kraft market pulp, Deinked bleached market pulp: 256 km.
- CUTOFF Old news paper: 17.418 kg
- Transport, train, diesel powered: 98.986 t*km
  Transport market pulp. Bleached kraft market pulp, Deinked bleached market pulp: 1452 km.
- Transport, combination truck, average fuel mix: 1.9564 t*km
  Transport of packaging. Containerboard: 201 km. Core board: 369 km. Polypropylene and Polyethylene: 417 km. Steel: 257 km.
- CUTOFF Clay, at mine: 190.06 kg
  ei: Kaolin
- Polypropylene resin, at plant: 1.016 kg
  Packaging material
- CUTOFF Disposal, solid waste, unspecified, to unspecified landfill: 10.07 kg
  Typically company-owned, but some third party.
- Polyethylene, low density, resin, at plant: 0.08709 kg
  Packaging material

## Inputs from nature
- Process water: 43144 kg
  Estimated based on individual mill process effluent and cooling water flows and process characteristics. Share between process and cooling estimated.
- Cooling water, non-contact: 43014 kg
  (same comment as for Process water)

## Emissions to nature
- Acetaldehyde: 0.0158 kg
  From process
- Barium: 0.00089758 kg
  In effluent.
- Manganese: 0.0059584 kg
  In effluent.
- Lead: 8.5939e-6 kg
  In effluent.
- Formaldehyde: 0.0009283 kg
  In effluent.
- Arsenic: 4.7744e-5 kg
  In effluent.
- Phenol: 4.7687e-6 kg
  In effluent.
- Nickel: 0.001 kg
  From onsite management of solid waste. All metals reported as elemental althought in most cases they are releases into metal compounds.
- Chromium: 4.2014e-5 kg
  In effluent.
- Copper: 0.00433 kg
  (same comment as for Nickel)
- Ammonia: 0.038615 kg
  From process
- Water, evaporated: 1952 kg
  Estimated based on individual mill process effluent and cooling water flows and process characteristics. Share between process and cooling estimated. Includes evaporation and other losses (e.g., water in solid waste).
- Phenol: 0.004372 kg
  From process
- Ammonia_toxic: 0.010785 kg
  In effluent.
- Process effluent: 42052 kg
  (same comment as for Water, evaporated)
- Zinc: 0.00403 kg
  (same comment as for Nickel)
- Arsenic: 0.0012 kg
  (same comment as for Nickel)
- Acetaldehyde: 0.0011257 kg
  In effluent.
- PAH, polycyclic aromatic hydrocarbons: 5.72e-6 kg
  (same comment as for Nickel)
- Mercury: 2.4063e-8 kg
  In effluent.
- AOX, Adsorbable Organic Halogen as Cl: 0.043562 kg
  In effluent.
- Suspended solids, unspecified: 1.4243 kg
  In effluent.
- Cooling water, non-contact: 43014 kg
  (same comment as for Water, evaporated)
- Toluene: 3.91e-5 kg
  From process
- Mercury: 3.41e-6 kg
  (same comment as for Nickel)
- Manganese: 0.0516 kg
  (same comment as for Nickel)
- Xylene: 0.00061278 kg
  From process
- Chromium: 0.00371 kg
  (same comment as for Nickel)
- Lead: 0.0047 kg
  (same comment as for Nickel)
- Methanol: 0.14615 kg
  From process
- Carbon dioxide, fossil: -1.5423 kg
  From process (Precipitated Calcium Carbonate (PCC) production on site). Some emissions reported under "Fuels burned at coated mechanical paper, average producion, at mill" are capture to produce PCC
- Vanadium: 0.00086 kg
  (same comment as for Nickel)
- Phosphorus, total: 0.021767 kg
  In effluent.
- Carbon dioxide, biogenic: -3.074 kg
  (same comment as for Carbon dioxide, fossil)
- BOD5, Biological Oxygen Demand: 0.80662 kg
  In effluent.
- Ammonia: 0.000546 kg
  (same comment as for Nickel)
- Methanol: 0.005619 kg
  In effluent.
- PAH, polycyclic aromatic hydrocarbons: 2.4106e-6 kg
  In effluent.
- Barium: 0.02 kg
  (same comment as for Nickel)
- Nickel: 0.00016806 kg
  In effluent.
- Copper: 7.639e-5 kg
  In effluent.
- Zinc: 0.0046884 kg
  In effluent.
- Acetaldehyde: 0.000124 kg
  (same comment as for Nickel)
- Nitrogen, total: 0.16816 kg
  In effluent.

## Sampling procedure
The survey included results from 18 paper mills representing 5 million short tons per year (TPY), nearly 95% of 2006/2007 North American production volume.

## Sources
- AF&PA
