# Reforesting, medium intensity site, US PNW

Dataset: openLCA process, unit process
Category: Forest Nurseries, Gathering Forest Prod.
Geography: RNA
Generated by: Jamie Meil
Published in: Leonard R. Johnson
restrictionsDescription: All information can be accessed by everybody.
copyright: true

## General comment
Base process data presented with allocations to within process co-products noted. Refer to allocation worksheet for specifics. All allocations performed using mass or volume.,
Important note: although most of the data in the US LCI database has
undergone some sort of review, the database as a whole has not yet
undergone a formal validation process.
Please email comments to lci@nrel.gov.

## Technology
Typical

## Geography
US Pacific North West

## Reference product
- Reforesting, medium intensity site, US PNW: 1 m2

## Inputs from technosphere
- Seedlings, at greenhouse, US PNW: 0.098842 Item(s)
- Gasoline, combusted in equipment: 0.0011786 l

## Inputs from nature
- Carbon dioxide, in air: 67.47 kg
- Wood, soft, US PNW, standing/m3: 0.081343 m3

## Sources
- Leonard R. Johnson
- Michael Milota
- Maureen Puetmann
