# Scanner, department, i5800

Dataset: openLCA process, unit process
Category: Other material
Geography: GLO
Time period: 2003-06-10 to 2012-09-15
Generated by: Roy Wood
Reviewer: Jay Mathewson
Published in: Roy Wood
restrictionsDescription: All information can be accessed by everybody.
copyright: false

## General comment
Cradle to Gate data for a single 251.328 kg scanner from a single company. Scanner scans at 280-340 A4 images per minute. Use can exceed 200,000 images per day. This cradle to gate data was extracted from a full cradle to end of life LCA. Internal company validation via business and peer review and internal assessment. This dataset was consistent with LCA conducted using same approach as the office scanner LCA, which was peer reviewed by Kate Winnebeck, LCACP, New York State Pollution Prevention Institute , Rochester Institute of Technology. Data is only directly representative for the scanner model i5800. However components and manufacturing process is similar for many scanners, so extrapolation to other similar scanners may be done using judement. Component proxy data for original LCA was from Ecoinvent. Each flow represents one or more parts made with the same materials and processes, which were aggregated. The scanner was manufactured in China with the subcomponents mostly from China. However the best available datasets were used as proxy data and the best data often came from different geographic locations. Some data was replaced in this cradle to gate dataset by USLCI data where appropriate data was available. Unless otherwise noted in a General Comment for individual flows, data described as dummy_ was from Ecoinvent. Waste scrap was 0.5% of input flows. Although these were included in the full LCA, they were not shown to be significant in the modeling and according to a 1% cutoff criteria, have not been included in this cradle to gate data.

## Technology
Best available technology

## Geography
Global

## Time period
start date was based on earliest date of secondary data. Start date of primary data was 2011-07-01

## Reference product
- Scanner, department, i5800: 1 Item(s)

## Inputs from technosphere
- CUTOFF LCD glass, at plant: 0.403 kg; triangle minimum 0.4, mode 0.403, maximum 0.406
  About half this quantity was LCD glass and half was lens glass and other highly processed glass. LCD glass was the best available data for lens and other highly processed glass based on cost and manufacturing complexity.
- Acrylonitrile-butadiene-styrene copolymer, resin, at plant: 8.902 kg; triangle minimum 8.8, mode 8.906, maximum 9
  original data - acrylonitrile-butadiene-styrene (ABS), at plant RER/U from Ecoinvent
- CUTOFF Power adapter, for laptop, at plant: 1.152 kg; triangle minimum 1.14, mode 1.156, maximum 1.16
- CUTOFF Flat glass, coated, at plant: 0.2045 kg; triangle minimum 0.2, mode 0.2035, maximum 0.21
- CUTOFF Printed wiring board, surface mounted, unspec., Pb free, at plant: 1.913 kg; triangle minimum 1.81, mode 1.919, maximum 2.01
- Packaging, production scanners: 54.444 kg; triangle minimum 54, mode 54.332, maximum 55
- CUTOFF Polyurethane, flexible foam, at plant: 0.004 kg; triangle minimum 0.0038, mode 0.004, maximum 0.0042
- Aluminum ingot, production mix, at plant: 0.013148 t; triangle minimum 0.013, mode 0.013144, maximum 0.0133
  original data - aluminum, production mix at plant RER/U from Ecoinvent
- CUTOFF Synthetic rubber, at plant: 1.513 kg; triangle minimum 1.45, mode 1.529, maximum 1.56
- Polypropylene resin, at plant: 3.095 kg; triangle minimum 3, mode 3.085, maximum 3.2
  original data - polypropylene granulate, at plant, RER/U from Ecoinvent
- CUTOFF Copper, primary, at refinery: 0.588 kg; triangle minimum 0.58, mode 0.584, maximum 0.6
- CUTOFF Electronic component, unspecified, at plant: 0.03 kg; triangle minimum 0.029, mode 0.03, maximum 0.031
- CUTOFF Electricity, low voltage, at grid: 118 kWh; triangle minimum 106, mode 118, maximum 130
- CUTOFF Cable, connector for computer, without plugs, at plant: 7.807 kg; triangle minimum 7.7, mode 7.821, maximum 7.9
- CUTOFF Flat glass, uncoated, at plant: 0.2045 kg; triangle minimum 0.2, mode 0.2035, maximum 0.21
- CUTOFF Light emitting diode, LED, at plant: 0.16 kg; triangle minimum 0.15, mode 0.16, maximum 0.17
- Polyethylene, low density, resin, at plant: 1.077 kg; triangle minimum 1.06, mode 1.078, maximum 1.093
  original data - LDPE granulate, at plant, RER/U from Ecoinvent
- CUTOFF Treatment, sewage, to wastewater treatment, class 1: 661 kg; triangle minimum 600, mode 656, maximum 727
- CUTOFF Polyethylene terephthalate, granulate, amorphous, at plant: 0.066 kg; triangle minimum 0.065, mode 0.066, maximum 0.067
- CUTOFF Cold impact extrusion, aluminium, 1 stroke: 13.148 kg; triangle minimum 13, mode 13.144, maximum 13.3
- CUTOFF Polyphenylene sulfide, at plant: 0.616 kg; triangle minimum 0.61, mode 0.616, maximum 0.622
- Polyvinyl chloride, resin, at plant: 0.061 kg; triangle minimum 0.06, mode 0.061, maximum 0.062
  original data - polyvinyl chloride ar regional storage, RER/U from Ecoinvent
- CUTOFF Steel, low-alloyed, at plant: 154.74 kg; triangle minimum 154, mode 154.72, maximum 155.5
- CUTOFF Silver, at regional storage: 0.023 kg; triangle minimum 0.022, mode 0.023, maximum 0.024
  silver data was used for neodymium, because there was no neodymium data and silver was the best substitute based on price and cost of production.
- CUTOFF Nylon 6, at plant: 0.14 kg; triangle minimum 0.135, mode 0.14, maximum 0.145
- CUTOFF Injection moulding: 16.652 kg; triangle minimum 16.3, mode 16.656, maximum 17
- CUTOFF Tetrafluoroethylene, at plant: 0.032 kg; triangle minimum 0.031, mode 0.032, maximum 0.033
- CUTOFF Copper product manufacturing, average metal working: 0.588 kg; triangle minimum 0.58, mode 0.584, maximum 0.6
- Transport, combination truck, diesel powered: 243 t*km; triangle minimum 122, mode 207, maximum 400
  original data - transport, lorry &amp;amp;amp;gt;32t, EURO5/ RER U from Ecoinvent
- CUTOFF Tap water, at user: 661 kg; triangle minimum 600, mode 656, maximum 727
- CUTOFF Polycarbonate, at plant: 0.927 kg; triangle minimum 0.917, mode 0.927, maximum 0.937
- CUTOFF Steel product manufacturing, average metal working: 154.74 kg; triangle minimum 154, mode 154.72, maximum 155.5
- CUTOFF Carbon black, at plant: 0.055 kg; triangle minimum 0.053, mode 0.055, maximum 0.057
- Polystyrene, high impact, resin, at plant: 0.164 kg; triangle minimum 0.158, mode 0.164, maximum 0.17
  original data - Polystyrene, high impact, HIPS, at plant, RER/U from Ecoinvent

## Sampling procedure
engineering specifications, variability less than 1% for this model

## Review details
Data was reviewed to ensure in was consistent with the manufacturing process and components, was based on quality sources - primary data from design and manufacturing specifications, and secondary data was from reliable sources (largely from Ecoinvent) and data was properly documented in final report and associated appendices. Initial review was by Roy Wood, followed by an independent internal review by Jay Mathewson.

## Sources
- Roy Wood
