# Electricity, at eGrid, SRTV, 2010

Dataset: openLCA process, unit process
Category: Utilities
Geography: RNA
Time period: 2010-01-01 to 2010-01-01
Generated by: Samantha Wascavage
Published in: Chris Goemans, Athena Institute
restrictionsDescription: All information can be accessed by everybody.
copyright: false

## General comment
The methodology used to put together the grid information is outlined in reference 1.

## Technology
Typical

## Geography
SRTV Tennessee Valley electricity grid to includes Tennessee, most of Kentucky (less RFCW) and a small portions of West Virginia, North Carolina, Georgia, Alabama and Mississippi.

## Reference product
- Electricity, at eGrid, SRTV, 2010: 1 kWh

## Inputs from technosphere
- Electricity, nuclear, at power plant: 0.217661 kWh
  Nuclear Fission NUC – Nuclear (Uranium, Plutonium, Thorium)
- Electricity, lignite coal, at power plant: 0.013681 kWh
  Lignite Coal
- CUTOFF Electricity, petroleum coke, at power plant: 0.008922 kWh
  Petroleum (Other Fossil) PC, SG, WO - petroleum coke
- CUTOFF Electricity, biomass, gas, landfill, at power plant: 0.000286 kWh
  Gaseous Renewable Fuels (Biomass) LFG, OBG - landfill gas
- CUTOFF Electricity, at wind power plant, unspecified: 0.000167 kWh
  Wind
- Electricity, natural gas, at power plant: 0.10982 kWh
  Natural Gas
- CUTOFF Electricity, hydropower, at power plant, unspecified: 0.068729 kWh
  Hydroelectric WAT – Water (Conventional, Pumped Storage)
- Electricity, bituminous coal, at power plant: 0.052475 kWh
  SUB – Subbituminous Coal
- Electricity, residual fuel oil, at power plant: 1.7e-5 kWh
  Petroleum (RFO) – Residual Fuel Oil (includes No. 5 and No. 6 Fuel Oils and Bunker C Fuel Oil)
- Electricity, diesel, at power plant: 0.001699 kWh
  Petroleum (DFO, JF, KER) – Distillate Fuel Oil (includes all Diesel and No. 1, No. 2, and No. 4 Fuel Oils)
- Electricity, bituminous coal, at power plant: 0.516354 kWh
  Bituminous Coal BIT, SC, SGC, WC - Anthracite Coal, and Bituminous Coal.
- CUTOFF Electricity, tire derived fuel, at power plant: 0.001831 kWh
  Solid Renewable Fuels (Biomass) TDF, AB, MSB, MSW, OBS, WDS - tires, tire derived fuel
- CUTOFF Electricity, biomass,liquid, unspecified, at power plant: 0.008358 kWh
  Liquid Renewable Fuels (Biomass) BLQ, OBL, SLW, WDL - black liquor

## Sampling procedure
based on EIA electricity reports for all power plants in the US.

## Sources
- Chris Goemans, Athena Institute
- Statistics Canada
- unspecified
- USEPA
- Statistics Canada
- Statistics Canada
- Statistics Canada
- Statistics Canada
- USEPA
- EIA
- EIA
- EIA
- EIA
- EIA
- EIA
- EIA
- EIA
- EIA
- US DOE
- International Energy Agency
- EIA
