# Conditioned log, at plywood plant, US PNW

Dataset: openLCA process, unit process
Category: Cut Stock, Resawing Lumber, and Planing
Geography: RNA
Time period: 2000-01-01 to 2000-01-01
Generated by: Jamie Meil
Published in: Eric T. Sackimoto
restrictionsDescription: All information can be accessed by everybody.
copyright: true

## General comment
Base process data presented with allocations to within process co-products noted. Refer to allocation worksheet for specifics. All allocations performed using mass or volume.,
Important note: although most of the data in the US LCI database has
undergone some sort of review, the database as a whole has not yet
undergone a formal validation process.
Please email comments to lci@nrel.gov.

## Technology
typical

## Geography
US Pacific North West

## Reference product
- Conditioned log, at plywood plant, US PNW: 1 kg

## Inputs from technosphere
- Debarked wood, at plywood plant, US PNW: 1 kg
- CUTOFF Hogfuel-Biomass (50% MC), combusted in industrial boiler: 0.0235 kg
- Liquefied petroleum gas, combusted in industrial boiler: 0.000317 l
- Electricity, at grid, Western US, 2000: 0.0118 kWh

## Inputs from nature
- Water: 0.525 l

## Sources
- Leonard R. Johnson
- Eric T. Sackimoto
- Maureen Puetmann
