# Electricity, at Grid, NPCC, 2008

Dataset: openLCA process, unit process
Category: Utilities
Geography: RNA
Time period: 2008-01-01 to 2008-01-01
Generated by: Alberta Carpenter
Published in: Chris Goemans, Athena Institute
restrictionsDescription: All information can be accessed by everybody.
copyright: false

## General comment
The methodology used to put together the grid information is outlined in reference 1.

## Technology
Typical

## Geography
Connecticut, Maine, Massachusetts, New Brunswick, New Hampshire, New York, Nova Scotia, Ontario, Prince Edward Island, Quebec, Rhode Island and Vermont.

## Reference product
- Electricity, at Grid, NPCC, 2008: 1 kWh

## Inputs from technosphere
- Electricity, bituminous coal, at power plant: 0.000210976 kWh
  SC - Coal Synfuel. Coal-based solid fuel that has been processed by a coal synfuel plant, and coal-based fuels such as briquettes, pellets, or extrusions, which are formed from fresh or recycled coal and binding materials.
- CUTOFF Electricity, at wind power plant, unspecified: 0.00525976 kWh
  WND – Wind
- CUTOFF Electricity, tire derived fuel, at power plant: 0.00162658 kWh
  TDF – Tired (tire derived fuel)
- CUTOFF Electricity, biomass,liquid, unspecified, at power plant: 0.000273362 kWh
  WDL – Wood Waste Liquids (Red Liquor, Sludge Wood, Spent Sulfite Liquor, and other wood based liquids
- Electricity, bituminous coal, at power plant: 0.105322 kWh
  BIT - Anthracite Coal, and Bituminous Coal.
- CUTOFF Electricity, petroleum, waste oil, at power plant: 5.40244e-5 kWh
  WO – Waste/Other Oil (including Crude Oil, Liquid Butane, Liquid Propane, Oil Waste, Re-Refined Motor Oil, Sludge Oil, Tar Oil, or other petroleum-based liquid wastes)
- CUTOFF Electricity, other fuels, unspecified, at power plant: 8.82005e-5 kWh
  OTH – Other (Batteries, Chemicals, Coke Breeze, Hydrogen, Pitch, Sulfur, Tar Coal, and miscellaneous technologies)
- CUTOFF Electricity, hydropower, at power plant, unspecified: 0.129236 kWh
  WAT – Water (Conventional, Pumped Storage)
- Electricity, diesel, at power plant: 1.63972e-5 kWh
  JF – Jet Fuel
- Electricity, bituminous coal, at power plant: 0.0364627 kWh
  SUB – Subbituminous Coal
- Electricity, diesel, at power plant: 0.000514152 kWh
  KER – Kerosene
- CUTOFF Electricity, petroleum coke, at power plant: 0.000589686 kWh
  PC – Petroleum Coke
- Electricity, residual fuel oil, at power plant: 0.0228154 kWh
  RFO – Residual Fuel Oil (includes No. 5 and No. 6 Fuel Oils and Bunker C Fuel Oil)
- Electricity, nuclear, at power plant: 0.294507 kWh
  NUC – Nuclear (Uranium, Plutonium, Thorium)
- CUTOFF Electricity, biomass,liquid, unspecified, at power plant: 0.00456588 kWh
  BLQ – Black Liquor
- CUTOFF Electricity, biomass, gas, landfill, at power plant: 0.00326427 kWh
  LFG – Landfill Gas
- CUTOFF Electricity, biomass, liquid, sludge, at power plant: 0.00019456 kWh
  SLW – Sludge Waste
- CUTOFF Electricity, solar, unspecified, at power plant: 2.99869e-7 kWh
  SUN – Solar (Photovoltaic, Thermal)
- CUTOFF Electricity, other fuels, unspecified, at power plant: 4.88452e-5 kWh
  PUR – Purchased Steam
- Electricity, diesel, at power plant: 0.00243744 kWh
  DFO – Distillate Fuel Oil (includes all Diesel and No. 1, No. 2, and No. 4 Fuel Oils)
- CUTOFF Electricity, biomass, gas, unspecified, at power plant: 5.67354e-6 kWh
  OBG – Other Biomass Gases (Digester Gas, Methane, and other biomass gases)
- Electricity, biomass, at power plant: 0.0167474 kWh
  WDS – Wood/Wood Waste Solids (Paper Pellets, Railroad Ties, Utility Poles, Wood Chips, and other wood solids)
- Electricity, natural gas, at power plant: 0.355602 kWh
  NG – Natural Gas
- CUTOFF Electricity, biomass, solid, biogenic MSW, at power plant: 0.0112872 kWh
  MSB – Municipal Solid Waste – Biogenic Component
- CUTOFF Electricity, MSW, non-biogenic, at power plant: 0.00886858 kWh
  MSN – Municipal Solid Waste – Non-biogenic components
- CUTOFF Electricity, biomass,liquid, unspecified, at power plant: 5.92394e-7 kWh
  OBL – Other Biomass Liquid (Ethanol, Fish Oil, Liquid Acetonitrile Waste, Medical Waste, Tall Oil, Waste Alcohol, and other Biomass not specified)

## Sampling procedure
based on EIA electricity reports for all power plants in the US.

## Sources
- Chris Goemans, Athena Institute
- unspecified
- USEPA
- Statistics Canada
- Statistics Canada
- Statistics Canada
- Statistics Canada
- Statistics Canada
- Statistics Canada
- USEPA
- EIA
- EIA
- EIA
- EIA
- EIA
- EIA
- EIA
- EIA
- EIA
- EIA
- EIA
- US DOE
- International Energy Agency
- US DOE
