# Transport, combination truck, gasoline powered

Dataset: openLCA process, unit process
Category: General Freight Trucking
Geography: RNA
Time period: 2001-01-01 to 2001-01-01
Generated by: Franklin Associates
Published in: Franklin Associates
restrictionsDescription: All information can be accessed by everybody.
copyright: false

## General comment
Important note: although most of the data in the US LCI database has
undergone some sort of review, the database as a whole has not yet
undergone a formal validation process.
Please email comments to lci@nrel.gov.

## Technology
Represents current technologies for combination truck transport.

## Geography
United States

## Reference product
- Transport, combination truck, gasoline powered: 1 t*km

## Inputs from technosphere
- Gasoline, at refinery: 0.027224 l

## Emissions to nature
- Particulates, < 10 um: 1.4809e-6 kg
- Nitrogen oxides: 0.00033825 kg
- Carbon dioxide, fossil: 0.061826 kg
- VOC, volatile organic compounds: 5.5285e-5 kg
- Methane, fossil: 8.8995e-6 kg
- Sulfur oxides: 1.4759e-5 kg
- Dinitrogen monoxide: 1.7964e-6 kg
- Carbon monoxide, fossil: 0.0012282 kg

## Sources
- unspecified
- Franklin Associates
- Center for Transportation Research, Argo
