# Electricity, at eGrid, AZNM, 2008

Dataset: openLCA process, unit process
Category: Utilities
Geography: RNA
Time period: 2008-01-01 to 2008-01-01
Generated by: Alberta Carpenter
Published in: Chris Goemans, Athena Institute
restrictionsDescription: All information can be accessed by everybody.
copyright: false

## General comment
The methodology used to put together the grid information is outlined in reference 1.

## Technology
Typical

## Geography
Southwest US (Arizona and New Mexico and small portions of southern California, southern Nevada and western Texas. )

## Reference product
- Electricity, at eGrid, AZNM, 2008: 1 kWh

## Inputs from technosphere
- CUTOFF Electricity, geothermal, unspecified: 0.0244416 kWh
- CUTOFF Electricity, solar, unspecified, at power plant: 0.00107147 kWh
  Solar (Photovoltaic, Thermal)
- CUTOFF Electricity, hydropower, at power plant, unspecified: 0.059673 kWh
- Electricity, natural gas, at power plant: 0.420785 kWh
- CUTOFF Electricity, other fuels, at power plant, unspecified: 1.91342e-5 kWh
  Other Fuels WH - Waste Heat
- Electricity, bituminous coal, at power plant: 0.171311 kWh
  subbituminous coal
- Electricity, nuclear, at power plant: 0.183563 kWh
- CUTOFF Electricity, other gases, unspecified, at power plant: 1.24718e-5 kWh
  Other Gases OG – Other Gas (Butane, Coal Processes, Coke-Oven, Refinery, and other processes)
- CUTOFF Electricity, biomass, gas, landfill, at power plant: 0.000119549 kWh
  Gaseous Renewable Fuels (Biomass) LFG - Landfill Gas
- CUTOFF Electricity, at wind power plant, unspecified: 8.02643e-6 kWh
- CUTOFF Electricity, petroleum coke, at power plant: 1.37404e-5 kWh
  Petroleum (Other Fossil) PC – Petroleum Coke
- CUTOFF Electricity, biomass, gas, unspecified, at power plant: 0.000143214 kWh
  Gaseous Renewable Fuels (Biomass) OBG – Other Biomass Gases (Digester Gas, Methane, and other biomass gases)
- Electricity, diesel, at power plant: 0.000387065 kWh
  Petroleum (DFO) - Distillate Fuel Oil (includes all Diesel and No. 1, No. 2, and No. 4 Fuel Oils)
- Electricity, biomass, at power plant: 0.0026748 kWh
  WDS – Wood/Wood Waste Solids (Paper Pellets, Railroad Ties, Utility Poles, Wood Chips, and other wood solids)

## Sampling procedure
based on EIA electricity reports for all power plants in the US.

## Sources
- Chris Goemans, Athena Institute
- unspecified
- USEPA
- Statistics Canada
- Statistics Canada
- Statistics Canada
- Statistics Canada
- Statistics Canada
- Statistics Canada
- USEPA
- EIA
- EIA
- EIA
- EIA
- EIA
- EIA
- EIA
- EIA
- EIA
- EIA
- EIA
- US DOE
- International Energy Agency
- US DOE
