# Transport, school bus, diesel powered, Northeast

Dataset: openLCA process, unit process
Category: School and Employee Bus Transportation
Geography: RNA
Time period: 2010-01-01 to 2010-01-01
Generated by: Nathan Hardesty
Published in: U.S. Environmental Protection Agency (EP
restrictionsDescription: All information can be accessed by everybody.
copyright: false

## General comment
This dataset represents the Northeastern U.S. (CT, DC, DE, ME, MD, MA, NH, NJ, NY, PA, RI, VT (Reference 10)) average airborne emissions for operating a diesel powered school bus. The inventory includes all vehicle operation processes, including off-network and refueling activities.
The refinery-to-pump transportation and distribution data are calculated from Argonne National Laboratory's GREET 1.8d.1 model.
The vehicle operation data are calculated from EPA's MOVES2010a model, using the assumptions described in the corresponding detailed spreadsheet. Emissions factors in MOVES2010a are largely based on EPA's Mobile Source Observation Database, which in turn includes data from a variety of vehicle studies (References 6-8).
MOVES2010a acknowledges sources of uncertainty in the model structure, the population and acitivty data, and other model parameters. As of July 2011, the uncertainty calculation function of the model has not been activated.

## Technology
Combustion of diesel in a school bus.

## Geography
US

## Reference product
- Transport, school bus, diesel powered, Northeast: 1 p*km

## Inputs from technosphere
- Diesel, at refinery: 0.00429972 l
- Transport, ocean freighter, average fuel mix: 0.0094756 t*km
- Transport, combination truck, average fuel mix: 0.00138605 t*km
- Transport, train, diesel powered: 0.00258654 t*km
- Transport, barge, average fuel mix: 0.00134063 t*km
- Transport, pipeline, unspecified petroleum products: 0.0139709 t*km

## Emissions to nature
- Methane: 5.85922e-7 kg
- Particulates, < 2.5 um: 4.68769e-8 kg
  PM2.5 from tirewear.
- Sulfur dioxide: 1.90529e-7 kg
- Particulates, < 2.5 um: 1.99788e-7 kg
  PM2.5 from brakewear.
- Carbon dioxide, fossil: 0.011289 kg
- Hydrocarbons (other than methane): 9.35535e-6 kg
- Ammonia: 2.22155e-7 kg
- VOC, volatile organic compounds: 9.65455e-6 kg
- Nitrogen oxides: 9.74431e-5 kg
- Particulates, < 10 um: 1.95476e-7 kg
  PM10 from tirewear.
- Carbon monoxide, fossil: 6.49832e-5 kg
- Particulates, < 2.5 um: 5.06125e-6 kg
  PM2.5 from organic carbon, elemental carbon, and sulfate particulates.
- Nitrogen dioxide: 8.00383e-6 kg
- Particulates, < 10 um: 7.63188e-7 kg
  PM10 from brakewear.
- Nitrogen oxide: 8.94394e-5 kg
- Dinitrogen monoxide: 5.54781e-8 kg
- Particulates, < 10 um: 5.21758e-6 kg
  PM10 from organic carbon, elemental carbon, and sulfate particulates.

## Sources
- U.S. Environmental Protection Agency (EP
- National Institute of Standards and Tech
- EPA
- U.S. Alternative Fuels and Advanced Vehi
- Eastern Research Group
- Assessment and Standards Division, Offic
- Assessment and Standards Division, Offic
- Wang, M.
- National Climatic Data Center, National
- American School Bus Council
