# Limestone, at mine

Dataset: openLCA process, unit process
Category: Limestone Mining and Quarrying
Geography: RNA
Time period: 1992-01-01 to 2002-01-01
Generated by: Franklin Associates
Published in: Franklin Associates
restrictionsDescription: All information can be accessed by everybody.
copyright: false

## General comment
Limestone mining is quarried from open pits by blasting, followed by mechanical crushing and screening.
Important note: although most of the data in the US LCI database has
undergone some sort of review, the database as a whole has not yet
undergone a formal validation process.
Please email comments to lci@nrel.gov.

## Geography
United States

## Reference product
- Limestone, at mine: 1 kg
  The quantity of limestone-containing material per unit of crushed and screened limestone is unknown. The non-limestone material recovered from limestone processing is returned to the mining site. This quantity represents minimum amount of limestone extracted/kg limestone output

## Inputs from technosphere
- Bituminous coal, combusted in industrial boiler: 3.58e-5 kg
- Natural gas, combusted in industrial boiler: 0.00014 m3
- Diesel, combusted in industrial boiler: 0.000584 l
- Gasoline, combusted in equipment: 5.11e-5 l
- Electricity, at grid, US, 2000: 0.00423 kWh

## Inputs from nature
- Limestone: 1 kg

## Emissions to nature
- Particulates, unspecified: 5.11e-5 kg

## Sources
- Franklin Associates
- U.S. Department of Energy, EERE
- US EPA
- US EPA
- US Geological Survey
- U.S. Energy Information Administration
- M. Michael Miller
- unspecified
- unspecified
- U.S. EPA
