# Methylene diphenyl diisocyanate resin, at plant, US SE

Dataset: openLCA process, unit process
Category: Plastics Material and Resin Manufacturing
Geography: RNA
Generated by: Jamie Meil
Published in: Dr. Earl Kline
restrictionsDescription: All information can be accessed by everybody.
copyright: true

## General comment
Base process data presented with allocations to within process co-products noted. Refer to allocation worksheet for specifics. All allocations performed using mass or volume., European profile adjusted for US production
Important note: although most of the data in the US LCI database has
undergone some sort of review, the database as a whole has not yet
undergone a formal validation process.
Please email comments to lci@nrel.gov.

## Technology
Typical

## Geography
US Southeast

## Reference product
- Methylene diphenyl diisocyanate resin, at plant, US SE: 1 kg

## Inputs from technosphere
- Natural gas, processed, at plant: 0.51 m3
  Used as feedstock
- Transport, combination truck, average fuel mix: 2.65 t*km
- Diesel, at refinery: 5.01 l
  Used as feedstock
- Natural gas, combusted in industrial boiler: 0.91 m3
- CUTOFF Disposal, inert solid waste, to inert material landfill: 0.0274 kg
- Electricity, at grid, Eastern US, 2000: 1.23 kWh

## Inputs from nature
- Water: 362 l

## Emissions to nature
- Hydrocarbons, unspecified: 2.3e-5 kg
- Zinc: 5.1e-5 kg
- Nitrogen oxides: 0.0013 kg
- Hydrogen: 0.0018 kg
- Hydrogen chloride: 9.98e-6 kg
- Particulates, unspecified: 0.00018 kg
- Magnesium: 0.0959 kg
- COD, Chemical Oxygen Demand: 0.0053 kg
- Dissolved solids: 0.0081 kg
- Metallic ions, unspecified: 0.00023 kg
- BOD5, Biological Oxygen Demand: 0.00081 kg
- Aluminum: 8e-6 kg
- Suspended solids, unspecified: 0.0022 kg
- Dissolved organic matter: 0.00033 kg
- Sulfur oxides: 0.00035 kg
- Methane: 0.000889 kg
- Acids, unspecified: 3.4e-5 kg
- Organic substances, unspecified: 0.00016 kg
- Carbon dioxide: 0.41 kg
- Potassium: 0.00037 kg
- Sulfate: 0.0061 kg
- Carbon monoxide: 0.000957 kg
- VOC, volatile organic compounds: 6.3e-5 kg
- Phenol: 9.99e-7 kg
- Calcium, ion: 0.00011 kg
- Ammonium, ion: 0.0002 kg

## Sources
- Leonard R. Johnson
- Maureen Puetmann
- Dr. Earl Kline
