# Electricity, diesel, at power plant

Dataset: openLCA process, unit process
Category: Fossil Fuel Electric Power Generation
Geography: RNA
Generated by: Jeff Hernbloom
Published in: Franklin Associates
restrictionsDescription: All information can be accessed by everybody.
copyright: false

## General comment
Important note: although most of the data in the US LCI database has
undergone some sort of review, the database as a whole has not yet
undergone a formal validation process.
Please email comments to lci@nrel.gov.

## Geography
North America

## Reference product
- Electricity, diesel, at power plant: 1 kWh

## Inputs from technosphere
- Transport, combination truck, average fuel mix: 0.0017446 t*km
  Represents transportation from petroleum refinery to utility boiler.
- Transport, pipeline, unspecified petroleum products: 0.013739 t*km
  Represents transportation from petroleum refinery to utility boiler.
- Diesel, at refinery: 0.33261 l
  Fuel consumption : 0.333 liter/kWh (0.0878 gal/kWh)
- Transport, train, diesel powered: 0.001116 t*km
  Represents transportation from petroleum refinery to utility boiler.
- Transport, barge, average fuel mix: 0.0094543 t*km
  Represents transportation from petroleum refinery to utility boiler.

## Emissions to nature
- Radioactive species, unspecified: 0.036011 kBq
- Arsenic: 5.2609e-8 kg
- Manganese: 1.1956e-7 kg
- Carbon dioxide, fossil: 0.97897 kg
- Cobalt: 2.3993e-7 kg
- Beryllium: 1.108e-9 kg
- Methane, fossil: 2.1917e-6 kg
- Carbon monoxide, fossil: 0.00021551 kg
- VOC, volatile organic compounds: 8.6449e-6 kg
- Methane, dichloro-, HCC-30: 1.7827e-7 kg
- Dioxins, measured as 2,3,7,8-tetrachlorodibenzo-p-dioxin: 5.5279e-13 kg
- Nickel: 3.3677e-6 kg
- Particulates, > 2.5 um, and < 10um: 4.2981e-5 kg
- Naphthalene: 4.5036e-8 kg
- Formaldehyde: 1.3152e-6 kg
- Oils, unspecified: 1.7742e-7 kg
- Phenols, unspecified: 1.3433e-7 kg
- Iron: 1.1828e-8 kg
- Benzene: 8.529e-9 kg
- Lead: 6.0181e-8 kg
- Sulfur oxides: 0.0002149 kg
- Cadmium: 1.5862e-8 kg
- Chloride: 2.3656e-9 kg
- Mercury: 4.5036e-9 kg
- Dinitrogen monoxide: 4.7486e-6 kg
- Selenium: 2.7221e-8 kg
- Chromium: 3.3677e-8 kg
- Suspended solids, unspecified: 3.5484e-7 kg
- Hydrogen chloride: 2.7875e-5 kg
- Ethene, tetrachloro-: 3.0403e-9 kg
- Nitrogen oxides: 0.0010313 kg
- Copper, ions: 1.1828e-8 kg

## Sources
- Center for Transportation Research, Argo
- U.S. EPA
- U.S. EPA
- U.S. EPA
- EIA
- Franklin Associates
- U.S. EPA
- U.S. EPA Office of Solid Waste
