# Pressed raw panels, hardwood, at engineered wood flooring plant, E

Dataset: openLCA process, unit process
Category: Engineered Wood Member (ex. Truss) Manufacturing
Geography: RNA
Time period: 2007-01-01 to 2007-01-01
Generated by: Maureen Puettmann
Published in: Richard D. Bergman
restrictionsDescription: All information can be accessed by everybody.
copyright: false

## General comment
All weights given on an ovendry basis. All moisture contents are on an ovendry basis. MC% =(weight of water in wood / weight of oven dry wood) *100. Reference to specific gravities use oven dry mass and volumes at specified moisture contents. Reference to densities use mass and volume at specified moistrue contents.

Important note: although most of the data in the US LCI database has
undergone some sort of review, the database as a whole has not yet
undergone a formal validation process.
Please email comments to lci@nrel.gov.

## Technology
Average Transport distance

## Geography
E= Eastern US United States. The states included MN, IA, MO, WI, IL, NJ, OH, IN, MI, WV, PA, MD, DW, NJ, NY, ME, VT, NH, RI, MA, CT, VA, KY, AR, LA, MS, AL, FL,GA, NC, SC, and TN

## Reference product
- Pressed raw panels, hardwood, at engineered wood flooring plant, E: 1 kg
  Oven dry mass, od basis

## Inputs from technosphere
- Heat, pressing panels, hardwood, at engineered wood flooring plant, E: 1.077 MJ
  Amount of heat energy consumed during pressing. Reporesent 64.3% of flooring plant use of energy.
- Transport, combination truck, diesel powered: 0.0797 t*km
  Transported 0.167 kg resins over 477 km; 0.0797tkm=0.167kg*1tonne/1000kg*477km
- Diesel, combusted in industrial equipment: 0.000595638 l
  Amount of diesel consumed during pressing. Represents 5% of mill use of diesel
- Transport, combination truck, diesel powered: 0.503 t*km
  Transporting non-purchased dry veneer 1,043 km; 0.8977kg*561km/1000=0.503 tkm. Transporting non-purchased dry veneer 1,043 km; 0.8977kg*561km/1000=0.503 tkm
- Gasoline, combusted in equipment: 0.000143792 l
  Amount of gasoline consumed during pressing. Represents 14.3% of mill use of gasoline
- Electricity, at grid, Eastern US, 2000: 0.337 kWh
  Amount of electricity consumed during pressing. Represents 18.1% of mill use of electricity
- Veneer, hardwood, dry, at veneer mill, E: 0.8977 kg
  Based on a weighted average green density and specific gravity of 613 kg/m3 and 0.578. Moisture content (ovendry basis) = 6.0%.
- Urea formaldehyde resin, neat, 65% solids: 0.1114 kg
- Natural gas, combusted in industrial equipment: 7.43289e-7 m3
  Amount of natural gas consumed during pressing. Represents 14.3% of mill use of natural gas; proxy for propane
- CUTOFF Polyvinyl Acetate: 0.0584 kg

## Emissions to nature
- Hydrocarbons, unspecified: 4.61409e-5 kg
  EPA data (total hydrocarbons as C per EPA Method 25A)
- Acetone: 2.09732e-5 kg
  EPA Plywood Manufacturing—Emission Factor Documentation, AP-42, Chapter 10, Table 10.5-6, 2002
- Phenol: 9.22819e-6 kg
  EPA data
- Formaldehyde: 5.03356e-5 kg
  One mills reported
- Acetaldehyde: 0.000167785 kg
  One mill reported
- VOC, volatile organic compounds: 0.000553691 kg
  Two mills reported
- Methanol: 8.38926e-5 kg
  Two mills reported
- 4-Methyl-2-pentanone: 4.78188e-6 kg
  EPA Data

## Sampling procedure
Questionnaires from 4 veneer and 5 flooring mills in the E. United States representing 32 states.

## Sources
- Richard D. Bergman
