# Coal extraction; Underground mine

Dataset: openLCA process, unit process
Category: Bit. Coal and Lignite Surface Mining
Geography: US
Time period: 1989-01-01 to 2011-12-31
Generated by: Timothy Skone
Owner: National Energy Technology Laboratory
Reviewer: Robert James
Published in: National Energy Technology Laboratory (NETL). 2013. Coal extraction; Underground mine
restrictionsDescription: Use of this dataset is not restricted, but a statement of attribution is required. Please use the following attribution statement:
National Energy Technology Laboratory's (NETL) Unit Process Library
626 Cochrans Mill Road, P.O. Box 10940
Pittsburgh, PA 15236-0940
http://www.netl.doe.gov/research/energy-analysis/life-cycle-analysis/unit-process-library
Neither the U.S. Department of Energy (DOE) National Energy Technology Laboratory (NETL) nor any person acting on behalf of these organizations:
A. Makes any warranty or representation, express or implied, with respect to the accuracy, completeness, or usefulness of the information contained in this document, or that the use of any information, apparatus, method, or process disclosed in this document may not infringe on privately owned rights; or
B. Assumes any liability with this report as to its use, or damages resulting from the use of any information, apparatus, method, or process disclosed in this document.
Reference herein to any specific commercial product, process, or service by trade name, trademark, manufacturer, or otherwise, does not necessarily constitute or imply its endorsement, recommendation, or favoring by NETL. The views and opinions of the authors expressed herein do not necessarily state or reflect those of NETL.
copyright: true

## General comment
This process is part of the NETL Unit Process Library. To access the library and the original dataset:
1) Navigate to the NETL LCA home page (http://www.netl.doe.gov/lca)
2) Then navigate to the “Unit Process Library”
3) From the library, the unit process of interest can be found either through the "Complete Listing of the Unit Process Library link" or through the link to the "Unit Process Database" spreadsheet
4) For each process, a Data Sheet (DS) and Data File (DF) are available

BRIEF DESCRIPTION
This parameterized unit process calculates the fuel and non-combustion emissions for the extraction of raw coal from an underground coal mine. Inputs and outputs are reported on the basis of 1 kg of coal.

GOAL AND SCOPE
This unit process provides a summary of relevant input and output flows associated with the amount of electricity required to power equipment used in the extraction of raw coal from an underground mine. This equipment includes drills and explosives loaders. Fuel and non-combustion emissions for the operation of an underground coal mine are also included. Key inputs include electricity, light fuel oil, ammonium nitrate, diesel, coal, coal mine methane, and coal ventilation. Electricity, light fuel oil, ammonium nitrate, and diesel are also adjustable parameters to measure uncertainties. Extracted coal, Dust (PM10 and PM2.5), and VOCs are key outputs. All of these outputs except extracted coal are also adjustable parameters to measure uncertainties. The unit process is based on the reference flow of one kg of coal. The relevant flows of this unit process are described below and shown the associated documentation (referenced in the Citation and Associated Documentation section below).

Note: This process deviates from the DS in that it uses the input "Ammonia, steam reforming, liquid, at plant" in place of "Ammonium nitrate". The input value for ammonia reflects the amount of ammonia necessary to produce the required quantity of ammonium nitrate for this process.

BOUNDARY AND DESCRIPTION
A visual representation of the boundary of this unit process is available in the associated documentation (referenced in the Citation and Associated Documentation section below). The electricity and diesel requirements were calculated using the Energy and Environmental Profile of the U.S. Mining Industry developed by the U.S. Department of Energy’s Energy Efficiency and Renewable Energy division and the National Mining Association (DOE and NMA 2002). Chapter Two of the source focused on coal; description of coal types, overview of coal mining, energy requirements for underground and surface mines, and emissions from coal mining. The data source provides energy data for specific mining activities such as coal handling, extraction, and grinding. BCS, Incorporated (BCS) developed the data by integrating the U.S. Department of Energy’s Energy Information Administration’s 1997 Coal Industry data into the Western Mining Engineering, Inc.’s SHERPA Mine Cost Software to create 2002 estimates. BCS also used Mine and Mill Equipment Cost, An Estimator’s Guide to develop the data. Newer data for specific coal mining processes are not available. This unit process parameterizes key variables, which allow for evaluation of data uncertainty when used in a life cycle model.

Drills, two boom jumbo, continuous mining machine, raise borers, ANFO loaders, roof bolter, water pumps, and diamond drill were the pieces of equipment used for extracting coal from an underground mine; the drills, two boom jumbo, continuous mining machine, water pumps, and diamond drill use electricity, while the raise borers, ANFO loaders, and roof bolter use diesel. The reference flow for this process is one kg of coal. To calculate the electricity needed, the sum of the energy requirements for the equipment that uses electricity, in Btu per ton, was divided by the appropriate conversions to obtain the electricity needed in kWh per kg. The diesel requirement was calculated by dividing the sum of the energy requirements, in Btu per ton, for the equipment that uses diesel by the appropriate conversion to convert tons to kg and then divided by the high heating value of diesel (EIA 2011), in Btu per kg, to obtain the diesel requirement in kg of diesel per kg of coal. To calculate the amount of ANFO used to excavate coal, 1994 data specific to the Powder River Basin (PRB) was used (Stump 1995). The average weight percentages for the composition of ammonium nitrate and fuel oil in ANFO were taken from an ANFO material safety data sheet (Maxam North America 2010). The amount of ammonium nitrate required, in kg ammonium nitrate per kg coal, was calculated by multiplying the kg of ANFO per coal produced by the average weight percent of ammonium nitrate. The kg of ANFO per coal produced was multiplied by the average weight percent of light fuel oil to calculate the amount of light fuel oil required in kg fuel oil per kg of coal. Particulate matter (PM) and volatile organic compounds (VOCs) are emitted during coal extraction from an underground mine. To calculate the amount of VOC emissions released during the excavation of coal, 1989-1998 data specific to the PRB (McVehil, Addison, and Baugues 2001) and 2011 coal production data by the National Mining Association (NMA 2009) was used. In National Mining Association (2009), the total value for each coal type was used as the coal production item in the calculations. The amount of VOCs released, in tons per year, was multiplied by the appropriate conversion and divided by the amount of coal produced, which was also multiplied by the appropriate conversions, to obtain kg of VOC per kg of coal. The VOC emissions were calculated for the coal types of bituminous, subbituminous, and lignite by using the calculation just described above but replacing the coal produced with the appropriate coal type production value. It was assumed the VOC emissions released were for one year. Data for PM emissions was taken from 2008 U.S. Environmental Protection Agency data (EPA n.d.). Underground mines’ coal production data was obtained from 2008 U.S. Energy Information Administration historical data (EIA n.d.). PM emissions were calculated for underground mines only, not specific coal types. The PM emission factors were separated into PM10 and PM2.5. The following description for calculating the PM10 emissions is the same for PM2.5. The amount of PM10 emissions for each county throughout the U.S. was multiplied by the coal production of its specific county to obtain the amount of PM10 emissions within the specific county. This number was then multiplied by the coal production percentage for the specific county, which was the coal production for the specific county divided by the total coal production throughout all the U.S. counties in order to obtain the emissions for the specific county. The PM10 and PM2.5 emissions are the sum of the PM10 and PM2.5 emissions for every county, respectively. A minimum and maximum value for PM10 and PM25 was obtained. The PM10 minimum and maximum values were calculated by taking the percentile of the PM10 emissions per coal production for each county for 25 percent and 75 percent, respectively. This method was also used to calculate the minimum and maximum values for PM2.5. The ammonium nitrate, electricity, light fuel oil, PM, and VOC requirements were placed as parameters so the items could be adjusted to measure uncertainties.

Additional details regarding input and output flows, including calculation methods, are contained in the associated documentation (referenced in the Citation and Associated Documentation section below).

This process contains one or more surrogate product flows as replacements for proprietary product flows used in the NETL Unit Process Library. All surrogate flow were taken from the U.S. Life Cycle Inventory Database; a list of surrogate flows used in this process is provided below:
1) Diesel, at refinery
2) Electricity, at Grid, US, 2010

CITATION AND ASSOCIATED DOCUMENTATION
This document should be cited as:
National Energy Technology Laboratory (NETL). 2015. NETL Life Cycle Inventory Data – Unit Process: Coal extraction; Underground mine. U.S. Department of Energy, National Energy Technology Laboratory. Last Updated: September 2015 (version 01). Retrieved on [DATE] from [URL for this dataset].

This dataset is part of the NETL Unit Process Library. The Library offers additional information concerning this dataset in the form of a Detailed Spreadsheet Documentation (DS) file and a Process Documentation File (DF). The DS file is an Excel file that contains all of the parameters, inputs, and outputs for a given system as well as background data, calculations and quality scores. The DF file is a PDF document that contains major assumptions and data sources that are the basis for each unit process. The NETL Unit Process Library is located on the NETL website (netl.doe.gov) under Research / Energy Analysis / Energy Trends and Issues / Life Cycle Analysis / Unit Process Library.

This dataset was converted directly from the DS with additional supporting information provided by the DF. Full citations for the DS and DF are given below.

DS File
National Energy Technology Laboratory (NETL). 2013. NETL Life Cycle Inventory Data – Unit Process: Underground coal extraction. U.S. Department of Energy, National Energy Technology Laboratory. Last Updated: July 2013 (version 01). Retrieved on 6/30/2014 from: http://www.netl.doe.gov/File%20Library/Research/Energy%20Analysis/Life%20Cycle%20Analysis/UP_Library/DS_Stage1_O_Extraction_Underground_2013-01.xlsx

DF File
National Energy Technology Laboratory (NETL). 2013. NETL Life Cycle Inventory Data – Unit Process: Underground coal extraction. U.S. Department of Energy, National Energy Technology Laboratory. Last Updated: July 2013 (version 01). Retrieved on 6/30/2014 from: http://www.netl.doe.gov/File%20Library/Research/Energy%20Analysis/Life%20Cycle%20Analysis/UP_Library/DF_Stage1_O_Coal_Extraction_Underground_2013-01.pdf

## Technology
This unit process provides a summary of relevant input and output flows associated with the amount of electricity required to power equipment used in the extraction of raw coal from an underground mine. This equipment includes drills and explosives loaders. Fuel and non-combustion emissions for the operation of an underground coal mine are also included. Key inputs include electricity, light fuel oil, ammonium nitrate, diesel, coal, coal mine methane, and coal ventilation. Extracted coal, Dust (PM10 and PM2.5), and VOCs are key outputs.

A visual representation of the boundary of this unit process is available in the associated documentation
(referenced in the Citation and Associated Documentation section in the Description field). Drills, two boom jumbo, continuous mining machine, raise borers, ANFO loaders, roof bolter, water pumps, and diamond drill were the pieces of equipment used for extracting coal from an underground mine; the drills, two boom jumbo, continuous mining machine, water pumps, and diamond drill use electricity, while the raise borers, ANFO loaders, and roof bolter use diesel.

Additional details regarding the technologies used by this unit process are contained in the associated documentation
(referenced in the Citation and Associated Documentation section in the Description field).

## Time period
This data set is representative of best available public data from 01/01/1989 to 12/31/2011 and is not subject to limited usability within sub-time spans (e.g. summer, winter).

## Parameters
- NH3_NH4NO3: 0.425546
  [kg/kg] Mass of ammonia required to product 1 kg ammonium nitrate
- Electricity: 0.0182
  [kWh/kg] Amount of electricity per unit of coal produced
- Diesel: 0.000433762
  [kg/kg] Amount of diesel energy input per unit of coal produced
- Lightfueloil: 0.000101111
  [kg/kg] Mass of light fuel oil per unit of coal produced
- PM25: 7.59451e-6
  [kg/kg] Mass of PM25 emissions per unit of coal produced
- VOC_subbit: 2.13862e-7
  [kg/kg] Mass of VOC emissions per unit of subbituminous coal produced
- VOC_bit: 1.93918e-7
  [kg/kg] Mass of VOC emissions per unit of bituminous coal produced
- PM10to25: 6.49e-6
  [kg/kg] Mass of PM10-2.5 emissions per unit of coal produced
- NH3NO3: 0.00145444
  [kg/kg] Mass of ammonium nitrate per unit of coal produced
- Coaltype: 1
  [dimensionless] Switches for selecting coal type: 1=bituminous, 2=subbituminous, 3=lignite
- VOC_lig: 1.25769e-6
  [kg/kg] Mass of VOC emissions per unit of lignite coal produced
- VOC: 1.93918e-7; = if(Coaltype=1;VOC_bit;if(Coaltype=2;VOC_subbit;if(Coaltype=3;VOC_lig;0)))
  [kg/kg] Mass of VOC emissions per unit of coal produced
- Diesel_EDensity: 43.2
  [MJ/kg diesel] Energy density of diesel taken from the Excel model of NETL's 2008 Petroleum Baseline (http://netl.doe.gov/File%20Library/Research/Energy%20Analysis/Life%20Cycle%20Analysis/PetroBasedFuelsLCGHGAnlys2005BslnModel.xls)

## Reference product
- Coal; Production mix, from underground mine: 1 kg; data quality (2,2,4,1,1)

## Inputs from technosphere
All rows: data quality (2,2,4,1,1)
- Water use and quality; Production mix, from underground coal mine: 1 Item(s)
- Thermal energy; From diesel fired equipment; Production mix: 0.0187385 MJ; = Diesel*Diesel_EDensity
- Methane emission; Production mix, underground mine: 1 Item(s)
- Coal mine equipment assembly; Production mix, underground mine: 1 Item(s)
- Coal mine ventilation energy; Electric fan; Underground mine: 1 Item(s)
- Ammonia, steam reforming, liquid, at plant: 0.000618933 kg; = NH3NO3*NH3_NH4NO3
- Electricity, at Grid, US, 2010: 0.0182 kWh; = Electricity
- Coal preparation facility; Multiple processes; Underground mine: 1 Item(s)
- Fuel consumption and emissions from coal mine commissioning and decommissioning; Underground mine: 1 Item(s)

## Inputs from nature
- Coal; Raw, in ground; Underground mine; 27.1 MJ/kg: 1 kg; data quality (2,2,4,1,1)

## Emissions to nature
- Particulates, < 2.5 um: 7.59451e-6 kg; = (PM25) * 1.0; data quality (2,2,4,1,1)
- Particulates, > 2.5 um, and < 10um: 6.49e-6 kg; = (PM10to25) * 1.0; data quality (2,2,4,1,1)
- NMVOC, non-methane volatile organic compounds, unspecified origin: 1.93918e-7 kg; = VOC; data quality (2,2,4,1,1)

## Inventory method
Attributional

## Modelling constants
All elementary and technosphere flows are calculated on a functional unit basis. Calculations involving combustion primarily to generate useful work are done using lower heating values (LHV) and calculations involving combustion primarily to generate useful heat are done using higher heating values (HHV). Unless explicitly stated in the associated reference documents applicable calculations assumed standard atmospheric temperature and pressure (SATP).

## Completeness
Individual relevant flows captured

## Data selection
Best publically available data

## Data treatment
No allocation applied

## Data collection
No primary data collected

## Intended application
This is a gate-to-gate extraction process and can be used for any type of LCA study.

## Project
National Energy Technology Laboratory (NETL) Unit Process Library

## Sources
- McVehil, G.E.; Addison, E.L.; Baugues, K.A. 2001. Air Quality and Visibility Impacts of Powder River Basin Coal Mining at Badlands National Park
- Stump, B. 1995. Practical Observations of US Mining Practices and Implications for CTBT Monitoring
- National Mining Association (NMA). 2012. U.S. Coal Production and Number of Mines by State and Coal Type
- National Mining Association (NMA). 2009. 2008 Coal Producer Survey
- U.S. Energy Information Administration (EIA). 2011. Appendix A British Thermal Unit Conversion Factors
- National Energy Technology Laboratory (NETL). 2013. Coal extraction; Underground mine
- U.S. Environmental Protection Agency (EPA). n.d. The National Emissions Inventory
- U.S. Department of Energy (DOE) and National Mining Association (NMA). 2002. Energy and Environmental Profile of the U.S. Mining Industry: Chapter 2 Coal
- Maxam North America, Inc. 2010. Material Safety Data Sheet, ANFO
- U.S. Energy Information Administration (EIA). n.d. Coal.
