# Corn stover, ground and stored

Dataset: openLCA process, unit process
Category: Corn Farming
Geography: RNA
Time period: 2010-01-01 to 2022-01-01
Generated by: Daniel Inman
Published in: Hsu, D.
restrictionsDescription: All information can be accessed by everybody.
copyright: false

## General comment
Taken from Sheehan, Corn Stover Ethanol LCA. (Directly from TEAM). The corn steep liquor production involves the steeping of harvested corn for a period of from 24 to 48 hours in a light sulfurous acid solution. The production of sulfurous acid was assumed to be negligible. The only emissions were SOx from the steeping tanks. Emission factors provided by USA EPA AP-42. All of the production burdens from corn are assumed to be allocated to the production of the steeping liquor.

## Technology
modern

## Geography
North America

## Time period
2010

## Reference product
- Corn stover, ground and stored: 1 t

## Inputs from technosphere
- CUTOFF Conveyor belt, at plant: 3.4747e-5 m
  conveyor for grinder in-feed system
- CUTOFF Loading bales: 1.43 Item(s)
  loading bales for grinder. Calculation of number of bales comes from 2000 lbs of corn stover divided by weight per bale. Trailer volume is 2511 ft^3 (INL table 4-5), density is 12 lbs/ft^3 dry (=20 wet at 40% moisture).
- CUTOFF Fodder loading, by self-loading trailer: 2.7751 m3
  loading to storage
- CUTOFF Agricultural machinery, general, production: 0.9 kg
- Grinding: 0.93145 sh tn
- CUTOFF Maize drying: 238 kg
- CUTOFF Dried roughage store, non ventilated: 1.1723e-7 m3
- Electricity, at grid, US, 2008: 61.289 kWh
  Electricity needed for dust collection
- Corn stover, carted: 1.28 t
  comes in wet

## Emissions to nature
- Water: 280 kg
  water dried per ton of final moisture corn stover.

## Sources
- Hsu, D.
- Hess, J.
