# Soda powder, at plant

Dataset: openLCA process, unit process
Category: All Other Basic Inorganic Chemical Manufacturing
Geography: RNA
Time period: 2003-01-01 to 2003-01-01
Generated by: Franklin Associates
Published in: THE PLASTICS DIVISION OF THE AMERICAN C
restrictionsDescription: All information can be accessed by everybody.
copyright: false

## General comment
Soda powder may also be referred to as soda ash. Process inputs do not consider the fraction of mass that is extracted and returned to the mine as overburden. Complete inventory data and metadata are available in full in the final report and appendices, Cradle-to-Gate Life Cycle Inventory of Nine Plastic Resins and Four Polyurethane Precursors. This report has been extensively reviewed within Franklin Associates and has undergone partial critical review by ACC Plastics Division members and is available at: www.americanchemistry.com. Quantities may vary slightly between the reference to main source and and this module due to rounding. Important note: although most of the data in the US LCI database has undergone some sort of review, the database as a whole has not yet undergone a formal validation process. Please email comments to lci@nrel.gov.

## Technology
Underground mining of naturally occurring trona brine via the room and pillar method and the long wall method

## Geography
North America (US and Canada)

## Reference product
- Soda powder, at plant: 1 kg
  Also referred to as soda ash

## Inputs from technosphere
- Natural gas, combusted in industrial boiler: 0.0497543 m3
- Residual fuel oil, combusted in industrial boiler: 0.00158536 l
- Bituminous coal, combusted in industrial boiler: 0.108 kg
- Diesel, combusted in industrial equipment: 6.7e-5 l
  Includes diesel fuel and distillate oil amounts.
- Electricity, at grid, US, 2008: 0.0906085 kWh

## Inputs from nature
- Trona ore, in ground: 1 kg
  Process inputs do not consider the fraction of mass that is extracted and returned to the mine as overburden.

## Emissions to nature
- Particulates, unspecified: 0.0965 kg
- Carbon dioxide, fossil: 0.415 kg

## Sampling procedure
Data are from secondary sources.

## Sources
- THE PLASTICS DIVISION OF THE AMERICAN C
