# Crew to Burn Bole Only slash in the Woods, INW

Dataset: openLCA process, unit process
Category: Logging
Geography: RNA
Time period: 1989-01-01 to 1996-01-01
Generated by: Maureen Puetmann
Published in: Leonard R. Johnson
restrictionsDescription: All information can be accessed by everybody.
copyright: false

## General comment
Important note: although most of the data in the US LCI database has undergone some sort of review, the database as a whole has not yet undergone a formal validation process. Please email comments to lci@nrel.gov.

## Technology
Average technology. Some data extrapolated from similar processes.

## Geography
US Inland West including Montana, Idaho, and eastern Washington

## Reference product
- Crew to Burn Bole Only slash in the Woods, INW: 1 ha

## Inputs from technosphere
- CUTOFF Lubricants, unspecified, at plant: 0.00136078 kg
- Diesel, combusted in industrial equipment: 4.54249 l

## Sampling procedure
Region specific data on the level of resource consumption during site preparation is limited. Estimates for these values were developed using a limited set of published data and through direct inquiries of forest nursery managers. Calculation from production factors in piling slash.

## Sources
- Maureen Puettmann
- Leonard R. Johnson
