# Natural gas, combusted in industrial boiler, at pulp and paper mill (EXCL.)

Dataset: openLCA process, unit process
Category: Pulp, Paper, and Paperboard Mills
Geography: RNA
Time period: 1998-01-01 to 2001-01-01
Generated by: Caroline Gaudreault
Reviewer: Martha Stevenson
Published in: Franklin Associates
restrictionsDescription: All information can be accessed by everybody.
copyright: false

## General comment
This process was built to be used within the processes named "Fuels burned at bleached kraft market pulp mill", "Fuels burned at uncoated freesheet paper mill", "Fuels burned at coated freesheet paper mill", "Fuels burned at uncoated mechanical paper mill", "Fuels burned at coated mechanical paper mill" and "Fuels burned at bag and sack paper mill". It was built from the process named "Natural gas, combusted in industrial boiler" v.1.6 available in the US LCI database. Transport and waste processes were removed. The following emissions to air were excluded (excl.): Sulfur oxidesand Nitrogen oxides. These processes and emissions are reported in pulp and paper mill process chain in which this process is integrated.
Important note: although most of the data in the US LCI database has
undergone some sort of review, the database as a whole has not yet
undergone a formal validation process.
Please email comments to lci@nrel.gov.

## Technology
Natural gas combustion in average industrial boiler.

## Geography
United States

## Reference product
- Natural gas, combusted in industrial boiler, at pulp and paper mill (EXCL.): 1 m3

## Inputs from technosphere
- Natural gas, processed, at plant: 1 m3

## Emissions to nature
- Nickel: 3.3639e-8 kg
- Chromium: 2.2426e-8 kg
- Beryllium: 1.9222e-10 kg
- Manganese: 6.087e-9 kg
- Methane, fossil: 3.6017e-5 kg
- Selenium: 3.8444e-10 kg
- Cadmium: 1.762e-8 kg
- Particulates, > 2.5 um, and < 10um: 0.00012115 kg
- Naphthalene: 9.7713e-9 kg
- Dinitrogen monoxide: 3.6017e-5 kg
- Carbon dioxide, fossil: 1.96 kg
- Arsenic: 3.2037e-9 kg
- Formaldehyde: 1.2014e-6 kg
- VOC, volatile organic compounds: 8.8405e-5 kg
- Lead: 8.0092e-9 kg
- Mercury: 4.1648e-9 kg
- Radioactive species, unspecified: 0.0034247 kBq
- Benzene: 3.3639e-8 kg
- Cobalt: 1.3456e-9 kg
- Carbon monoxide, fossil: 0.0013457 kg

## Sources
- AF&PA
- U.S. EPA
- Franklin Associates
- Center for Transportation Research, Argo
- EPA
- U.S. EPA Office of Solid Waste and Emerg
- unspecified
