# Medium density fiberboard (MDF), at MDF mill

Dataset: openLCA process, unit process
Category: Softwood Veneer and Plywood Manufacturing
Geography: RNA
Time period: 2004-01-01 to 2004-01-01
Generated by: Maureen Puettmann
Published in: James B. Wilson
restrictionsDescription: All information can be accessed by everybody.
copyright: false

## General comment
All weights given on an ovendry basis.

Important note: although most of the data in the US LCI database has
undergone some sort of review, the database as a whole has not yet
undergone a formal validation process.
Please email comments to lci@nrel.gov. Review off this data by three industry representatives selected by the composite panel association (CPA); two academic reviewers selected by editors peer review journal

## Technology
The MDF process represents average US technology.

## Geography
Average US, United States data

## Reference product
- Medium density fiberboard (MDF), at MDF mill: 1 m3
  1.0 m3 of mdf weighing 741 kg which includes wood, resin, wax, etc; ovendry weight; wt. average for 4 mills in US

## By-products
- Wood fuel, at MDF mill: 54 kg
  oven dry weight
- Wood waste, at MDF mill: 0.0625 kg
  oven dry weight; sold for fuel
- Wood fuel, sanderdust, at MDF mill: 70 kg
  oven dry weight
- Bark, at MDF mill: 12.9 kg
  ovend dry weight; landscape mulch

## Inputs from technosphere
- Pulp chips, at rough green lumber production, US PNW: 38.439 kg
  oven dry weight
- CUTOFF Wood waste, unspecified: 2.21 kg
- Urea formaldehyde resin, neat, 65% solids: 134.4 kg
  UF neat resin at 62% solids; includes surrogate of 2.3 kg MUF resin at 65% solids and 1.1 kg of PMDI at 100% solids
- CUTOFF Emulsion wax 53% solids: 8.98 kg
  neat weight includes water
- Transport, combination truck, diesel powered: 177 t*km
  average oneway delivery at 161 km of 792.9 kg od wood at 39%mc with no backhaul (1.39X);
- Diesel, combusted in industrial boiler: 0.272 l
  surrogate for DFO
- Pulp chips, at sawmill, US SE: 230.634 kg
  oven dry weight
- Liquefied petroleum gas, combusted in industrial boiler: 0.755 l
  forklifts
- Sawdust, at rough green lumber production, US PNW: 140.616 kg
  oven dry weight
- Panel trim, from trim and saw at plywood plant, US PNW: 27.9 kg
  oven dry weight
- Gasoline, combusted in equipment: 0.131 l
- Planer shavings, from green lumber, at planer mill, US PNW: 61.6 kg
  oven dry weight
- Transport, combination truck, diesel powered: 1.63 t*km
  average one way delivery of 8.98 kg wax and 3.20 kg of urea by truck for 134 km with no back haul
- Natural gas, combusted in industrial boiler: 43 m3
- Electricity, at grid, US, 2000: 415 kWh
- Wood fuel, MDF, generated on-site, combusted in industrial boiler: 126.7 kg
  ovendry weight; actual MC of this fuel would be in the 20-30% dry basis range. 70 kg sanderdust and 54 kg wood fuel
- CUTOFF Disposal, fly ash, to unspecified landfill: 1.94 kg
- Sawdust, hardwood, green, at sawmill, NE-NC: 10.584 kg
  oven dry weight
- Transport, combination truck, diesel powered: 17.8 t*km
  average one way delivery at 134 km of 134.4 kg of neat resin at 62% solids with no backhaul --99% of resin shipped by truck
- CUTOFF Urea 40% solids: 3.2 kg
  neat weight includes water
- Wood chips, hardwood, green, at sawmill, NE-NC: 158.027 kg
  oven dry weight
- Diesel, combusted in industrial equipment: 0.427 l
- Planer shavings, from dried lumber, at planer mill, US PNW: 30.048 kg
  oven dry weight
- Planer shavings, at planer mill, US SE: 95.152 kg
  oven dry weight
- Transport, combination truck, diesel powered: 0.2 t*km
  average one way rail 1% of 134.4 kg of neat resin at 62% solids
- Wood fuel, MDF, purchased, combusted in industrial boiler: 236 kg
  ovendryweight--bark hog fuel

## Inputs from nature
- Water, well: 452 l
- Water: 935 l
  Municipal

## Emissions to nature
- Particulates, < 10 um: 0.29 kg
- Suspended solids, unspecified: 0.0101 kg
- Ammonia, as N: 0.002 kg
- BOD: 0.007 kg
- Methanol: 0.219 kg
- Particulates: 0.363 kg
- Formaldehyde: 0.159 kg
- VOC, volatile organic compounds: 0.84 kg
  Reported in survey. Might overestimate VOC's. Total VOC here, might include some boiler emissions from the "Wood…combusted in industrial boiler" process

## Sampling procedure
Survey of industry production practice; manufacturing technology typical for industry

## Sources
- James B. Wilson
- James B. Wilson
- Maureen Puettmann
