# Winter wheat straw, ground and stored

Dataset: openLCA process, unit process
Category: Wheat Farming
Geography: RNA
Time period: 2010-01-01 to 2011-01-01
Generated by: Daniel Inman
Published in: Hsu, D.
restrictionsDescription: All information can be accessed by everybody.
copyright: false

## General comment
dried to 12% moisture

## Technology
modern

## Geography
North America

## Time period
2010

## Reference product
- Winter wheat straw, ground and stored: 1 t

## Inputs from technosphere
- CUTOFF Agricultural machinery, general, production: 0.9 kg
- Winter wheat straw, carted: 1.33 t
- CUTOFF Conveyor belt, at plant: 3.4747e-5 m
  conveyor for grinder in-feed system
- Electricity, at grid, US, 2008: 3.2551 kWh
  twine removal
- CUTOFF Loading bales: 1.43 Item(s)
  loading bales for grinder. Calculation of number of bales comes from 2000 lbs of corn stover divided by weight per bale. Trailer volume is 2511 ft^3 (INL table 4-5), density is 12 lbs/ft^3 dry (=20 wet at 40% moisture).
- CUTOFF Dried roughage store, non ventilated: 1.1723e-7 m3
  30 year lifetime for storage from INL feedstock design report.
- CUTOFF Fodder loading, by self-loading trailer: 2.7751 m3
- CUTOFF Maize drying: 33.3 kg
- Grinding: 0.88 t

## Emissions to nature
- Water: 333 kg
  water dried per ton of final moisture corn stover.

## Sources
- Hsu, D.
- Hess, J.
