# Liquefied petroleum gas, combusted in industrial boiler

Dataset: openLCA process, unit process
Category: Steam and Air-Conditioning Supply
Geography: RNA
Time period: 2001-01-01 to 2001-01-01
Generated by: Franklin Associates
Published in: Franklin Associates
restrictionsDescription: All information can be accessed by everybody.
copyright: false

## General comment
Important note: although most of the data in the US LCI database has
undergone some sort of review, the database as a whole has not yet
undergone a formal validation process.
Please email comments to lci@nrel.gov.

## Technology
LPG combustion in average industrial boiler.

## Geography
United States

## Reference product
- Liquefied petroleum gas, combusted in industrial boiler: 1 l
  100% propane

## Inputs from technosphere
- Liquefied petroleum gas, at refinery: 1 l
- Transport, train, diesel powered: 0.0033554 t*km
  Represents transportation from petroleum refinery to industrial boiler.
- Transport, combination truck, average fuel mix: 0.0052453 t*km
  Represents transportation from petroleum refinery to industrial boiler.
- Transport, barge, average fuel mix: 0.028425 t*km
  Represents transportation from petroleum refinery to industrial boiler.
- Transport, pipeline, natural gas: 0.041307 t*km
  Represents transportation from petroleum refinery to industrial boiler.

## Emissions to nature
- Carbon monoxide: 0.00044339 kg
- Nitrogen oxides: 0.0026025 kg
- VOC, volatile organic compounds: 4.5544e-5 kg
- Dinitrogen monoxide: 0.00011711 kg
- Carbon dioxide, fossil: 1.724 kg
- Methane: 2.6025e-5 kg
- Particulates, < 10 um: 7.8147e-5 kg

## Sources
- Center for Transportation Research, Argo
- Franklin Associates
