# Combustion, wet wood residue, AP-42

Dataset: openLCA process, unit process
Category: Other Electric Power Generation
Geography: RNA
Time period: 1995-01-01 to 1995-01-01
Generated by: Daniel Inman
restrictionsDescription: All information can be accessed by everybody.
copyright: false

## General comment
From EPA AP-42 document for External Combustion Sources: Wood Residue Combusition. http://www.epa.gov/ttn/chief/ap42/ch01/final/c01s06.pdf. Accessed May 2008.

Use background spreadsheet to pick "fluidized bed" as firing configuration, where available.

## Technology
current

## Geography
North America

## Reference product
- Combustion, wet wood residue, AP-42: 1055.87 MJ
  based on heat input (HHV)

## Emissions to nature
- Carbon monoxide, biogenic: 0.0843682 kg
  wet wood-fired boiler, fluidized bed configuration
- Particulates, < 10 um: 0.0335658 kg
  for fabric filter
- Nitrogen oxides: 0.0725748 kg
  wet wood-fired boiler, fluidized bed configuration
- Particulates, unspecified: 0.0453592 kg
  for fabric filter
- Hydrogen chloride: 0.00861826 kg
- VOC, volatile organic compounds: 0.00771107 kg
- Organic substances, unspecified: 0.0176901 kg
- Sulfur dioxide: 0.00816466 kg
  wet wood-fired boiler, fluidized bed configuration
- Particulates, < 2.5 um: 0.0294835 kg
  for fabric filter
- Dinitrogen monoxide: 0.0058967 kg
- Methane, biogenic: 0.00952544 kg

## Sources
- USEPA
- Hsu, D.
- Unknown
