# Diesel, combusted in industrial boiler

Dataset: openLCA process, unit process
Category: Steam and Air-Conditioning Supply
Geography: RNA
Time period: 1998-01-01 to 2001-01-01
Generated by: Franklin Associates
Published in: Franklin Associates
restrictionsDescription: All information can be accessed by everybody.
copyright: false

## General comment
Important note: although most of the data in the US LCI database has
undergone some sort of review, the database as a whole has not yet
undergone a formal validation process.
Please email comments to lci@nrel.gov.

## Technology
Diesel combustion in average industrial boiler.

## Geography
United States

## Reference product
- Diesel, combusted in industrial boiler: 1 l

## Inputs from technosphere
- Transport, combination truck, average fuel mix: 0.0052453 t*km
  Represents transportation from petroleum refinery to industrial boiler.
- Transport, barge, average fuel mix: 0.028425 t*km
  Represents transportation from petroleum refinery to industrial boiler.
- Diesel, at refinery: 1 l
- Transport, pipeline, unspecified petroleum products: 0.041307 t*km
  Represents transportation from petroleum refinery to industrial boiler.
- Transport, train, diesel powered: 0.0033554 t*km
  Represents transportation from petroleum refinery to industrial boiler.

## Emissions to nature
- Nitrogen oxides: 0.0028727 kg
- Selenium: 2.493e-7 kg
- Radioactive species, unspecified: 0.10827 kBq
- Manganese: 9.972e-8 kg
- Particulates, < 10 um: 0.00011972 kg
- Chromium: 4.986e-8 kg
- Chloride: 7.1124e-9 kg
- Carbon dioxide, fossil: 2.727 kg
- Dinitrogen monoxide: 1.3227e-5 kg
- Phenols, unspecified: 4.0386e-7 kg
- Hydrogen chloride: 8.3807e-5 kg
- Methane, fossil: 6.1048e-6 kg
- Dioxins, measured as 2,3,7,8-tetrachlorodibenzo-p-dioxin: 1.662e-12 kg
- Cadmium: 4.986e-8 kg
- Iron: 3.5562e-8 kg
- Copper, ion: 3.5562e-8 kg
- Mercury: 4.986e-8 kg
- Methane, dichloro-, HCC-30: 5.3599e-7 kg
- Carbon monoxide, fossil: 0.00060031 kg
- Nickel: 4.986e-8 kg
- Zinc: 6.648e-8 kg
- Sulfur oxides: 0.0005986 kg
- Suspended solids, unspecified: 1.0669e-6 kg
- Ethene, tetrachloro-: 9.141e-9 kg
- Lead: 1.4958e-7 kg
- Copper: 9.972e-8 kg
- Arsenic: 6.648e-8 kg
- Oils, unspecified: 5.3343e-7 kg
- Beryllium: 4.986e-8 kg
- VOC, volatile organic compounds: 2.408e-5 kg

## Sources
- Franklin Associates
- Center for Transportation Research, Argo
- U.S. EPA
- U.S. EPA
- U.S. EPA
- U.S. EPA
- U.S. EPA Office of Solid Waste
- EIA
