# Transport, refuse truck, gasoline powered

Dataset: openLCA process, unit process
Category: Waste Collection
Geography: RNA
Time period: 2010-01-01 to 2010-01-01
Generated by: Nathan Hardesty
Published in: U.S. Environmental Protection Agency (EP
restrictionsDescription: All information can be accessed by everybody.
copyright: false

## General comment
This dataset represents the U.S. average airborne emissions for operating a gasoline powered refuse truck. The inventory includes all vehicle operation processes, including off-network and refueling activities.
The refinery-to-pump transportation and distribution data are calculated from Argonne National Laboratory's GREET 1.8d.1 model.
The vehicle operation data are calculated from EPA's MOVES2010a model, using the assumptions described in the corresponding detailed spreadsheet. Emissions factors in MOVES2010a are largely based on EPA's Mobile Source Observation Database, which in turn includes data from a variety of vehicle studies (References 6-8).
MOVES2010a acknowledges sources of uncertainty in the model structure, the population and acitivty data, and other model parameters. As of July 2011, the uncertainty calculation function of the model has not been activated.

## Technology
Combustion of gasoline in a refuse truck.

## Geography
US

## Reference product
- Transport, refuse truck, gasoline powered: 1 t*km

## Inputs from technosphere
- Gasoline, at refinery: 0.0405824 l
- Transport, ocean freighter, average fuel mix: 0.101036 t*km
- Transport, pipeline, unspecified petroleum products: 0.115996 t*km
- Transport, barge, average fuel mix: 0.00765624 t*km
- Transport, combination truck, average fuel mix: 0.0118175 t*km
- Transport, train, diesel powered: 0.0220636 t*km

## Emissions to nature
- Particulates, < 2.5 um: 6.68494e-7 kg
  PM2.5 from brakewear.
- Nitrogen dioxide: 2.68582e-5 kg
- Particulates, < 2.5 um: 1.30864e-6 kg
  PM2.5 from organic carbon, elemental carbon, and sulfate particulates.
- Nitrogen oxide: 0.000326039 kg
- Particulates, < 10 um: 5.64975e-7 kg
  PM10 from tirewear.
- Carbon monoxide, fossil: 0.00353842 kg
- Ammonia: 2.41617e-6 kg
- Particulates, < 10 um: 1.42117e-6 kg
  PM10 from organic carbon, elemental carbon, and sulfate particulates.
- Carbon dioxide, fossil: 0.0930117 kg
- VOC, volatile organic compounds: 0.000156183 kg
- Sulfur dioxide: 1.72964e-6 kg
- Dinitrogen monoxide: 2.22809e-6 kg
- Particulates, < 2.5 um: 1.35486e-7 kg
  PM2.5 from tirewear.
- Nitrogen oxides: 0.000352897 kg
- Particulates, < 10 um: 2.55365e-6 kg
  PM10 from brakewear.
- Hydrocarbons (other than methane): 0.000151875 kg
- Methane: 3.63185e-6 kg

## Sources
- U.S. Environmental Protection Agency (EP
- National Institute of Standards and Tech
- EPA
- U.S. Alternative Fuels and Advanced Vehi
- Eastern Research Group
- Assessment and Standards Division, Offic
- Assessment and Standards Division, Offic
- Wang, M.
- Alam, M.
