# Lime, agricultural, corn production

Dataset: openLCA process, unit process
Category: Corn Farming
Geography: RNA
Time period: 2005-01-01 to 2009-12-31
Generated by: Daniel Inman
Published in: Hsu, D.
restrictionsDescription: All information can be accessed by everybody.
copyright: false

## Technology
current

## Geography
North America (US and Canada)

## Time period
2005-2009

## Reference product
- Lime, agricultural, corn production: 1 ha

## Inputs from technosphere
- Transport, combination truck, diesel powered: 112 t*km
  Assuming a 500km two way distance to an outlet. Proxy: Transport, lorry >32t, EURO5/RER with US electricity U
- CUTOFF Fertilising, by broadcaster: 1 ha
- Transport, single unit truck, gasoline powered: 3.43 t*km
  Assumign a 80.51 km round-trip distance from the outlet to the farm - diesel / petrol mix truck -19% % diesel ; 18.035 tkm total. Proxy: Transport, van <3.5t/RER with US electricity U
- Transport, single unit truck, diesel powered: 14.6 t*km
  Assumign a 80.51 km round-trip distance from the outlet to the farm - diesel / petrol mix truck - 81% diesel ; 18.035 tkm total. Proxy: Transport, van <3.5t/RER with US electricity U
- Quicklime, at plant: 448 kg
  Farrell et al., 2006. proxy: limestone, milled, packed, at plant

## Sources
- Hsu, D.
- Farrell, A.E.
