# Particleboard, average, softwood, particleboard mill

Dataset: openLCA process, unit process
Category: Softwood Veneer and Plywood Manufacturing
Geography: RNA
Time period: 2004-01-01 to 2004-01-01
Generated by: Maureen Puettmann
Published in: James B. Wilson
restrictionsDescription: All information can be accessed by everybody.
copyright: true

## General comment
All weights given on an ovendry basis.

Important note: although most of the data in the US LCI database has
undergone some sort of review, the database as a whole has not yet
undergone a formal validation process.
Please email comments to lci@nrel.gov. Review off this data by three industry representatives selected by the composite panel association (CPA); two academic reviewers selected by editors peer review journal

## Technology
The particle board process represents average US technology. The particleboard manufacturing process is a highly automate and process-controlled. Wood residues are sorted and stored, screeened by particle size, oversized particles are refined, particles are dried and then blended with resin, wax, catalyst, and scavengers, the board is formed forming a mat with mulitple layers consisting of face and core layers, the board is then pressed, cooled, sanded and sawn to final size.

## Geography
Average US, United States data

## Reference product
- Particleboard, average, softwood, particleboard mill: 1 m3
  1 m3 of particleboard weighs 746 kg on oven dry (OD) basis--5 mill average

## By-products
- Wood waste, softwood, particleboard mill: 5.18 kg
  oven dry weight
- Wood fuel, sanderdust, particleboard mill: 25 kg
  oven dry weight; sanderdust
- Wood fuel, hogfuel, particleboard mill: 2 kg
  oven dry weight; hogfuel

## Inputs from technosphere
- CUTOFF Urea 40% solids: 7.25 kg
  liguid urea scavenger at 40% solids
- Fines, at oriented strand board production, US SE: 3.1 kg
  oven dry weight
- Sawdust, at rough green lumber production, US PNW: 42.3 kg
  oven dry weight
- Urea formaldehyde resin, neat, 65% solids: 104.6 kg
  liquid UF resin at 65% solids
- CUTOFF Disposal, fly ash, to unspecified landfill: 0.103 kg
- Pulp chips, from dried lumber, at planer mill, US PNW: 49 kg
  oven dry weight
- Panel trim, from trim and saw at plywood plant, US PNW: 30 kg
- Planer shavings, from green lumber, at planer mill, US PNW: 32 kg
  oven dry weight
- Gasoline, combusted in equipment: 0.02 l
- Wood, particleboard, generated onsite, combusted in industrial boiler: 27 kg
  oven dry weight
- CUTOFF Wood waste, unspecified: 0.4 kg
- CUTOFF Ammonium sulfate 30% solids: 2.4 kg
  liquid catalyst at 30% solids
- Transport, combination truck, diesel powered: 114.8 t*km
  wood residue delivery to mill, based on FAL database, 136 km oneway with no back haul and an average mc of furnish of 25.7%
- Transport, combination truck, diesel powered: 1.76 t*km
  wax, scavenger, and ammon. sulfate delivery based on FAL database, 124 km oneway with no back haul
- Sawdust, at sawmill, US SE: 49.7 kg
  oven dry weight
- Diesel, combusted in industrial equipment: 0.26 l
- Liquefied petroleum gas, combusted in industrial boiler: 0.33 l
  Surragate for LPG for forklifts
- Natural gas, combusted in industrial boiler: 30 m3
  oven dry weight
- Planer shavings, from dried lumber, at planer mill, US PNW: 113.4 kg
  oven dry weight
- Diesel, combusted in industrial boiler: 0.06 l
  Surragate for DFO
- Transport, combination truck, diesel powered: 13.03 t*km
  neat resin delivery to mill based on FAL database, 124 km oneway with no back haul
- Pulp chips, at sawmill, US SE: 57 kg
  oven dry weight
- CUTOFF Emulsion wax 53% solids: 4.72 kg
  liquid wax emulsion at 53% solids
- Planer shavings, at planer mill, US SE: 291.6 kg
  oven dry weight
- Electricity, at grid, US, 2000: 158.1 kWh
- Pulp chips, at rough green lumber production, US PNW: 3 kg
  oven dry weight

## Inputs from nature
- Water, process: 0.304 m3

## Emissions to nature
- HAPS: 0.0789 kg
- Methanol: 0.025 kg
- Formaldehyde: 0.0551 kg
- Suspended solids, unspecified: 0.0103 kg
- Acetaldehyde: 0.000552 kg
- Particulates: 0.215 kg
- VOC, volatile organic compounds: 0.357 kg
- Acrolein: 3.78e-5 kg
- Particulates, < 10 um: 0.0326 kg
- Phenol: 0.0036 kg

## Sampling procedure
Survey of industry production practice; manufacturing technology typical for industry.

## Sources
- Maureen Puettmann
- James B. Wilson
- James B. Wilson
