# Transport, pipeline, natural gas

Dataset: openLCA process, unit process
Category: Fossil Fuel Electric Power Generation
Geography: RNA
Time period: 2003-01-01 to 2009-01-01
Generated by: Franklin Associates
restrictionsDescription: All information can be accessed by everybody.
copyright: false

## General comment
Fugitive and non-combustion greenhouse gas emissions from natural gas pipeline intra- and inter-state transmission and distribution are updated values representative of the average for the U.S. in 2009. The data and metadata for energy consumption during transport of natural gas are available in full in the final report and appendices, Cradle-to-Gate Life Cycle Inventory of Nine Plastic Resins and Four Polyurethane Precursors. This report has been extensively reviewed within Franklin Associates and has undergone partial critical review by ACC Plastics Division members and is available at: www.americanchemistry.com. Quantities may vary slightly between the reference to main source and and this module due to rounding. Important note: although most of the data in the US LCI database has undergone some sort of review, the database as a whole has not yet undergone a formal validation process. Please email comments to lci@nrel.gov.

## Technology
Representative of energy consumption of natural gas pipelines used by North American industry. Process emissions reflect fugitive and non-combustion methane and carbon dioxide emissions from natural gas pipeline storage and transport.

## Geography
North America (US and Canada)

## Reference product
- Transport, pipeline, natural gas: 1 t*km

## Inputs from technosphere
- Natural gas, combusted in industrial equipment: 0.0121378 m3
  The data for this process are based on publicly available sources (including the GREET transportation model) and represent transportation technologies used in the United States.

## Emissions to nature
- Methane, fossil: 0.00456686 kg
  Fugitive and non-combustion methane and carbon dioxide emission values are updated values representative of inter- and intra-state natural gas transmission and distribution calculated from the EPA Inventory of U.S. Greenhouse Gas Emissions and Sinks: 1990-2009 (Table 3-37 and 3-39) and from the EIA Natural Gas Annual 2009 (Tables 3 and 12).
- Carbon dioxide, fossil: 0.000138469 kg
  (same comment as for Methane, fossil)

## Sampling procedure
Data are from secondary sources.

## Sources
- THE PLASTICS DIVISION OF THE AMERICAN C
