# Rapeseed, whole plant, at field

Dataset: openLCA process, unit process
Category: Oilseed (except Soybean) Farming
Geography: US
Time period: 1990-01-01 to 2000-01-01
Generated by: Olivier Muller
restrictionsDescription: All information can be accessed by everybody.
copyright: true

## General comment
Agricultural Crop Production, Harvested acres are 97% of the planted acre (1998-2000 US average).
The impacts of producing 1 kg of seed are assumed equal to those of producing 1kg of grain.
For Water, only consumptive use is taken into account (i.e. 60.7% of the total water consumption). 100% of impacts allocated to rapeseed, 0% to residues
Important note: although most of the data in the US LCI database has
undergone some sort of review, the database as a whole has not yet
undergone a formal validation process.
Please email comments to lci@nrel.gov.

## Technology
USA and European average practices (tillage, fertilizer and pesticide application, crop residue management, irrigation),

## Geography
USA and European average practices .

## Reference product
- Rapeseed residues, at field: 5 kg

## By-products
- Rapeseed, at field: 1 kg

## Inputs from technosphere
- CUTOFF Potash Fertilizer (K2O), at plant: 0.022848 kg
- Nitrogen fertilizer, production mix, at plant: 0.076103 kg
- CUTOFF Agrochemicals, at plant: 0.00042878 kg
- CUTOFF Phosphorous Fertilizer (TSP as P2O5), at plant: 0.015288 kg
- Transport, single unit truck, diesel powered: 0.085459 t*km
- Diesel, combusted in industrial equipment: 0.051675 l
- Transport, train, diesel powered: 0.2276 t*km

## Inputs from nature
- Occupation, arable, conservation tillage: 1.177 m2*a
- Occupation, arable, reduced tillage: 1.267 m2*a
- Occupation, arable, conventional tillage: 4.355 m2*a
- Carbon dioxide, in air: 1.833 kg

## Emissions to nature
- Carbofuran: 2.3507e-6 kg
  Pesticides - consumption (19), Pesticides - application method is 100% surface application and 0% soil incorporation ie similar to corn cotton soybean wheat in (11), Pesticides - air emission factors (12), Pesticides - vapor pressure (13),
- Malathion: 9.1307e-9 kg
  Pesticides - consumption (19), Pesticides - application method is 100% surface application and 0% soil incorporation ie similar to corn cotton soybean wheat in (11), Runoff of pesticides (14)
- Malathion: 2.1305e-7 kg
  (same comment as for Carbofuran)
- Trifluralin: 7.8382e-5 kg
  (same comment as for Carbofuran)
- Carbaryl: 3.8908e-8 kg
  (same comment as for Malathion)
- Ammonia: 0.0073557 kg
  Emissions of N2O and NH3 and NOx (4),
- Suspended solids, unspecified: 4.725 kg
  Erosion (6)
- Carbaryl: 9.0784e-7 kg
  (same comment as for Carbofuran)
- Parathion, methyl: 1.0382e-6 kg
  (same comment as for Carbofuran)
- Parathion, methyl: 4.4495e-8 kg
  (same comment as for Malathion)
- Carbofuran: 1.0074e-7 kg
  (same comment as for Malathion)
- Nitrogen oxides: 0.019904 kg
  Emissions of N2O and NH3 and NOx (4)
- Dinitrogen monoxide: 0.0059404 kg
  Emissions of N2O and NH3 and NOx (4),
- Ethalfluralin: 2.9176e-6 kg
  (same comment as for Malathion)
- Hydrocarbons, unspecified: 0.00025727 kg
  Pesticides - consumption (19), Pesticides - application method is 100% surface application and 0% soil incorporation ie similar to corn cotton soybean wheat in (11)
- Phosphorus compounds, unspecified: 0.00032059 kg
  Runoff/leaching of fertilizers (15)
- Ethalfluralin: 6.8078e-5 kg
  (same comment as for Carbofuran)
- Nitrogen, total: 0.014915 kg
  Runoff/leaching of fertilizers (15)
- Trifluralin: 2.0271e-6 kg
  (same comment as for Malathion)

## Sources
- USDA/National Agricultural Statistics Se
- USDA/ERS
- Conservation Technology Information Cent
- USGS
- USDA/ERS
- USDA/ERS
- USDA/ERS
- USDA/NCRS
- USDA/ERS
- U.S. EPA
- U.S. EPA
- USDA/NCRS
- USGS
- U.S. EPA
- USDA/ERS
- National Center for Food and Agricultura
- USDA/NRCS
- U.S. EPA
- Ecobilan
- North Dakota State University
