# Electricity, lignite coal, at power plant

Dataset: openLCA process, unit process
Category: Fossil Fuel Electric Power Generation
Geography: RNA
Time period: 2002-01-01 to 2003-01-01
Generated by: Franklin Associates
Published in: Franklin Associates
restrictionsDescription: All information can be accessed by everybody.
copyright: false

## General comment
Important note: although most of the data in the US LCI database has
undergone some sort of review, the database as a whole has not yet
undergone a formal validation process.
Please email comments to lci@nrel.gov.

## Technology
Electricity production by coal-fired steam generation.

## Geography
United States

## Reference product
- Electricity, lignite coal, at power plant: 1 kWh

## Inputs from technosphere
- CUTOFF Disposal, solid waste, unspecified, to unspecified treatment: 0.1426 kg
- Transport, train, diesel powered: 0.0008055 t*km
  Represents transportation from lignite mining to utility.
- Transport, combination truck, average fuel mix: 0.0086088 t*km
  Represents transportation from lignite mining to utility.
- Lignite coal, at surface mine: 0.78206 kg
- CUTOFF Disposal, lignite coal combustion byproducts, to unspecified reuse: 0.022514 kg

## Emissions to nature
- Biphenyl: 6.6475e-10 kg
  Sources for PAH data are old or unverifiable. Use this PAH data with caution.
- Organic substances, unspecified: 2.5234e-6 kg
- Phenanthrene: 1.0558e-9 kg
  Sources for PAH data are old or unverifiable. Use this PAH data with caution.
- NMVOC, non-methane volatile organic compounds, unspecified origin: 2.2617e-5 kg
- Cadmium: 1.9942e-8 kg
- Carbon monoxide, fossil: 9.7757e-5 kg
- Suspended solids, unspecified: 1.9457e-6 kg
- Methane, fossil: 1.5641e-5 kg
- Hydrogen chloride: 0.00046923 kg
- Nitrogen oxides: 0.0034674 kg
- Mercury: 3.2455e-8 kg
- Acenaphthylene: 9.7757e-11 kg
  Sources for PAH data are old or unverifiable. Use this PAH data with caution.
- Chromium: 1.0167e-7 kg
- Anthracene: 8.2116e-11 kg
  Sources for PAH data are old or unverifiable. Use this PAH data with caution.
- Arsenic: 1.6032e-7 kg
- Sulfur oxides: 0.0043278 kg
- Magnesium: 4.3013e-6 kg
- Sulfur dioxide: 0.0056347 kg
- Carbon dioxide, fossil: 1.088 kg
- Benzo(ghi)perylene: 1.0558e-11 kg
  Sources for PAH data are old or unverifiable. Use this PAH data with caution.
- Oils, unspecified: 9.7286e-7 kg
- Methane, dichloro-, HCC-30: 1.134e-7 kg
- Manganese: 1.916e-7 kg
- Fluorene: 3.5584e-10 kg
  Sources for PAH data are old or unverifiable. Use this PAH data with caution.
- Antimony: 7.0385e-9 kg
- Chromium VI: 3.0891e-8 kg
- Acenaphthene: 1.9942e-10 kg
  Sources for PAH data are old or unverifiable. Use this PAH data with caution.
- Chrysene, 5-methyl-: 8.6026e-12 kg
  Sources for PAH data are old or unverifiable. Use this PAH data with caution.
- Particulates, unspecified: 0.0011105 kg
- Selenium: 5.0834e-7 kg
- Naphthalene: 5.0834e-9 kg
  Sources for PAH data are old or unverifiable. Use this PAH data with caution.
- Pyrene: 1.2904e-10 kg
  Sources for PAH data are old or unverifiable. Use this PAH data with caution.
- Dinitrogen monoxide: 2.4973e-5 kg
- Benzo(a)pyrene: 1.4859e-11 kg
  Sources for PAH data are old or unverifiable. Use this PAH data with caution.
- Cobalt: 3.9103e-8 kg
- Aldehydes, unspecified: 3.7148e-7 kg
- Indeno(1,2,3-cd)pyrene: 2.3853e-11 kg
  Sources for PAH data are old or unverifiable. Use this PAH data with caution.
- Radioactive species, unspecified: 22.13 kBq
- Chrysene: 3.9103e-11 kg
  Sources for PAH data are old or unverifiable. Use this PAH data with caution.
- Benzo(b,j,k)fluoranthene: 4.3013e-11 kg
  Sources for PAH data are old or unverifiable. Use this PAH data with caution.
- Phenols, unspecified: 6.2564e-9 kg
- Nickel: 1.0949e-7 kg
- Benzene: 5.0834e-7 kg
- Beryllium: 8.2116e-9 kg
- Hydrogen fluoride: 5.8654e-5 kg
- Benzo(a)anthracene: 3.1282e-11 kg
  Sources for PAH data are old or unverifiable. Use this PAH data with caution.
- Ethene, tetrachloro-: 1.6814e-8 kg
- Fluoranthene: 2.7763e-10 kg
  Sources for PAH data are old or unverifiable. Use this PAH data with caution.
- Formaldehyde: 9.3847e-8 kg
- Lead: 1.6423e-7 kg
- Acrolein: 1.134e-7 kg

## Sources
- U.S. EPA
- U.S. Energy Information Administration
- U.S. EPA
- unspecified
- Energy Information Administration
- Energy Information Administration
- U.S. EPA
- Franklin Associates
- U.S. Energy Information Administration
