# Sodium chloride, at plant

Dataset: openLCA process, unit process
Category: All Other Basic Organic Chemical Manufacturing
Geography: RNA
Time period: 2003-01-01 to 2003-01-01
Generated by: Franklin Associates
Published in: THE PLASTICS DIVISION OF THE AMERICAN C
restrictionsDescription: All information can be accessed by everybody.
copyright: false

## General comment
Process inputs do not consider the fraction of mass that is extracted and returned to the mine as overburden. Complete inventory data and metadata are available in full in the final report and appendices, Cradle-to-Gate Life Cycle Inventory of Nine Plastic Resins and Four Polyurethane Precursors. This report has been extensively reviewed within Franklin Associates and has undergone partial critical review by ACC Plastics Division members and is available at: www.americanchemistry.com. Quantities may vary slightly between the reference to main source and and this module due to rounding. Important note: although most of the data in the US LCI database has undergone some sort of review, the database as a whole has not yet undergone a formal validation process. Please email comments to lci@nrel.gov.

## Technology
95 % solution mining of salt brine and 5 % underground mining of rock salt

## Geography
North America (US and Canada)

## Reference product
- Sodium chloride, at plant: 1 kg
  Process inputs do not consider the fraction of mass that is extracted and returned to the mine as overburden.

## Inputs from technosphere
- Bituminous coal, combusted in industrial boiler: 0.0117 kg
- Diesel, combusted in industrial equipment: 0.0100962 l
  Includes diesel fuel and distillate oil amounts.
- Natural gas, combusted in industrial boiler: 0.0247835 m3
- Electricity, at grid, US, 2008: 0.0332892 kWh

## Inputs from nature
- Salt, in ground: 1 kg

## Sampling procedure
Data are from secondary sources.

## Sources
- THE PLASTICS DIVISION OF THE AMERICAN C
