# Wood fuel, unspecified

Dataset: openLCA process, unit process
Category: Sawmills
Geography: RNA
Time period: 1995-01-01 to 1999-01-01
Generated by: Maureen Puetmann
Published in: Franklin 98
restrictionsDescription: All information can be accessed by everybody.
copyright: false

## General comment
Important note: although most of the data in the US LCI database has
undergone some sort of review, the database as a whole has not yet
undergone a formal validation process.
Please email comments to lci@nrel.gov.

## Technology
This process is a copy of the FAL "Wood" process. It has been modified in the following way: (1) it has an input of CO2 from the atmosphere, to close the carbon balance; (2) weights are expressed as ovendry basis; and (3) waste has been moved from a final waste flow to a waste treatment input

## Geography
US

## Reference product
- Wood fuel, unspecified: 1 kg
  Weight reported on an ovendry basis. Assumes the actual moisture content is 100% ovendry basis. This assumption is very uncertain.

## Inputs from technosphere
- CUTOFF Disposal, solid waste, unspecified, to unspecified treatment: 0.003 kg

## Inputs from nature
- Limestone, in ground: 0.116 kg
- Wood and wood waste, 20.9 MJ per kg, ovendry basis: 1.006 kg
  (same comment as for Wood fuel, unspecified)
- Carbon dioxide, in air: 1.84 kg
  Flow added to original Franklin dataset for carbon accounting
- Oil, crude, 42 MJ per kg, in ground: 0.01426 kg
- Uranium, 2291 GJ per kg, in ground: 4.8e-8 kg
- Gas, natural, 46.8 MJ per kg, in ground: 0.00316 kg
- Coal, 26.4 MJ per kg, in ground: 0.00032 kg

## Emissions to nature
- Particulates, unspecified: 6e-6 kg
- Sulfur oxides: 2.4e-5 kg
- Carbon monoxide: 0.0002 kg
- Nitrogen oxides: 0.00072 kg

## Sources
- Maureen Puettmann
- Franklin 98
