# Electricity, bauxite mining regions

Dataset: openLCA process, unit process
Category: All Other Metal Ore Mining
Geography: GLO
Time period: 2004-01-01 to 2004-01-01
Generated by: James Littlefield, Franklin Associates
Published in: Franklin Associates, A Division of ERG
restrictionsDescription: All information can be accessed by everybody.
copyright: false

## General comment
In order to calculate the fuels used to generate electricity for bauxite production, it is necessary to determine the percent of bauxite produced in each of the aforementioned countries. This quantity is calculated from the amount exported to the U.S. as bauxite ore and the amount used within each country to produce alumina, which is then exported to the U.S.
Important note: although most of the data in the US LCI database has
undergone some sort of review, the database as a whole has not yet
undergone a formal validation process.
Please email comments to lci@nrel.gov.

## Technology
Coal (2%), Nuclear (0.1%), Hydropower (22%), Fuel oil (75%), Natural gas (0.8%)

## Geography
Australia (2%), Jamaica (55 %), Guinea (30%), Brazil (3%), Suriname (1%), and Guyana (9%).

## Reference product
- Electricity, bauxite mining regions: 1 kWh

## Inputs from technosphere
- Electricity, diesel, at power plant: 0.745 kWh
- Electricity, nuclear, at power plant: 0.001179 kWh
- CUTOFF Electricity, from renewable source, unspecified: 0.010255 kWh
- Electricity, natural gas, at power plant: 0.0076075 kWh
- CUTOFF Electricity, hydropower, at power plant, unspecified: 0.21579 kWh
- Electricity, bituminous coal, at power plant: 0.020714 kWh

## Sources
- Franklin Associates, A Division of ERG
- Energy Information Administration (EIA)
- US Geological Survey
- IAI Statistical Report: Electrical Power
- US EPA
- The Aluminum Association
