# Crude oil, at production

Dataset: openLCA process, unit process
Category: Crude Petroleum and Natural Gas Extraction
Geography: RNA
Time period: 1997-01-01 to 2001-01-01
Generated by: Franklin Associates
Published in: Franklin Associates
restrictionsDescription: All information can be accessed by everybody.
copyright: false

## General comment
No data are available for foreign extraction of crude oil. United States data was used to represent extraction by foreign producers.,
Important note: although most of the data in the US LCI database has
undergone some sort of review, the database as a whole has not yet
undergone a formal validation process.
Please email comments to lci@nrel.gov.

## Technology
Includes data for crude oil extracted from onshore and offshore wells.

## Geography
North America

## Reference product
- Crude oil, at production: 1 kg

## Inputs from technosphere
- Residual fuel oil, combusted in industrial boiler: 0.000835 l
- Diesel, combusted in industrial boiler: 0.00125 l
- CUTOFF Disposal, solid waste, unspecified, to sanitary landfill: 0.0261 kg
- Natural gas, combusted in industrial boiler: 0.0328 m3
- Electricity, at grid, US, 2000: 0.039 kWh
- Gasoline, combusted in equipment: 0.000684 l

## Inputs from nature
- Oil, crude: 1 kg

## Emissions to nature
- Titanium, ion: 3.06e-6 kg
- n-Hexacosane: 2.37e-9 kg
- Fluorene, 1-methyl-: 4.05e-10 kg
- Hexanoic acid: 7.47e-7 kg
- Arsenic, ion: 9.83e-7 kg
- Octadecane: 5.3e-8 kg
- Fluorine: 4.98e-9 kg
- Boron: 1.12e-5 kg
- Phenol: 1.58e-6 kg
- Phenanthrenes, alkylated, unspecified: 1.19e-9 kg
- Methane: 0.00353 kg
- Dodecane: 1.97e-7 kg
- Dibenzothiophene: 5.48e-10, 3.49e-11 kg (2 entries, compartments not in this file)
- BOD5, Biological Oxygen Demand: 0.000619 kg
- Selenium: 3.86e-8 kg
- Cyanide: 2.57e-10 kg
- Xylene: 2.95e-6, 7.84e-8 kg (2 entries, compartments not in this file)
- Acetone: 3.55e-8 kg
- Sulfate: 0.000258 kg
- Benzenes, alkylated, unspecified: 1.75e-7 kg
- Radium-228/kg: 6.57e-16 kg
  Radioactive substances in kBq in other DB and in impact assessment methods, no conversion factors found.
- Yttrium: 2.4e-8 kg
- Thallium: 4.2e-8 kg
- Barium: 0.00436 kg
- Docosane: 3.8e-9 kg
- Decane: 1.04e-7 kg
- Benzene, 1-methyl-4-(1-methylethyl)-: 3.55e-10 kg
- Radium-226/kg: 1.28e-13 kg
  (same comment as for Radium-228/kg)
- Magnesium: 0.00223 kg
- Nickel: 9.77e-7 kg
- Tin: 7.99e-7 kg
- Antimony: 1.99e-7 kg
- m-Xylene: 1.08e-7 kg
- Ammonia: 5.32e-5 kg
- Suspended solids, unspecified: 0.00977 kg
- Lithium, ion: 3.82e-6 kg
- Methyl ethyl ketone: 2.86e-10 kg
- Molybdenum: 8.17e-8 kg
- Benzene, ethyl-: 3.35e-7 kg
- Beryllium: 5.52e-8 kg
- Iron: 0.000631 kg
- Dibenzofuran: 6.76e-10 kg
- Bromide: 0.000762 kg
- Calcium, ion: 0.0114 kg
- Benzoic acid: 3.61e-6 kg
- Vanadium: 9.65e-8 kg
- Mercury: 3.49e-9 kg
- Detergents, oil: 2.96e-6 kg
- Dissolved solids: 0.158 kg
- Manganese: 3.56e-6 kg
- Tetradecane: 8.62e-8 kg
- Naphthalene: 6.48e-8 kg
- Toluene: 5.63e-6 kg
- Sodium, ion: 0.0362 kg
- COD, Chemical Oxygen Demand: 0.00102 kg
- Pentanone, methyl-: 1.49e-8 kg
- Aluminum: 0.000319 kg
- Chromium: 8.5e-6 kg
- 2-Hexanone: 2.32e-8 kg
- Phenol, 2,4-dimethyl-: 9.96e-8 kg
- Naphthalenes, alkylated, unspecified: 2.86e-9 kg
- Copper, ion: 1.02e-6 kg
- Lead: 2.09e-6 kg
- Benzene, pentamethyl-: 2.66e-10 kg
- Phenanthrene: 1.01e-9 kg
- Benzene: 5.96e-6 kg
- Cobalt: 7.88e-8 kg
- Lead-210/kg: 3.69e-16 kg
  (same comment as for Radium-228/kg)
- Chloride: 0.128 kg
- p-Cresol: 1.1e-7 kg
- Naphthalene, 2-methyl-: 5.63e-8 kg
- Zinc: 7.34e-6 kg
- Sulfur: 9.42e-6 kg
- Eicosane: 5.41e-8 kg
- Strontium: 0.000194 kg
- Fluorenes, alkylated, unspecified: 1.01e-8 kg
- Silver: 7.47e-6 kg
- Oils, unspecified: 7.2e-5 kg
- Hexadecane: 2.15e-7 kg
- Methane, monochloro-, R-40: 1.43e-10 kg
- o-Cresol: 1.02e-7 kg
- Cadmium, ion: 1.45e-7 kg
- Biphenyl: 1.13e-8 kg

## Sampling procedure
Data on different elementary flows come from different sources

## Sources
- Franklin Associates
- unspecified
- unspecified
- unspecified
- unspecified
- unspecified
- unspecified
- unspecified
- unspecified
- unspecified
- ICF Consulting
- unspecified
- unspecified
