# Coal cleaning facility; Construction; At mine

Dataset: openLCA process, unit process
Category: Bit. Coal and Lignite Surface Mining
Geography: US
Time period: 2009-01-01 to 2009-12-31
Generated by: Timothy Skone
Owner: National Energy Technology Laboratory
Reviewer: Robert James
Published in: National Energy Technology Laboratory (NETL). 2014. Coal cleaning facility; Construction; At mine
restrictionsDescription: Use of this dataset is not restricted, but a statement of attribution is required. Please use the following attribution statement:
National Energy Technology Laboratory's (NETL) Unit Process Library
626 Cochrans Mill Road, P.O. Box 10940
Pittsburgh, PA 15236-0940
http://www.netl.doe.gov/research/energy-analysis/life-cycle-analysis/unit-process-library
Neither the U.S. Department of Energy (DOE) National Energy Technology Laboratory (NETL) nor any person acting on behalf of these organizations:
A. Makes any warranty or representation, express or implied, with respect to the accuracy, completeness, or usefulness of the information contained in this document, or that the use of any information, apparatus, method, or process disclosed in this document may not infringe on privately owned rights; or
B. Assumes any liability with this report as to its use, or damages resulting from the use of any information, apparatus, method, or process disclosed in this document.
Reference herein to any specific commercial product, process, or service by trade name, trademark, manufacturer, or otherwise, does not necessarily constitute or imply its endorsement, recommendation, or favoring by NETL. The views and opinions of the authors expressed herein do not necessarily state or reflect those of NETL.
copyright: true

## General comment
This process is part of the NETL Unit Process Library. To access the library and the original dataset:
1) Navigate to the NETL LCA home page (http://www.netl.doe.gov/lca)
2) Then navigate to the “Unit Process Library”
3) From the library, the unit process of interest can be found either through the "Complete Listing of the Unit Process Library link" or through the link to the "Unit Process Database" spreadsheet
4) For each process, a Data Sheet (DS) and Data File (DF) are available

BRIEF DESCRIPTION
This unit process is a construction process that includes material requirements for the construction of a coal cleaning facility, which is a steel building used to house coal cleaning equipment.

GOAL AND SCOPE
This parameterized unit process provides a summary of relevant input and output flows associated with the construction of a steel building to be used to house coal cleaning equipment; a steel building with a reinforced concrete slab as a foundation. This process encompasses all of the materials that are required for construction. Input flows include concrete cement, rebar wire, cold-rolled stainless steel, and zinc for the use of zinc-galvanized steel panels. The reference flow of this unit process is: 1 piece (pcs) of Coal Cleaning Facility.

BOUNDARY AND DESCRIPTION
This process encompasses all of the materials that are required in the construction of a steel building to be used to house coal cleaning equipment; a steel building with a reinforced concrete slab as a foundation. The concrete slab will also serve as the first floor of the building. Carbon steel I-beams (high-strength, low alloy) will form the exterior frame of the buildings as well as each of the other five floors, plus the roof (Saginaw, 2009). The walls and roof of the facility will be constructed out of zinc-galvanized steel panels (Bay Area Rapid Transit, 2004; Buildings Direct, 2009; Steel Building, 2009; Engineers Edge, 2009).

The exterior of the building will be 100 ft. long × 60 ft. wide (NETL, 2010). Vertical I-beams will be spaced every 20 ft. along all four walls. Horizontal I-beams will form the floors from the second level up to and including the roof (six total levels). Each level will be 14 ft. tall, for a total building height of 84 ft (NETL, 2010). The I-beams for the floor will be spaced every 20 ft., running horizontally both the length and width of the building. The weight of the steel for the I-beams will be determined by taking the average of four beams with a depth of 12 in.
The exterior of the building, all four walls and the roof, will be clad in 26-gauge zinc-galvanized carbon steel panels (Buildings Direct, 2009; Engineers Edge, 2009; Steel Building, 2009). The zinc is a layer with a volume of approximately 1.25 ounces per square ft (oz/ft2) of steel panel (Bay Area Rapid Transit, 2004).

The foundation of the building, which will also serve as the ground floor, will be constructed using a 4,000 psi mix of concrete (NETL, 2010). The concrete foundation will be reinforced by size #4 carbon steel rebar running horizontally over both the length and the width of the concrete. The rebar will be evenly spaced every 12 in. in both directions, and has a cross-sectional area of 0.20 in2 (CRSI, 2008). The perimeter of the slab must be located below the frost line, which is located 21 in. below ground level at the mine location (Weather Bureau, 2008). The exterior of the concrete slab will extend an additional 6 in. below the frost line and will be 18 in. thick around the perimeter. The interior of the concrete slab will be 1 in. thick.

The flooring for each level of the building is assumed to consist of steel grating. This weight is excluded from these calculations due to the assumption they will be balanced by the sections of the interior I-beams that will be removed for stairways and to accommodate large pieces of equipment.

The weight of each material used in the coal cleaning facility was calculated separately. The materials were cold-rolled steel for the I-beams and the exterior paneling, zinc for the galvanization of the paneling, reinforcement bar (i.e. rebar) for reinforcing the concrete foundation, and concrete for the building foundation. The input and output flows for the construction of the coal cleaning facility are illustrated in the associated documentation (referenced in the Citation and Associated Documentation section below).

This process contains one or more surrogate product flows as replacements for proprietary product flows used in the NETL Unit Process Library. All surrogate flow were taken from the U.S. Life Cycle Inventory Database; a list of surrogate flows used in this process is provided below:
1) Cold rolled sheet, steel, at plant
2) Portland cement, at plant: This flow is a proxy for Ready Mixed Concrete. This process calculates the required mass of Portland Cement as a fraction of the required mass of Ready Mixed Concrete to construct one coal cleaning facility. The default parameter setting assumes that Portland Cement comprises 14.1% (by mass) of Ready Mixed Concrete (NIST 2009); however, this parameter may be modified by the user. This process does not consider other material and energy inputs for producing Ready Mixed Concrete.
3) Zinc, sheet

CITATION AND ASSOCIATED DOCUMENTATION
This dataset should be cited as:
National Energy Technology Laboratory (NETL). 2015. NETL Life Cycle Inventory Data – Unit Process: Coal cleaning facility; Construction; At mine. U.S. Department of Energy, National Energy Technology Laboratory. Last Updated: September 2015 (version 01). Retrieved on [DATE] from [URL for this dataset].

This dataset is part of the NETL Unit Process Library. The Library offers additional information concerning this dataset in the form of a Detailed Spreadsheet Documentation (DS) file and a Process Documentation File (DF). The DS file is an Excel file that contains all of the parameters, inputs, and outputs for a given system as well as background data, calculations and quality scores. The DF file is a PDF document that contains major assumptions and data sources that are the basis for each unit process. The NETL Unit Process Library is located on the NETL website (netl.doe.gov) under Research / Energy Analysis / Energy Trends and Issues / Life Cycle Analysis / Unit Process Library.

This dataset was converted directly from the DS with additional supporting information provided by the DF. Full citations for the DS and DF are given below.

DS File
National Energy Technology Laboratory (NETL). 2014. NETL Life Cycle Inventory Data – Unit Process: Coal Cleaning Facility, Construction. U.S. Department of Energy, National Energy Technology Laboratory. Last Updated: May 2014 (version 01). Retrieved on 09/29/2015 from: URL

DF File
National Energy Technology Laboratory (NETL). 2014. NETL Life Cycle Inventory Data – Unit Process: Coal Cleaning Facility, Construction. U.S. Department of Energy, National Energy Technology Laboratory. Last Updated: May 2014 (version 01). Retrieved on 09/29/2015 from: URL

## Technology
This unit process provides a summary of relevant input and output flows associated with the construction of a steel building to be used to house coal cleaning equipment; a steel building with a reinforced concrete slab as a foundation. This process encompasses all of the materials that are required for construction. Input flows include concrete cement, rebar wire, cold-rolled stainless steel, and zinc for the use of zinc-galvanized steel panels.

This process encompasses all of the materials that are required in the construction of a steel building to be used to house coal cleaning equipment; a steel building with a reinforced concrete slab as a foundation. The concrete slab will also serve as the first floor of the building. Carbon steel I-beams (high-strength, low alloy) will form the exterior frame of the buildings as well as each of the other five floors, plus the roof (Saginaw, 2009). The walls and roof of the facility will be constructed out of zinc-galvanized steel panels (Bay Area Rapid Transit, 2004; Buildings Direct, 2009; Steel Building, 2009; Engineers Edge, 2009).

## Time period
This data set is representative of best available public data from 01/01/2009 to 12/31/2009 and is not subject to limited usability within sub-time spans (e.g. summer, winter).

## Parameters
- Concrete: 448973
  [kg/item] Mass of Ready Mixed Concrete required for the contruction of one Coal Cleaning Facility
- Cement_Fraction: 0.141
  [kg/kg] Mass of Portland Cement per kilogram of Ready Mixed Concrete
- Portland_Cement: 63305.3; = Concrete*Cement_Fraction
  [kg/item] Mass of cement required for the contruction of one coal cleaning facility

## Reference product
- Coal cleaning facility; Construction; At mine: 1 Item(s); data quality (3,3,2,3,1)

## Inputs from technosphere
- Portland cement, at plant: 63305.3 kg; = Portland_Cement; data quality (3,3,2,3,1)
- Steel reinforcement bar; Blast furnace route; Production mix: 3610 kg; data quality (3,3,2,3,1)
- Zinc, sheet: 1165.17 kg; data quality (3,3,2,3,1)
- Cold rolled sheet, steel, at plant: 116431 kg; data quality (3,3,2,3,1)

## Inventory method
Attributional

## Modelling constants
All elementary and technosphere flows are calculated on a functional unit basis. Calculations involving combustion primarily to generate useful work are done using lower heating values (LHV) and calculations involving combustion primarily to generate useful heat are done using higher heating values (HHV). Unless explicitly stated in the associated reference documents applicable calculations assumed standard atmospheric temperature and pressure (SATP).

## Completeness
Individual relevant flows captured

## Data selection
Best publically available data

## Data treatment
No allocation applied

## Data collection
No primary data collected

## Intended application
This is a gate-to-gate manufacturing process and can be used for any type of LCA study.

## Project
National Energy Technology Laboratory (NETL) Unit Process Library

## Sources
- Engineers Edge. 2009. Sheet Metal Gauge Sizes
- National Energy Technology Laboratory (NETL). 2014. Coal cleaning facility; Construction; At mine
- National Institute of Standards and Technology (NIST). 2009. Product List: Generic 100% Portland Cement
- Metal Suppliers Online. 2009. Carbon Steels Cold Rolled Steel
- Concrete Reinforcing Steel Institute (CRSI). 2008. ASTM Standard Inch-Pound Reinforcing Bars
- Steel Building. 2009. General Specification for Steel Buildings
- Weather Bureau. 2008. Frostline Map
- National Energy Technology Laboratory (NETL). 2010. Life Cycle Analysis: Supercritical Pulverized Coal (SCPC) Power Plant
- Saginaw. 2009. Steel Reference Handbook
- Buildings Direct. 2009. Paneling System
- Bay Area Rapid Transit. 2004. BART Facilities Standards
