# Transport, aircraft, freight

Dataset: openLCA process, unit process
Category: Scheduled Freight Air Transportation
Geography: RNA
Time period: 2003-01-01 to 2010-01-01
Generated by: Beverly Sauer
Published in: Franklin Associates
restrictionsDescription: All information can be accessed by everybody.
copyright: false

## General comment
1. Important note: although most of the data in the US LCI database has
undergone some sort of review, the database as a whole has not yet
undergone a formal validation process.
2. Please email comments to lci@nrel.gov.

## Technology
Typical

## Geography
United States

## Reference product
- Transport, aircraft, freight: 1 t*km

## Inputs from technosphere
- Kerosene, at refinery: 0.41992 l

## Emissions to nature
- Hydrocarbons, unspecified: 0.00104611 kg
- Carbon monoxide, fossil: 0.00441023 kg
- Carbon dioxide, fossil: 1.05285 kg
- Nitrogen oxides: 0.00536646 kg

## Sources
- Franklin Associates
- ICAO
- Aviation Industry Press
- unspecified
- Michael Wang
- J. Davies
- Oak Ridge National Laboratory
