# Portland cement, at plant

Dataset: openLCA process, unit process
Category: Cement Manufacturing
Geography: RNA
Time period: 1993-01-01 to 2004-01-01
Generated by: Medgar L. Marceau and Martha G. VanGeem
Published in: Medgar L. Marceau
restrictionsDescription: All information can be accessed by everybody.
copyright: false

## General comment
Portland cement is a hydraulic cement composed primarily of hydraulic calcium silicates. Hydraulic cements harden by reacting chemically with water. During this reaction, cement combines with water to form a stonelike mass, called paste. When the paste (cement and water) is added to aggregates (sand and gravel, crushed stone, or other granular materials) it binds the aggregates together to form concrete, the most widely used construction material. Although the words “cement” and “concrete” are used interchangeably in everyday usage, cement is one of the constituents of concrete. Cement is a very fine powder and concrete is a stonelike material. Cement constitutes 8 to 15 percent of concrete’s total mass by weight. Using cement LCI data incorrectly as concrete LCI data is a serious error., 2002 for fuels and electricity consumption; 2000 for raw material consumption and transportation modes and distances; and 1993 to 2004 for emissions.
Important note: although most of the data in the US LCI database has
undergone some sort of review, the database as a whole has not yet
undergone a formal validation process.
Please email comments to lci@nrel.gov.

## Technology
Approximately 2002 technology.

## Geography
United States.

## Reference product
- Portland cement, at plant: 1 kg

## Inputs from technosphere
- Natural gas, combusted in industrial boiler: 0.00557 m3
- CUTOFF Chains, at plant: 2.01e-5 kg
- CUTOFF Slag, at blast furnace: 0.0198 kg
- CUTOFF Refractory material, unspecified, at plant: 0.000647 kg
- CUTOFF Disposal, cement kiln dust, in residual material landfill: 0.0373 kg
- Residual fuel oil, combusted in industrial boiler: 4.42e-5 l
- CUTOFF Cement bags, at plant: 0.00068 kg
- Electricity, at grid, US, 2000: 0.144 kWh
- CUTOFF Grinding media, at plant: 0.00014 kg
- CUTOFF Oil and grease, at plant: 0.00013 kg
- CUTOFF Filter bags, at plant: 1.92e-5 kg
- CUTOFF Waste, tire derived, combusted in industrial boiler: 0.00337 kg
- CUTOFF Recycling, cement kiln dust: 0.00965 kg
- Gasoline, combusted in equipment: 0.000133 l
- CUTOFF Waste, miscellaneous, combusted in industrial boiler: 0.00148 kg
- CUTOFF Foundry sand, at mine: 0.00382 kg
- CUTOFF Explosives, at plant: 0.000295 kg
- CUTOFF Fly ash, unspecified origin: 0.0135 kg
- CUTOFF Grinding aids, at plant: 0.00036 kg
- Bituminous coal, combusted in industrial boiler: 0.107 kg
- Liquefied petroleum gas, combusted in industrial boiler: 1.43e-5 l
- CUTOFF Bottom ash, unspecified origin: 0.0101 kg
- CUTOFF Waste, oil, combusted in industrial boiler: 4.87e-7 m3
- CUTOFF Waste, solvents, combusted in industrial boiler: 0.00881 kg
- CUTOFF Waste, other solid, combusted in industrial boiler: 0.000934 kg
- CUTOFF Middle distillates, combusted in industrial boiler: 1.07e-6 m3
- CUTOFF Petroleum coke, combusted in industrial boiler: 0.0223 kg

## Inputs from nature
- Iron ore: 0.0135 kg
- Water, process: 0.0883 kg
- Clay, unspecified: 0.0597 kg
- Gypsum: 0.0615 kg
  Was initially reported as "Gypsum, anhydrite", at 0.0486kg/kg cement
- Sand, unspecified: 0.0405 kg
- Slate: 0.00113 kg
- Limestone: 1.37 kg
  Also includes gravel and marl (representing together 15% by mass), all approximated to limestone.
- Water: 0.752 kg
- Raw material, unspecified: 0.0264 kg
- Shale: 0.0522 kg

## Emissions to nature
- Hydrogen chloride: 6.49e-5 kg
- Particulates, unspecified: 0.00235 kg
- Sulfur dioxide: 0.00166 kg
- Phosphorus: 5.51e-9 kg
- Ammonia: 4.76e-6 kg
- Dioxins and furans, measured as 2,3,7,8-tetrachlorodibenzo-p-dioxin: 9.98e-11 kg
- Particulates, < 2.5 um: 9.11e-8 kg
- Aluminum: 8.6e-7 kg
- Carbon dioxide: 0.374 kg
- Sulfide: 6.61e-8 kg
- Carbon monoxide: 0.0011 kg
- Particulates, > 2.5 um, and < 10um: 0.000296 kg
- Chloride: 0.000727 kg
- Phenols, unspecified: 2.2e-8 kg
- Suspended solids, unspecified: 0.000234 kg
- Sulfate: 0.000616 kg
- Oils, unspecified: 7.52e-6 kg
- VOC, volatile organic compounds: 5.02e-5 kg
- DOC, Dissolved Organic Carbon: 1.38e-5 kg
- Ammonium, ion: 9.48e-7 kg
- Methane: 3.95e-5 kg
- Nitrate compounds: 5.9e-6 kg
- Nitrogen oxides: 0.0025 kg
- Zinc: 3.31e-8 kg
- Carbon dioxide, fossil: 0.553 kg
- Mercury: 6.24e-8 kg

## Sampling procedure
Varies

## Sources
- Medgar L. Marceau
