# Harvest, corn, single pass

Dataset: openLCA process, unit process
Category: Corn Farming
Geography: RNA
Time period: 2010-01-01 to 2100-12-31
Generated by: Daniel Inman
Published in: Hsu, D.
restrictionsDescription: All information can be accessed by everybody.
copyright: false

## General comment
INL design report 2007 for single pass concept. This process is for the single pass harvest of grain and crop residue from one hectare of land. This is applicable to both corn-corn stover and wheat-wheat straw collection systems. The process does not include unloading the material from the combine and subsequent loading to a truck.

## Technology
modern

## Geography
North America

## Time period
2010 and after

## Reference product
- Harvest, corn, single pass: 1 ha

## Inputs from technosphere
- CUTOFF Combine harvesting: 1.38 ha
  Scaled combine up in acreage because now collecting stover in addition to corn grain-still one hectare

## Sources
- Hsu, D.
- Hess, J. R.
- EcoInvent
- Wu, M.
