# Roundwood, hardwood, green, at mill, E

Dataset: openLCA process, unit process
Category: Forestry and Logging
Geography: RNA
Time period: 2007-01-01 to 2007-01-01
Generated by: Maureen Puettmann
Published in: Richard D. Bergman
restrictionsDescription: All information can be accessed by everybody.
copyright: false

## General comment
All weights given on an ovendry basis.
Both logs and bark were transported jointly - however, these were seperated in the model based on mass allocation. This unit process only accounts for the transport of logs and excludes the transport of bark.
Important note: although most of the data in the US LCI database has
undergone some sort of review, the database as a whole has not yet
undergone a formal validation process.
Please email comments to lci@nrel.gov.

## Technology
Average Transport distance

## Geography
E= Eastern US United States. The states included MN, IA, MO, WI, IL, NJ, OH, IN, MI, WV, PA, MD, DW, NJ, NY, ME, VT, NH, RI, MA, CT, VA, KY, AR, LA, MS, AL, FL,GA, NC, SC, and TN

## Reference product
- Roundwood, hardwood, green, at mill, E: 1 m3
  Based on a weighted average green density of 944 kg/m3 and green specific gravity of 0.510. 2.46 M3 = 1255 KG Moisture content (ovendry basis) = 85%.

## By-products
- Bark, hardwood, green, at mill, E: 27.1865 kg
  Weight reported on an ovendry basis. Moisture content (ovendry basis) = 85%

## Inputs from technosphere
- Roundwood, hardwood, average, at forest road, NE-NC: 1 m3
  Based on a weighted average green density of 944 kg/m3. 2.46M3 = 1255 KG Moisture content (ovendry basis) = 85%. proxy for hardwood logs at forest road
- Transport, combination truck, diesel powered: 189.777 t*km
  Transportation of logs from forest: 201km*1255*(1+.85)/1000/2.46tonnes=190tkm
- Bark, hardwood, average, at forest road, NE-NC: 27.1865 kg
  Weight reported on an ovendry basis. Moisture content (ovendry basis) = 85%; proxy for hardwood bark at forest road
- Transport, combination truck, diesel powered: 10.1187 t*km
  Transportation of bark from forest: 201km*27.2*(1+.85)/1000tonnes=10.1tkm
- Diesel, combusted in industrial equipment: 1.70677 l
  Diesel used for on-site transportation. Represents 60% of mill use of diesel for transport.

## Inputs from nature
- Water, process, well: 345.825 l
  Amount of water consumed as water spray for logs. Represents 30% of mill used of ground water
- Water, process, surface: 118.661 l
  (same comment as for Water, process, well)

## Sampling procedure
Questionnaires from 4 veneer mills and 5 flooring plants in the E. United States representing 32 states.

## Sources
- Richard D. Bergman
- Maureen Puettmann
