# Roundwood, softwd, state or private dry forest, steep slope, at forest rd, INW

Dataset: openLCA process, unit process
Category: Logging
Geography: RNA
Time period: 1989-01-01 to 1996-01-01
Generated by: Maureen Puetmann
Published in: Leonard R. Johnson
restrictionsDescription: All information can be accessed by everybody.
copyright: false

## General comment
FIA inventory were from 1989 to 1996 depending on jurisdiction Allocation on a mass basis.
Important note: although most of the data in the US LCI database has
undergone some sort of review, the database as a whole has not yet
undergone a formal validation process.
Please email comments to lci@nrel.gov.

## Technology
Average technology. Some data extrapolated from similar processes.

## Geography
US Inland West including Montana, Idaho, and eastern Washington

## Reference product
- Roundwood, softwd, state or private dry forest, steep slope, at forest rd, INW: 174.41 m3
  Ovendry density = 450 kg/m3

## By-products
- Pulpwood, softwd, state or private dry forest, steep slope, at forest rd, INW: 42.248 m3
  Ovendry density = 450 kg/m3
- Bark, softwd, state or private dry forest, steep slope, at forest rd, INW: 8677.2 kg
  Ovendry density = 450 kg/m3.

## Inputs from technosphere
- Site preparation, state or private dry softwood forest, steep slope, INW: 1 ha
- Chainsawing, hand felling and delimbing, INW: 30.645 h
  Hand felling and bucking of thinning and final harvest. Based on a rate of 0.14 standard machine hours per m3
- Loader operation, large, INW: 8.854 h
  Based on a rate of 0.04standard machine hours per m3
- Reforesting, average state or private dry softwood forest, INW: 1 ha
- Skidding, aerial cable yarder, medium: 21.753 h
  Cable yarding of thinning and final harvest. Based on a rate of 0.10 standard machine hours per m3

## Inputs from nature
- Carbon dioxide, in air: 34831 kg
  Based on carbon content of pulpwood
- Carbon dioxide, in air: 143790 kg
  Based on carbon content of roundwood
- Carbon dioxide, in air: 15897 kg
  Based on carbon content of bark
- Wood, soft, INW, standing: 235.94 m3

## Sampling procedure
Harvesting production, cost and fuel consumption rates were assimilated from existing studies of harvesting equipment typical of the systems used to harvest sites in the Inland West. These studies included both published information and personal interviews with timber harvesting contractors.
The costs, production and consumption rates were developed for equipment options within each component of the system. Harvesting systems were developed as combinations of these harvesting components. Although there are many combinations of harvesting equipment and systems that can be used for harvesting timber, this analysis assumes the use of the most common systems operating on the range of slope classifications identified for the harvested sites.

## Sources
- Maureen Puettmann
- Leonard R. Johnson
