# Electricity, bituminous coal, at power plant

Dataset: openLCA process, unit process
Category: Fossil Fuel Electric Power Generation
Geography: RNA
Time period: 2002-01-01 to 2003-01-01
Generated by: Franklin Associates
Published in: Franklin Associates
restrictionsDescription: All information can be accessed by everybody.
copyright: false

## General comment
Important note: although most of the data in the US LCI database has
undergone some sort of review, the database as a whole has not yet
undergone a formal validation process.
Please email comments to lci@nrel.gov.

## Technology
Electricity production by coal-fired steam generation.

## Geography
United States

## Reference product
- Electricity, bituminous coal, at power plant: 1 kWh

## Inputs from technosphere
- CUTOFF Transport, pipeline, coal slurry: 0.0022186 t*km
  Represents transportation from bituminous production/processing to utility boiler.
- CUTOFF Disposal, ash and flue gas desulfurization sludge, to unspecified reuse: 0.014139 kg
- Transport, combination truck, diesel powered: 0.0029866 t*km
  Represents transportation from bituminous production/processing to utility boiler.
- Transport, train, diesel powered: 0.46079 t*km
  Represents transportation from bituminous production/processing to utility boiler.
- Bituminous coal, at mine: 0.44186 kg
- Transport, barge, average fuel mix: 0.055949 t*km
  Represents transportation from bituminous production/processing to utility boiler.
- CUTOFF Disposal, solid waste, unspecified, to unspecified treatment: 0.043755 kg

## Emissions to nature
- Oils, unspecified: 8.8847e-7 kg
- Hydrogen chloride: 0.00026511 kg
- Chrysene: 2.2093e-11 kg
  Sources for PAH data are old or unverifiable. Use this PAH data with caution.
- Antimony: 3.9767e-9 kg
- Arsenic: 9.0581e-8 kg
- Magnesium: 2.4302e-6 kg
- Phenanthrene: 5.9651e-10 kg
  Sources for PAH data are old or unverifiable. Use this PAH data with caution.
- Benzo(a)anthracene: 1.7674e-11 kg
  Sources for PAH data are old or unverifiable. Use this PAH data with caution.
- Methane, fossil: 8.3124e-6 kg
- Ethene, tetrachloro-: 9.4999e-9 kg
- Chrysene, 5-methyl-: 4.8604e-12 kg
  Sources for PAH data are old or unverifiable. Use this PAH data with caution.
- Benzo(a)pyrene: 8.3953e-12 kg
  Sources for PAH data are old or unverifiable. Use this PAH data with caution.
- Acenaphthylene: 5.5232e-11 kg
  Sources for PAH data are old or unverifiable. Use this PAH data with caution.
- Benzo(ghi)perylene: 5.9651e-12 kg
  Sources for PAH data are old or unverifiable. Use this PAH data with caution.
- Hydrogen fluoride: 3.3139e-5 kg
- Beryllium: 4.6395e-9 kg
- Methane, dichloro-, HCC-30: 6.4069e-8 kg
- Dinitrogen monoxide: 2.4231e-5 kg
- Biphenyl: 3.7558e-10 kg
  Sources for PAH data are old or unverifiable. Use this PAH data with caution.
- Sulfur dioxide: 0.006766 kg
- Furan: 1.1002e-12 kg
- Nickel: 6.186e-8 kg
- Organic substances, unspecified: 1.3382e-6 kg
- Pyrene: 7.2906e-11 kg
  Sources for PAH data are old or unverifiable. Use this PAH data with caution.
- Aldehydes, unspecified: 2.0988e-7 kg
- Phenols, unspecified: 3.5349e-9 kg
- NMVOC, non-methane volatile organic compounds, unspecified origin: 2.4904e-5 kg
- Carbon monoxide, fossil: 0.0001097 kg
- Formaldehyde: 5.3023e-8 kg
- Lead: 9.279e-8 kg
- Radioactive species, unspecified: 12.5 kBq
- Fluoranthene: 1.5686e-10 kg
  Sources for PAH data are old or unverifiable. Use this PAH data with caution.
- Cadmium: 1.1267e-8 kg
- Particulates, < 10 um: 4.1673e-5 kg
- Anthracene: 4.6395e-11 kg
  Sources for PAH data are old or unverifiable. Use this PAH data with caution.
- Acrolein: 6.4069e-8 kg
- Carbon dioxide, fossil: 0.99407 kg
- Indeno(1,2,3-cd)pyrene: 1.3477e-11 kg
  Sources for PAH data are old or unverifiable. Use this PAH data with caution.
- Acenaphthene: 1.1267e-10 kg
  Sources for PAH data are old or unverifiable. Use this PAH data with caution.
- Naphthalene: 2.8721e-9 kg
  Sources for PAH data are old or unverifiable. Use this PAH data with caution.
- Nitrogen oxides: 0.0027065 kg
- Selenium: 2.8721e-7 kg
- Benzene: 2.8721e-7 kg
- Mercury: 1.8337e-8 kg
- Fluorene: 2.0104e-10 kg
  Sources for PAH data are old or unverifiable. Use this PAH data with caution.
- Dioxins, measured as 2,3,7,8-tetrachlorodibenzo-p-dioxin: 1.7365e-13 kg
- Manganese: 1.0825e-7 kg
- Benzo(b,j,k)fluoranthene: 2.4302e-11 kg
  Sources for PAH data are old or unverifiable. Use this PAH data with caution.
- Chromium: 5.7441e-8 kg
- Suspended solids, unspecified: 1.7769e-6 kg
- Cobalt: 2.2093e-8 kg
- Chromium VI: 1.7453e-8 kg

## Sources
- U.S. EPA
- Energy Information Administration
- U.S. Energy Information Administration
- U.S. EPA
- unspecified
- Energy Information Administration
- Energy Information Administration
- Franklin Associates
- U.S. EPA
