# Planed dried lumber processing, at planer mill, US SE

Dataset: openLCA process, unit process
Category: Cut Stock, Resawing Lumber, and Planing
Geography: RNA
Time period: 1999-01-01 to 2004-01-01
Generated by: Jamie Meil
Published in: Michael Milota
restrictionsDescription: All information can be accessed by everybody.
copyright: true

## General comment
Base process data presented with allocations to within process co-products noted. Refer to allocation worksheet for specifics. All allocations performed using mass or volume., This sheet sets out each unit process in the production of 1000 board feet of surfaced, kiln-dried softwood lumber as produced in the US Southeast. The sheet is structured as a system using both mass or volume allocation among primary and co-products.
Important note: although most of the data in the US LCI database has
undergone some sort of review, the database as a whole has not yet
undergone a formal validation process.
Please email comments to lci@nrel.gov.

## Technology
typical

## Geography
US South east

## Reference product
- Surfaced dried lumber, at planer mill, US SE: 1 kg
  Represents 1.13 board feet of surfaced, kiln-dried softwood lumber as produced in the US Southeast.

## By-products
- Planer shavings, at planer mill, US SE: 0.154 kg
- Sawdust, at planer mill, US SE: 0.0222 kg

## Inputs from technosphere
- Diesel, combusted in industrial boiler: 0.000526 l
- Natural gas, combusted in industrial boiler: 1.22e-10 m3
- Dry rough lumber, at kiln, US SE: 1.18 kg
- Electricity, at grid, Eastern US, 2000: 0.0256 kWh

## Sampling procedure
survey method

## Sources
- Leonard R. Johnson
- Maureen Puetmann
- Michael Milota
