# Corn steep liquor

Dataset: openLCA process, unit process
Category: All Other Basic Organic Chemical Manufacturing
Geography: RNA
Time period: 2003-01-01 to 2003-01-01
Generated by: Daniel Inman
Published in: Hsu, D.
restrictionsDescription: All information can be accessed by everybody.
copyright: false

## General comment
Taken from Sheehan, Corn Stover Ethanol LCA. (Directly from TEAM). The corn steep liquor production involves the steeping of harvested corn for a period of from 24 to 48 hours in a light sulfurous acid solution. The production of sulfurous acid was assumed to be negligible. The only emissions were SOx from the steeping tanks. Emission factors provided by USA EPA AP-42. All of the production burdens from corn are assumed to be allocated to the production of the steeping liquor.&#xD;&#xA;

## Technology
current

## Geography
North America

## Time period
2003

## Reference product
- Corn steep liquor: 1 kg

## Inputs from nature
- Water, process, unspecified natural origin/kg: 1.15 kg
- Limestone, in ground: 0.0027155 kg
- Coal, hard, unspecified, in ground: 0.00037736 kg
- Potassium oxide: 0.0003308 kg
  potash
- Phosphate ore, in ground: 0.0013295 kg
- Gas, natural, in ground: 0.00148 m3
  0.8 kg/m3
- Uranium, in ground: 1.0488e-8 kg
- Oil, crude, in ground: 0.00057581 kg

## Emissions to nature
- Organic substances, unspecified: 4.9767e-6 kg
- Xylene: 1.098e-12 kg
- Particulates: 0.00020285 kg
- Sulfate: 3.4498e-10 kg
- Aldehydes, unspecified: 6.1085e-9 kg
- Sulfur dioxide: 0.0082154 kg
- Zinc: 2.3309e-11 kg
- Antimony: 5.6285e-12 kg
- Hydrocarbons, unspecified: 1.6507e-9 kg
- Dinitrogen monoxide: 6.2058e-6 kg
- Phenol: 5.3525e-9 kg
- Vanadium: 1.2978e-11 kg
- Methane, fossil: 1.0554e-5 kg
- Hydrogen chloride: 1.2101e-7 kg
- Fluoride: 1.1181e-7, 1.5817e-9 kg (2 entries, compartments not in this file)
- Chromium: 5.216e-10 kg
- Manganese: 3.2155e-10 kg
- Sodium, ion: 9.2973e-6 kg
- Cadmium: 1.0494e-11 kg
- Molybdenum: 7.2755e-13 kg
- Metallic ions, unspecified: 1.2958e-8 kg
  assumed to be metals (unspecified)
- Mercury: 9.6382e-12 kg
- Waste, industrial: 5.8042e-7 kg
- Cobalt: 1.2849e-11 kg
- Nitrogen oxides: 2.991e-5 kg
- Ammonia: 0.00012017, 8.3327e-8 kg (2 entries, compartments not in this file)
- Carbon dioxide, fossil: 0.006861 kg
- Salts, unspecified: 1.4095e-6 kg
  assumed to be dissolved matter (unspecified)
- Carbon monoxide, fossil: 2.0511e-5 kg
- Formaldehyde: 1.7323e-9 kg
- Oils, unspecified: 1.6358e-7 kg
- Nitrate: 0.00053401 kg
- Benzene: 2.9121e-8 kg
- Waste water/m3: 8.2483e-9 m3
  TEAM=water: chemically polluted
- Iron: 3.1525e-12 kg
- Hydrocarbons, unspecified: 7.64e-6 kg
  non-methane
- BOD5, Biological Oxygen Demand: 1.5419e-6 kg
- Hydrogen sulfide: 3.5735e-9 kg
- Chloride: 7.22e-6 kg
- Copper: 1.7306e-12 kg
- Hydrogen fluoride: 1.8732e-8 kg
- Acids, unspecified: 6.0202e-8 kg
- Nickel: 5.3312e-10 kg
- Magnesium: 8.6981e-10 kg
- Suspended substances, unspecified: 1.3179e-6 kg
- Waste, unspecified: 0.00042041 kg
- Lead: 2.6013e-10 kg
- Arsenic: 1.2898e-10 kg
- Barium: 4.3915e-12 kg
- Toluene: 2.7545e-11 kg
- COD, Chemical Oxygen Demand: 6.2012e-6 kg

## Sources
- Hsu, D.
- Sheehan, J.
- USEPA
