# Roundwood, hardwood, green, at mill, SE

Dataset: openLCA process, unit process
Category: Forestry and Logging
Geography: RNA
Time period: 2005-01-01 to 2006-01-01
Generated by: Maureen Puettmann
Published in: Richard D. Bergman
restrictionsDescription: All information can be accessed by everybody.
copyright: false

## General comment
All weights given on an ovendry basis.
Both logs and bark were transported jointly - however, these were seperated in the model based on mass allocation. This unit process only accounts for the transport of logs and excludes the transport of bark.
Important note: although most of the data in the US LCI database has
undergone some sort of review, the database as a whole has not yet
undergone a formal validation process.
Please email comments to lci@nrel.gov.

## Technology
Average transport distance.

## Geography
SE = Southeast United States. The 8 states are Arkansas, Louisiana, Mississippi, Alabama, Tennessee, North Carolina, South Carolina, Georgia.

## Reference product
- Roundwood, hardwood, green, at mill, SE: 1 m3
  Based on a weighted average green density of 854 kg/m3

## By-products
- Bark, hardwood, green, at mill, SE: 21.6 kg
  Weight reported on an ovendry basis. Moisture content (ovendry basis) = 85%

## Inputs from technosphere
- Transport, combination truck, diesel powered: 2.42 t*km
  Transport of green bark 60.4 km. 85% moisture content, od basis
- CUTOFF Bark, hardwood, at forest road, SE: 21.6 kg
  Oven-dried weight; specific gravity of 0.558 and 85% MC ,od basis
- Transport, combination truck, diesel powered: 59 t*km
  Transport of green logs 60.4 km. 85% moisture content, od basis
- CUTOFF Roundwood, hardwood, at forest road, SE: 1 m3
  oven-dried weight. Wood specific gravity of 0.528 and 85% MC dry basis.

## Sampling procedure
Questionnaires from 12 mills from the 8 states of southeast region. Hardwood sawmills were members of the Hardwood Manufacturer Association (HMA).

## Sources
- Richard D. Bergman
- Maureen Puettmann
