# Containerboard, 100% recycled, average production, at mill

Dataset: openLCA process, unit process
Category: Pulp, Paper, and Paperboard Mills
Geography: US
Time period: 2010-01-01 to 2010-01-01
Generated by: Caroline Gaudreault
Reviewer: Jamie Meil
Published in: Corrugated Packaging Alliance (CPA)
restrictionsDescription: All information can be accessed by everybody.
copyright: false

## General comment
Containerboard, 100% recycled (recycled linerboard and recycled corrugating medium), average U.S. production, at mill. By-products were allocated 0% of the impacts to enable the user to choose and apply their own allocation method more easily. All flows are production-weighted means. Data were developed for a full LCA that was critically reviewed. Reviewers were: Mr. Jamie Meil, Athena Institute - review panel Chairman; Ms. Lindita Bushi, Athena Institute; Ms Melissa Hamilton, Earthshift.

The unit process includes pulp production from recovered paper, papermaking, and preparation for shipping to customers. Net purchased energy is included, but upstream flows associated with its generation are excluded. Flows associated with transportation of inputs from the technosphere are included. Product transportation is excluded.

## Technology
current technology mix for containerboard

## Time period
Primary data collected from participating companies and associations for their operational activities are representative for 2010.

## Reference product
- Containerboard, 100% recycled, average production, at mill: 1.1052 kg

## By-products
- Sold electricity, from 100 % recycled containerboard (2010): 0.102 MJ
  Produced as byproduct of containerboard, 100% recycled, production. Sold i.e., not used on site. Allocation set to 0%.

## Inputs from technosphere
- CUTOFF Disposal, wastewater treatment plant residuals, to uns. beneficial use: 0.0151 kg
- CUTOFF Disposal, other solid waste from plant, to uns. incinerator: 0.00138 kg
- CUTOFF Recovered paper, pulp substitutes: 0.00311 kg
  High-grade paper that often consists of shavings and clippings from converting operations at paper mills and print shops
- Natural gas, processed, at plant: 0.114 m3
- Ammonia, steam reforming, liquid, at plant: 7.58e-7 kg
- CUTOFF Wood fuel, hog fuel and bark, unspecified: 0.057655 kg
  Includes self-generated logging residues, purchased hogged fuel, as well as other renewable fuels. Self-generated hogged fuel (manufacturing) and black liquor solids are not included here but rather in total wood inputs above.
- Roundwood, hardwood, green, at logyard, SE: 1.0895e-6 m3
  7.06E-04 dry kg, 648 dry kg/m3 (http://www.corrim.org/pubs/reports/2010/phase2/Module_L.pdf)Includes bar. Containerboard made form 100%-recylced fiber does not use logs and chips for pulp production. Howerver, some of the containerboard form 100%-recycled fiber is produced at mills that also produce containerboard from virgin fiber. Some of these mills produce more energy using spent liquor and self-generated hogged fuel thant they need in their virgin operations. In theses cases, it was assumed that extra energy form these fuels was "sold" to the recyled product and hence, the quantity of chips and logs required to produce that sold energy was allocated to the recycled product. Wood (logs and chips) usage in the process is distrubuted as follows: 9.5% in self-generated hogged fuel, and 90.5% in black liquor.
- CUTOFF Disposal, wood ash, to uns. beneficial use: 0.00079365 kg
- CUTOFF Disposal, wood ash mixture, pure, 0% water, to uns. land application: 0.00043 kg
  i.e.: Disposal, wood ash mixture, pure, 0% water, to landfarming
- CUTOFF Biocides, for paper production, unspecified, at plant: 0.00015907 kg
  i.e.: Biocides, for paper production, unspecified, at plant
- CUTOFF Color: 9.49e-5 kg
- Transport, barge, diesel powered: 0.0152 t*km
  Recovered fiber to pulp and paper mills: 1.2% of total mass travels 824 km. Chemicals: 6.8% of total mass travels 336 km. Residuals to management : 1.2% of total mass travels 824 km
- CUTOFF Silica sand, at mine: 8.56e-5 kg
- CUTOFF Unspecified biomass: 0.00106 kg
- Diesel, at refinery: 8.23e-6 m3
  for distillate fuel oil
- CUTOFF Cationic resin, at plant: 1.86e-5 kg
  i.e. : Cationic resin, at plant
- Transport, combination truck, diesel powered: 0.308 t*km
  Wood logs to P&P (pulp and paper) mills: 96.8% of total mass travels 145 km. Wood chips to P&P mills: 95.2% of total mass travels 259 km. Recovered fiber to P&P mills: 87.8% of total mass travels 201 km. Pulp to P&P mills: 78.6% of total mass travels 267 km. Chemicals: 59.5% of total mass travels 208km. Residuals to management: 87.8% of total mass travels 201km. Purchased hogged fuel, other biomass: 100% of total mass travels 145km.
- CUTOFF Anionic resin, at plant: 0.000102 kg
  i.e.: Anionic resin, at plant
- Wood chips, hardwood, green, at sawmill, SE: 0.012 kg
  hardwood SWD chips. Containerboard made form 100%-recylced fiber does not use logs and chips for pulp production. Howerver, some of the containerboard form 100%-recycled fiber is produced at mills that also produce containerboard from virgin fiber. Some of these mills produce more energy using spent liquor and self-generated hogged fuel thant they need in their virgin operations. In theses cases, it was assumed that extra energy form these fuels was "sold" to the recyled product and hence, the quantity of chips and logs required to produce that sold energy was allocated to the recycled product. Wood (logs and chips) usage in the process is distrubuted as follows: 9.5% in self-generated hogged fuel, and 90.5% in black liquor.
- CUTOFF Dispersant: 0.000541 kg
- Transport, train, diesel powered: 0.134 t*km
  Wood logs to P&P (pulp and paper) mills: 3.2% of total mass travels 2828 km. Wood chips to P&P mills: 4.8% of total mass travels 1989 km. Recovered fiber to P&P mills: 11.0% of total mass travels 589 km. Pulp to P&P mills: 21.4% of total mass travels 1347 km. Chemicals: 31.3% of total mass travels 1355 km. Residuals to management: 11.0% of total mass travels 589 km.
- CUTOFF Unspecified polymer: 0.00191 kg
- Sulfuric acid, at plant: 0.00356 kg
- Liquefied petroleum gas, at refinery: 2.61e-7 m3
- CUTOFF Recovered paper, mixed: 0.158 kg
  Broad category that often includes items such as discarded mail, telephone books, paper board, magazines, and catalogs
- CUTOFF Unspecified additive: 2.94e-6 kg
  Proxy for total reduced sulfur compounds (TRS). TRS is a gaseous mixture of compounds consisting mainly of hydrogen sulfide (H2S), but it may also contain other gases such as methyl mercaptan (CH3S-H), dimethyl sulfide (CH3-S-CH3) and dimethyl disulfide (CH3-S-S-CH3). Reported as equivalent mass of H2S.
- Electricity, at grid, Western US, 2000: 0.127 MJ
  Net purchased, National average grid, Medium voltage: <50 kV
- CUTOFF Maize starch, at plant: 0.00819 kg
  i.e. : Maize starch, at plant
- Softwood logs with bark, harvested at average intensity site, at mill, US SE: 0.00015465 m3
  6.99E-02 dry kg, 452 dry kg/m3 (http://www.corrim.org/pubs/reports/2013/phase1_updates/SE%20Lumber%20LCA%20may%202013%20final.pdf. Containerboard made form 100%-recylced fiber does not use logs and chips for pulp production. Howerver, some of the containerboard form 100%-recycled fiber is produced at mills that also produce containerboard from virgin fiber. Some of these mills produce more energy using spent liquor and self-generated hogged fuel thant they need in their virgin operations. In theses cases, it was assumed that extra energy form these fuels was "sold" to the recyled product and hence, the quantity of chips and logs required to produce that sold energy was allocated to the recycled product. Wood (logs and chips) usage in the process is distrubuted as follows: 9.5% in self-generated hogged fuel, and 90.5% in black liquor.
- CUTOFF Felt wash: 2.17e-5 kg
- Pulp chips, at sawmill, US SE: 0.00117 kg
  southern SWD chips. Containerboard made form 100%-recylced fiber does not use logs and chips for pulp production. Howerver, some of the containerboard form 100%-recycled fiber is produced at mills that also produce containerboard from virgin fiber. Some of these mills produce more energy using spent liquor and self-generated hogged fuel thant they need in their virgin operations. In theses cases, it was assumed that extra energy form these fuels was "sold" to the recyled product and hence, the quantity of chips and logs required to produce that sold energy was allocated to the recycled product. Wood (logs and chips) usage in the process is distrubuted as follows: 9.5% in self-generated hogged fuel, and 90.5% in black liquor.
- CUTOFF Aluminium sulphate, powder, at plant: 0.00291 kg
  i.e.: Aluminium sulphate, powder, at plant
- CUTOFF Disposal, coal ash, to landfarming: 0.000463 kg
- CUTOFF Old corrugated containers: 1.04 kg
  consist of converting wastes (pre-consumer OCC) and ppost-cosumer old corrugated containers (OCC)
- Electricity, at grid, Texas US, 2000: 0.163 MJ
  Net purchased, National average grid, Medium voltage: <50 kV
- CUTOFF Retention aids, in paper production, at plant: 0.00051337 kg
  i.e.: Retention aids, in paper production, at plant
- Transport, ocean freighter, diesel powered: 0.00222 t*km
  Chemicals: 2.5% of total mass travel 2020 km
- Electricity, at grid, Eastern US, 2000: 1.91 MJ
  Net purchased, National average grid, Medium voltage: <50 kV
- CUTOFF Purchased steam mix: 4.1944 MJ
- Gasoline, at refinery: 1.96e-8 m3
- CUTOFF Disposal, coal ash, to uns. beneficial use: 0.000883 kg
- CUTOFF Barium scale inibitor: 7.89e-5 kg
- CUTOFF Disposal, wood ash mixture, pure, 0% water, to sanitary landfill: 0.00223 kg
  i.e.: Disposal, wood ash mixture, pure, 0% water, to sanitary landfill
- CUTOFF Recovered paper, high grade deinking: 0.0381 kg
  Grade made of high-grade paper such as letterhead, copier paper, envelopes, and printer, and convertor scrap that has gone through the printing process
- CUTOFF AKD sizer, in paper production, at plant: 0.000733 kg
  i.e.: AKD sizer, in paper production, at plant
- CUTOFF Disposal, other solid waste from plant, to uns. landfill: 0.0328 kg
- CUTOFF Disposal, coal ash, to uns. landfill: 0.0024636 kg
- CUTOFF Disposal, other solid waste from plant, to uns. beneficial use: 0.00554 kg
- CUTOFF Disposal, wastewater treatment plant residuals, to uns. landfill: 0.0741 kg
- CUTOFF Disposal, wastewater treatment plant residuals, to uns. land application: 0.0528 kg
- Bituminous coal, at mine: 0.027942 kg
- Sodium hydroxide, production mix, at plant: 4.99e-5 kg
- Residual fuel oil, at refinery: 5.17e-6 m3
- Forest residue, processed and loaded, at landing system: 0.0042 kg
  For energy requirements
- CUTOFF Defoamer: 0.000381 kg
- CUTOFF Antiskid: 2.17e-5 kg
- CUTOFF Nitric acid, 50% in H2O, at plant/RER U: 1.03e-7 kg
  i.e.: Nitric acid, 50% in H2O, at plant, dry weight
- CUTOFF Hydrogen peroxide, 50% in H2O, at plant/RER U: 0.000122 kg
  i.e.: Hydrogen peroxide, 50% in H2O, at plant. dry weight

## Inputs from nature
- Water, river: 0.010144 m3
  Total intake - Cooling
- Water, cooling: 0.35596 kg

## Emissions to nature
- Iron: 3.05e-8, 5.15e-10 kg (2 entries, compartments not in this file)
- Methane, dichloro-, HCC-30: 1.14e-8 kg
- Strontium: 2.17e-8 kg
- NMVOC, non-methane volatile organic compounds, unspecified origin: 0.00036169 kg
  From all fuel combustion, including biomass.
- Anthracene: 2.93e-12 kg
- Ethane, 1,2-dibromo-: 1.68e-11 kg
- Acenaphthene: 1.94e-8 kg
- Propanal: 1.09e-6 kg
- Particulates, > 2.5 um, and < 10um: 7.74e-5 kg
- Ethane, dichloro-: 5.59e-10 kg
- Ammonia: 1.08e-5 kg
- Nickel: 1.13e-8, 1.72e-7 kg (2 entries, compartments not in this file)
- Beryllium: 2.06e-9 kg
- Indeno(1,2,3-cd)pyrene: 8.52e-13 kg
- Fluorene: 1.27e-11 kg
- Fluoride: 6.23e-7 kg
- Benzofluoranthene: 1.54e-12 kg
- Arsenic: 4.89e-9, 3.27e-8 kg (2 entries, compartments not in this file)
- Water: 1.9188 kg
  Estimated by neglecting water in wastes
- Acetone: 1.16e-6 kg
- Thallium: 5.37e-10 kg
- Titanium: 2.79e-8 kg
- Benzene, ethyl-: 1.31e-9 kg
- Methane, biogenic: 4.74e-5 kg
  From biomass combustion. Does not include emissions from on-site wastewater treatment or landfills.
- Butadiene: 1.87e-8 kg
- Cyanide: 3.49e-8 kg
- Mercaptans, unspecified: 3.03e-6 kg
- Copper: 1.21e-8 kg
- Chrysene: 1.7e-12 kg
- t-Butyl methyl ether: 4.89e-10 kg
- Hexane: 3.79e-6 kg
- Manganese: 6.92e-8, 1.07e-6 kg (2 entries, compartments not in this file)
- Chloride: 1.03e-10 kg
- Dioxin, 2,3,7,8 Tetrachlorodibenzo-p-: 2.29e-14 kg
- Phenanthrene: 3.77e-11 kg
- Zinc: 2.51e-7, 4.37e-7 kg (2 entries, compartments not in this file)
- 2-Chloroacetophenone: 9.78e-11 kg
- Boron: 9.26e-8 kg
- Mercury: 3.99e-12 kg
- Toluene: 1.24e-5 kg
- Tin: 1.19e-8 kg
- Particulates, > 10 um: 3.25e-5 kg
- Methane, bromo-, Halon 1001: 1.17e-8 kg
- VOC, volatile organic compounds: 1.45e-5 kg
- Magnesium: 2.94e-7 kg
- Bromoform: 5.45e-10 kg
- Styrene: 6.55e-7 kg
- Isophorone: 8.1e-9 kg
- Cobalt: 6.34e-9 kg
- PAH, polycyclic aromatic hydrocarbons: 3.88e-5 kg
- Antimony: 2.12e-9 kg
- Formaldehyde: 6.09e-6 kg
- Hydrogen fluoride: 4.02e-6 kg
- Hydrazine: 2.38e-9 kg
- Lead: 1.32e-9 kg
- Ethene, chloro-: 1.13e-8 kg
- Water, cooling, unspecified natural origin/kg: 0.35596 kg
  Equal to output of cooling water
- Cadmium: 4.38e-8 kg
- Phenol: 7.06e-6 kg
- Chlorine: 2.54e-8 kg
- Nitrogen oxides: 0.0006341 kg
- Hydrogen chloride: 1.65e-5 kg
- Chromium: 7.15e-9, 1.73e-8 kg (2 entries, compartments not in this file)
- Methane: 8.74e-6 kg
  From fossil fuel combustion
- Carbon dioxide: 0.36 kg
  From combustion of fossil fuels for energy generation on site.
- Fluoranthene: 9.92e-12 kg
- Molybdenum: 1.2e-7 kg
- Methanol: 0.00011433 kg
- Waste water/m3: 0.0082851 m3
- Chloroform: 2.53e-6 kg
- Benzo(a)anthracene: 1.12e-12 kg
- Particulates, < 10 um: 0.0010832 kg
- Acetaldehyde: 1.28e-5 kg
- Biphenyl: 2.38e-11 kg
- Methyl ethyl ketone: 5.45e-9 kg
- Carbon disulfide: 5.04e-6 kg
- Xylene: 1.06e-7 kg
- Barium: 1.1e-7, 7.72e-8 kg (2 entries, compartments not in this file)
- Dinitrogen monoxide: 1.87e-5 kg
  Total from on-site manufacturing processes and energy generation.
- Methyl methacrylate: 2.79e-10 kg
- Benzo(a)pyrene: 1.74e-9 kg
- Oils, unspecified: 3.58e-8 kg
- Nitrogen, total: 4.87e-5 kg
- Acrolein: 1.7e-7 kg
- Naphthalene: 2e-9 kg
- Hydrogen sulfide: 2.94e-6 kg
- Cumene: 1.45e-6 kg
- Toluene, chloro-: 9.78e-9 kg
- Carbon dioxide, biogenic: 0.247 kg
  From combustion of biomass materials (wood/bark residues, spent pulping liquor organic solids, and other biomass fuels) for energy production on site.
- Vanadium: 2.56e-8, 2.42e-8 kg (2 entries, compartments not in this file)
- Benzene, hexachloro-: 1.3e-9 kg
- Lead II: 1.63e-7 kg
- Vinyl acetate: 1.06e-10 kg
- Mercury II: 3.4e-8 kg
- Benzene, chloro-: 3.07e-10 kg
- Ethene, tetrachloro-: 4.61e-8 kg
- Propene: 7.56e-10 kg
- Particulates, unspecified: 2.25e-10 kg
- Chromium VI: 2.39e-9 kg
- Sulfur oxides: 0.00054847 kg
  Total from on-site manufacturing processes and energy generation.
- Sulfuric acid: 6.71e-10 kg
- Suspended solids, unspecified: 0.00013533 kg
- Pyrene: 4.61e-12 kg
- Particulates, < 2.5 um: 6.2e-5 kg
- BOD5, Biological Oxygen Demand: 0.000556 kg
- Radioactive species, unspecified: 1.7959 Bq
- Benzene: 2.2e-6 kg
- Phosphorus, total: 4.95e-6 kg
- Selenium: 1.19e-7 kg
- Methane, monochloro-, R-40: 3.89e-8 kg
- Organic substances, unspecified: 8.46e-8 kg
- Phosphorus: 9.47e-8 kg
- Toluene, 2,4-dinitro-: 3.91e-12 kg
- Copper II: 1.08e-7 kg
- Ethane, 1,1,1-trichloro-, HCFC-140: 3.46e-8 kg
- Phthalate, dioctyl-: 1.02e-9 kg
- Acetophenone: 2.1e-10 kg
- Acenaphthylene: 3.49e-12 kg
- Benzo(g,h,i)perylene: 3.77e-13 kg
- Carbon monoxide: 0.000245 kg

## Sampling procedure
The survey included results from 24 containerboard mills representing 4.2 million short tons per year (TPY) of 100% recycled containerboard, nearly 56% of 2010 production volume.

## Sources
- Corrugated Packaging Alliance (CPA)
