# Green veneer processing, at plywood plant, US SE

Dataset: openLCA process, unit process
Category: Softwood Veneer and Plywood Manufacturing
Geography: RNA
Time period: 2000-01-01 to 2000-01-01
Generated by: Jamie Meil
Published in: Eric T. Sackimoto
restrictionsDescription: All information can be accessed by everybody.
copyright: true

## General comment
Base process data presented with allocations to within process co-products noted. Refer to allocation worksheet for specifics. All allocations performed using mass or volume., coproducts include pulp chips, peeler core and green veneer sold
Important note: although most of the data in the US LCI database has
undergone some sort of review, the database as a whole has not yet
undergone a formal validation process.
Please email comments to lci@nrel.gov.

## Technology
typical

## Geography
US Southeast

## Reference product
- Green veneer, at plywood plant, US SE: 1 kg

## By-products
- Green veneer, sold, at plywood plant, US SE: 0.132 kg
- Peeler core, from green veneer production at plywood plant, US SE: 0.0959 kg
- Pulp chips, from green veneer production at plywood plant, US SE: 0.553 kg

## Inputs from technosphere
- Liquefied petroleum gas, combusted in industrial boiler: 0.000579 l
- Electricity, at grid, Eastern US, 2000: 0.0405 kWh
- Conditioned log, at plywood plant, US SE: 1.78 kg

## Sources
- Leonard R. Johnson
- Eric T. Sackimoto
- Maureen Puetmann
