# Piling, whole tree slash, at landing, gentle slope forest, INW

Dataset: openLCA process, unit process
Category: Logging
Geography: RNA
Time period: 1989-01-01 to 1996-01-01
Generated by: Maureen Puetmann
Published in: Leonard R. Johnson
restrictionsDescription: All information can be accessed by everybody.
copyright: false

## General comment
Important note: although most of the data in the US LCI database has undergone some sort of review, the database as a whole has not yet undergone a formal validation process. Please email comments to lci@nrel.gov.

## Technology
Average technology. Some data extrapolated from similar processes.

## Geography
US Inland West including Montana, Idaho, and eastern Washington

## Reference product
- Piling, whole tree slash, at landing, gentle slope forest, INW: 1 ha

## Inputs from technosphere
- CUTOFF Lubricants, unspecified, at plant: 0.35 kg
- Diesel, combusted in industrial equipment: 22.543 l
  Consumption for equipment piling material and transportation for crew to pile and then return to burn piles.

## Sampling procedure
Fuel consumption data for the selected harvesting systems is generally based on the horsepower of the machines used within those systems. The fuel consumption calculations show consistency across the range of equipment used and should have a fairly high degree of reliability. Lubricant consumption was calculated as a percent of fuel consumption. This assumption generalizes the consumption rate and fails to distinguish between individual equipment characteristics.

## Sources
- Maureen Puettmann
- Leonard R. Johnson
