# Oriented strand board processsing, at plant, US SE

Dataset: openLCA process, unit process
Category: Engineered Wood Member (ex. Truss) Manufacturing
Geography: RNA
Time period: 1999-01-01 to 1999-01-01
Generated by: Jamie Meil
Published in: Dr. Earl Kline
restrictionsDescription: All information can be accessed by everybody.
copyright: true

## General comment
Base process data presented with allocations to within process co-products noted. Refer to allocation worksheet for specifics. All allocations performed using mass or volume., number of co-products produced, some hogfuel remains in system
Important note: although most of the data in the US LCI database has
undergone some sort of review, the database as a whole has not yet
undergone a formal validation process.
Please email comments to lci@nrel.gov.

## Technology
typical

## Geography
US Southeast

## Reference product
- Oriented strand board product, US SE: 1 kg

## By-products
- Fines, at oriented strand board production, US SE: 0.0143 kg
- Bark mulch, at oriented strand board production, US SE: 0.0352 kg
- Dust and scrap, at oriented strand board production, US SE: 0.00718 kg

## Inputs from technosphere
- Softwood logs with bark, harvested at average intensity site, at mill, US SE: 0.00246 m3
- Electricity, at grid, Eastern US, 2000: 0.33 kWh
- CUTOFF Water, at user: 0.0828 kg
- Slack wax, at plant, US SE: 0.0152 kg
- Natural gas, combusted in industrial boiler: 0.0367 m3
- Diesel, combusted in industrial boiler: 0.00125 l
- CUTOFF Hogfuel-Biomass (50% MC), combusted in industrial boiler: 0.658 kg
- Liquefied petroleum gas, combusted in industrial boiler: 0.00465 l
- Phenol formaldehyde, at plant: 0.0334 kg
- Transport, combination truck, average fuel mix: 0.106 t*km
  Transport of phenol formaldehyde
- Methylene diphenyl diisocyanate resin, at plant, US SE: 0.00643 kg
- Gasoline, combusted in equipment: 0.000197 l

## Emissions to nature
- VOC, volatile organic compounds: 0.00172 kg
- Phenol: 1.91e-5 kg
- Methanol: 0.000313 kg
- Carbon dioxide: 0.0189 kg
- Formaldehyde: 8.82e-5 kg
- Acrolein: 3.71e-5 kg
- Acetaldehyde: 0.000103 kg
- Particulates, unspecified: 0.000484 kg

## Sources
- Leonard R. Johnson
- Maureen Puetmann
- Dr. Earl Kline
