# Ethylene glycol, at plant

Dataset: openLCA process, unit process
Category: Petrochemical Manufacturing
Geography: RNA
Time period: 2003-01-01 to 2004-01-01
Generated by: Franklin Associates
Published in: THE PLASTICS DIVISION OF THE ACC
restrictionsDescription: All information can be accessed by everybody.
copyright: false

## General comment
Complete inventory data and metadata are available in full in the final report and appendices, Cradle-to-Gate Life Cycle Inventory of Nine Plastic Resins and Four Polyurethane Precursors. This report has been extensively reviewed within Franklin Associates and has undergone partial critical review by ACC Plastics Division members and is available at: www.americanchemistry.com. Quantities may vary slightly between the reference to main source and and this module due to rounding. Important note: although most of the data in the US LCI database has undergone some sort of review, the database as a whole has not yet undergone a formal validation process. Please email comments to lci@nrel.gov.

## Technology
Ethylene glycol is produced by the hydration of ethylene oxide.

## Geography
Representative of North America (US and Canada)

## Reference product
- Ethylene glycol, at plant: 1 kg

## By-products
- Recovered energy, for ethylene glycol, CTR: 0.018099 MJ

## Inputs from technosphere
- CUTOFF Disposal, solid waste, fuel, to municipal incineration: 0.061894 kg
- CUTOFF Disposal, solid waste,process, to municipal incineration: 0.0022468 kg
- CUTOFF Disposal, solid waste, process, to sanitary landfill: 0.030202 kg
- CUTOFF Disposal, solid waste, process, to waste-to-energy: 1.4354e-5 kg

## Inputs from nature
- Energy, geothermal: 0.0065726 MJ
- Energy, solar: 0.00027602 MJ
- Energy, from biomass: 0.0027084 MJ
- Gas, natural, in ground: 0.54054 kg
  This flow represents the amount of natural gas that is a material input for producing the resin output. The energy content of the natural gas used as EMR/feedstock is 49.8 MJ per kg. The energy content multiplied by the mass should be considered an Energy of Material Resource (EMR)/feedstock energy.
- Uranium oxide, 332 GJ per kg, in ore: 3.258e-6 kg
- Oil, crude, in ground: 0.12231 kg
  This flow represents the amount of crude oils that is a material input for producing the resin output. The energy content of the crude oil used as EMR/feedstock is 43.7 MJ per kg. The energy content multiplied by the mass should be considered an Energy of Material Resource (EMR)/feedstock energy.
- Gas, natural, in ground: 0.54286 m3
  This flow represents the amount of natural gas that is used for fuel. The energy content of the natural gas used for fuel is 36.7 MJ per m3.
- Energy, unspecified: 0.0088028 MJ
  Energy unspecified reflects "other fossil" fuels
- Energy, from hydro power: 0.1249 MJ
- Oxygen, in air: 0.6952 kg
- Coal, lignite, in ground: 0.01278 kg
- Coal, unprocessed bituminous, in ground: 0.13295 kg
- Oil, crude, in ground: 0.16138 kg
  This flow represents the amount of crude oil that is used for fuel. The energy content of the crude oil used for fuel is 43.7 MJ per kg.
- Water, consumptive use, unspecified origin/m3: 0.0085909 m3
  Franklin Associates uses a default as opposed to Egalitarian approach in collecting data for water use. During data collection, water use data were only requested and compiled in terms of 'evaporative' or consumptive use (i.e., ultimate withdraws, evaporation, or incorporation into the product). Data were not collected to determine reliable averages for non-evaporative water use. In other words, averages for water inputs and outputs are not available for this unit process. Consumptive use includes: water incorporated into the product, water evaporated during the process, and/or water used and released to a body other than that from which it was drawn.
- Energy, kinetic (in wind), converted: 0.0065036 MJ

## Emissions to nature
- Naphthalene: 5.295e-9, 2.2846e-8 kg (2 entries, compartments not in this file)
- Mercaptans, unspecified: 6.0977e-9 kg
- Benzenes, alkylated, unspecified: 5.4595e-8 kg
- Hydrocarbons, unspecified: 9.9803e-7 kg
- Radioactive species, unspecified: 3540 Bq
- Radionuclides (Including Radon): 4.6311e-6 kg
- Oils, unspecified: 8.5394e-6 kg
- Selenium: 1.6612e-8, 9.2815e-8 kg (2 entries, compartments not in this file)
- Particulates, < 10 um: 0.00031686 kg
- Tetradecane: 6.8593e-9 kg
- Sulfur: 7.3141e-7 kg
- Sodium, ion: 0.0016967 kg
- Propene: 4.1447e-8 kg
- Acetaldehyde: 7.9e-5, 1.2339e-8 kg (2 entries, compartments not in this file)
- Chlorine: 6.241e-8 kg
- Silver: 3.593e-7 kg
- Ammonium chloride: 1.7292e-7 kg
- Tin: 6.6585e-8 kg
- Benzene, chloro-: 6.6914e-13 kg
- Fluorene: 1.4769e-9, 5.672e-11 kg (2 entries, compartments not in this file)
- Zinc: 8.5656e-6, 1.8521e-10 kg (2 entries, compartments not in this file)
- Hydrogen chloride: 8.621e-5 kg
- Methane, dichloro-, HCC-30: 9.6684e-8 kg
- Methacrylic acid, methyl ester: 6.0831e-13 kg
- Sulfide: 5.1158e-8 kg
- Methane, fossil: 0.015612 kg
- 2-Chloroacetophenone: 2.1291e-13 kg
- Ethane, chloro-: 1.2775e-12 kg
- Ammonia: 7.1381e-6, 1.0193e-6 kg (2 entries, compartments not in this file)
- Calcium, ion: 0.00059413 kg
- Benzyl chloride: 2.1291e-11 kg
- Fluorenes, alkylated, unspecified: 3.164e-9 kg
- Methane, chlorotrifluoro-, CFC-13: 5.9235e-9 kg
- Carbon monoxide: 0.00017003 kg
- Vinyl acetate: 2.3116e-13 kg
- Ammonium, ion: 3.6971e-8 kg
- BOD5, Biological Oxygen Demand: 0.0017766 kg
- Xylene: 7.8441e-5, 1.3392e-7 kg (2 entries, compartments not in this file)
- Kerosene: 8.2816e-8 kg
- Cyanide: 1.2368e-11, 7.6039e-11 kg (2 entries, compartments not in this file)
- VOC, volatile organic compounds: 0.00077502 kg
- Particulates, < 2.5 um: 0.000224 kg
- o-Xylene: 3.1401e-9 kg
- Benzene: 3.1348e-7, 8.6962e-5 kg (2 entries, compartments not in this file)
- Copper, ion: 5.6811e-8 kg
- Antimony: 1.6296e-8, 1.6712e-9 kg (2 entries, compartments not in this file)
- Acetone: 1.7625e-9 kg
- Benzo(ghi)perylene: 1.6829e-12 kg
- Sulfate: 8.7086e-5 kg
- Dinitrogen monoxide: 2.4472e-5 kg
- Vanadium: 2.2262e-8 kg
- Dissolved solids: 0.0074204 kg
- Furan: 2.7889e-13 kg
- Copper: 6.0928e-8, 2.7781e-10 kg (2 entries, compartments not in this file)
- Strontium: 1.5868e-5 kg
- Sulfuric acid, dimethyl ester: 1.4599e-12 kg
- Ethene, tetrachloro-: 3.8332e-9 kg
- Phenanthrenes, alkylated, unspecified: 3.7095e-10 kg
- Manganese: 8.1301e-8, 1.2471e-6 kg (2 entries, compartments not in this file)
- Lead-210/kg: 3.0289e-17 kg
- Ethane, 1,1,1-trichloro-, HCFC-140: 6.0831e-13 kg
- Dibenzofuran: 3.2585e-11 kg
- Methane, monochloro-, R-40: 1.612e-11, 6.8976e-12 kg (2 entries, compartments not in this file)
- Formaldehyde: 1.0475e-6 kg
- Methane, bromo-, Halon 1001: 4.8665e-12 kg
- Acenaphthene: 3.1788e-11 kg
- Particulates, > 2.5 um, and < 10um: 7.3088e-5 kg
- Mercury: 8.84e-9, 3.5756e-10 kg (2 entries, compartments not in this file)
- Hydrazine, methyl-: 5.1706e-12 kg
- Radium-228/kg: 5.3901e-17 kg
- Carbon dioxide, fossil: 2.3841 kg
- Methane: 0.00045747 kg
- Docosane: 1.8338e-10 kg
- Benzoic acid: 2.957e-7 kg
- Ethane, 1,2-dichloro-: 1.2166e-12 kg
- Hexane: 2.0378e-12 kg
- Biphenyl: 1.0596e-10, 3.535e-9 kg (2 entries, compartments not in this file)
- Nickel: 6.7154e-8, 1.3855e-6 kg (2 entries, compartments not in this file)
- Suspended solids, unspecified: 0.0029784 kg
- Lithium, ion: 0.00013609 kg
- Benzo(a)anthracene: 4.9864e-12 kg
- Cadmium: 1.6804e-8 kg
- Barium: 0.00035897 kg
- Dibenzothiophene: 3.4547e-11 kg
- Nitrogen oxides: 0.0031216 kg
- Dioxins, measured as 2,3,7,8-tetrachlorodibenzo-p-dioxin: 2.8776e-13 kg
- Naphthalene, 2-methyl-: 4.481e-9 kg
- Boron: 9.1238e-7 kg
- Carbon monoxide, fossil: 0.0008111 kg
- n-Hexacosane: 1.144e-10 kg
- Organic substances, unspecified: 0.0005382 kg
- Cobalt: 6.4568e-9, 1.0316e-7 kg (2 entries, compartments not in this file)
- Butadiene: 6.2813e-10 kg
- Yttrium: 1.9574e-9 kg
- Fluoride: 5.1378e-9, 7.5933e-7 kg (2 entries, compartments not in this file)
- Methyl ethyl ketone: 1.3795e-11, 1.1862e-11 kg (2 entries, compartments not in this file)
- Sulfur oxides: 0.0015322 kg
- Styrene: 7.6039e-13, 6.241e-10 kg (2 entries, compartments not in this file)
- 5-methyl Chrysene: 1.3713e-12 kg
- Acenaphthylene: 1.5583e-11 kg
- Bromoform: 1.1862e-12 kg
- PAH, polycyclic aromatic hydrocarbons: 2.6989e-9 kg
- Magnesium: 0.00011886, 6.8563e-7 kg (2 entries, compartments not in this file)
- Chloroform: 1.7945e-12 kg
- Phenol: 7.0588e-7, 4.8665e-13 kg (2 entries, compartments not in this file)
- Phenols, unspecified: 6.7109e-8, 6.0227e-8 kg (2 entries, compartments not in this file)
- Phenanthrene: 2.3342e-10, 1.6829e-10 kg (2 entries, compartments not in this file)
- Benzene, 1-methyl-4-(1-methylethyl)-: 1.7124e-11 kg
- Sulfur dioxide: 0.003602 kg
- Decane: 8.4513e-9 kg
- o-Cresol: 8.3939e-9 kg
- 4-Methyl-2-pentanone: 7.2316e-10 kg
- p-Xylene: 3.1401e-9 kg
- Acetophenone: 4.5623e-13 kg
- Beryllium: 1.9704e-9, 3.4943e-9 kg (2 entries, compartments not in this file)
- Indeno(1,2,3-cd)pyrene: 3.8023e-12 kg
- Benzo(a)pyrene: 2.3686e-12 kg
- Fluorene, 1-methyl-: 1.9504e-11 kg
- Arsenic: 4.8233e-8 kg
- NMVOC, non-methane volatile organic compounds, unspecified origin: 0.015667 kg
- Benzo(b,j,k)fluoranthene: 6.8563e-12 kg
- Benzene, pentamethyl-: 1.2844e-11 kg
- Lead: 5.4409e-8, 1.5179e-7 kg (2 entries, compartments not in this file)
- Chromium: 3.9106e-8, 2.0465e-5 kg (2 entries, compartments not in this file)
- Arsenic, ion: 5.6452e-8 kg
- Radium-226/kg: 1.0537e-14 kg
- Fluoranthene: 4.4255e-11 kg
- Benzene, ethyl-: 1.0819e-5, 2.3438e-8 kg (2 entries, compartments not in this file)
- Organic acids: 6.3544e-10 kg
- TOC, Total Organic Carbon: 6.241e-7 kg
- Aluminum: 2.7966e-5 kg
- Propanal: 1.1558e-11 kg
- Surfactants, unspecified: 1.1224e-7 kg
- Chrysene: 6.2331e-12 kg
- Thallium: 3.5258e-9 kg
- Naphthalenes, alkylated, unspecified: 8.9465e-10 kg
- Phenol, 2,4-dimethyl-: 8.1652e-9 kg
- t-Butyl methyl ether: 1.0645e-12 kg
- Methane, tetrachloro-, CFC-10: 3.7695e-10 kg
- Chromium VI: 4.924e-9 kg
- Toluene: 0.00013524, 3.4599e-7 kg (2 entries, compartments not in this file)
- Iron: 5.2831e-5 kg
- Bromide: 3.5689e-5 kg
- Polycyclic organic matter, unspecified: 1.5078e-8 kg
- Methane, chlorodifluoro-, HCFC-22: 6.241e-10 kg
- Cadmium, ion: 9.1397e-9 kg
- Carbon disulfide: 3.954e-12 kg
- Cumene: 1.612e-13 kg
- Anthracene: 1.3089e-11 kg
- Toluene, 2,4-dinitro-: 8.5163e-15 kg
- Hydrogen: 2.4964e-6 kg
- Titanium, ion: 2.5712e-7 kg
- Nitrogen, total: 9.2037e-8 kg
- Isophorone: 1.7641e-11 kg
- Hydrogen fluoride: 9.3482e-6 kg
- p-Cresol: 9.0477e-9 kg
- Dodecane: 1.6027e-8 kg
- Hexadecane: 1.753e-8 kg
- Ethylene dibromide: 1.1578e-9 kg
- Surfactants: 3.3166e-8 kg
- Ethane, 1,2-dibromo-: 3.6499e-14 kg
- Hexanoic acid: 6.1238e-8 kg
- m-Xylene: 8.5343e-9 kg
- Radioactive species, Nuclides, unspecified: 5.3701 Bq
- Eicosane: 4.4011e-9 kg
- 2-Hexanone: 1.9371e-9 kg
- Molybdenum: 6.6904e-9 kg
- Pyrene: 2.0569e-11 kg
- Particulates, unspecified: 0.00022175 kg
- COD, Chemical Oxygen Demand: 0.0023281 kg
- Octadecane: 4.3472e-9 kg
- Chloride: 0.0073734 kg
- Phthalate, dioctyl-: 2.2203e-12 kg
- Ethylene oxide: 7.505e-5 kg
- Aldehydes, unspecified: 0.00022126 kg

## Sampling procedure
Data are from one confidential, primary source.

## Sources
- THE PLASTICS DIVISION OF THE ACC
