# Scanner, packaging and information sheets

Dataset: openLCA process, unit process
Category: Other material
Geography: GLO
Time period: 2010-01-01 to 2100-12-31
Generated by: Roy Wood
Published in: Roy Wood
restrictionsDescription: All information can be accessed by everybody.
copyright: false

## Technology
Average technology

## Geography
Asia, China

## Time period
2010 and after

## Reference product
- Scanner, packaging and information sheets: 1.88 kg

## Inputs from technosphere
- Polyethylene, linear low density, resin, at plant: 0.044 kg; triangle minimum 0.0435, mode 0.044, maximum 0.0445
- Electricity, at grid, US, 2008: 0.05 kWh
- Transport, combination truck, long-haul, diesel powered: 0.99 t*km
- CUTOFF Paper, woodcontaining, LWC, at plant: 0.27 kg; triangle minimum 0.265, mode 0.27, maximum 0.275
- CUTOFF Corrugated board, mixed fibre, single wall, at plant: 1.3 kg; triangle minimum 1.29, mode 1.3, maximum 1.31
- Polystyrene, high impact, resin, at plant: 0.266 kg; triangle minimum 0.2655, mode 0.266, maximum 0.2665

## Sources
- Roy Wood
