# Open mold casting, rigid composites part, at plant

Dataset: openLCA process, unit process
Category: Plastics Product Manufacturing
Geography: RNA
Time period: 2011-01-01 to 2012-01-01
Generated by: Franklin Associates
Published in: American Composites Manufacturers Assn.
restrictionsDescription: All information can be accessed by everybody.
copyright: false

## General comment
An average of 0.00049 kg of rigid composite part scrap is produced for every kilogram of open mold casted parts produced; this scrap is sold for recycling. Complete inventory data and metadata are shown in full in the final report, Life Cycle Inventory of Polymer Composites. The report is not publicly available. This report has been extensively reviewed within Franklin Associates by Rebe Feraldi, Anne Marie Molen, and Melissa Huff and has undergone partial critical review by ACMA members. Important note: although most of the data in the US LCI database has undergone some sort of review, the database as a whole has not yet undergone a formal validation process. Please email comments to lci@nrel.gov.

## Technology
Fabrication of rigid composite parts by open mold casting.

## Geography
US

## Reference product
- Open mold casting, rigid composites part, at plant: 1 kg

## By-products
- Composite scrap, from composites open mold casting, at plant: 0.00049 kg

## Inputs from technosphere
All rows: lognormal geomSd 1
- Limestone, at mine: 0.71 kg
- CUTOFF Acetone from butane, at plant: 0.0061 kg
- CUTOFF Gelcoat, UPR & styrene-based, at plant: 0.025 kg
- CUTOFF Disposal, solid waste, unspecified, to waste-to-energy: 3e-5 kg
- Unsaturated polyester, resin, at plant: 0.23 kg
- Natural gas, combusted in industrial boiler: 0.044386 m3
- CUTOFF Disposal, solid waste, unspecified, to municipal incineration: 0.0026 kg
- Transport, combination truck, diesel powered: 0.57924 t*km
- CUTOFF Mold-release agent, at plant: 0.0046 kg
- CUTOFF Dichloromethane, at plant: 0.00015 kg
- Liquefied petroleum gas, combusted in industrial boiler: 0.0056739 l
- Electricity, at Grid, US, 2010: 0.55776 kWh
- CUTOFF Aluminum hydroxide, at plant: 0.046 kg
- Polyethylene terephthalate, resin, at plant: 0.014 kg
- CUTOFF Pigment, at plant: 0.0038 kg
- CUTOFF Disposal, solid waste, unspecified, to sanitary landfill: 0.043 kg

## Emissions to nature
- Methane, dichloro-, HCC-30: 0.00015 kg; lognormal geomSd 1
- Particulates, < 10 um: 1.9e-5 kg; lognormal geomSd 1
- Methyl methacrylate: 1.2e-6 kg; lognormal geomSd 1
- Styrene: 0.0071 kg; lognormal geomSd 1

## Sampling procedure
Data are from primary sources. The composites fabricators who provided data for this module verified that the characteristics of their plants are representative of North American composites fabrication facilities producing open mold casted composite parts. The representativeness of the composites fabrication processes are unknown, but estimated to be less than 10% of the US production volume.

## Sources
- American Composites Manufacturers Assn.
