# Sawn lumber, hardwood, rough, kiln dried, at kiln, SE

Dataset: openLCA process, unit process
Category: Sawmills
Geography: RNA
Time period: 2005-01-01 to 2006-01-01
Generated by: Maureen Puettmann
Published in: Richard D. Bergman
restrictionsDescription: All information can be accessed by everybody.
copyright: false

## General comment
Important note: although most of the data in the US LCI database has
undergone some sort of review, the database as a whole has not yet
undergone a formal validation process.
Please email comments to lci@nrel.gov.

## Technology
Average technology for the production of hardwood lumber in the SE region.

## Geography
SE = Southeast United States. The 8 states are Arkansas, Louisiana, Mississippi, Alabama, Tennessee, North Carolina, South Carolina, Georgia.

## Reference product
- Sawn lumber, hardwood, rough, kiln dried, at kiln, SE: 1 m3
  Oven-dried weights; wood specific gravity of 0.600 at 8%MC dry basis; 1.27 m3 rough dry lumber = 1 m3 planed dry lumber

## Inputs from technosphere
- Diesel, combusted in industrial equipment: 0.846 l
  20% of mill use for on-site transportation
- Electricity, at grid, Eastern US, 2000: 41.6 kWh
  Represents 25% of total mill consumption of grid electricity.
- Gasoline, combusted in equipment: 0.0876 l
  20% of mill use for on-site transportation
- Electricity, onsite boiler, hardwood mill, average, SE: 2.32 kWh
  Represents 25% of total mill consumption of electricity generated onsite.
- Natural gas, combusted in industrial equipment: 0.00708 l
  20% of mill use for on-site transportation; proxy for propane
- Heat, onsite boiler, hardwood mill, average, SE: 4828 MJ
  4,678 MJ per 1.0 cubic meter is equal to 7.46 million BTUs (no efficiencies) during drying; incorporates plant heating
- Sawn lumber, hardwood, rough, green, at sawmill, SE: 765 kg
  Oven-dried weights.

## Inputs from nature
- Water, process and cooling, surface: 25 l
  amount of water consumed as makeup boiler water

## Emissions to nature
- VOC, volatile organic compounds: 0.0504 kg
  Derived values are from secondary data found in two Forest Products Journal (Rice and Erich 2006; Beakler et al 2007)

## Sampling procedure
Questionnaires from 12 mills from the 8 states of southeast region. Hardwood sawmills were members of the Hardwood Manufacturer Association (HMA).

## Sources
- Richard D. Bergman
- Maureen Puettmann
- Forest Products Laboratory
- Forest Products Laboratory
- NHLA
- unspecified
- unspecified
