# Electricity, at Grid, TRE, 2008

Dataset: openLCA process, unit process
Category: Utilities
Geography: RNA
Time period: 2008-01-01 to 2008-01-01
Generated by: Alberta Carpenter
Published in: Chris Goemans, Athena Institute
restrictionsDescription: All information can be accessed by everybody.
copyright: false

## General comment
The methodology used to put together the grid information is outlined in reference 1.

## Technology
Typical

## Geography
Texas

## Reference product
- Electricity, at Grid, TRE, 2008: 1 kWh

## Inputs from technosphere
- CUTOFF Electricity, biomass,liquid, unspecified, at power plant: 9.10875e-6 kWh
  OBL – Other Biomass Liquid (Ethanol, Fish Oil, Liquid Acetonitrile Waste, Medical Waste, Tall Oil, Waste Alcohol, and other Biomass not specified)
- CUTOFF Electricity, other fuels, unspecified, at power plant: 4.71068e-5 kWh
  WH – Waste heat not directly attributed to a fuel source. Note that WH should only be reported where the fuel source for the waste heat is undetermined, and for combined cycle steam turbines that are not supplementary fired
- Electricity, residual fuel oil, at power plant: 5.13468e-6 kWh
  RFO – Residual Fuel Oil (includes No. 5 and No. 6 Fuel Oils and Bunker C Fuel Oil)
- Electricity, natural gas, at power plant: 0.47503 kWh
  NG – Natural Gas
- Electricity, biomass, at power plant: 0.000404077 kWh
  WDS – Wood/Wood Waste Solids (Paper Pellets, Railroad Ties, Utility Poles, Wood Chips, and other wood solids)
- CUTOFF Electricity, petroleum coke, at power plant: 0.00270797 kWh
  PC – Petroleum Coke
- CUTOFF Electricity, hydropower, at power plant, unspecified: 0.00204898 kWh
  WAT – Water (Conventional, Pumped Storage)
- CUTOFF Electricity, other fuels, unspecified, at power plant: 9.60474e-5 kWh
  OTH – Other (Batteries, Chemicals, Coke Breeze, Hydrogen, Pitch, Sulfur, Tar Coal, and miscellaneous technologies)
- CUTOFF Electricity, biomass, gas, unspecified, at power plant: 5.98588e-5 kWh
  OBG – Other Biomass Gases (Digester Gas, Methane, and other biomass gases)
- Electricity, bituminous coal, at power plant: 0.226331 kWh
  SUB – Subbituminous Coal
- Electricity, nuclear, at power plant: 0.120329 kWh
  NUC – Nuclear (Uranium, Plutonium, Thorium)
- CUTOFF Electricity, other gases, unspecified, at power plant: 0.00702204 kWh
  OG – Other Gas (Butane, Coal Processes, Coke-Oven, Refinery, and other processes)
- CUTOFF Electricity, biomass,liquid, unspecified, at power plant: 0.000847793 kWh
  BLQ – Black Liquor
- Electricity, diesel, at power plant: 0.000299496 kWh
  DFO – Distillate Fuel Oil (includes all Diesel and No. 1, No. 2, and No. 4 Fuel Oils)
- CUTOFF Electricity, other fuels, unspecified, at power plant: 0.000783224 kWh
  PUR – Purchased Steam
- CUTOFF Electricity, at wind power plant, unspecified: 0.0439623 kWh
  WND – Wind
- Electricity, lignite coal, at power plant: 0.118863 kWh
  LIG – Lignite Coal
- CUTOFF Electricity, biomass, solid, agriculture by-products, at power plant: 4.24006e-5 kWh
  AB – Agriculture Crop By-products / Straw / Energy Crops
- CUTOFF Electricity, biomass, gas, landfill, at power plant: 0.00111093 kWh
  LFG – Landfill Gas

## Sampling procedure
based on EIA electricity reports for all power plants in the US.

## Sources
- Chris Goemans, Athena Institute
- unspecified
- USEPA
- Statistics Canada
- Statistics Canada
- Statistics Canada
- Statistics Canada
- Statistics Canada
- Statistics Canada
- USEPA
- EIA
- EIA
- EIA
- EIA
- EIA
- EIA
- EIA
- EIA
- EIA
- EIA
- EIA
- US DOE
- International Energy Agency
- US DOE
