# Bauxite, at mine

Dataset: openLCA process, unit process
Category: All Other Metal Ore Mining
Geography: GLO
Time period: 1998-01-01 to 1998-01-01
Generated by: James Littlefield, Franklin Associates
Published in: Franklin Associates, A Division of ERG
restrictionsDescription: All information can be accessed by everybody.
copyright: false

## General comment
Aluminum is the most widely distributed metal in the earth’s crust, with only the nonmetallic elements oxygen and silicon surpassing it in abundance. However, bauxite ore is the only commercially exploited source of aluminum. Although other types of earth, including ordinary clay, contain aluminum, economics favor the use of bauxite. Bauxite is formed by the action of rain and erosion on materials containing aluminum oxide (alumina). The heavy rainfall and warm temperatures of the tropics provide nearly ideal conditions for this process, and most of the world’s bauxite is mined in these regions. Australia is the leading producer of bauxite, followed by Guinea, Jamaica, Brazil, and Guyana. Greater than 99 percent of the total bauxite imported by the U.S. is supplied by these countries. This analysis assumes that the Canadian supply of bauxite is similar to that of the U.S.

Important note: although most of the data in the US LCI database has
undergone some sort of review, the database as a whole has not yet
undergone a formal validation process.
Please email comments to lci@nrel.gov.

## Technology
Mining of bauxite ore.

## Geography
Australia (2%), Jamaica (55 %), Guinea (30%), Brazil (3%), Suriname (1%), and Guyana (9%).

## Reference product
- Bauxite, at mine: 1 kg

## Inputs from technosphere
- Residual fuel oil, combusted in industrial boiler: 0.0012518 l
- Transport, train, diesel powered: 0.34901 t*km
- Gasoline, combusted in equipment: 0.00026705 l
- Diesel, combusted in industrial boiler: 0.0043396 l
- Electricity, bauxite mining regions: 0.00039683 kWh
- CUTOFF Disposal, solid waste, unspecified, to unspecified treatment: 0.13604 kg
  Overburden
- Transport, ocean freighter, residual fuel oil powered: 2.527 t*km
- Transport, ocean freighter, diesel powered: 0.28081 t*km

## Inputs from nature
- Bauxite: 1 kg

## Emissions to nature
- Oils, unspecified: 1.9e-9 kg
- Particulates, unspecified: 0.00235 kg
- Suspended solids, unspecified: 1.5e-8 kg
- Methane: 6.6e-6 kg
- Detergents, unspecified: 2.5e-9 kg
- Nitrogen oxides: 4e-5 kg
- Phosphate: 2.5e-9 kg
- Carbon monoxide: 3.2e-6 kg
- Dinitrogen monoxide: 3.4e-7 kg
- Carbon dioxide, fossil: 0.00079 kg
- NMVOC, non-methane volatile organic compounds, unspecified origin: 4.5e-7 kg
- Dissolved solids: 2.1e-7 kg
- Sulfur oxides: 1.1e-6 kg
- Nitrogen: 6.5e-10 kg

## Sources
- Franklin Associates, A Division of ERG
- The Aluminum Association
- Energy Information Administration (EIA)
- US Geological Survey
- IAI Statistical Report: Electrical Power
- US EPA
