# Electricity, at eGrid, RFCW, 2010

Dataset: openLCA process, unit process
Category: Utilities
Geography: RNA
Time period: 2010-01-01 to 2010-01-01
Generated by: Samantha Wascavage
Published in: Chris Goemans, Athena Institute
restrictionsDescription: All information can be accessed by everybody.
copyright: false

## General comment
The methodology used to put together the grid information is outlined in reference 1.

## Technology
Typical

## Geography
RFC West electricity grid to include Indiana, Ohio, West Virginia, and portions of Illinois, Michigan, Minnesota, Kentucky, West Virginia, Maryland and Pennsylvania.

## Reference product
- Electricity, at eGrid, RFCW, 2010: 1 kWh

## Inputs from technosphere
- Electricity, nuclear, at power plant: 0.190671 kWh
  Nuclear Fission – NUC Nuclear (Uranium, Plutonium, Thorium)
- CUTOFF Electricity, MSW, non-biogenic, at power plant: 0.000994 kWh
  Other Fuels MSN, OTH, PUR, WH – Other (Batteries, Chemicals, Coke Breeze, Hydrogen, Pitch, Sulfur, Tar Coal, and miscellaneous technologies)
- Electricity, natural gas, at power plant: 0.054394 kWh
  Natural Gas
- Electricity, bituminous coal, at power plant: 0.556185 kWh
  Bituminous Coal BIT, SC, SGC, WC - Anthracite Coal, and Bituminous Coal.
- Electricity, residual fuel oil, at power plant: 2.8e-5 kWh
  Petroleum (RFO) – Residual Fuel Oil (includes No. 5 and No. 6 Fuel Oils and Bunker C Fuel Oil)
- CUTOFF Electricity, biomass, gas, landfill, at power plant: 0.001952 kWh
  Gaseous Renewable Fuels (Biomass) LFG, OBG - landfill gas
- CUTOFF Electricity, biomass, solid, biogenic MSW, at power plant: 0.000948 kWh
  Solid Renewable Fuels (Biomass) MSB, AB, MSW, OBS, TDF, WDS – Municipal Solid Waste – Biogenic Component
- CUTOFF Electricity, biomass,liquid, unspecified, at power plant: 0.001369 kWh
  Liquid Renewable Fuels (Biomass) BLQ, OBL, SLW, WDL - black liquor
- CUTOFF Electricity, at wind power plant, unspecified: 0.006139 kWh
  Wind
- CUTOFF Electricity, other gases, unspecified, at power plant: 0.005266 kWh
  Other Gases OG, BFG, PG – Other Gas (Butane, Coal Processes, Coke-Oven, Refinery, and other processes)
- CUTOFF Electricity, hydropower, at power plant, unspecified: 0.006398 kWh
  Hydroelectric WAT – Water (Conventional, Pumped Storage)
- CUTOFF Electricity, petroleum coke, at power plant: 0.0021 kWh
  Petroleum (Other Fossil) PC, SG, WO - petroleum coke
- Electricity, bituminous coal, at power plant: 0.150323 kWh
  Subbituminous Coal
- Electricity, diesel, at power plant: 0.023233 kWh
  Petroleum (DFO, JF, KER) – Distillate Fuel Oil (includes all Diesel and No. 1, No. 2, and No. 4 Fuel Oils)

## Sampling procedure
based on EIA electricity reports for all power plants in the US.

## Sources
- Chris Goemans, Athena Institute
- Statistics Canada
- unspecified
- USEPA
- Statistics Canada
- Statistics Canada
- Statistics Canada
- Statistics Canada
- USEPA
- EIA
- EIA
- EIA
- EIA
- EIA
- EIA
- EIA
- EIA
- EIA
- US DOE
- International Energy Agency
- EIA
