# Sawn lumber, softwood, rough, kiln dried, at kiln, NE-NC

Dataset: openLCA process, unit process
Category: Sawmills
Geography: RNA
Time period: 2006-01-01 to 2007-01-01
Generated by: Maureen Puetmann
Published in: Richard D. Bergman
restrictionsDescription: All information can be accessed by everybody.
copyright: false

## General comment
Important note: although most of the data in the US LCI database has
undergone some sort of review, the database as a whole has not yet
undergone a formal validation process.
Please email comments to lci@nrel.gov.

## Technology
Average technology.

## Geography
NE/NC = Northeast (NE) and Northcentral (NC) United States. Some states are however omitted: Connecticut, Delaware, Illinois, Iowa, New Jersey, and Ohio.

## Reference product
- Sawn lumber, softwood, rough, kiln dried, at kiln, NE-NC: 1 m3
  Moisture content (ovendry basis) = 16%; specific gravity = 0.39

## Inputs from technosphere
- Heat, onsite boiler, softwood mill, average, NE-NC: 1593.3 MJ
- Gasoline, combusted in equipment: 0.00601 l
  Gasoline used for on-site transportation. Represents 20% of mill use of gasoline for transport.
- Sawn lumber, softwood, rough, green, at sawmill, NE-NC: 392 kg
- Electricity, onsite boiler, softwood mill, average, NE-NC: 2.854 kWh
  Represents 25.6% of total mill consumption of electricity generated onsite.
- Diesel, combusted in industrial equipment: 0.322 l
  Diesel used for on-site transportation. Represents 20% of mill use of diesel for transport.
- Electricity, at grid, Eastern US, 2000: 16.99 kWh
  Represents 25.6% of total mill consumption of grid electricity.

## Emissions to nature
- VOC, volatile organic compounds: 0.624 kg
  Based on four major softwood species found in eastern US (eastern white pine, spruce, balsam fir, and red pine).

## Sampling procedure
Questionnaires from 6 mills member of the Northeastern Lumber Manufacturer’s Association (NeLMA). Mills of the NeLMA are assumed to be representative of the softwood industry in the NE/NC region.

## Sources
- Richard D. Bergman
- Maureen Puettmann
