# Transport, passenger truck, gasoline powered

Dataset: openLCA process, unit process
Category: Other Transit and Ground Passenger Transportation
Geography: RNA
Time period: 2010-01-01 to 2010-01-01
Generated by: Nathan Hardesty
Published in: U.S. Environmental Protection Agency (EP
restrictionsDescription: All information can be accessed by everybody.
copyright: false

## General comment
This dataset represents the U.S. average airborne emissions for operating a gasoline powered passenger truck. The inventory includes all vehicle operation processes, including off-network and refueling activities.
The refinery-to-pump transportation and distribution data are calculated from Argonne National Laboratory's GREET 1.8d.1 model.
The vehicle operation data are calculated from EPA's MOVES2010a model, using the assumptions described in the corresponding detailed spreadsheet. Emissions factors in MOVES2010a are largely based on EPA's Mobile Source Observation Database, which in turn includes data from a variety of vehicle studies (References 6-8).
MOVES2010a acknowledges sources of uncertainty in the model structure, the population and acitivty data, and other model parameters. As of July 2011, the uncertainty calculation function of the model has not been activated.

## Technology
Combustion of gasoline in a passenger truck.

## Geography
US

## Reference product
- Transport, passenger truck, gasoline powered: 1 p*km

## Inputs from technosphere
- Transport, barge, average fuel mix: 0.0147921 t*km
- Transport, pipeline, unspecified petroleum products: 0.224109 t*km
- Transport, ocean freighter, average fuel mix: 0.195204 t*km
- Transport, combination truck, average fuel mix: 0.0228318 t*km
- Gasoline, at refinery: 0.0784066 l
- Transport, train, diesel powered: 0.0426277 t*km

## Emissions to nature
- Dinitrogen monoxide: 1.22719e-5 kg
- Nitrogen oxide: 0.000487033 kg
- Nitrogen dioxide: 5.27243e-5 kg
- Particulates, < 2.5 um: 1.77035e-6 kg
  PM2.5 from brakewear.
- Nitrogen oxides: 0.000539757 kg
- Methane: 1.793e-5 kg
- Particulates, < 10 um: 6.76274e-6 kg
  PM10 from brakewear.
- Carbon monoxide, fossil: 0.0046627 kg
- Sulfur dioxide: 3.34218e-6 kg
- Particulates, < 2.5 um: 4.76085e-7 kg
  PM2.5 from tirewear.
- Ammonia: 1.33714e-5 kg
- Hydrocarbons (other than methane): 0.000376395 kg
- Particulates, < 10 um: 1.98527e-6 kg
  PM10 from tirewear.
- VOC, volatile organic compounds: 0.000383999 kg
- Carbon dioxide, fossil: 0.179701 kg
- Particulates, < 10 um: 8.28088e-6 kg
  PM10 from organic carbon, elemental carbon, and sulfate particulates.
- Particulates, < 2.5 um: 7.62515e-6 kg
  PM2.5 from organic carbon, elemental carbon, and sulfate particulates.

## Sources
- U.S. Environmental Protection Agency (EP
- National Institute of Standards and Tech
- EPA
- U.S. Alternative Fuels and Advanced Vehi
- Eastern Research Group
- Assessment and Standards Division, Offic
- Assessment and Standards Division, Offic
- Wang, M.
- Oak Ridge National Laboratory
