# Ethanol, denatured, wheat straw, biochemical

Dataset: openLCA process, unit process
Category: Ethyl alcohol manufacturing
Geography: RNA
Time period: 2009-01-01 to 2009-01-01
Generated by: Daniel Inman
Published in: Hsu, D.
restrictionsDescription: All information can be accessed by everybody.
copyright: false

## Technology
modern

## Geography
North America

## Time period
2009

## Reference product
- Ethanol, denatured, wheat straw, biochemical: 26100 kg

## Inputs from technosphere
- Enzyme, Cellulase, Novozyme Celluclast: 571 kg
  calculated based on regression fit of several aspen sensitivity runs.
- Gasoline, at refinery: 464 l
  About a 0.6% impurity content in product stream (water, CO2, alcohols)
- CUTOFF Disposal, inert waste, 5% water, to inert material landfill: 15800 kg
  gypsum waste. calculated based on regression fit of several aspen sensitivity runs.
- CUTOFF Chemicals inorganic, at plant: 1.9 kg
  cooling tower chemicals. assumed all were inorganic.
- Electricity, at grid, US, 2008: 19600 kWh
  Proxy: Electricity, medium voltage, at grid/US with US electricity U
- Sodium hydroxide, production mix, at plant: 0.333 kg
  boiler chemicals http://www.accepta.com/water_treatment_chemicals/boiler-water-treatment.asp. Proxy: Sodium hydroxide, 50% in H2O, production mix, at plant/RER with US electricity U
- Corn steep liquor: 1300 kg
- CUTOFF Chemicals organic, at plant: 24.9 kg
  waste water chemicals. assumed 50% organic.
- Wheat straw, at conversion plant, 2022: 98 t
  Tentatively assume 50/50 mix of spring and winter wheat
- CUTOFF Hydrochloric acid, 30% in H2O, at plant: 0.333 kg
  boiler chemicals http://www.accepta.com/water_treatment_chemicals/boiler-water-treatment.asp
- Quicklime, at plant: 2440 kg
  proxy: Lime, hydrated, packed, at plant/CH with US electricity U
- CUTOFF Ethanol fermentation plant: 2.97e-5 Item(s)
  plant lifetime is 20 years. only need 1 hr. 90000 tons of ethanol is about 31 Mgal/yr in ecoinvent process.
- Combustion, wet wood residue, AP-42: 616000 btu
  HHV is from GREET for corn stover. From http://www1.eere.energy.gov/biomass/docs/energy_analysis.ppt#346,8,Feedstock Potential, 37% of feed energy is in non-ethanol producing reactants.
- Phosphorous fertilizer, production mix, at plant: 163 kg
  Proxy: Diammonium phosphate, as N, at regional storehouse/RER with US electricity U
- CUTOFF Energy, output: 70560 MJ
  from electricity
- CUTOFF Sulphite, at plant: 0.333 kg
  (same comment as for CUTOFF Hydrochloric acid, 30% in H2O, at plant)
- CUTOFF Sulphuric acid, liquid, at plant: 3340 kg

## Inputs from nature
- Water, cooling, well, in ground: 180000 kg
  calculated based on regression fit of several aspen sensitivity runs.
- Oxygen, in air: 62100 kg
  calculated based on regression fit of several aspen sensitivity runs.
- Nitrogen, in air: 210000 kg
  calculated based on regression fit of several aspen sensitivity runs.
- Water, process, unspecified natural origin/kg: 6290 kg
  Water brought in with enzyme stream. calculated based on regression fit of several aspen sensitivity runs.

## Emissions to nature
- Nitrogen dioxide: 54.4 kg
- Carbon monoxide, biogenic: 54.4 kg
- Sulfur dioxide: 100 kg
- Phosphate: 149 kg
  placeholder for diammonium phosphate
- Carbon dioxide, biogenic: 82200 kg
- Organic substances, unspecified: 1400 kg
  furfural, glyceral, sccacid, csl, xylose, solslds, lgnsol, HMF, arabanose, galactose, glucoolig, cellob, xylolig, extract, protein
- Lactic acid, methyl ester: 16.2 kg
  placeholder for lactic acid
- Acetic acid: 110 kg
- Methane, biogenic: 3.84 kg
- Nitrogen: 211000 kg
- Oxygen: 16200 kg
- Sulfuric acid: 1.55 kg
- Water: 215000 kg

## Sources
- Hsu, D.
- Hess, J.
