# Polyethylene terephthalate, resin, at plant

Dataset: openLCA process, unit process
Category: Petrochemical Manufacturing
Geography: RNA
Time period: 2001-01-01 to 2004-01-01
Generated by: Franklin Associates
Published in: THE PLASTICS DIVISION OF THE AMERICAN C
restrictionsDescription: All information can be accessed by everybody.
copyright: false

## General comment
The two PET technologies were weighted accordingly at 15 percent PET from DMT and 85 percent PET from PTA. Scrap and heat are produced as coproducts during this process. A mass basis was used to partition the credit for scrap, while the energy amount for the steam was reported separately as recovered energy. Methanol is produced also a coproduct of PET production from DMT. This coproduct is sent to the DMT production facilities. Due to the boundaries for this table, the recycled methanol amount is not included in the methanol raw materials. Mass imbalance is due to unavailability of the weight of water inputs to production. Complete inventory data and metadata are available in full in the final report and appendices, Cradle-to-Gate Life Cycle Inventory of Nine Plastic Resins and Four Polyurethane Precursors. This report has been extensively reviewed within Franklin Associates and has undergone partial critical review by ACC Plastics Division members and is available at: www.americanchemistry.com. Quantities may vary slightly between the reference to main source and and this module due to rounding. Important note: although most of the data in the US LCI database has undergone some sort of review, the database as a whole has not yet undergone a formal validation process. Please email comments to lci@nrel.gov.

## Technology
Melt phase and the solid state polymerization from both PTA and DMT

## Geography
US

## Reference product
- Polyethylene terephthalate, resin, at plant: 1 kg
  The data for production of this product includes an aggregation of crude terephthalic acid (TPA), purified TPA (PTA), dimethyl terephthalate (DMT), PET melt phase polymerization, and PET solid phase polymerization. The mass imbalance is due to the unavailability of the weight of water inputs to production.

## By-products
- Recovered energy: 0.142233 MJ
  Credit for steam or heat co-product sold externally.

## Inputs from technosphere
- Bituminous coal, combusted in industrial boiler: 0.0189 kg
- Diesel, combusted in industrial equipment: 0.0127663 l
  Includes diesel fuel and distillate oil amounts.
- Transport, pipeline, natural gas: 8.75817e-5 t*km
- Residual fuel oil, combusted in industrial boiler: 0.0267842 l
- CUTOFF Disposal, solid waste, unspecified, to municipal incineration: 0.00031 kg
- CUTOFF Ethylene glycol, at plant: 0.322 kg
  The energy and emissions data for ethylene glycol production is from a confidential source and is not shown to protect its confidentiality
- Transport, barge, residual fuel oil powered: 0.00217708 t*km
  Values for barge transport are calculated based on average fuel consumption rates as reported in Transportation Energy Data Book: Edition 22 from Oak Ridge National Laboratory, September 2002: 22% of barges use diesel fuel in their engines, 78% use residual oil to generate steam for steam turbines, and a barge that consumes residual oil consumes 3.4 gallons per 1,000 ton-miles
- Transport, barge, diesel powered: 0.000654761 t*km
  (same comment as for Transport, barge, residual fuel oil powered)
- Acetic acid, at plant: 0.0372 kg
- CUTOFF Disposal, solid waste, unspecified, to waste-to-energy: 0.00059 kg
- Electricity, at grid, US, 2008: 0.55776 kWh
- Natural gas, combusted in industrial boiler: 0.0980728 m3
- Paraxylene, at plant: 0.521 kg
- Electricity, at cogen, for natural gas turbine: 0.0511464 kWh
- Methanol, at plant: 0.0352 kg
- CUTOFF Disposal, solid waste, unspecified, to sanitary landfill: 0.00419 kg
- Transport, train, diesel powered: 1.61293 t*km

## Inputs from nature
- Water, process, unspecified natural origin/m3: 0.000243783 m3
  Consumptive use includes: water incorporated into the product, water evaporated during the process, and/or water used and released to a body other than that from which it was drawn.

## Emissions to nature
- Carbon dioxide, fossil: 0.0724 kg
- COD, Chemical Oxygen Demand: 0.00076 kg
- Antimony: 9.7e-10 kg
- Carbon monoxide: 0.00568 kg
- Iron: 9.7e-10 kg
- Bromine: 7.9e-5 kg
- Zinc: 5.5e-6 kg
- Suspended solids, unspecified: 5.4e-5 kg
- Methyl acetate: 4e-5 kg
- BOD5, Biological Oxygen Demand: 0.0003 kg
- Aluminum: 9.7e-10 kg
- Ammonia: 0.00011 kg
- Ammonium ion: 1.3e-6 kg
- Dissolved solids: 3e-5 kg
- Particulates, unspecified: 0.00015 kg
- Nitrogen oxides: 5.2e-5 kg
- Phosphates: 5.1e-7 kg
- Methane: 0.00016 kg
- NMVOC, non-methane volatile organic compounds, unspecified: 0.00028 kg
- TOC, Total Organic Carbon: 4.4e-5 kg
- Acetic acid: 5.1e-5 kg
- Organic substances, unspecified: 0.00094 kg
- Metallic ions, unspecified: 4.5e-9 kg
- Xylene: 4.1e-5 kg
- Aldehydes: 9.4e-5 kg
- Phenol compounds, unspecified: 3.6e-9 kg

## Sampling procedure
Data are from primary sources.

## Sources
- THE PLASTICS DIVISION OF THE AMERICAN C
