# Transport, train, diesel powered

Dataset: openLCA process, unit process
Category: Rail Transportation
Geography: RNA
Time period: 2001-01-01 to 2001-01-01
Generated by: Franklin Associates
Published in: Franklin Associates
restrictionsDescription: All information can be accessed by everybody.
copyright: false

## General comment
Important note: although most of the data in the US LCI database has
undergone some sort of review, the database as a whole has not yet
undergone a formal validation process.
Please email comments to lci@nrel.gov.

## Technology
Combustion of diesel in a locomotive.

## Geography
United States

## Reference product
- Transport, train, diesel powered: 1 t*km

## Inputs from technosphere
- Diesel, at refinery: 0.006482 l

## Emissions to nature
- Methane, fossil: 9.0485e-7 kg
- Nitrogen oxides: 0.00049859 kg
- Particulates, < 10 um: 1.2372e-5 kg
- NMVOC, non-methane volatile organic compounds, unspecified: 1.8466e-5 kg
- Sulfur oxides: 4.1881e-6 kg
- Dinitrogen monoxide: 4.7458e-7 kg
- Carbon monoxide, fossil: 4.912e-5 kg
- Carbon dioxide, fossil: 0.018949 kg

## Sources
- Center for Transportation Research, Argo
- unspecified
- Franklin Associates
- Association of American Railroads
