# Polyol ether, for rigid foam polyurethane production, at plant

Dataset: openLCA process, unit process
Category: Petrochemical Manufacturing
Geography: RNA
Time period: 2003-01-01 to 2003-01-01
Generated by: Franklin Associates
Published in: THE PLASTICS DIVISION OF THE AMERICAN C
restrictionsDescription: All information can be accessed by everybody.
copyright: false

## General comment
Heat was a coproduct for one producer of polyether polyol for use in rigid foam polyurethane. The energy for exported heat was reported separately as recovered energy. Mass imbalance is due to the inclusion of total sugar beets used from harvest; no outputs are shown for land-applied wastes or animal feed from sugar beet processing to sucrose. Complete inventory data and metadata are available in full in the final report and appendices, Cradle-to-Gate Life Cycle Inventory of Nine Plastic Resins and Four Polyurethane Precursors. This report has been extensively reviewed within Franklin Associates and has undergone partial critical review by ACC Plastics Division members and is available at: www.americanchemistry.com. Quantities may vary slightly between the reference to main source and and this module due to rounding. Important note: although most of the data in the US LCI database has undergone some sort of review, the database as a whole has not yet undergone a formal validation process. Please email comments to lci@nrel.gov.

## Technology
Reaction of sucrose initiator with hydroxide catalyst and propylene oxide, followed by separation and purification by distillation

## Geography
US

## Reference product
- Polyol ether, for rigid foam polyurethane production, at plant: 1 kg
  This data module includes cradle-to-gate inventory data for sucrose production from sugar beets. The mass imbalance is due to the inclusion of total sugar beets used from harvest; no outputs are shown for land-applied wastes or animal feed from sugar beet processing to sucrose.

## By-products
- Recovered energy: 0.23132 MJ
  Credit for steam or heat co-product sold externally.

## Inputs from technosphere
- Electricity, at grid, US, 2008: 0.106481 kWh
- Gasoline, combusted in equipment: 0.0253658 l
- Limestone, at mine: 0.0725 kg
- Bituminous coal, combusted in industrial boiler: 0.0544 kg
- Transport, pipeline, unspecified petroleum products: 0.00122284 t*km
  Transport is specific to propylene oxide delivered to producers of polyether polyol for rigid foam PUR
- Transport, train, diesel powered: 0.0333073 t*km
  Transportation energy includes that for transporting the sugar beets to the sucrose plant and the sucrose to the polyols plant.
- Propylene oxide, at plant: 0.76 kg
- Transport, barge, residual fuel oil powered: 0.0023317 t*km
  Values for barge transport are calculated based on average fuel consumption rates as reported in Transportation Energy Data Book: Edition 22 from Oak Ridge National Laboratory, September 2002: 22% of barges use diesel fuel in their engines, 78% use residual oil to generate steam for steam turbines, and a barge that consumes residual oil consumes 3.4 gallons per 1,000 ton-miles
- CUTOFF Disposal, solid waste, unspecified, to sanitary landfill: 6.4e-5 kg
- Transport, barge, diesel powered: 0.000701264 t*km
  (same comment as for Transport, barge, residual fuel oil powered)
- Natural gas, combusted in industrial boiler: 0.0678581 m3
- Diesel, combusted in industrial equipment: 0.0151861 l
  Includes diesel fuel and distillate oil amounts.
- CUTOFF Potassium hydroxide, production mix, at plant, for polyol foams: 0.013 kg
  Data for the production of sodium hydroxide are used as a surrogate for the production of the potassium hydroxide required for the resin.
- Transport, combination truck, diesel powered: 0.257114 t*km
  Transport is specific to propylene oxide delivered to producers of polyether polyol for rigid foam PUR. It also represents transporting the sugar beets to the sucrose plant and the sucrose to the polyols plant.
- Electricity, at cogen, for natural gas turbine: 0.133598 kWh

## Inputs from nature
- Sugar beets, in ground: 1.215 kg
  Mass imbalance is due to the inclusion of total sugar beets used from harvest; no outputs are shown for land-applied wastes or animal feed from sugar beet processing to sucrose.

## Emissions to nature
- BOD5, Biological Oxygen Demand: 0.00089 kg
- Suspended solids, unspecified: 1e-7 kg
  This emission was reported by fewer than three companies. To indicate known emissions while protecting the confidentiality of individual company responses, the emission is reported only by order of magnitude.
- Nitrogen: 0.00091 kg
- Particulates, < 2.5 um: 1e-5 kg
  (same comment as for Suspended solids, unspecified)
- Chlorine: 1e-7 kg
  (same comment as for Suspended solids, unspecified)
- Carbon dioxide, fossil: 0.01682 kg
- Carbon monoxide: 0.00013 kg
- Organic substances, unspecified: 0.00011 kg
- Sulfur oxides: 9.9e-7 kg
- Particulates, unspecified: 0.00025 kg
- COD, Chemical Oxygen Demand: 0.001 kg
  (same comment as for Suspended solids, unspecified)
- Nitrogen oxides: 0.00042 kg
- Particulates, > 2.5 um, and < 10um: 3.3e-5 kg

## Sampling procedure
Data are from primary sources.

## Sources
- THE PLASTICS DIVISION OF THE AMERICAN C
