# Corrugated product, containerboard, average production, at mill, 2010

Dataset: openLCA process, unit process
Category: Pulp, Paper, and Paperboard Mills
Geography: US
Time period: 2010-01-01 to 2010-01-01
Generated by: Caroline Gaudreault
Reviewer: Jamie Meil
Published in: Corrugated Packaging Alliance (CPA)
restrictionsDescription: All information can be accessed by everybody.
copyright: false

## General comment
Corrugated product, containerboard (linerboard and corrugating medium), average U.S. production, at mill. All flows are production-weighted means. Data were developed for a full LCA that was critically reviewed. Reviewers were: Mr. Jamie Meil, Athena Institute - review panel Chairman; Ms. Lindita Bushi, Athena Institute; Ms Melissa Hamilton, Earthshift.

The unit process includes sheet feeder plants, sheet plants and corrugator plants. Net purchased energy is included, but upstream flows associated with its generation are excluded. Flows associated with transportation of inputs from the technosphere are included. Product transportation is excluded.

## Technology
current technology mix for containerboard

## Time period
Primary data collected from participating companies and associations for their operational activities are representative for 2010.

## Reference product
- Corrugated product, containerboard, average production, at mill, 2010: 1 kg

## Inputs from technosphere
- Electricity, at grid, US, 2000: 0.47585 MJ
- Liquefied petroleum gas, at refinery: 0.00066781 gal
  0.064510089 MJ HHV @ 96.6 MJ HHV/gal
- CUTOFF Adhesives and binders, at plant: 0.0012391 kg
- Gasoline, at refinery: 1.05e-7 m3
- CUTOFF Coating powder, at plant: 6.65e-5 kg
  i.e. Coating powder, at plant
- Slack wax, at plant, US SE: 0.0023232 kg
  for wax
- Sodium hydroxide, production mix, at plant: 0.00055015 kg
- Diesel, at refinery: 0.0012418 l
  for distillate fuel oil, 0.189997716 MJ HHV @ 153 MJ HHV/gal
- Residual fuel oil, at refinery: 0.00016453 l
  0.026007669 MJ HHV @ 158 MJ HHV/gal
- CUTOFF Unspecified inks: 0.001475 kg
- CUTOFF Wastewater treatment, converting, to external: 0.20725 kg
- CUTOFF Borax, anhydrous, powder, at plant: 0.00027517 kg
  i.e. Borax, anhydrous, powder, at plant
- Transport, ocean freighter, diesel powered: 0.0014632 t*km
  Chemicals: 2.5% of total mass travel 2020 km
- CUTOFF Purchased steam mix: 0.019208 MJ
- CUTOFF Aluminium chloride: 1.17e-6 kg
- Natural gas, processed, at plant: 1.0486 cu ft
  1.141163234 MJ HHV @ 1088 MJ HHV/1000 ft
- CUTOFF Glue, at plant: 0.00056974 kg
- CUTOFF Disposal, other waste, to unspecified disposal: 0.0059479 kg
- Transport, train, diesel powered: 0.078051 t*km
  Chemicals: 31.3% of total mass travels 1355 km. Residuals to management: 11.0% of total mass travels 589 km. Containerboard to converting and corrugated sheets: 21.4% of total mass travels 1347 km.
- Transport, barge, diesel powered: 0.00072824 t*km
  Chemicals: 6.8% of total mass travels 336 km. Residuals to management : 1.2% of total mass travels 824 km
- CUTOFF Maize starch, at plant: 0.02092 kg
  i.e. : Maize starch, at plant
- Bituminous coal, at mine: 1.1591e-8 kg
  3.48E-07 MJ HHV @ 30 MJ HHV/kg
- Transport, combination truck, diesel powered: 0.14523 t*km
  Chemicals: 59.5% of total mass travels 208km. Residuals to management: 87.8% of total mass travels 201km. Containerbaord to converting and corrugated sheets: 78.6% of total mass travels 267 km.
- CUTOFF Disposal, unspecified waste from converting, to burning: 4.8e-12 kg
- CUTOFF Converting losses to recycling: 0.13205 kg
- CUTOFF Disposal, unspecified waste from converting, to landfill: 1.68e-11 kg
- Containerboard, average production, at mill: 1.1052 kg
  or 100% recycled containerboard (2010)

## Inputs from nature
- Water, river: 0.00042454 m3

## Emissions to nature
- Cobalt: 4.9e-10 kg
- Ethane, 1,2-dibromo-: 6.96e-18 kg
- Chloride: 5.35e-12 kg
- Arsenic: 1.94e-10 kg
- Hydrogen chloride: 5.23e-8 kg
- VOC, volatile organic compounds: 1.62e-12 kg
- BOD5, Biological Oxygen Demand: 1.04e-5 kg
- Water: 0.20657 kg
- Hydrogen fluoride: 6.07e-13 kg
- Sulfur oxides: 2.07e-6 kg
- Radioactive species, unspecified: 0.16367 Bq
- Phthalate, dioctyl-: 4.23e-16 kg
- Selenium: 6.25e-11 kg
- Chrysene: 7.07e-19 kg
- Methane, monochloro-, R-40: 3.07e-15 kg
- Dinitrogen monoxide: 3.12e-7 kg
- Naphthalene: 7.54e-17 kg
- Chromium: 7.29e-10 kg
- Antimony: 1.04e-16 kg
- Acetophenone: 8.7e-17 kg
- Benzofluoranthene: 6.38e-19 kg
- Methyl ethyl ketone: 2.26e-15 kg
- 2-Chloroacetophenone: 4.06e-17 kg
- Copper: 2.68e-11 kg
- Cadmium: 5.53e-10 kg
- Beryllium: 7.79e-12 kg
- Benzo(g,h,i)perylene: 1.57e-19 kg
- Cyanide: 1.45e-14 kg
- Methane: 1.31e-6 kg
- Manganese: 4.05e-10 kg
- Mercaptans, unspecified: 1.26e-12 kg
- Lead II: 3.51e-10 kg
- Toluene, chloro-: 4.06e-15 kg
- Carbon disulfide: 7.54e-16 kg
- Carbon dioxide: 0.064818 kg
- Nitrogen oxides: 5.35e-5 kg
- Vinyl acetate: 4.41e-17 kg
- Isophorone: 3.36e-15 kg
- Benzene, ethyl-: 5.45e-16 kg
- NMVOC, non-methane volatile organic compounds, unspecified origin: 3.85e-5 kg
- Biphenyl: 9.86e-18 kg
- Fluorene: 5.28e-18 kg
- Iron: 2.68e-11 kg
- Phenanthrene: 1.57e-17 kg
- Methyl methacrylate: 1.16e-16 kg
- Chloroform: 3.42e-16 kg
- Mercury II: 1.32e-10 kg
- Oils, unspecified: 4.01e-10 kg
- Bromoform: 2.26e-16 kg
- Hydrazine: 9.86e-16 kg
- Nickel: 7.31e-9 kg
- Ethane, dichloro-: 2.32e-16 kg
- Ethene, chloro-: 2.44e-16 kg
- Fluoride: 2.59e-13 kg
- Particulates, unspecified: 4.11e-5 kg
- Pyrene: 1.91e-18 kg
- Indeno(1,2,3-cd)pyrene: 3.54e-19 kg
- Carbon monoxide: 5.57e-5 kg
- Dioxin, 2,3,7,8 Tetrachlorodibenzo-p-: 1.12e-15 kg
- Chromium VI: 4.58e-16 kg
- Methane, bromo-, Halon 1001: 9.28e-16 kg
- Toluene, 2,4-dinitro-: 1.62e-18 kg
- Ethene, tetrachloro-: 5.23e-12 kg
- Anthracene: 1.22e-18 kg
- Sulfuric acid, dimethyl ester: 2.78e-16 kg
- Benzo(a)pyrene: 2.2e-19 kg
- Benzo(a)anthracene: 4.64e-19 kg
- t-Butyl methyl ether: 2.03e-16 kg
- Suspended solids, unspecified: 1.46e-5 kg
- Fluoranthene: 4.12e-18 kg
- Ethane, 1,1,1-trichloro-, HCFC-140: 1.16e-16 kg
- PAH, polycyclic aromatic hydrocarbons: 2.64e-10 kg
- Waste water/m3: 1.6198e-5 m3
- Organic substances, unspecified: 3.51e-14 kg
- Magnesium: 6.38e-14 kg
- Benzene, chloro-: 1.28e-16 kg
- Methane, dichloro-, HCC-30: 3.6e-10 kg

## Sampling procedure
The survey included results from 173 corrugated converting plants representing 7.0 million short tons per year, nearly 28% of production volume. These plants included a representative sample of corrugating plants, sheet feeders and sheet plants manufacturing a wide variety of corrugated products.

## Sources
- Corrugated Packaging Alliance (CPA)
