# Composite wood I-joist processing, at plant, US SE

Dataset: openLCA process, unit process
Category: Engineered Wood Member (ex. Truss) Manufacturing
Geography: RNA
Time period: 2000-01-01 to 2000-01-01
Generated by: Jamie Meil
Published in: Dr. Jim Wilson
restrictionsDescription: All information can be accessed by everybody.
copyright: true

## General comment
Base process data presented with allocations to within process co-products noted. Refer to allocation worksheet for specifics. All allocations performed using mass or volume. To take profile back to cradle the user must add LCI profile information for SE LVL and SE OSB US LCI database modules. Cradle-to-gate resin adhesive LCI data provided in profile for easy reference., this is a weighted average profile for all I-joist dimensions produced in the two plants
Important note: although most of the data in the US LCI database has
undergone some sort of review, the database as a whole has not yet
undergone a formal validation process.
Please email comments to lci@nrel.gov.

## Technology
Typical

## Geography
US Southeast

## Reference product
- Composite wood I-joist, at plant, US SE: 1 kg

## By-products
- Sawdust from I-Joist processing, at plant, US SE: 0.0751 kg

## Inputs from technosphere
- Liquefied petroleum gas, combusted in industrial boiler: 0.00122 l
- Transport, combination truck, average fuel mix: 0.48 t*km
- Transport, combination truck, average fuel mix: 0.000628 t*km
  Transport of phenol formaldehyde
- Laminated veneer lumber, at plant, US SE: 0.617 kg
- Oriented strand board product, US SE: 0.458 kg
- Natural gas, combusted in industrial boiler: 0.00151 m3
- Phenol formaldehyde, at plant: 0.00117 kg
- Methylene diphenyl diisocyanate resin, at plant, US SE: 0.002 kg
- Diesel, combusted in industrial boiler: 0.000929 l
- Electricity, at grid, Eastern US, 2000: 0.0636 kWh

## Inputs from nature
- Water: 0.177 l

## Emissions to nature
- Methanol: 6.53e-6 kg
- Formaldehyde: 6.91e-8 kg
- Particulates, unspecified: 1.08e-5 kg
- Acetone: 5.38e-8 kg

## Sources
- Dr. Jim Wilson
