# Wood, particleboard, generated on-site, combusted in industrial boiler

Dataset: openLCA process, unit process
Category: Steam and Air-Conditioning Supply
Geography: RNA
Time period: 1995-01-01 to 1999-01-01
Generated by: Maureen Puettmann
Published in: Franklin Associates
restrictionsDescription: All information can be accessed by everybody.
copyright: false

## General comment
Important note: although most of the data in the US LCI database has
undergone some sort of review, the database as a whole has not yet
undergone a formal validation process.
Please email comments to lci@nrel.gov.

## Technology
This process is a copy of the FAL "Wood into industrial boilers" for which (1) the wood input was changed to fuel wood generated at NE-NC sawmills; (2) wood weight is expressed on oven dry basis; and (3) waste flow is changed to waste treatment input.

## Geography
US

## Reference product
- Wood, particleboard, generated onsite, combusted in industrial boiler: 1 kg
  Weight reported on an ovendry basis. Assumes the actual moisture content is 100% ovendry basis. This assumption is very uncertain.

## Inputs from technosphere
- Wood fuel, hogfuel, particleboard mill: 0.0741 kg
  Weight reported on an ovendry basis.
- CUTOFF Disposal, solid waste, unspecified, to unspecified treatment: 0.09 kg
- Wood fuel, sanderdust, particleboard mill: 0.9259 kg
  Weight reported on an ovendry basis.

## Emissions to nature
- Formaldehyde: 6.6e-6 kg
- Potassium: 0.00078 kg
- Nickel: 5.6e-7 kg
- Sodium: 1.8e-5 kg
- Naphthalene: 2.4e-6 kg
- Barium: 4.4e-6 kg
- Zinc: 4.4e-6 kg
- Arsenic: 8.8e-8 kg
- Chlorine: 7.8e-6 kg
- Lead: 1.2e-6 kg
- Phenol: 4e-5 kg
- Organic substances, unspecified: 0.000166 kg
- Particulates, < 10 um: 0.00017 kg
- Acetaldehyde: 3e-6 kg
- Carbon dioxide, biogenic: 2.1 kg
- Nitrogen oxides: 0.0015 kg
- Chromium: 4.6e-8 kg
- Manganese: 9e-6 kg
- Sulfur oxides: 7.6e-5 kg
- Benzene: 3.6e-6 kg
- Iron: 4.4e-6 kg
- Carbon monoxide: 0.0136 kg

## Sources
- Franklin Associates
- U.S. EPA
- Combustion Engineering Inc.
- Kaminski, Paul
- Argonne National Laboratory
- Sassenrath, Charles P
- U.S. DoE
- Maureen Puettmann
