# Coal mine equipment assembly; Production mix, underground mine

Dataset: openLCA process, unit process
Category: Bit. Coal and Lignite Surface Mining
Geography: US
Time period: 2005-12-31 to 2006-12-30
Generated by: Timothy Skone
Owner: National Energy Technology Laboratory
Reviewer: Robert James
Published in: National Energy Technology Laboratory (NETL). 2010. Coal mine equipment assembly; Production mix, underground mine
restrictionsDescription: Use of this dataset is not restricted, but a statement of attribution is required. Please use the following attribution statement:
National Energy Technology Laboratory's (NETL) Unit Process Library
626 Cochrans Mill Road, P.O. Box 10940
Pittsburgh, PA 15236-0940
http://www.netl.doe.gov/research/energy-analysis/life-cycle-analysis/unit-process-library
Neither the U.S. Department of Energy (DOE) National Energy Technology Laboratory (NETL) nor any person acting on behalf of these organizations:
A. Makes any warranty or representation, express or implied, with respect to the accuracy, completeness, or usefulness of the information contained in this document, or that the use of any information, apparatus, method, or process disclosed in this document may not infringe on privately owned rights; or
B. Assumes any liability with this report as to its use, or damages resulting from the use of any information, apparatus, method, or process disclosed in this document.
Reference herein to any specific commercial product, process, or service by trade name, trademark, manufacturer, or otherwise, does not necessarily constitute or imply its endorsement, recommendation, or favoring by NETL. The views and opinions of the authors expressed herein do not necessarily state or reflect those of NETL.
copyright: true

## General comment
This process is part of the NETL Unit Process Library. To access the library and the original dataset:
1) Navigate to the NETL LCA home page (http://www.netl.doe.gov/lca)
2) Then navigate to the “Unit Process Library”
3) From the library, the unit process of interest can be found either through the "Complete Listing of the Unit Process Library link" or through the link to the "Unit Process Database" spreadsheet
4) For each process, a Data Sheet (DS) and Data File (DF) are available

BRIEF DESCRIPTION
The parameterized system process calculates the number of each piece of equipment included in an underground, Illinois No. 6 bituminous coal mine. Includes life expectancy and replacement rates for longwall mining system, continuous miner, conveyor system, and shuttle car.

GOAL AND SCOPE
The scope of this unit process covers the elements required for the construction of a single underground coal mine used to extract Illinois No. 6 bituminous coal under LC Stage #1. Once the coal has been conveyed to the surface, it will be crushed and cleaned, then loaded into railcars for transport (LC Stage #2) to the power plant (LC Stage #3) over the 30-year study period, as described below and in the associated documentation (referenced in the Citation and Associated Documentation section below). Input flows for the underground coal mine construction include longwall mining systems, continuous miners, shuttle cars, and a conveyor system. This unit process estimates the number of each type of equipment included in the underground coal mine, and calculates the fraction of each type of equipment needed as inputs to extract 1 kg of Illinois No. 6 bituminous coal, based on the parameters included in this dataset and in the associated documentation (referenced below).

Construction data, including the mass of raw materials required to construct a single longwall mining system, continuous miner, shuttle car, and conveyor system are calculated in separate unit processes. Therefore, the following unit processes are considered to be embedded in this system process:
- Longwall miner system; Manufacture; At underground coal mine, U.S.
- Continuous coal miner; Manufacture; At underground mine, U.S.; 563 kW
- Coal conveyor system; Manufacture; At point-of-sale, for underground mine, U.S.; 1.22 m belt width
- Coal shuttle car; Manufacture; At point-of-sale, U.S.

For a discussion of environmental emissions associated with the manufacture of raw materials used in the construction of these components, as well as other pertinent information, please refer to these separate unit processes.

BOUNDARY AND DESCRIPTION
A visual representation of the boundary of this unit process is available in the associated documentation (referenced in the Citation and Associated Documentation section below). Specifications for the number of longwall mining systems and continuous miners at the underground coal mine were taken from the Illinois Department of Natural Resources’ 2006 Annual Statistical Report (Illinois Department of Natural Resources 2006). These values are from the Galatia mine in southern Illinois, a representative underground mine extracting Illinois No. 6 bituminous coal. This source indicated a total of three longwall mining units and nine continuous miners in use at this mine, and these values were used for this unit process. In an e-mail communication, the expected lifetime of longwall system components was given as 10–15 years (Bruniany 2008). The average of these values (12.5 years) was assumed for the life expectancy of both the longwall mining system and the continuous miner. The lifetime of the plant (30 years) was divided by the life expectancy of the longwall system and continuous miner for a replacement rate of 2.4 for both the longwall system and continuous miner over the lifetime of the plant.

It was assumed that the conveyor system construction unit process was modeled so that a single conveyor system would be adequate to carry as much coal to the surface as required. The conveyor belt has an expected lifetime of 20 years (Goodyear 2008b), and it was assumed that the same lifetime would apply to the conveyor system as a whole. Dividing the plant lifetime by the conveyor lifetime resulted in a replacement rate of 1.5 conveyor systems over the study period.

To determine the number of shuttle cars required in the underground coal mine, it was assumed that there was a 2-to-1 ratio between the continuous miners and the shuttle cars, so that there would be 18 shuttle cars. Each shuttle car has an expected lifetime of 12 years (Australian Tax Office 2008). This lifetime results in a replacement rate of 2.5 shuttle cars over the 30-year lifetime of the plant.

To determine the portion of each piece of equipment constructed per kg of coal, a coal feedrate value was taken from a previous NETL study (NETL 2009). The coal feedrate is included as an adjustable parameter that indicates the total amount of coal required by the plant in LC Stage #3, in metric tonnes per day. The default value for this parameter is 21,719 tonnes/day, taken from the table shown in Figure 2 under Case #1 (NETL 2009). This variable can be adjusted as needed to reflect assumptions regarding the amount of coal required.

To determine the fraction of a single piece of each type of equipment required over the lifetime of the plant to produce 1 kg of Illinois No. 6 bituminous coal, the coal feedrate (tonnes/day) was converted to kg/year, then multiplied by the plant lifetime (30 years) to get the kilograms of coal produced over the entire study period. Finally, the number of each type of equipment was multiplied by the replacement rate of that equipment, and then divided by the total amount of coal required over the study period.

The associated documentation (referenced in the Citation and Associated Documentation section below) contains additional information on: relevant properties of a single underground coal mine; modeled input and output flows; calculation methods; and other relevant information.

CITATION AND ASSOCIATED DOCUMENTATION
This document should be cited as:
National Energy Technology Laboratory (NETL). 2015. NETL Life Cycle Inventory Data – Unit Process: Coal mine equipment assembly; Production mix, underground mine. U.S. Department of Energy, National Energy Technology Laboratory. Last Updated: September 2015 (version 01). Retrieved on [DATE] from [URL for this dataset].

This dataset is part of the NETL Unit Process Library. The Library offers additional information concerning this dataset in the form of a Detailed Spreadsheet Documentation (DS) file and a Process Documentation File (DF). The DS file is an Excel file that contains all of the parameters, inputs, and outputs for a given system as well as background data, calculations and quality scores. The DF file is a PDF document that contains major assumptions and data sources that are the basis for each unit process. The NETL Unit Process Library is located on the NETL website (netl.doe.gov) under Research / Energy Analysis / Energy Trends and Issues / Life Cycle Analysis / Unit Process Library.

This dataset was converted directly from the DS with additional supporting information provided by the DF. Full citations for the DS and DF are given below.

DS File
National Energy Technology Laboratory (NETL). 2010. NETL Life Cycle Inventory Data – Unit Process: Illinois No. 6 Underground Coal Mine Assembly, Construction. U.S. Department of Energy, National Energy Technology Laboratory. Last Updated: January 2010 (version 01). Retrieved on 6/30/2014 from: http://www.netl.doe.gov/File%20Library/Research/Energy%20Analysis/Life%20Cycle%20Analysis/UP_Library/DS_Stage1_C_Assembly_I6_Coal_Underground_Mine_2010-02.xls

DF File
National Energy Technology Laboratory (NETL). 2010. NETL Life Cycle Inventory Data – Unit Process: Illinois No. 6 Underground Coal Mine Assembly, Construction. U.S. Department of Energy, National Energy Technology Laboratory. Last Updated: February 2010 (version 01). Retrieved on 6/30/2014 from: http://www.netl.doe.gov/File%20Library/Research/Energy%20Analysis/Life%20Cycle%20Analysis/UP_Library/DF_Stage1_C_Assembly_I6_Coal_Underground_Mine_2010-02.pdf

## Technology
The scope of this unit process covers the elements required for the construction of a single underground coal mine used to extract Illinois No. 6 bituminous coal under LC Stage #1. Once the coal has been conveyed to the surface, it will be crushed and cleaned, then loaded into railcars for transport (LC Stage #2) to the power plant (LC Stage #3) over the 30-year study period, as described below and in the associated documentation (referenced in the Citation and Associated Documentation section in the Description field). Input flows for the underground coal mine construction include longwall mining systems, continuous miners, shuttle cars, and a conveyor system.

The following unit processes are considered to be embedded in this system process:
- DF_Stage1_C_Assembly_Longwall_Mining_System_2010.01.doc
- DF_Stage1_C_Continuous_Miner_755_HP_2010.01.doc
- DF_Stage1_C_Conveyor_System_48_Inch_2010.01.doc
- DF_Stage1_C_Shuttle_Car_95_Horsepower_2010.01.doc.

A visual representation of the boundary of this unit process is available in the associated documentation (referenced in the Citation and Associated Documentation section in the Description field). Specifications for the number of longwall mining systems and continuous miners at the underground coal mine were taken from the Illinois Department of Natural Resources’ 2006 Annual Statistical Report (Illinois Department of Natural Resources 2006). These values are from the Galatia mine in southern Illinois, a representative underground mine extracting Illinois No. 6 bituminous coal. This source indicated a total of three longwall mining units and nine continuous miners in use at this mine, and these values were used for this unit process. In an e-mail communication, the expected lifetime of longwall system components was given as 10–15 years (Bruniany 2008).

The conveyor system construction unit process was modeled so that a single conveyor system would be adequate to carry as much coal to the surface as required. The conveyor belt has an expected lifetime of 20 years (Goodyear 2008), and it was assumed that the same lifetime would apply to the conveyor system as a whole. It was assumed that there was a 2-to-1 ratio between the continuous miners and the shuttle cars, so that there would be 18 shuttle cars. Each shuttle car has an expected lifetime of 12 years (Australian Tax Office 2008). The coal feedrate is included as an adjustable parameter that indicates the total amount of coal required by the plant in LC Stage #3, in metric tonnes per day. The default value for this parameter is 21,719 tonnes/day, taken from the table shown in Figure 2 under Case #1 (NETL 2009). This variable can be adjusted as needed to reflect assumptions regarding the amount of coal required.

The associated documentation (referenced in the Citation and Associated Documentation section below) contains additional information regarding the technological assumptions for this system process.

## Time period
This data set is representative of best available public data from 01/01/2006 to 12/31/2006 and is not subject to limited usability within sub-time spans (e.g. summer, winter).

## Reference product
- Coal mine equipment assembly; Production mix, underground mine: 1 Item(s); data quality (3,2,3,3,3)

## Inputs from technosphere
All rows: data quality (3,2,3,3,3)
- Coal mine site construction; Concrete structures and asphalt paving; Underground mine: 5.08906e-12 Item(s)
- Continuous coal miner; Manufacture; At underground mine; 563 kW: 1.09924e-10 Item(s)
- Longwall mining system; Equipment assembly; Production mix, at underground coal mine: 3.66412e-11 Item(s)
- Coal shuttle car; Manufacture; For underground mine, at plant; 28.6 metric tonnes: 2.29008e-10 Item(s)
- Coal conveyor system; Manufacture; For underground mine, at point-of-sale; 1.22 m belt width: 7.63359e-12 Item(s)

## Inventory method
Attributional

## Modelling constants
All elementary and technosphere flows are calculated on a functional unit basis. Calculations involving combustion primarily to generate useful work are done using lower heating values (LHV) and calculations involving combustion primarily to generate useful heat are done using higher heating values (HHV). Unless explicitly stated in the associated reference documents applicable calculations assumed standard atmospheric temperature and pressure (SATP).

## Completeness
Individual relevant flows captured

## Data selection
Best publically available data

## Data treatment
No allocation applied

## Data collection
No primary data collected

## Intended application
This is a gate-to-gate basic process and can be used for any type of LCA study.

## Project
National Energy Technology Laboratory (NETL) Unit Process Library

## Sources
- Australian Tax Office. 2008. Taxation Ruling: TR 2008/4
- Illinois Department of Natural Resources. 2006. Annual Statistical Report, 2006
- Goodyear Engineered Products. 2008b. Flexsteel Conveyor Belt
- Bruniany, C. 2008. E-mail Interview
- National Energy Technology Laboratory (NETL). 2010. Coal mine equipment assembly; Production mix, underground mine
- National Energy Technology Laboratory (NETL). 2009. Affordable, Low-Cost Diesel Fuel from Domestic Coal and Biomass. DOE/NETL-2009/1349
