# Electricity, at eGrid, NYUP, 2008

Dataset: openLCA process, unit process
Category: Utilities
Geography: RNA
Time period: 2008-01-01 to 2008-01-01
Generated by: Alberta Carpenter
Published in: Chris Goemans, Athena Institute
restrictionsDescription: All information can be accessed by everybody.
copyright: false

## General comment
The methodology used to put together the grid information is outlined in reference 1.

## Technology
Typical

## Geography
Upstate NY electricity grid to include most of NY state less Long Island, Westchester County and New York City

## Reference product
- Electricity, at eGrid, NYUP, 2008: 1 kWh

## Inputs from technosphere
- Electricity, biomass, at power plant: 0.00416884 kWh
  Solid Renewable Fuels (Biomass) WDS – Wood/Wood Waste Solids (Paper Pellets, Railroad Ties, Utility Poles, Wood Chips, and other wood solids)
- CUTOFF Electricity, biomass, solid, biogenic MSW, at power plant: 0.00346294 kWh
  Solid Renewable Fuels (Biomass) MSB – Municipal Solid Waste – Biogenic Component
- CUTOFF Electricity, biomass, gas, landfill, at power plant: 0.00506217 kWh
  Gaseous Renewable Fuels (Biomass) LFG - landfill gas
- CUTOFF Electricity, at wind power plant, unspecified: 0.0137565 kWh
  Wind
- Electricity, diesel, at power plant: 0.000271974 kWh
  Petroleum (DFO) – Distillate Fuel Oil (includes all Diesel and No. 1, No. 2, and No. 4 Fuel Oils)
- Electricity, bituminous coal, at power plant: 0.0723754 kWh
  Subbituminous Coal
- Electricity, nuclear, at power plant: 0.284012 kWh
  Nuclear Fission – Nuclear (Uranium, Plutonium, Thorium)
- Electricity, bituminous coal, at power plant: 0.138302 kWh
  Bituminous Coal BIT - Anthracite Coal, and Bituminous Coal.
- CUTOFF Electricity, petroleum coke, at power plant: 0.00173446 kWh
  Petroleum (Other Fossil) PC - petroleum coke
- Electricity, residual fuel oil, at power plant: 0.00682559 kWh
  Petroleum (RFO) – Residual Fuel Oil (includes No. 5 and No. 6 Fuel Oils and Bunker C Fuel Oil)
- CUTOFF Electricity, biomass,liquid, unspecified, at power plant: 0.00113266 kWh
  Liquid Renewable Fuels (Biomass) BLQ - black liquor
- Electricity, diesel, at power plant: 1.67562e-6 kWh
  Petroleum (DFO) JF - jet fuel
- CUTOFF Electricity, MSW, non-biogenic, at power plant: 0.00272089 kWh
  Other Fuels MSN – Municipal Solid Waste – Non-biogenic components
- CUTOFF Electricity, biomass,liquid, unspecified, at power plant: 0.000804049 kWh
  Liquid Renewable Fuels (Biomass) WDL – Wood Waste Liquids (Red Liquor, Sludge Wood, Spent Sulfite Liquor, and other wood based liquids
- Electricity, diesel, at power plant: 2.27376e-5 kWh
  Petroleum (DFO) KER - kerosene
- CUTOFF Electricity, hydropower, at power plant, unspecified: 0.286503 kWh
  Hydroelectric WAT – Water (Conventional, Pumped Storage)
- CUTOFF Electricity, tire derived fuel, at power plant: 0.00179444 kWh
  Solid Renewable Fuels (Biomass) TDF - tires, tire derived fuel
- Electricity, natural gas, at power plant: 0.177048 kWh
  Natural Gas

## Sampling procedure
based on EIA electricity reports for all power plants in the US.

## Sources
- Chris Goemans, Athena Institute
- unspecified
- USEPA
- Statistics Canada
- Statistics Canada
- Statistics Canada
- Statistics Canada
- Statistics Canada
- Statistics Canada
- USEPA
- EIA
- EIA
- EIA
- EIA
- EIA
- EIA
- EIA
- EIA
- EIA
- EIA
- EIA
- US DOE
- International Energy Agency
- US DOE
