# White mineral oil, at plant

Dataset: openLCA process, unit process
Category: Petrochemical Manufacturing
Geography: RNA
Time period: 1989-01-01 to 1992-01-01
Generated by: Franklin Associates
Published in: THE PLASTICS DIVISION OF THE AMERICAN C
restrictionsDescription: All information can be accessed by everybody.
copyright: false

## General comment
Complete inventory data and metadata are available in full in the final report and appendices, Cradle-to-Gate Life Cycle Inventory of Nine Plastic Resins and Four Polyurethane Precursors. This report has been extensively reviewed within Franklin Associates and has undergone partial critical review by ACC Plastics Division members and is available at: www.americanchemistry.com. Quantities may vary slightly between the reference to main source and and this module due to rounding. Important note: although most of the data in the US LCI database has undergone some sort of review, the database as a whole has not yet undergone a formal validation process. Please email comments to lci@nrel.gov.

## Technology
Distillation of crude oil followed by vacuum distillation and hydrotreating, deasphalting, and dewaxing processes

## Geography
North America (US and Canada)

## Reference product
- White mineral oil, at plant: 1 kg
  MATERIAL USE

## Inputs from technosphere
- Electricity, at grid, US, 2008: 0.414 kWh
- Residual fuel oil, combusted in industrial boiler: 0.182 l
- Liquefied petroleum gas, combusted in industrial boiler: 0.00776 l
- Transport, pipeline, unspecified petroleum products: 0.345 t*km
- Transport, train, diesel powered: 0.028 t*km
- Natural gas, combusted in industrial boiler: 0.0746 m3
- Petroleum refining, for olefins production, at plant: 1 kg
- Transport, combination truck, diesel powered: 0.0439 t*km

## Emissions to nature
- Phenol compounds, unspecified: 9e-7 kg
- VOC, volatile organic compounds: 0.0001 kg
- Methyl ethyl ketone: 0.0001 kg
- Chromium, unspecified: 1.04e-6 kg
- Chromium VI: 8.7e-8 kg

## Sampling procedure
Data are from secondary sources.

## Sources
- THE PLASTICS DIVISION OF THE AMERICAN C
