# Electricity, at Grid, US, 2010

Dataset: openLCA process, unit process
Category: Utilities
Geography: RNA
Time period: 2010-01-01 to 2010-01-01
Generated by: Samantha Wascavage
Published in: Chris Goemans, Athena Institute
restrictionsDescription: All information can be accessed by everybody.
copyright: false

## General comment
The methodology used to put together the grid information is outlined in reference 1.

## Technology
Typical

## Geography
US

## Reference product
- Electricity, at Grid, US, 2010: 1 kWh

## Inputs from technosphere
- Electricity, residual fuel oil, at power plant: 0.003532 kWh
  RFO – Residual Fuel Oil (includes No. 5 and No. 6 Fuel Oils and Bunker C Fuel Oil)
- CUTOFF Electricity, biomass, gas, landfill, at power plant: 0.001802 kWh
  LFG, OBG – Landfill Gas
- Electricity, diesel, at power plant: 0.012448 kWh
  DFO, JF, KER – Distillate Fuel Oil (includes all Diesel and No. 1, No. 2, and No. 4 Fuel Oils)
- CUTOFF Electricity, biomass,liquid, unspecified, at power plant: 0.004257 kWh
  BLQ, OBL, SLW, WDL – Black Liquor
- Electricity, lignite coal, at power plant: 0.019001 kWh
  LIG – Lignite Coal
- CUTOFF Electricity, geothermal, unspecified: 0.003677 kWh
  GEO – Geothermal
- Electricity, bituminous coal, at power plant: 0.227292 kWh
  BIT, SC, SGC, WC - Anthracite Coal, and Bituminous Coal.
- CUTOFF Electricity, hydropower, at power plant, unspecified: 0.063383 kWh
  WAT – Water (Conventional, Pumped Storage)
- CUTOFF Electricity, other gases, unspecified, at power plant: 0.002789 kWh
  OG, BFG, PG – Other Gas (Butane, Coal Processes, Coke-Oven, Refinery, and other processes)
- CUTOFF Electricity, other fuels, unspecified, at power plant: 0.002784 kWh
  OTH, MSN, PUR, WH – Other (Batteries, Chemicals, Coke Breeze, Hydrogen, Pitch, Sulfur, Tar Coal, and miscellaneous technologies)
- Electricity, bituminous coal, at power plant: 0.184163 kWh
  SUB – Subbituminous Coal
- CUTOFF Electricity, at wind power plant, unspecified: 0.017323 kWh
  WND – Wind
- CUTOFF Electricity, petroleum coke, at power plant: 0.007414 kWh
  PC, SG, WO – Petroleum Coke
- Electricity, nuclear, at power plant: 0.198186 kWh
  NUC – Nuclear (Uranium, Plutonium, Thorium)
- CUTOFF Electricity, solar, unspecified, at power plant: 0.000215 kWh
  SUN – Solar (Photovoltaic, Thermal)
- CUTOFF Electricity, biomass, solid, agriculture by-products, at power plant: 0.007143 kWh
  AB, MSB, MSW, OBS, TDF, WDS – Agriculture Crop By-products / Straw / Energy Crops
- Electricity, natural gas, at power plant: 0.244591 kWh
  NG – Natural Gas

## Sampling procedure
based on EIA electricity reports for all power plants in the US.

## Sources
- Chris Goemans, Athena Institute
- Statistics Canada
- USEPA
- Statistics Canada
- Statistics Canada
- Statistics Canada
- Statistics Canada
- USEPA
- EIA
- EIA
- EIA
- EIA
- EIA
- EIA
- EIA
- EIA
- EIA
- US DOE
- International Energy Agency
- EIA
- NERC
