# Coal preparation facility; Multiple processes; Underground mine

Dataset: openLCA process, unit process
Category: Bit. Coal and Lignite Surface Mining
Geography: US
Time period: 2008-01-01 to 2008-12-31
Generated by: Timothy Skone
Owner: National Energy Technology Laboratory
Reviewer: Robert James
Published in: National Energy Technology Laboratory (NETL). 2010. Coal preparation facility; Multiple processes; Underground mine
restrictionsDescription: Use of this dataset is not restricted, but a statement of attribution is required. Please use the following attribution statement:
National Energy Technology Laboratory's (NETL) Unit Process Library
626 Cochrans Mill Road, P.O. Box 10940
Pittsburgh, PA 15236-0940
http://www.netl.doe.gov/research/energy-analysis/life-cycle-analysis/unit-process-library
Neither the U.S. Department of Energy (DOE) National Energy Technology Laboratory (NETL) nor any person acting on behalf of these organizations:
A. Makes any warranty or representation, express or implied, with respect to the accuracy, completeness, or usefulness of the information contained in this document, or that the use of any information, apparatus, method, or process disclosed in this document may not infringe on privately owned rights; or
B. Assumes any liability with this report as to its use, or damages resulting from the use of any information, apparatus, method, or process disclosed in this document.
Reference herein to any specific commercial product, process, or service by trade name, trademark, manufacturer, or otherwise, does not necessarily constitute or imply its endorsement, recommendation, or favoring by NETL. The views and opinions of the authors expressed herein do not necessarily state or reflect those of NETL.
copyright: true

## General comment
This process is part of the NETL Unit Process Library. To access the library and the original dataset:
1) Navigate to the NETL LCA home page (http://www.netl.doe.gov/lca)
2) Then navigate to the “Unit Process Library”
3) From the library, the unit process of interest can be found either through the "Complete Listing of the Unit Process Library link" or through the link to the "Unit Process Database" spreadsheet
4) For each process, a Data Sheet (DS) and Data File (DF) are available

BRIEF DESCRIPTION
This parameterized dataset calculates the number of each type of equipment required to prepare Illinois No. 6 bituminous coal for transport from an underground coal mine. It includes the following facilities: silo, stacker, crusher facility, cleaning facility, and waste water treatment plant.

GOAL AND SCOPE
The scope of this unit process covers the elements required for the construction of a single coal preparation facility required to prepare Illinois No. 6 bituminous coal under Life Cycle (LC) Stage #1. After preparation, the coal will be loaded into railcars for transport (LC Stage #2) to the energy conversion facility (LC Stage #3) over the 30-year study period, as described below and in the associated documentation (see the Citation and Associated Documentation section below). Input flows for this coal preparation facility assembly unit process include coal loading silos, stockpile stacker reclaimers, coal crusher facilities, coal cleaning facilities, and a wastewater treatment plant (WWTP). This unit process estimates the number of each type of equipment included in the coal preparation facility, evaluates the life expectancy and replacement rate for each input, and calculates the fraction of each type of equipment needed as inputs to prepare 1 kg of Illinois No. 6 bituminous coal, based on the parameters shown above and in the DS.

Construction data, including the mass of raw materials required to construct a single silo, stacker, crusher facility, cleaning facility, and WWTP, are calculated in separate unit processes. Therefore, the following unit processes are considered to be embedded in this assembly unit process:
- Coal loading silo; Manufacture; For railcar loading of coal; U.S.; 295 metric tonnes
- Coal stockpile stacker; Manufacture; At point-of-sale, U.S.
- Coal crusher facility; Construction; At mine, U.S.
- Coal cleaning facility; Construction; At mine; U.S.
- Coal mine wastewater treatment plant; Construction; Underground coal mine, U.S.

For a discussion of environmental emissions associated with the manufacture of raw materials used in the construction of unit train components, as well as other pertinent information, please refer to these separate unit processes.

BOUNDARY AND DESCRIPTION
An overview of the boundary of this unit process is available in the associated documentation (see the Citation and Associated Documentation section below). The total number of coal loading silos at the coal preparation facility was calculated based on coal production at the coal mine where the representative silo is located. This mine, the Wolverine mine in British Columbia, Canada, has a single silo. Wolverine mine had permits to extract up to 3 million tonnes of coal per year, as of 2008 (Western Coal 2010). To determine the number of silos, the required amount of coal at the Study mine was determined by ratioing to the coal feedrate required by the energy conversion facility in LC Stage #3, in metric tonnes per day. This coal feedrate is an adjustable parameter, which can be adjusted as needed to reflect assumptions regarding the amount of coal required. The default value for this parameter is 21,719 tonnes/day. Multiplied by 365 days/year, the total amount of coal required is 7,927,435 tonnes/year. This value was divided by 3,000,000 tonnes/year (the capacity of a single silo) and rounded up for a total of 3 silos.

The lifetime of the plant was assumed to be 30 years. Each type of equipment or facility was assumed to have a life expectancy of 30 years, which means that the replacement rate for each is 1. To determine the fraction of a single piece of each type of equipment required over the lifetime of the plant, to produce 1 kg of Illinois No. 6 bituminous coal, the coal feedrate (tonnes/day) was converted to kg/year, and then multiplied by the plant lifetime (30 years) to get the total amount of coal produced over the Study period. Finally, the number of each type of equipment was multiplied by the relevant replacement rate, and then divided by the total amount coal required over the study period.

The associated documentation (referenced below) contains: relevant properties of a single Illinois No. 6 coal preparation facility used for the calculation of input and output flows for this unit process ; a summary of modeled input and output flows; additional details showing calculation methods for input and output flows; and other relevant information.

CITATION AND ASSOCIATED DOCUMENTATION
This document should be cited as:
National Energy Technology Laboratory (NETL). 2015. NETL Life Cycle Inventory Data – Unit Process: Coal preparation facility; Multiple processes; Underground mine. U.S. Department of Energy, National Energy Technology Laboratory. Last Updated: September 2015 (version 01). Retrieved on [DATE] from [URL for this dataset].

This dataset is part of the NETL Unit Process Library. The Library offers additional information concerning this dataset in the form of a Detailed Spreadsheet Documentation (DS) file and a Process Documentation File (DF). The DS file is an Excel file that contains all of the parameters, inputs, and outputs for a given system as well as background data, calculations and quality scores. The DF file is a PDF document that contains major assumptions and data sources that are the basis for each unit process. The NETL Unit Process Library is located on the NETL website (netl.doe.gov) under Research / Energy Analysis / Energy Trends and Issues / Life Cycle Analysis / Unit Process Library.

This dataset was converted directly from the DS with additional supporting information provided by the DF. Full citations for the DS and DF are given below.:

DS File
National Energy Technology Laboratory (NETL). 2010. NETL Life Cycle Inventory Data – Unit Process: Illinois No. 6 Coal Preparation Facility Assembly, Construction. U.S. Department of Energy, National Energy Technology Laboratory. Last Updated: February 2010 (version 01). Retrieved on 6/30/2014 from: http://www.netl.doe.gov/File%20Library/Research/Energy%20Analysis/Life%20Cycle%20Analysis/UP_Library/DS_Stage1_C_Assembly_I6_Coal_Prep_2010-01.xls

DF File
National Energy Technology Laboratory (NETL). 2010. NETL Life Cycle Inventory Data – Unit Process: Illinois No. 6 Coal Preparation Facility Assembly, Construction. U.S. Department of Energy, National Energy Technology Laboratory. Last Updated: January 2010 (version 01). Retrieved on 6/30/2014 from: http://www.netl.doe.gov/File%20Library/Research/Energy%20Analysis/Life%20Cycle%20Analysis/UP_Library/DF_Stage1_C_Assembly_I6_Coal_Prep_2010-01.pdf

## Technology
The scope of this unit process covers the elements required for the construction of a single coal preparation facility required to prepare Illinois No. 6 bituminous coal under Life Cycle (LC) Stage #1. After preparation, the coal will be loaded into railcars for transport (LC Stage #2) to the energy conversion facility (LC Stage #3) over the 30-year study period, as described below and in the associated documentation (see the Citation and Associated Documentation section in the Description field). Input flows for this coal preparation facility assembly unit process include coal loading silos, stockpile stacker reclaimers, coal crusher facilities, coal cleaning facilities, and a wastewater treatment plant (WWTP). An overview of the boundary of this unit process is available in the associated documentation (see the Citation and Associated Documentation section in the Description field). The total number of coal loading silos at the coal preparation facility was calculated based on coal production at the coal mine where the representative silo is located. This mine, the Wolverine mine in British Columbia, Canada, has a single silo. The lifetime of the plant was assumed to be 30 years. Each type of equipment or facility was assumed to have a life expectancy of 30 years, which means that the replacement rate for each is 1.

The associated documentation (see the Citation and Associated Documentation section in the Description field) contains: relevant properties of a single Illinois No. 6 coal preparation facility used for the calculation of input and output flows for this unit process ; a summary of modeled input and output flows; additional details showing calculation methods for input and output flows; and other relevant information.

## Time period
This data set is representative of best available public data from 01/01/2008 to 12/31/2008 and is not subject to limited usability within sub-time spans (e.g. summer, winter).

## Parameters
- crusher_fac: 1
  [crusher facilities] Number of stockpile stackers required for a single coal preparation facility. S
- silo_storage: 3e6
  [tonne/yr] Amount of coal capacity handled by a single silo over a single year
- silo_tot: 1.11007e-11; = silos*silo_repl/coal_total
  [silo/kg coal required] Number of silos constructed per kg coal required by plant over plant lifetim
- crusher_repl: 1
  [crusher facility] Replacement rate of crusher facilities over lifetime of plant, based on estimated
- stackers: 1
  [stackers] Number of stockpile stackers required for a single coal preparation facility. See Assumpt
- stacker_repl: 1
  [stacker] Replacement rate of stackers over lifetime of the plant, based on estimated lifetimes of s
- cleaning_fac: 1
  [cleaning facilities] Number of cleaning facilities required for a single coal preparation facility.
- stacker_tot: 4.20481e-12; = stackers*stacker_repl/coal_total
  [stacker/kg coal required] Number of stackers constructed per kg coal required by plant over plant l
- plant_life: 30
  [yr] Assumed lifetime of the energy conversion facility. See Assumption #1
- crusher_tot: 4.20481e-12; = crusher_fac*crusher_repl/coal_total
  [crusher facility/kg coal required] Number of crusher facilities constructed per kg coal required by
- silos: 2.64
  [silos] Number of coal storage silos required for a single coal preparation facility
- silo_repl: 1
  [silo] Replacement rate of silos over lifetime of the plant, based on estimated lifetimes of silo an
- cleaning_tot: 4.20481e-12; = cleaning_fac*cleaning_repl/coal_total
  [cleaning facility/kg coal required] Number of cleaning facilities constructed per kg coal required
- coal_annual: 7.92744e6; = coal_feedrate*365
  [tonne/yr] Estimated amount of coal required to pass through silos in a single year
- cleaning_repl: 1
  [cleaning facility] Replacement rate of cleaning facility over lifetime of plant, based on estimated
- coal_total: 2.37823e11; = coal_feedrate*365*1000*plant_life
  [kg] Total amount of coal required over the lifetime of the energy conversion facility
- WWTP_repl: 1
  [WWTP] Replacement rate of wastewater treatment plant over lifetime of plant, based on estimated lif
- WWTP_tot: 4.20481e-12; = WWTP*WWTP_repl/coal_total
  [WWTP/kg coal required] Number of WWTPs constructed per kg coal required by plant over plant lifetim
- WWTP: 1
  [WWTPs] Number of wastewater treatment plants required for a single coal preparation facility. See A
- coal_feedrate: 21719
  [tonne/day] Adjustable parameter; estimated required feedrate of coal in LC Stage #3, default is fro

## Reference product
- Coal preparation facility; Multiple processes; Underground mine: 1 Item(s); data quality (2,3,2,3,2)

## Inputs from technosphere
All rows: data quality (2,3,2,3,2)
- Coal stockpile stacker; Manufacture; At point-of-sale: 4.20481e-12 Item(s); = stacker_tot
- Coal loading silo; Manufacture; For railcar loading of coal, underground mine; 295 metric tonnes: 1.11007e-11 Item(s); = silo_tot
- Coal crusher facility; Construction; At underground mine: 4.20481e-12 Item(s); = crusher_tot
- Wastewater treatment plant; Construction; For underground coal mine: 4.20481e-12 Item(s); = WWTP_tot
- Coal cleaning facility; Construction; At mine: 4.20481e-12 Item(s); = cleaning_tot

## Inventory method
Attributional

## Modelling constants
All elementary and technosphere flows are calculated on a functional unit basis. Calculations involving combustion primarily to generate useful work are done using lower heating values (LHV) and calculations involving combustion primarily to generate useful heat are done using higher heating values (HHV). Unless explicitly stated in the associated reference documents applicable calculations assumed standard atmospheric temperature and pressure (SATP).

## Completeness
Individual relevant flows captured

## Data selection
Best publically available data

## Data treatment
No allocation applied

## Data collection
No primary data collected

## Intended application
This is a gate-to-gate basic process and can be used for any type of LCA study.

## Project
National Energy Technology Laboratory (NETL) Unit Process Library

## Sources
- Western Coal. 2010. Operations: Wolverine Group
- National Energy Technology Laboratory (NETL). 2009. Affordable, Low-Cost Diesel Fuel from Domestic Coal and Biomass. DOE/NETL-2009/1349
- National Energy Technology Laboratory (NETL). 2010. Coal preparation facility; Multiple processes; Underground mine
