# Polypropylene, resin, at plant, CTR

Dataset: openLCA process, unit process
Category: All Other Basic Organic Chemical Manufacturing
Geography: RNA
Time period: 2003-01-01 to 2004-01-01
Generated by: Franklin Associates
Published in: THE PLASTICS DIVISION OF THE ACC
restrictionsDescription: All information can be accessed by everybody.
copyright: false

## General comment
Transportation amounts for propylene were calculated using a weighted average of data collected from the polypropylene producers. Numerous coproduct streams are produced during this process. Fuel gas and off-gas were two of the coproducts produced that were exported to another process for fuel use. When the fuel coproducts are exported from the hydrocracker, they carry with them the allocated share of the inputs and outputs for their production. The ratio of the mass of the exported fuel over the total mass output was removed from the total inputs and outputs of the hydrocracker, and the remaining inputs and outputs are allocated over the material hydrocracker products. No energy credit is applied for the exported fuels, since both the inputs and outputs for the exported fuels have been removed from the data set. Complete inventory data and metadata are available in full in the final report and appendices, Cradle-to-Gate Life Cycle Inventory of Nine Plastic Resins and Four Polyurethane Precursors. This report has been extensively reviewed within Franklin Associates and has undergone partial critical review by ACC Plastics Division members and is available at: www.americanchemistry.com. Quantities may vary slightly between the reference to main source and and this module due to rounding. Important note: although most of the data in the US LCI database has undergone some sort of review, the database as a whole has not yet undergone a formal validation process. Please email comments to lci@nrel.gov.

## Technology
Polymerization of propylene using Ziegler-Natta catalysts via a combination of the liquid monomer and gas phase processes

## Geography
Representative of North America (US and Canada)

## Reference product
- Recovered energy, for Polypropylene, resin, at plant, CTR: 0.0053 MJ

## By-products
- Polypropylene, resin, at plant, CTR: 1 kg

## Inputs from technosphere
- CUTOFF Disposal, solid waste, fuel, to municipal incineration: 0.052761 kg
- CUTOFF Disposal, solid waste,process, to municipal incineration: 0.0077 kg
- CUTOFF Disposal, solid waste, process, to waste-to-energy: 4.4e-6 kg
- CUTOFF Disposal, solid waste, process, to sanitary landfill: 0.028104 kg

## Inputs from nature
- Energy, from biomass: 0.0023517 MJ
- Energy, unspecified: 0.0076433 MJ
- Energy, kinetic (in wind), converted: 0.005647 MJ
- Coal, lignite, in ground: 0.011097 kg
- Energy, geothermal: 0.0057069 MJ
- Gas, natural, in ground: 0.66784 kg
- Energy, from hydro power: 0.10845 MJ
- Energy, solar: 0.00023966 MJ
- Gas, natural, in ground: 0.47577 m3
- Coal, unprocessed bituminous, in ground: 0.11544 kg
- Uranium oxide, 332 GJ per kg, in ore: 2.8288e-6 kg
- Water, consumptive use, unspecified origin/m3: 0.0083475 m3
- Oil, crude, in ground: 0.10936 kg

## Emissions to nature
- Ammonia: 1.731e-6, 1.0839e-5 kg (2 entries, compartments not in this file)
- 2-Hexanone: 2.3584e-9 kg
- o-Xylene: 3.8209e-9 kg
- Decane: 1.0303e-8 kg
- Chromium: 8.7646e-7, 2.3034e-8 kg (2 entries, compartments not in this file)
- Nickel: 8.2456e-8, 2.5831e-7 kg (2 entries, compartments not in this file)
- Magnesium: 5.9532e-7, 0.00014659 kg (2 entries, compartments not in this file)
- Biphenyl: 9.2005e-11, 4.3292e-9 kg (2 entries, compartments not in this file)
- Titanium, ion: 3.1488e-7 kg
- Dioxins, measured as 2,3,7,8-tetrachlorodibenzo-p-dioxin: 8.3869e-14 kg
- Particulates, > 2.5 um, and < 10um: 0.00011027 kg
- Naphthalenes, alkylated, unspecified: 1.0956e-9 kg
- Thallium: 4.3176e-9 kg
- Benzene, ethyl-: 1.1714e-5, 3.1228e-8 kg (2 entries, compartments not in this file)
- Sulfur dioxide: 0.0035537 kg
- Chrysene: 5.4121e-12 kg
- Dibenzothiophene: 3.8669e-11 kg
- Methane, bromo-, Halon 1001: 4.2255e-12 kg
- Fluorene, 1-methyl-: 2.2053e-11 kg
- Eicosane: 5.3639e-9 kg
- Tetradecane: 8.3408e-9 kg
- Xylene: 1.6631e-7, 8.4931e-5 kg (2 entries, compartments not in this file)
- Fluorenes, alkylated, unspecified: 3.8748e-9 kg
- Copper: 2.9839e-10, 6.5969e-8 kg (2 entries, compartments not in this file)
- Silver: 4.4516e-7 kg
- NMVOC, non-methane volatile organic compounds, unspecified origin: 0.00058458 kg
- Mercury: 4.2916e-10, 6.1317e-9 kg (2 entries, compartments not in this file)
- Vinyl acetate: 2.0071e-13 kg
- Benzo(a)anthracene: 4.3296e-12 kg
- m-Xylene: 1.0372e-8 kg
- Chloroform: 1.5581e-12 kg
- Radium-226/kg: 1.2854e-14 kg
- Benzo(a)pyrene: 2.0566e-12 kg
- Phthalate, dioctyl-: 1.9279e-12 kg
- Beryllium: 1.4146e-9, 4.3013e-9 kg (2 entries, compartments not in this file)
- Lead-210/kg: 3.6947e-17 kg
- Ethane, 1,2-dibromo-: 3.1691e-14 kg
- Aldehydes, unspecified: 5.1941e-8 kg
- Hydrocarbons, unspecified: 8.6657e-7 kg
- Arsenic: 2.6999e-8 kg
- Ethylene dibromide: 2.0158e-9 kg
- Lead: 1.848e-7, 2.9869e-8 kg (2 entries, compartments not in this file)
- Propanal: 1.0036e-11 kg
- Chloride: 0.0090795 kg
- Toluene, 2,4-dinitro-: 7.3946e-15 kg
- Chromium VI: 4.2754e-9 kg
- Ethane, 1,2-dichloro-: 1.0564e-12 kg
- Cyanide: 6.6023e-11, 1.3984e-11 kg (2 entries, compartments not in this file)
- Zinc: 8.047e-7, 1.1989e-9 kg (2 entries, compartments not in this file)
- Radioactive species, Nuclides, unspecified: 4.6628 Bq
- Hydrogen fluoride: 8.1169e-6 kg
- Furan: 2.4216e-13 kg
- Oils, unspecified: 1.1835e-5 kg
- Sulfide: 8.9071e-8 kg
- Methacrylic acid, methyl ester: 5.2818e-13 kg
- BOD5, Biological Oxygen Demand: 5.3548e-5 kg
- Phenol, 2,4-dimethyl-: 9.9602e-9 kg
- Styrene: 1e-9, 6.6023e-13 kg (2 entries, compartments not in this file)
- Fluorene: 1.8073e-9, 4.9249e-11 kg (2 entries, compartments not in this file)
- Methane, fossil: 0.015066 kg
- Hexane: 1.7694e-12 kg
- Benzenes, alkylated, unspecified: 6.6859e-8 kg
- Methane, chlorodifluoro-, HCFC-22: 1e-9 kg
- Sodium, ion: 0.0021036 kg
- Sulfur oxides: 0.00088841 kg
- Ethene, tetrachloro-: 2.5515e-9 kg
- Formaldehyde: 4.5563e-7 kg
- Radium-228/kg: 6.5751e-17 kg
- Toluene: 4.5074e-7, 0.00014643 kg (2 entries, compartments not in this file)
- Nitrogen, total: 7.9914e-8 kg
- Phenanthrenes, alkylated, unspecified: 4.5429e-10 kg
- Lithium, ion: 0.00014738 kg
- n-Hexacosane: 1.2935e-10 kg
- Radioactive species, unspecified: 3064.3 Bq
- Benzene, pentamethyl-: 1.4523e-11 kg
- Phenol: 1.1424e-6, 4.2255e-13 kg (2 entries, compartments not in this file)
- Acenaphthene: 2.7601e-11 kg
- Particulates, unspecified: 0.00022305 kg
- Anthracene: 1.1365e-11 kg
- Manganese: 1.1454e-6, 3.6695e-8 kg (2 entries, compartments not in this file)
- Propene: 4.534e-8 kg
- Bromide: 4.4259e-5 kg
- Phenols, unspecified: 1.1958e-8, 7.2662e-8 kg (2 entries, compartments not in this file)
- Ammonium, ion: 3.2102e-8 kg
- Ethane, chloro-: 1.1092e-12 kg
- Hydrogen: 5.2e-6 kg
- Indeno(1,2,3-cd)pyrene: 3.3014e-12 kg
- Cadmium, ion: 1.1057e-8 kg
- Fluoride: 4.4611e-9, 5.2213e-7 kg (2 entries, compartments not in this file)
- Antimony: 2.0019e-8, 1.9305e-9 kg (2 entries, compartments not in this file)
- Kerosene: 7.1908e-8 kg
- Methane, chlorotrifluoro-, CFC-13: 1.0314e-8 kg
- Carbon dioxide, fossil: 1.451 kg
- Copper, ion: 6.0099e-8 kg
- Bromoform: 1.03e-12 kg
- Sulfur: 8.8699e-7 kg
- Organic acids: 5.5174e-10 kg
- Cadmium: 8.8604e-9 kg
- Carbon monoxide: 0.00036659 kg
- Suspended solids, unspecified: 0.0036677 kg
- Benzene: 3.898e-7, 9.4327e-5 kg (2 entries, compartments not in this file)
- Butadiene: 6.8712e-10 kg
- Sulfate: 8.0125e-5 kg
- Carbon disulfide: 3.4332e-12 kg
- Surfactants, unspecified: 1.2153e-7 kg
- Boron: 1.1126e-6 kg
- Dibenzofuran: 3.6844e-11 kg
- Particulates, < 2.5 um: 8.982e-5 kg
- p-Cresol: 1.1037e-8 kg
- Methyl ethyl ketone: 1.5598e-11, 1.03e-11 kg (2 entries, compartments not in this file)
- Cobalt: 7.876e-9, 2.2243e-8 kg (2 entries, compartments not in this file)
- Dinitrogen monoxide: 2.2339e-5 kg
- Dodecane: 1.9539e-8 kg
- 2-Chloroacetophenone: 1.8486e-13 kg
- Isophorone: 1.5317e-11 kg
- p-Xylene: 3.8209e-9 kg
- Tin: 8.1427e-8 kg
- Organic substances, unspecified: 1.133e-5 kg
- VOC, volatile organic compounds: 0.00083845 kg
- Dissolved solids: 0.0092123 kg
- t-Butyl methyl ether: 9.2432e-13 kg
- Cumene: 1.3997e-13 kg
- Benzo(ghi)perylene: 1.4613e-12 kg
- Hydrogen chloride: 6.7093e-5 kg
- Benzene, 1-methyl-4-(1-methylethyl)-: 1.9362e-11 kg
- Acetophenone: 3.9614e-13 kg
- Mercaptans, unspecified: 5.2945e-9 kg
- Acenaphthylene: 1.353e-11 kg
- Naphthalene: 6.4893e-9, 6.4506e-9 kg (2 entries, compartments not in this file)
- Benzoic acid: 3.607e-7 kg
- Strontium: 1.9354e-5 kg
- TOC, Total Organic Carbon: 1e-6 kg
- Sulfuric acid, dimethyl ester: 1.2676e-12 kg
- Phenanthrene: 2.8442e-10, 1.4613e-10 kg (2 entries, compartments not in this file)
- Radionuclides (Including Radon): 4.0211e-6 kg
- Iron: 6.3608e-5 kg
- Methane, monochloro-, R-40: 1.3997e-11, 7.7991e-12 kg (2 entries, compartments not in this file)
- Benzo(b,j,k)fluoranthene: 5.9532e-12 kg
- Acetaldehyde: 1.3494e-8 kg
- Calcium, ion: 0.00073373 kg
- Docosane: 2.0734e-10 kg
- 5-methyl Chrysene: 1.1906e-12 kg
- Methane, dichloro-, HCC-30: 3.0416e-8 kg
- Aluminum: 3.3782e-5 kg
- 4-Methyl-2-pentanone: 8.1753e-10 kg
- Fluoranthene: 3.8426e-11 kg
- Selenium: 1.5953e-8, 7.3077e-8 kg (2 entries, compartments not in this file)
- Benzyl chloride: 1.8486e-11 kg
- Molybdenum: 8.1598e-9 kg
- Barium: 0.00044004 kg
- Hexadecane: 2.1375e-8 kg
- Ammonium chloride: 1.5014e-7 kg
- Chlorine: 1e-7 kg
- Yttrium: 2.3868e-9 kg
- Ethane, 1,1,1-trichloro-, HCFC-140: 5.2818e-13 kg
- Methane, tetrachloro-, CFC-10: 6.5632e-10 kg
- Polycyclic organic matter, unspecified: 2.6253e-8 kg
- PAH, polycyclic aromatic hydrocarbons: 2.9524e-9 kg
- Hydrazine, methyl-: 4.4896e-12 kg
- Acetone: 1.9937e-9 kg
- Hexanoic acid: 7.47e-8 kg
- Particulates, < 10 um: 0.0001165 kg
- Nitrogen oxides: 0.0028802 kg
- Carbon monoxide, fossil: 0.00070354 kg
- Naphthalene, 2-methyl-: 5.4487e-9 kg
- Pyrene: 1.786e-11 kg
- Methane: 0.00039722 kg
- Benzene, chloro-: 5.81e-13 kg
- COD, Chemical Oxygen Demand: 0.00018725 kg
- Surfactants: 5.7745e-8 kg
- Octadecane: 5.3028e-9 kg
- Arsenic, ion: 6.926e-8 kg
- Vanadium: 3.4711e-8 kg
- o-Cresol: 1.0243e-8 kg

## Sampling procedure
Data are from both primary and secondary sources. A weighted average using propylene production amounts was applied to the individual olefins plant production data collected from three leading producers (8 thermal cracking units) in North America. The olefins producers who provided data for this module verified that the characteristics of their plants are representative of a majority of North American olefins production.

## Sources
- THE PLASTICS DIVISION OF THE ACC
