# Sawn lumber, hardwood, rough, kiln dried, at kiln, NE-NC

Dataset: openLCA process, unit process
Category: Sawmills
Geography: RNA
Time period: 2005-01-01 to 2006-01-01
Generated by: Maureen Puetmann
Published in: Richard D. Bergman
restrictionsDescription: All information can be accessed by everybody.
copyright: false

## General comment
Important note: although most of the data in the US LCI database has
undergone some sort of review, the database as a whole has not yet
undergone a formal validation process.
Please email comments to lci@nrel.gov.

## Technology
Average technology.

## Geography
NE/NC = Northeast (NE) and Northcentral (NC) United States. The 20 states are Connecticut, Delaware, Illinois, Indiana, Iowa, Maine, Maryland, Massachusetts, Michigan, Minnesota, Missouri, New Hampshire, New Jersey, New York, Ohio, Pennsylvania, Rhode Island, Vermont, West Virginia, Wisconsin.

## Reference product
- Sawn lumber, hardwood, rough, kiln dried, at kiln, NE-NC: 1 m3
  Moisture content (ovendry basis) =9.6%

## Inputs from technosphere
- Electricity, at grid, Eastern US, 2000: 32.1 kWh
  Represents 25% of total mill consumption of grid electricity.
- Natural gas, combusted in industrial equipment: 0.0405 l
  Proxy for propane. Propane used for on-site transportation. Represents 20% of mill use of propane for transport.
- Sawn lumber, hardwood, rough, green, at sawmill, NE-NC: 572 kg
  Weight reported on an ovendry basis. Moisture content (ovendry basis) = 87%
- Heat, onsite boiler, hardwood mill, average, NE-NC: 3920 MJ
  Includes energy used for plant heating, walnut steaming and cogeneration.
- Electricity, onsite boiler, hardwood mill, average, NE-NC: 0.551 kWh
  Represents 25% of total mill consumption of electricity generated onsite.
- Gasoline, combusted in equipment: 0.087 l
  Gasoline used for on-site transportation. Represents 20% of mill use of gasoline for transport.
- Diesel, combusted in industrial equipment: 1 l
  Diesel used for on-site transportation. Represents 20% of mill use of diesel for transport.

## Emissions to nature
- VOC, volatile organic compounds: 1.37 kg
  Based on six major hardwood species found in eastern US (red oak, black cherry, ash, yellow poplar, hard maple, and black walnut).

## Sampling procedure
Questionnaires from 20 mills (17 companies) from the 20 states of Forest Service (FS) Northeastern (NE) Region. Hardwood sawmills were members of the Hardwood Manufacturer Association (HMA).

## Sources
- Richard D. Bergman
- Maureen Puettmann
- Forest Products Laboratory
- Forest Products Laboratory
- NHLA
- unspecified
- unspecified
