# Coal mine tailings storage and disposal; Production mix, underground mine

Dataset: openLCA process, unit process
Category: Bit. Coal and Lignite Surface Mining
Geography: GLO
Time period: 2000-01-01 to 2009-12-31
Generated by: Timothy Skone
Owner: National Energy Technology Laboratory
Reviewer: Robert James
Published in: National Energy Technology Laboratory (NETL). 2014. Coal mine tailings storage and disposal; Production mix, underground mine
restrictionsDescription: Use of this dataset is not restricted, but a statement of attribution is required. Please use the following attribution statement:
National Energy Technology Laboratory's (NETL) Unit Process Library
626 Cochrans Mill Road, P.O. Box 10940
Pittsburgh, PA 15236-0940
http://www.netl.doe.gov/research/energy-analysis/life-cycle-analysis/unit-process-library
Neither the U.S. Department of Energy (DOE) National Energy Technology Laboratory (NETL) nor any person acting on behalf of these organizations:
A. Makes any warranty or representation, express or implied, with respect to the accuracy, completeness, or usefulness of the information contained in this document, or that the use of any information, apparatus, method, or process disclosed in this document may not infringe on privately owned rights; or
B. Assumes any liability with this report as to its use, or damages resulting from the use of any information, apparatus, method, or process disclosed in this document.
Reference herein to any specific commercial product, process, or service by trade name, trademark, manufacturer, or otherwise, does not necessarily constitute or imply its endorsement, recommendation, or favoring by NETL. The views and opinions of the authors expressed herein do not necessarily state or reflect those of NETL.
copyright: true

## General comment
This process is part of the NETL Unit Process Library. To access the library and the original dataset:
1) Navigate to the NETL LCA home page (http://www.netl.doe.gov/lca)
2) Then navigate to the “Unit Process Library”
3) From the library, the unit process of interest can be found either through the "Complete Listing of the Unit Process Library link" or through the link to the "Unit Process Database" spreadsheet
4) For each process, a Data Sheet (DS) and Data File (DF) are available

BRIEF DESCRIPTION
This parameterized unit process calculates the relevant inputs and outputs for the storage of coal mine tailings in an impoundment (pond), piles (landfill), or backfill.

GOAL AND SCOPE
This unit process provides a summary of relevant input and output flows associated with disposing or storing coal mine tailings in an impoundment (pond), piles (landfill), or backfill. The process accounts for the leachate incurred during storage process in the short-term (0-100 years) and long-term (0-60,000 years). The reference flow of this unit process is: 1 kg of coal mine tailings.

BOUNDARY AND DESCRIPTION
A visual representation of the boundary of this unit process is available in the associated documentation (referenced in the Citation and Associated Documentation section below). Coal mine tailings are the waste portions of mined coal that are separated from the target mineral(s) during beneficiation (EPA, 2000). Tailings disposal is a significant portion of the overall portion of the overall waste management process at coal mining operations (EPA, 2000). The physical and chemical nature of the tailings is a function of the coal being processed and the operations used for beneficiation (EPA, 2000). In the United States, tailings are managed wet or thickened in tailings impoundments; dry in disposal piles; or slurried and used as backfill into underground mines (EPA, 2000).

Data for coal tailings composition and leachate concentrations were collected by a literature survey (Doka, 2009). Over 1,300 data points were analyzed to derive a landfill model specific to the observed behavior of coal tailings (Doka, 2009). The model serves as a generic coal mine tailings disposal/storage process applicable to tailings impoundments, backfills, or heaps (Doka, 2009).

When coal tailings are placed into a landfill, an impoundment or used for backfill, the resulting leachate depends on climate, water availability, aquifer depths and characteristics, landscape, disposal site size, coal/mineral composition, and geographic location (Doka, 2009). It is not possible to quantify all of these factors in a generic model, and this approach should yield conservative estimates (Doka, 2009). When possible, global data was used (Doka, 2009).

Hydrocarbon concentrations and radioactive pollutants are not included in the emissions inventory due to lack of available data and low toxicity relevance compared to the inorganic pollutants in coal tailings leachate (Doka, 2009; WV, 2009).

In the model pollutants are transported only by water directly infiltrating from the surface (Doka, 2009). Groundwater in-flow and flow-through across the deposit and resulting pollutant removal is not considered (Doka, 2009).

For tin, scandium, thallium, and tungsten data from coal tailings is missing to calculate transfer coefficients so leachate data from lignite spoil was used for the calculation. For bromine and iodine the transfer coefficients of fluorine were assumed (Doka, 2009). For the inventory S, N, P are converted to the appropriate weights of sulfate (SO42-), nitrate (NO3-), phosphate (PO43-) (Doka, 2009). Chromium is inventoried as the soluble species (CrVI) (Doka, 2009). All emissions are inventoried as emissions to groundwater.

As an intermediate result of the modelling, Doka calculated transfer coefficients to indicate how much of each chemical will leach out of the landfill over time (Doka, 2009). Two separate sets of transfer coefficients were produced: a 100 year time (short-term) and the transfer coefficients for the full 60,000 year modelling period (Doka, 2009).

The inventoried emissions were obtained by multiplying the solids composition with the transfer coefficients for each element (Doka, 2009). The long-term emissions numbers used the long-term transfer coefficients and the short-term emissions numbers used the short-term emissions values.

Because industrial waste storage facilities like landfills may be required to control emissions by treating leachate water prior to discharge, a parameter was added to provide the ability to divert flows as simply deposited waste rather than being discharged to fresh water. This method discounts any energy required to process leach water and is also applied to all of the leachates when it may be possible to treat for only specific flows.

Additional details regarding input and output flows, including calculation methods, are contained in the associated documentation (referenced in the Citation and Associated Documentation section below).

CITATIONS AND ASSOCIATED DOCUMENTATION
This dataset should be cited as:
National Energy Technology Laboratory (NETL). 2015. NETL Life Cycle Inventory Data - Unit Process: Coal mine tailings storage and disposal; Production mix, underground mine. U.S. Department of Energy, National Energy Technology Laboratory. Last updated: September 2015 (Version 1). Retrieved on [DATE] from [URL for this dataset].

Last updated: September 2015 (Version 1). Retrieved on [DATE] from [URL for this dataset].

. U.S. Department of Energy, National Energy Technology Laboratory.

This dataset is part of the NETL Unit Process Library. The Library offers additional information concerning this dataset in the form of a Detailed Spreadsheet Documentation (DS) file and a Process Documentation File (DF). The DS file is an Excel file that contains all of the parameters, inputs, and outputs for a given system as well as background data, calculations and quality scores. The DF file is a PDF document that contains major assumptions and data sources that are the basis for each unit process. The NETL Unit Process Library is located on the NETL website (netl.doe.gov) under Research / Energy Analysis / Energy Trends and Issues / Life Cycle Analysis / Unit Process Library.

This dataset was converted directly from the DS with additional supporting information provided by the DF. Full citations for the DS and DF are given below.

DS File
National Energy Technology Laboratory (NETL). 2014. NETL Life Cycle Inventory Data – Unit Process: Storage/Disposal Coal Mine Tailings – Version 01. U.S. Department of Energy, National Energy Technology Laboratory. Version 01. Retrieved on 09/18/2015 from: http://www.netl.doe.gov/File%20Library/Research/Energy%20Analysis/Life%20Cycle%20Analysis/UP_Library/DS_Stage1_O_Coal_Tailings_Disposal_2014-01.xlsx.

DF File
National Energy Technology Laboratory (NETL). 2014. NETL Life Cycle Inventory Data – Unit Process: Storage/Disposal Coal Mine Tailings – Version 01. U.S. Department of Energy, National Energy Technology Laboratory. Version 01. Retrieved on 09/18/2015 from: http://www.netl.doe.gov/File%20Library/Research/Energy%20Analysis/Life%20Cycle%20Analysis/UP_Library/DF_Stage1_O_Coal_Tailings_Disposal_2014-01.pdf.

## Technology
This unit process provides a summary of relevant input and output flows associated with disposing or storing coal mine tailings in an impoundment (pond), piles (landfill), or backfill. Coal mine tailings are the waste portions of mined coal that are separated from the target mineral(s) during beneficiation (EPA, 2000). Tailings disposal is a significant portion of the overall portion of the overall waste management process at coal mining operations (EPA, 2000). The physical and chemical nature of the tailings is a function of the coal being processed and the operations used for beneficiation (EPA, 2000). In the United States, tailings are managed wet or thickened in tailings impoundments; dry in disposal piles; or slurried and used as backfill into underground mines (EPA, 2000).

Additional details regarding input and output flows, including calculation methods, are contained in the associated documentation (referenced in the Citation and Associated Documentation section in the Description field).

## Parameters
- h2o_Iron_s: 2.52054e-6
  [kg/kg] kg of Iron, ion leached to water per kg of coal tailings_Short-Term
- h2o_Potassium: 0.00129992; = IF(disposal_time=0;h2o_Potassi_s;h2o_Potassi_l)*waste_to_env
  [kg/kg] kg of Potassium, ion leached to fresh water per kg of coal tailings
- h2o_Cadmium_l: 6.397e-7
  [kg/kg] kg of Cadmium, ion leached to water per kg of coal tailings_Long-Term
- h2o_Nickel_l: 1.629e-5
  [kg/kg] kg of Nickel, ion leached to water per kg of coal tailings_Long-Term
- h2o_Scandium: 2.84468e-9; = IF(disposal_time=0;h2o_Scandiu_s;h2o_Scandiu_l)*waste_to_env
  [kg/kg] kg of Scandium leached to fresh water per kg of coal tailings
- wst_Thallium: 1.25761e-12; = IF(disposal_time=0;h2o_Thalliu_s;h2o_Thalliu_l)*(1-waste_to_env)
  [kg/kg] kg of Thallium leached and either retained or treated per kg of coal tailings
- h2o_Chromiu_s: 8.75952e-9
  [kg/kg] kg of Chromium VI leached to water per kg of coal tailings_Short-Term
- disposal_time: 0
  [dimensionless] 0 - Short-Term, 1 - Long-Term
- h2o_Potassi_l: 0.00131305
  [kg/kg] kg of Potassium, ion leached to water per kg of coal tailings_Long-Term
- h2o_Chlorid_s: 0.000149075
  [kg/kg] kg of Chloride leached to water per kg of coal tailings_Short-Term
- wst_Beryllium: 1.33973e-10; = IF(disposal_time=0;h2o_Berylli_s;h2o_Berylli_l)*(1-waste_to_env)
  [kg/kg] kg of Beryllium leached and either retained or treated per kg of coal tailings
- wst_Aluminum: 6.7295e-9; = IF(disposal_time=0;h2o_Aluminu_s;h2o_Aluminu_l)*(1-waste_to_env)
  [kg/kg] kg of Aluminum leached and either retained or treated per kg of coal tailings
- wst_Lead: 1.49613e-11; = IF(disposal_time=0;h2o_Lead_s;h2o_Lead_l)*(1-waste_to_env)
  [kg/kg] kg of Lead leached and either retained or treated per kg of coal tailings
- wst_Arsenic: 8.99102e-11; = IF(disposal_time=0;h2o_Arsenic_s;h2o_Arsenic_l)*(1-waste_to_env)
  [kg/kg] kg of Arsenic, ion leached and either retained or treated per kg of coal tailings
- h2o_Stronti_l: 1.938e-5
  [kg/kg] kg of Strontium leached to water per kg of coal tailings_Long-Term
- h2o_Silicon_l: 0.0002391
  [kg/kg] kg of Silicon leached to water per kg of coal tailings_Long-Term
- h2o_Aluminu_s: 6.7295e-7
  [kg/kg] kg of Aluminum leached to water per kg of coal tailings_Short-Term
- h2o_Calcium_l: 0.001101
  [kg/kg] kg of Calcium, ion leached to water per kg of coal tailings_Long-Term
- wst_Mercury: 5.8806e-12; = IF(disposal_time=0;h2o_Mercury_s;h2o_Mercury_l)*(1-waste_to_env)
  [kg/kg] kg of Mercury leached and either retained or treated per kg of coal tailings
- wst_Molybdenum: 2.2695e-10; = IF(disposal_time=0;h2o_Molybde_s;h2o_Molybde_l)*(1-waste_to_env)
  [kg/kg] kg of Molybdenum leached and either retained or treated per kg of coal tailings
- h2o_Fluoride: 6.16869e-7; = IF(disposal_time=0;h2o_Fluorid_s;h2o_Fluorid_l)*waste_to_env
  [kg/kg] kg of Fluoride leached to fresh water per kg of coal tailings
- h2o_Scandiu_l: 2.83782e-7
  [kg/kg] kg of Scandium leached to water per kg of coal tailings_Long-Term
- h2o_Phospha_l: 6.72393e-5
  [kg/kg] kg of Phosphate leached to water per kg of coal tailings_Long-Term
- h2o_Berylli_s: 1.33973e-8
  [kg/kg] kg of Beryllium leached to water per kg of coal tailings_Short-Term
- h2o_Nitrate_l: 0.000188847
  [kg/kg] kg of Nitrate leached to water per kg of coal tailings_Long-Term
- wst_Cadmium: 1.85513e-10; = IF(disposal_time=0;h2o_Cadmium_s;h2o_Cadmium_l)*(1-waste_to_env)
  [kg/kg] kg of Cadmium, ion leached and either retained or treated per kg of coal tailings
- h2o_Barium_l: 5.04504e-5
  [kg/kg] kg of Barium leached to water per kg of coal tailings_Long-Term
- wst_Scandium: 2.87341e-11; = IF(disposal_time=0;h2o_Scandiu_s;h2o_Scandiu_l)*(1-waste_to_env)
  [kg/kg] kg of Scandium leached and either retained or treated per kg of coal tailings
- h2o_Phosphate: 1.10944e-7; = IF(disposal_time=0;h2o_Phospha_s;h2o_Phospha_l)*waste_to_env
  [kg/kg] kg of Phosphate leached to fresh water per kg of coal tailings
- wst_Magnesium: 4.22431e-7; = IF(disposal_time=0;h2o_Magnesi_s;h2o_Magnesi_l)*(1-waste_to_env)
  [kg/kg] kg of Magnesium leached and either retained or treated per kg of coal tailings
- h2o_Titanium: 5.46427e-9; = IF(disposal_time=0;h2o_Titaniu_s;h2o_Titaniu_l)*waste_to_env
  [kg/kg] kg of Titanium, ion leached to fresh water per kg of coal tailings
- h2o_Stronti_s: 6.2016e-7
  [kg/kg] kg of Strontium leached to water per kg of coal tailings_Short-Term
- h2o_Molybde_l: 1.335e-6
  [kg/kg] kg of Molybdenum leached to water per kg of coal tailings_Long-Term
- h2o_Sodium_l: 0.0006855
  [kg/kg] kg of Sodium, ion leached to water per kg of coal tailings_Long-Term
- wst_Iron: 2.52054e-8; = IF(disposal_time=0;h2o_Iron_s;h2o_Iron_i_l)*(1-waste_to_env)
  [kg/kg] kg of Iron, ion leached and either retained or treated per kg of coal tailings
- wst_Antimony: 2.22894e-11; = IF(disposal_time=0;h2o_Antimon_s;h2o_Antimon_l)*(1-waste_to_env)
  [kg/kg] kg of Antimony leached and either retained or treated per kg of coal tailings
- h2o_Tin_s: 1.67844e-7
  [kg/kg] kg of Tin, ion leached to water per kg of coal tailings_Short-Term
- h2o_Lead: 1.48117e-9; = IF(disposal_time=0;h2o_Lead_s;h2o_Lead_l)*waste_to_env
  [kg/kg] kg of Lead leached to fresh water per kg of coal tailings
- wst_Sulfate: 6.41527e-6; = IF(disposal_time=0;h2o_Sulfate_s;h2o_Sulfate_l)*(1-waste_to_env)
  [kg/kg] kg of Sulfate leached and either retained or treated per kg of coal tailings
- wst_Vanadium: 2.42284e-11; = IF(disposal_time=0;h2o_Vanadiu_s;h2o_Vanadiu_l)*(1-waste_to_env)
  [kg/kg] kg of Vanadium, ion leached and either retained or treated per kg of coal tailings
- h2o_Lead_l: 8.96944e-7
  [kg/kg] kg of Lead leached to water per kg of coal tailings_Long-Term
- h2o_Chromium: 8.67192e-9; = IF(disposal_time=0;h2o_Chromiu_s;h2o_Chromiu_l)*waste_to_env
  [kg/kg] kg of Chromium VI leached to fresh water per kg of coal tailings
- h2o_Strontium: 6.13958e-7; = IF(disposal_time=0;h2o_Stronti_s;h2o_Stronti_l)*waste_to_env
  [kg/kg] kg of Strontium leached to fresh water per kg of coal tailings
- h2o_Silver: 2.42168e-9; = IF(disposal_time=0;h2o_Silver_s;h2o_Silver_l)*waste_to_env
  [kg/kg] kg of Silver, ion leached to fresh water per kg of coal tailings
- h2o_Tin: 1.66166e-7; = IF(disposal_time=0;h2o_Tin_s;h2o_Tin_l)*waste_to_env
  [kg/kg] kg of Tin, ion leached to fresh water per kg of coal tailings
- wst_Tungsten: 2.611e-12; = IF(disposal_time=0;h2o_Tungste_s;h2o_Tungste_l)*(1-waste_to_env)
  [kg/kg] kg of Tungsten leached and either retained or treated per kg of coal tailings
- h2o_Thalliu_s: 1.25761e-10
  [kg/kg] kg of Thallium leached to water per kg of coal tailings_Short-Term
- h2o_Calcium: 8.62182e-5; = IF(disposal_time=0;h2o_Calcium_s;h2o_Calcium_l)*waste_to_env
  [kg/kg] kg of Calcium, ion leached to fresh water per kg of coal tailings
- h2o_Fluorid_l: 1.86e-6
  [kg/kg] kg of Fluoride leached to water per kg of coal tailings_Long-Term
- wst_Phosphate: 1.12065e-9; = IF(disposal_time=0;h2o_Phospha_s;h2o_Phospha_l)*(1-waste_to_env)
  [kg/kg] kg of Phosphate leached and either retained or treated per kg of coal tailings
- wst_Chloride: 1.49075e-6; = IF(disposal_time=0;h2o_Chlorid_s;h2o_Chlorid_l)*(1-waste_to_env)
  [kg/kg] kg of Chloride leached and either retained or treated per kg of coal tailings
- h2o_Phospha_s: 1.12065e-7
  [kg/kg] kg of Phosphate leached to water per kg of coal tailings_Short-Term
- h2o_Cobalt_s: 3.80619e-8
  [kg/kg] kg of Cobalt leached to water per kg of coal tailings_Short-Term
- h2o_Vanadiu_s: 2.42284e-9
  [kg/kg] kg of Vanadium, ion leached to water per kg of coal tailings_Short-Term
- h2o_Nickel_s: 1.77561e-7
  [kg/kg] kg of Nickel, ion leached to water per kg of coal tailings_Short-Term
- h2o_Zinc_i_l: 5.427e-5
  [kg/kg] kg of Zinc, ion leached to water per kg of coal tailings_Long-Term
- h2o_Molybde_s: 2.2695e-8
  [kg/kg] kg of Molybdenum leached to water per kg of coal tailings_Short-Term
- h2o_Chromiu_l: 4.7496e-6
  [kg/kg] kg of Chromium VI leached to water per kg of coal tailings_Long-Term
- h2o_Sulfate_s: 0.000641527
  [kg/kg] kg of Sulfate leached to water per kg of coal tailings_Short-Term
- h2o_Fluorid_s: 6.231e-7
  [kg/kg] kg of Fluoride leached to water per kg of coal tailings_Short-Term
- h2o_Sodium: 0.000107905; = IF(disposal_time=0;h2o_Sodium_s;h2o_Sodium_l)*waste_to_env
  [kg/kg] kg of Sodium, ion leached to fresh water per kg of coal tailings
- h2o_Mangane_l: 7.254e-5
  [kg/kg] kg of Manganese leached to water per kg of coal tailings_Long-Term
- h2o_Copper_l: 1.12074e-5
  [kg/kg] kg of Copper, ion leached to water per kg of coal tailings_Long-Term
- wst_Copper: 1.8692e-10; = IF(disposal_time=0;h2o_Copper_s;h2o_Copper_l)*(1-waste_to_env)
  [kg/kg] kg of Copper, ion leached and either retained or treated per kg of coal tailings
- wst_Zinc: 3.7175e-9; = IF(disposal_time=0;h2o_Zinc_s;h2o_Zinc_i_l)*(1-waste_to_env)
  [kg/kg] kg of Zinc, ion leached and either retained or treated per kg of coal tailings
- h2o_Chloride: 0.000147584; = IF(disposal_time=0;h2o_Chlorid_s;h2o_Chlorid_l)*waste_to_env
  [kg/kg] kg of Chloride leached to fresh water per kg of coal tailings
- wst_Potassium: 1.31305e-5; = IF(disposal_time=0;h2o_Potassi_s;h2o_Potassi_l)*(1-waste_to_env)
  [kg/kg] kg of Potassium, ion leached and either retained or treated per kg of coal tailings
- h2o_Cobalt: 3.76813e-8; = IF(disposal_time=0;h2o_Cobalt_s;h2o_Cobalt_l)*waste_to_env
  [kg/kg] kg of Cobalt leached to fresh water per kg of coal tailings
- h2o_Tungsten: 2.58489e-10; = IF(disposal_time=0;h2o_Tungste_s;h2o_Tungste_l)*waste_to_env
  [kg/kg] kg of Tungsten leached to fresh water per kg of coal tailings
- h2o_Silver_l: 3.54e-9
  [kg/kg] kg of Silver, ion leached to water per kg of coal tailings_Long-Term
- h2o_Silicon: 1.42025e-6; = IF(disposal_time=0;h2o_Silicon_s;h2o_Silicon_l)*waste_to_env
  [kg/kg] kg of Silicon leached to fresh water per kg of coal tailings
- waste_to_env: 0.99
  [kg/kg] kg of leachate that is emitted to fresh water per kg of total leachate
- h2o_Tin_l: 1.71232e-5
  [kg/kg] kg of Tin, ion leached to water per kg of coal tailings_Long-Term
- h2o_Antimon_s: 2.22894e-9
  [kg/kg] kg of Antimony leached to water per kg of coal tailings_Short-Term
- h2o_Titaniu_l: 3.30893e-6
  [kg/kg] kg of Titanium, ion leached to water per kg of coal tailings_Long-Term
- wst_Silver: 2.44614e-11; = IF(disposal_time=0;h2o_Silver_s;h2o_Silver_l)*(1-waste_to_env)
  [kg/kg] kg of Silver, ion leached and either retained or treated per kg of coal tailings
- h2o_Seleniu_l: 7.45953e-7
  [kg/kg] kg of Selenium leached to water per kg of coal tailings_Long-Term
- wst_Sodium: 1.08995e-6; = IF(disposal_time=0;h2o_Sodium_s;h2o_Sodium_l)*(1-waste_to_env)
  [kg/kg] kg of Sodium, ion leached and either retained or treated per kg of coal tailings
- h2o_Iron_i_l: 0.00151354
  [kg/kg] kg of Iron, ion leached to water per kg of coal tailings_Long-Term
- h2o_Molybdenum: 2.2468e-8; = IF(disposal_time=0;h2o_Molybde_s;h2o_Molybde_l)*waste_to_env
  [kg/kg] kg of Molybdenum leached to fresh water per kg of coal tailings
- h2o_Copper_s: 1.8692e-8
  [kg/kg] kg of Copper, ion leached to water per kg of coal tailings_Short-Term
- h2o_Mangane_s: 3.71405e-6
  [kg/kg] kg of Manganese leached to water per kg of coal tailings_Short-Term
- h2o_Magnesi_s: 4.22431e-5
  [kg/kg] kg of Magnesium leached to water per kg of coal tailings_Short-Term
- h2o_Beryllium: 1.32633e-8; = IF(disposal_time=0;h2o_Berylli_s;h2o_Berylli_l)*waste_to_env
  [kg/kg] kg of Beryllium leached to fresh water per kg of coal tailings
- wst_Cobalt: 3.80619e-10; = IF(disposal_time=0;h2o_Cobalt_s;h2o_Cobalt_l)*(1-waste_to_env)
  [kg/kg] kg of Cobalt leached and either retained or treated per kg of coal tailings
- h2o_Barium: 8.30269e-8; = IF(disposal_time=0;h2o_Barium_s;h2o_Barium_l)*waste_to_env
  [kg/kg] kg of Barium leached to fresh water per kg of coal tailings
- h2o_Manganese: 3.67691e-6; = IF(disposal_time=0;h2o_Mangane_s;h2o_Mangane_l)*waste_to_env
  [kg/kg] kg of Manganese leached to fresh water per kg of coal tailings
- h2o_Arsenic_s: 8.99102e-9
  [kg/kg] kg of Arsenic, ion leached to water per kg of coal tailings_Short-Term
- h2o_Nitrate: 1.30311e-5; = IF(disposal_time=0;h2o_Nitr_s;h2o_Nitrate_l)*waste_to_env
  [kg/kg] kg of Nitrate leached to fresh water per kg of coal tailings
- wst_Fluoride: 6.231e-9; = IF(disposal_time=0;h2o_Fluorid_s;h2o_Fluorid_l)*(1-waste_to_env)
  [kg/kg] kg of Fluoride leached and either retained or treated per kg of coal tailings
- wst_Tin: 1.67844e-9; = IF(disposal_time=0;h2o_Tin_s;h2o_Tin_l)*(1-waste_to_env)
  [kg/kg] kg of Tin, ion leached and either retained or treated per kg of coal tailings
- h2o_Zinc: 3.68032e-7; = IF(disposal_time=0;h2o_Zinc_s;h2o_Zinc_i_l)*waste_to_env
  [kg/kg] kg of Zinc, ion leached to fresh water per kg of coal tailings
- wst_Titanium: 5.51946e-11; = IF(disposal_time=0;h2o_Titaniu_s;h2o_Titaniu_l)*(1-waste_to_env)
  [kg/kg] kg of Titanium, ion leached and either retained or treated per kg of coal tailings
- wst_Barium: 8.38656e-10; = IF(disposal_time=0;h2o_Barium_s;h2o_Barium_l)*(1-waste_to_env)
  [kg/kg] kg of Barium leached and either retained or treated per kg of coal tailings
- h2o_Tungste_s: 2.611e-10
  [kg/kg] kg of Tungsten leached to water per kg of coal tailings_Short-Term
- h2o_Zinc_s: 3.7175e-7
  [kg/kg] kg of Zinc, ion leached to water per kg of coal tailings_Short-Term
- h2o_Magnesi_l: 0.0008586
  [kg/kg] kg of Magnesium leached to water per kg of coal tailings_Long-Term
- h2o_Mercury_l: 4.86e-8
  [kg/kg] kg of Mercury leached to water per kg of coal tailings_Long-Term
- h2o_Lead_s: 1.49613e-9
  [kg/kg] kg of Lead leached to water per kg of coal tailings_Short-Term
- h2o_Scandiu_s: 2.87341e-9
  [kg/kg] kg of Scandium leached to water per kg of coal tailings_Short-Term
- h2o_Sulfate: 0.000635112; = IF(disposal_time=0;h2o_Sulfate_s;h2o_Sulfate_l)*waste_to_env
  [kg/kg] kg of Sulfate leached to fresh water per kg of coal tailings
- h2o_Nickel: 1.75785e-7; = IF(disposal_time=0;h2o_Nickel_s;h2o_Nickel_l)*waste_to_env
  [kg/kg] kg of Nickel, ion leached to fresh water per kg of coal tailings
- wst_Strontium: 6.2016e-9; = IF(disposal_time=0;h2o_Stronti_s;h2o_Stronti_l)*(1-waste_to_env)
  [kg/kg] kg of Strontium leached and either retained or treated per kg of coal tailings
- h2o_Chlorid_l: 0.000445
  [kg/kg] kg of Chloride leached to water per kg of coal tailings_Long-Term
- h2o_Mercury: 5.82179e-10; = IF(disposal_time=0;h2o_Mercury_s;h2o_Mercury_l)*waste_to_env
  [kg/kg] kg of Mercury leached to fresh water per kg of coal tailings
- wst_Selenium: 8.36304e-11; = IF(disposal_time=0;h2o_Seleniu_s;h2o_Seleniu_l)*(1-waste_to_env)
  [kg/kg] kg of Selenium leached and either retained or treated per kg of coal tailings
- h2o_Seleniu_s: 8.36304e-9
  [kg/kg] kg of Selenium leached to water per kg of coal tailings_Short-Term
- h2o_Tungste_l: 1.869e-8
  [kg/kg] kg of Tungsten leached to water per kg of coal tailings_Long-Term
- wst_Nitrate: 1.31627e-7; = IF(disposal_time=0;h2o_Nitr_s;h2o_Nitrate_l)*(1-waste_to_env)
  [kg/kg] kg of Nitrate leached and either retained or treated per kg of coal tailings
- h2o_Iron: 2.49533e-6; = IF(disposal_time=0;h2o_Iron_s;h2o_Iron_i_l)*waste_to_env
  [kg/kg] kg of Iron, ion leached to fresh water per kg of coal tailings
- h2o_Thallium: 1.24503e-10; = IF(disposal_time=0;h2o_Thalliu_s;h2o_Thalliu_l)*waste_to_env
  [kg/kg] kg of Thallium leached to fresh water per kg of coal tailings
- h2o_Vanadiu_l: 1.33734e-6
  [kg/kg] kg of Vanadium, ion leached to water per kg of coal tailings_Long-Term
- h2o_Barium_s: 8.38656e-8
  [kg/kg] kg of Barium leached to water per kg of coal tailings_Short-Term
- h2o_Titaniu_s: 5.51946e-9
  [kg/kg] kg of Titanium, ion leached to water per kg of coal tailings_Short-Term
- h2o_Aluminu_l: 0.00040377
  [kg/kg] kg of Aluminum leached to water per kg of coal tailings_Long-Term
- wst_Silicon: 1.4346e-8; = IF(disposal_time=0;h2o_Silicon_s;h2o_Silicon_l)*(1-waste_to_env)
  [kg/kg] kg of Silicon leached and either retained or treated per kg of coal tailings
- h2o_Arsenic: 8.90111e-9; = IF(disposal_time=0;h2o_Arsenic_s;h2o_Arsenic_l)*waste_to_env
  [kg/kg] kg of Arsenic, ion leached to fresh water per kg of coal tailings
- h2o_Cadmium: 1.83658e-8; = IF(disposal_time=0;h2o_Cadmium_s;h2o_Cadmium_l)*waste_to_env
  [kg/kg] kg of Cadmium, ion leached to fresh water per kg of coal tailings
- wst_Manganese: 3.71405e-8; = IF(disposal_time=0;h2o_Mangane_s;h2o_Mangane_l)*(1-waste_to_env)
  [kg/kg] kg of Manganese leached and either retained or treated per kg of coal tailings
- h2o_Nitr_s: 1.31627e-5
  [kg/kg] kg of Nitrate leached to water per kg of coal tailings
- h2o_Cadmium_s: 1.85513e-8
  [kg/kg] kg of Cadmium, ion leached to water per kg of coal tailings_Short-Term
- h2o_Sodium_s: 0.000108995
  [kg/kg] kg of Sodium, ion leached to water per kg of coal tailings_Short-Term
- wst_Nickel: 1.77561e-9; = IF(disposal_time=0;h2o_Nickel_s;h2o_Nickel_l)*(1-waste_to_env)
  [kg/kg] kg of Nickel, ion leached and either retained or treated per kg of coal tailings
- h2o_Magnesium: 4.18207e-5; = IF(disposal_time=0;h2o_Magnesi_s;h2o_Magnesi_l)*waste_to_env
  [kg/kg] kg of Magnesium leached to fresh water per kg of coal tailings
- wst_Chromium: 8.75952e-11; = IF(disposal_time=0;h2o_Chromiu_s;h2o_Chromiu_l)*(1-waste_to_env)
  [kg/kg] kg of Chromium VI leached and either retained or treated per kg of coal tailings
- h2o_Calcium_s: 8.70891e-5
  [kg/kg] kg of Calcium, ion leached to water per kg of coal tailings_Short-Term
- h2o_Copper: 1.85051e-8; = IF(disposal_time=0;h2o_Copper_s;h2o_Copper_l)*waste_to_env
  [kg/kg] kg of Copper, ion leached to fresh water per kg of coal tailings
- h2o_Berylli_l: 5.928e-7
  [kg/kg] kg of Beryllium leached to water per kg of coal tailings_Long-Term
- h2o_Sulfate_l: 0.016663
  [kg/kg] kg of Sulfate leached to water per kg of coal tailings_Long-Term
- h2o_Aluminum: 6.6622e-7; = IF(disposal_time=0;h2o_Aluminu_s;h2o_Aluminu_l)*waste_to_env
  [kg/kg] kg of Aluminum leached to fresh water per kg of coal tailings
- h2o_Antimon_l: 1.281e-7
  [kg/kg] kg of Antimony leached to water per kg of coal tailings_Long-Term
- wst_Calcium: 8.70891e-7; = IF(disposal_time=0;h2o_Calcium_s;h2o_Calcium_l)*(1-waste_to_env)
  [kg/kg] kg of Calcium, ion leached and either retained or treated per kg of coal tailings
- h2o_Thalliu_l: 1.28089e-8
  [kg/kg] kg of Thallium leached to water per kg of coal tailings_Long-Term
- h2o_Vanadium: 2.39861e-9; = IF(disposal_time=0;h2o_Vanadiu_s;h2o_Vanadiu_l)*waste_to_env
  [kg/kg] kg of Vanadium, ion leached to fresh water per kg of coal tailings
- h2o_Potassi_s: 0.00131305
  [kg/kg] kg of Potassium, ion leached to water per kg of coal tailings_Short-Term
- h2o_Cobalt_l: 3.429e-6
  [kg/kg] kg of Cobalt leached to water per kg of coal tailings_Long-Term
- h2o_Silver_s: 2.44614e-9
  [kg/kg] kg of Silver, ion leached to water per kg of coal tailings_Short-Term
- h2o_Selenium: 8.27941e-9; = IF(disposal_time=0;h2o_Seleniu_s;h2o_Seleniu_l)*waste_to_env
  [kg/kg] kg of Selenium leached to fresh water per kg of coal tailings
- h2o_Mercury_s: 5.8806e-10
  [kg/kg] kg of Mercury leached to water per kg of coal tailings_Short-Term
- h2o_Silicon_s: 1.4346e-6
  [kg/kg] kg of Silicon leached to water per kg of coal tailings_Short-Term
- h2o_Antimony: 2.20665e-9; = IF(disposal_time=0;h2o_Antimon_s;h2o_Antimon_l)*waste_to_env
  [kg/kg] kg of Antimony leached to fresh water per kg of coal tailings
- h2o_Arsenic_l: 3.12905e-6
  [kg/kg] kg of Arsenic, ion leached to water per kg of coal tailings_Long-Term

## Reference product
- Coal mine tailings storage and disposal; Production mix, underground mine: 1 kg; data quality (2,2,2,2,2)

## Inputs from nature
- Water (Unspecified) [Water]: 0.00497 l; data quality (2,2,2,2,2)

## Emissions to nature
All rows: data quality (2,2,2,2,2)
- Sodium, ion (water), water: 0.000107905 kg; = h2o_Sodium
- Lead (water), water: 1.48117e-9 kg; = h2o_Lead
- Zinc, ion (water) [Deposited goods]: 3.7175e-9 kg; = wst_Zinc
- Potassium, ion (water) [Deposited goods]: 1.31305e-5 kg; = wst_Potassium
- Manganese (water) [Deposited goods]: 3.71405e-8 kg; = wst_Manganese
- Chromium VI (water), water: 8.67192e-9 kg; = h2o_Chromium
- Barium (water), water: 8.30269e-8 kg; = h2o_Barium
- Fluoride (water) [Deposited goods]: 6.231e-9 kg; = wst_Fluoride
- Cobalt (water) [Deposited goods]: 3.80619e-10 kg; = wst_Cobalt
- Sulfate (water) [Deposited goods]: 6.41527e-6 kg; = wst_Sulfate
- Magnesium (water), water: 4.18207e-5 kg; = h2o_Magnesium
- Vanadium, ion (water) [Deposited goods]: 2.42284e-11 kg; = wst_Vanadium
- Zinc, ion (water), water: 3.68032e-7 kg; = h2o_Zinc
- Tin, ion (water) [Deposited goods]: 1.67844e-9 kg; = wst_Tin
- Magnesium (water) [Deposited goods]: 4.22431e-7 kg; = wst_Magnesium
- Arsenic, ion (water) [Deposited goods]: 8.99102e-11 kg; = wst_Arsenic
- Calcium, ion (water) [Deposited goods]: 8.70891e-7 kg; = wst_Calcium
- Molybdenum (water) [Deposited goods]: 2.2695e-10 kg; = wst_Molybdenum
- Titanium, ion (water), water: 5.46427e-9 kg; = h2o_Titanium
- Scandium (water), water: 2.84468e-9 kg; = h2o_Scandium
- Calcium, ion (water), water: 8.62182e-5 kg; = h2o_Calcium
- Potassium, ion (water), water: 0.00129992 kg; = h2o_Potassium
- Chloride (water), water: 0.000147584 kg; = h2o_Chloride
- Aluminum (water), water: 6.6622e-7 kg; = h2o_Aluminum
- Arsenic, ion (water), water: 8.90111e-9 kg; = h2o_Arsenic
- Selenium (water), water: 8.27941e-9 kg; = h2o_Selenium
- Chromium VI (water) [Deposited goods]: 8.75952e-11 kg; = wst_Chromium
- Tungsten (water) [Deposited goods]: 2.611e-12 kg; = wst_Tungsten
- Nickel, ion (water) [Deposited goods]: 1.77561e-9 kg; = wst_Nickel
- Fluoride (water), water: 6.16869e-7 kg; = h2o_Fluoride
- Thallium (water), water: 1.24503e-10 kg; = h2o_Thallium
- Silicon (water), water: 1.42025e-6 kg; = h2o_Silicon
- Aluminum (water) [Deposited goods]: 6.7295e-9 kg; = wst_Aluminum
- Silver, ion (water), water: 2.42168e-9 kg; = h2o_Silver
- Beryllium (water), water: 1.32633e-8 kg; = h2o_Beryllium
- Chloride (water) [Deposited goods]: 1.49075e-6 kg; = wst_Chloride
- Antimony (water), water: 2.20665e-9 kg; = h2o_Antimony
- Copper, ion (water), water: 1.85051e-8 kg; = h2o_Copper
- Sodium, ion (water) [Deposited goods]: 1.08995e-6 kg; = wst_Sodium
- Manganese (water), water: 3.67691e-6 kg; = h2o_Manganese
- Iron, ion (water) [Deposited goods]: 2.52054e-8 kg; = wst_Iron
- Mercury (water) [Deposited goods]: 5.8806e-12 kg; = wst_Mercury
- Barium (water) [Deposited goods]: 8.38656e-10 kg; = wst_Barium
- Molybdenum (water), water: 2.2468e-8 kg; = h2o_Molybdenum
- Cadmium, ion (water) [Deposited goods]: 1.85513e-10 kg; = wst_Cadmium
- Phosphate (water) [Deposited goods]: 1.12065e-9 kg; = wst_Phosphate
- Nitrate (water) [Deposited goods]: 1.31627e-7 kg; = wst_Nitrate
- Thallium (water) [Deposited goods]: 1.25761e-12 kg; = wst_Thallium
- Scandium (water) [Deposited goods]: 2.87341e-11 kg; = wst_Scandium
- Strontium (water) [Deposited goods]: 6.2016e-9 kg; = wst_Strontium
- Nitrate (water), water: 1.30311e-5 kg; = h2o_Nitrate
- Tungsten (water), water: 2.58489e-10 kg; = h2o_Tungsten
- Nickel, ion (water), water: 1.75785e-7 kg; = h2o_Nickel
- Cobalt (water), water: 3.76813e-8 kg; = h2o_Cobalt
- Selenium (water) [Deposited goods]: 8.36304e-11 kg; = wst_Selenium
- Silver, ion (water) [Deposited goods]: 2.44614e-11 kg; = wst_Silver
- Lead (water) [Deposited goods]: 1.49613e-11 kg; = wst_Lead
- Strontium (water), water: 6.13958e-7 kg; = h2o_Strontium
- Vanadium, ion (water), water: 2.39861e-9 kg; = h2o_Vanadium
- Iron, ion (water), water: 2.49533e-6 kg; = h2o_Iron
- Tin, ion (water), water: 1.66166e-7 kg; = h2o_Tin
- Silicon (water) [Deposited goods]: 1.4346e-8 kg; = wst_Silicon
- Mercury (water), water: 5.82179e-10 kg; = h2o_Mercury
- Antimony (water) [Deposited goods]: 2.22894e-11 kg; = wst_Antimony
- Phosphate (water), water: 1.10944e-7 kg; = h2o_Phosphate
- Copper, ion (water) [Deposited goods]: 1.8692e-10 kg; = wst_Copper
- Cadmium, ion (water), water: 1.83658e-8 kg; = h2o_Cadmium
- Titanium, ion (water) [Deposited goods]: 5.51946e-11 kg; = wst_Titanium
- Sulfate (water), water: 0.000635112 kg; = h2o_Sulfate
- Beryllium (water) [Deposited goods]: 1.33973e-10 kg; = wst_Beryllium

## Inventory method
Attributional

## Modelling constants
All elementary and technosphere flows are calculated on a functional unit basis. Calculations involving combustion primarily to generate useful work are done using lower heating values (LHV) and calculations involving combustion primarily to generate useful heat are done using higher heating values (HHV). Unless explicitly stated in the associated reference documents applicable calculations assumed standard atmospheric temperature and pressure (SATP).

## Completeness
All Relevant Flows Captured

## Data selection
Best publically available data

## Data treatment
No allocation applied

## Data collection
No primary data collected

## Intended application
This is a gate-to-gate extraction process and can be used for any type of LCA study.

## Project
National Energy Technology Laboratory (NETL) Unit Process Library

## Sources
- U.S. Environmental Protection Agency (EPA). 2000. Abandoned Mine Site Characterization and Cleanup Handbook, Chapter 2: Overview of Mining and Mineral Processing Operations
- National Energy Technology Laboratory (NETL). 2014. Coal mine tailings storage and disposal; Production mix, underground mine
- West Virginia Department of Environmental Protection. 2009. An Evaluation of the Underground Injection of Coal Slurry in West Virginia -Phase I: Environmental Investigation.
- Gabor Doka. 2009. Life Cycle Inventory of the disposal of lignite spoil, coal spoil, and coal tailings.
