# Alumina, at plant

Dataset: openLCA process, unit process
Category: Alumina Refining
Geography: RNA
Time period: 1998-01-01 to 1998-01-01
Generated by: James Littlefield, Franklin Associates
Published in: Franklin Associates, A Division of ERG
restrictionsDescription: All information can be accessed by everybody.
copyright: false

## General comment
Before it can be used in the manufacture of metallic aluminum, bauxite ore must be refined to nearly pure aluminum oxide, usually called alumina. The Bayer process is the preferred method for bauxite refining. Bauxite is crushed and dissolved in digesters using strong caustic soda and lime solution. The undissolved residue, known as red mud, is filtered out. Sodium aluminate remains in solution, where it is hydrolyzed and precipitated as aluminum hydroxide, which is then calcined to alumina in a rotary kiln. Red mud filtered from the digester liquid is considered solid waste in this analysis. Red mud production rates vary depending on the quality of the ore and the level of alumina recovery.
Important note: although most of the data in the US LCI database has
undergone some sort of review, the database as a whole has not yet
undergone a formal validation process.
Please email comments to lci@nrel.gov.

## Technology
Bayer process for extracting alumina from bauxite.

## Geography
US (49%), Australia (32%), Jamaica (5%), Suriname (13%), and Brazil (1%).

## Reference product
- Alumina, at plant: 1 kg

## Inputs from technosphere
- Residual fuel oil, combusted in industrial boiler: 0.09931 l
- Quicklime, at plant: 0.0457 kg
- Transport, train, diesel powered: 0.4867 t*km
- Electricity, alumina refining regions: 0.10913 kWh
- CUTOFF Disposal, solid waste, unspecified, to unspecified treatment: 1.125 kg
- Diesel, combusted in industrial boiler: 0.0016691 l
- Transport, ocean freighter, diesel powered: 0.28097 t*km
- Natural gas, combusted in industrial boiler: 0.22512 m3
- Transport, ocean freighter, residual fuel oil powered: 2.529 t*km
- Gasoline, combusted in equipment: 2.3367e-5 l
- Sodium hydroxide, production mix, at plant: 0.0739 kg
- Bauxite, at mine: 2.64 kg
- Bituminous coal, combusted in industrial boiler: 0.00859 kg

## Emissions to nature
- COD, Chemical Oxygen Demand: 4.6e-5 kg
- Suspended solids, unspecified: 0.00013 kg
- Particulates, unspecified: 0.00045 kg
- Mercury: 6.1e-10, 2.1e-8 kg (2 entries, compartments not in this file)
- Methane: 1.7e-5 kg
- Metallic ions, unspecified: 6.9e-5 kg
- Iron: 1.6e-8 kg
- Sodium, ion: 0.00196 kg
- BOD5, Biological Oxygen Demand: 6.1e-15 kg
- Dissolved solids: 1e-5 kg
- Fluoride: 7.9e-7 kg
  0
- Calcium, ion: 5.8e-6 kg
- Sulfate: 0.00175 kg
- Oils, unspecified: 3.9e-7 kg
- CFCs and HCFCs, unspecified: 6.7e-10 kg
- Chloride: 7.6e-6 kg
- Acids, unspecified: 6.1e-5 kg
- NMVOC, non-methane volatile organic compounds, unspecified origin: 4.7e-5 kg
- Dinitrogen monoxide: 2.2e-7 kg
- Phenol: 3.9e-10 kg

## Sources
- Franklin Associates, A Division of ERG
- The Aluminum Association
- Energy Information Administration (EIA)
- US Geological Survey
- IAI Statistical Report: Electrical Power
- US EPA
