# Forest residue, dried, stored

Dataset: openLCA process, unit process
Category: Forest Nurseries, Gathering Forest Prod.
Geography: RNA
Time period: 2008-01-01 to 2008-01-01
Generated by: Daniel Inman
Published in: Hsu, D.
restrictionsDescription: All information can be accessed by everybody.
copyright: false

## Technology
average

## Geography
North America

## Time period
2008

## Reference product
- Forest residue, dried, stored: 0.772 t

## Inputs from technosphere
- CUTOFF Dried roughage store, non ventilated: 9.5711e-8 m3
- Forest residue, processed and loaded, at landing system: 0.908 t
- CUTOFF Fodder loading, by self-loading trailer: 2.2653 m3
- CUTOFF Conveyor belt, at plant: 3.4747e-5 m
- Transport, combination truck, diesel powered: 29.2 t*km
  1.12 is conversion from metric tons to short tons.

## Emissions to nature
- Water: 0.136 t
  field dried to 35% is default. Source: personal communication with Jake Jacobson, INL

## Sources
- Hsu, D.
