# Electricity, at eGrid, HIOA, 2010

Dataset: openLCA process, unit process
Category: Utilities
Geography: RNA
Time period: 2010-01-01 to 2010-01-01
Generated by: Samantha Wascavage
Published in: Chris Goemans, Athena Institute
restrictionsDescription: All information can be accessed by everybody.
copyright: false

## General comment
The methodology used to put together the grid information is outlined in reference 1.

## Technology
Typical

## Geography
Oahu electricity grid.

## Reference product
- Electricity, at eGrid, HIOA, 2010: 1 kWh

## Inputs from technosphere
- CUTOFF Electricity, other gases, unspecified, at power plant: 0.002797 kWh
  Other Gases OG, BFG, PG
- CUTOFF Electricity, petroleum, waste oil, at power plant: 0.000309 kWh
  Petroleum (Other Fossil) WO - Waste/Other Oil (including Crude Oil, Liquid Butane, Liquid Propane, Oil Waste, Re-Refined Motor Oil, Sludge Oil, Tar Oil, or other petroleum-based liquid wastes also includes PC, SG)
- CUTOFF Electricity, MSW, non-biogenic, at power plant: 0.01848 kWh
  Other Fuels MSN, OTH, PUR, WH
- Electricity, diesel, at power plant: 0.019129 kWh
  Petroleum (DFO) - Distillate Fuel Oil (includes all Diesel and No. 1, No. 2, and No. 4 Fuel Oils also includes JF, KER)
- Electricity, bituminous coal, at power plant: 0.190925 kWh
  Bituminous Coal - BIT - Anthracite Coal, and Bituminous Coal also includes SC, SGC, WC.
- Electricity, residual fuel oil, at power plant: 0.745893 kWh
  Petroleum (RFO) - Residual Fuel Oil (includes No. 5 and No. 6 Fuel Oils and Bunker C Fuel Oil)
- CUTOFF Electricity, biomass, solid, biogenic MSW, at power plant: 0.022261 kWh
  Solid Renewable Fuels (Biomass) MSB - Municipal Solid Waste – Biogenic Component also includes AB, MSW, OBS, TDF, WDS
- CUTOFF Electricity, biomass,liquid, unspecified, at power plant: 0.000206 kWh
  Black Liquor - BLQ, OBL, SLW, WDL

## Sampling procedure
based on EIA electricity reports for all power plants in the US.

## Sources
- Chris Goemans, Athena Institute
- Statistics Canada
- unspecified
- USEPA
- Statistics Canada
- Statistics Canada
- Statistics Canada
- Statistics Canada
- USEPA
- EIA
- EIA
- EIA
- EIA
- EIA
- EIA
- EIA
- EIA
- EIA
- US DOE
- International Energy Agency
- EIA
