# Seedlings, at greenhouse, US SE

Dataset: openLCA process, unit process
Category: Forest Nurseries, Gathering Forest Prod.
Geography: RNA
Generated by: Jamie Meil
Published in: Maureen Puetmann
restrictionsDescription: All information can be accessed by everybody.
copyright: false

## General comment
Base process data presented with allocations to within process co-products noted. Refer to allocation worksheet for specifics. All allocations performed using mass or volume., general growth related process for tree seedlings
Important note: although most of the data in the US LCI database has
undergone some sort of review, the database as a whole has not yet
undergone a formal validation process.
Please email comments to lci@nrel.gov.

## Technology
Typical

## Geography
US South East

## Reference product
- Seedlings, at greenhouse, US SE: 1 Item(s)

## Inputs from technosphere
- Electricity, at grid, Eastern US, 2000: 0.0156 kWh
- Nitrogen fertilizer, production mix, at plant: 4.54e-5 kg
- Gasoline, combusted in equipment: 0.00654 l
- CUTOFF Potassium fertilizer, production mix, at plant: 4.54e-5 kg
- Phosphorous fertilizer, production mix, at plant: 7.17e-5 kg

## Inputs from nature
- Water: 5.13 l

## Sources
- Leonard R. Johnson
- Maureen Puetmann
- Michael Milota
