# Transport, single unit truck, short-haul, gasoline powered, Northeast

Dataset: openLCA process, unit process
Category: General Freight Trucking
Geography: RNA
Time period: 2010-01-01 to 2010-01-01
Generated by: Nathan Hardesty
Published in: U.S. Environmental Protection Agency (EP
restrictionsDescription: All information can be accessed by everybody.
copyright: false

## General comment
This dataset represents the Northeast U.S. (ME, NH, VT, MA, RI, CT, NY, PA, NJ, MD, DE, DC (Reference 11)) average airborne emissions for operating a gasoline powered, single unit truck in a short-haul manner (trips less than 200 miles [322 km]). The inventory includes all vehicle operation processes, including off-network and refueling activities.
The refinery-to-pump transportation and distribution data are calculated from Argonne National Laboratory's GREET 1.8d.1 model.
The vehicle operation data are calculated from EPA's MOVES2010a model, using the assumptions described in the corresponding detailed spreadsheet. Emissions factors in MOVES2010a are largely based on EPA's Mobile Source Observation Database, which in turn includes data from a variety of vehicle studies (References 7-9).
MOVES2010a acknowledges sources of uncertainty in the model structure, the population and acitivty data, and other model parameters. As of July 2011, the uncertainty calculation function of the model has not been activated.

## Technology
Combustion of gasoline in a single unit, short-haul truck.

## Geography
US

## Reference product
- Transport, single unit truck, short-haul, gasoline powered, Northeast: 1 t*km

## Inputs from technosphere
- Transport, combination truck, average fuel mix: 0.032252 t*km
- Transport, train, diesel powered: 0.0602156 t*km
- Transport, barge, average fuel mix: 0.0208952 t*km
- Transport, ocean freighter, average fuel mix: 0.275744 t*km
- Gasoline, at refinery: 0.110757 l
- Transport, pipeline, unspecified petroleum products: 0.316574 t*km

## Emissions to nature
- Nitrogen oxide: 0.000982539 kg
- Carbon dioxide, fossil: 0.257555 kg
- Dinitrogen monoxide: 1.59875e-5 kg
- Methane: 4.11561e-5 kg
- Ammonia: 9.98331e-6 kg
- Particulates, < 10 um: 1.41629e-5 kg
  PM10 from brakewear.
- Particulates, < 2.5 um: 6.18587e-7 kg
  PM2.5 from tirewear.
- Nitrogen oxides: 0.00106704 kg
- VOC, volatile organic compounds: 0.000498052 kg
- Nitrogen dioxide: 8.45022e-5 kg
- Particulates, < 10 um: 2.57951e-6 kg
  PM10 from tirewear.
- Sulfur dioxide: 5.02785e-6 kg
- Hydrocarbons (other than methane): 0.000482142 kg
- Carbon monoxide, fossil: 0.0111317 kg
- Particulates, < 10 um: 8.73622e-6 kg
  PM10 from organic carbon, elemental carbon, and sulfate particulates.
- Particulates, < 2.5 um: 3.70757e-6 kg
  PM2.5 from brakewear.
- Particulates, < 2.5 um: 8.04442e-6 kg
  PM2.5 from organic carbon, elemental carbon, and sulfate particulates.

## Sources
- U.S. Environmental Protection Agency (EP
- National Institute of Standards and Tech
- EPA
- U.S. Alternative Fuels and Advanced Vehi
- Transportation Characteristics Branch, U
- Eastern Research Group
- Assessment and Standards Division, Offic
- Assessment and Standards Division, Offic
- Wang, M.
- National Climatic Data Center, National
- Alam, M.
