# Natural gas, processed, for olefins production, at plant

Dataset: openLCA process, unit process
Category: Petrochemical Manufacturing
Geography: RNA
Time period: 2003-01-01 to 2003-01-01
Generated by: Franklin Associates
Published in: THE PLASTICS DIVISION OF THE AMERICAN C
restrictionsDescription: All information can be accessed by everybody.
copyright: false

## General comment
Sulfur was given no coproduct allocation in this process. The amount of H2S in the sour natural gas varies widely depending on where it is extracted. Complete inventory data and metadata are available in full in the final report and appendices, Cradle-to-Gate Life Cycle Inventory of Nine Plastic Resins and Four Polyurethane Precursors. This report has been extensively reviewed within Franklin Associates and has undergone partial critical review by ACC Plastics Division members and is available at: www.americanchemistry.com. Quantities may vary slightly between the reference to main source and and this module due to rounding. Important note: although most of the data in the US LCI database has undergone some sort of review, the database as a whole has not yet undergone a formal validation process. Please email comments to lci@nrel.gov.

## Technology
Removal of heavier hydrocarbons followed by hydrogen sulfide removal with amine solution

## Geography
North America (US and Canada)

## Reference product
- Natural gas, processed, for olefins production, at plant: 1 kg

## Inputs from technosphere
- Electricity, at grid, US, 2008: 0.0213 kWh
- Residual fuel oil, combusted in industrial boiler: 4.96e-5 l
- Natural gas, extracted: 1.01 kg
  This weight reflects material loss at processing. MATERIAL USE.
- Gasoline, combusted in equipment: 4.76e-5 l
- Natural gas, combusted in industrial boiler: 0.0346 m3
- Diesel, combusted in industrial equipment: 5.02e-5 l
  Includes diesel fuel and distillate oil amounts.

## Emissions to nature
- Benzene: 9.6e-5 kg
- Benzene, ethyl-: 1.2e-5 kg
- Sulfur dioxide: 0.0019 kg
- Carbon dioxide, fossil: 0.053 kg
  Updated to reflect the amount of carbon dioxide in extracted natural gas that is removed and vented during acid gas removal; Value calculated from the US GHG Inventory and EIA processed natural gas (2007).
- Methane, fossil: 0.0019 kg
  Updated to adjust for the percentages of natural gas sweetened with and without sulfur recovery and for the hydrogen sulfide concentration in each fraction (previous value assumed all sour gas hydrogen sulfide content and that all hydrogen sulfide was converted to sulfur dioxide).
- Toluene: 0.00015 kg
- Xylene: 8.7e-5 kg
- VOC, volatile organic compounds: 0.00077 kg

## Sampling procedure
Data collected from secondary sources.

## Sources
- THE PLASTICS DIVISION OF THE AMERICAN C
