# Roundwood, hardwood, average, High Intensity Management, NE-NC

Dataset: openLCA process, unit process
Category: Logging
Geography: RNA
Generated by: Maureen Puetmann
Published in: Elaine Oneil
restrictionsDescription: All information can be accessed by everybody.
copyright: true

## General comment
FIA inventory from 1993 to 2003 Allocation on a mass basis.
Important note: although most of the data in the US LCI database has
undergone some sort of review, the database as a whole has not yet
undergone a formal validation process.
Please email comments to lci@nrel.gov.

## Technology
Average technology. Some data extrapolated from similar processes.

## Geography
Northeast/North Central (NE/NC) region of the US : Connecticut, Delaware, Illinois, Indiana, Iowa, Maine, Maryland, Massachusetts, Michigan, Minnesota, Missouri, New Hampshire, New Jersey, New York, Ohio, Pennsylvania, Rhode Island, Vermont, West Virginia, and Wisconsin.

## Reference product
- Roundwood, hardwood, average, High Intensity Management, NE-NC: 106.87 m3
  Ovendry density = 580 kg/m3

## By-products
- Bark, hardwood, average, High Intensity Management, NE-NC: 19614 kg
  Ovendry density = 580 kg/m3
- Pulpwood, hardwood, average, High Intensity Management, NE-NC: 212.15 m3
  Ovendry density = 580 kg/m3

## Inputs from technosphere
- Loader operation, large, NE-NC: 24.224 h
  Based on a rate of 0.08 standard machine hours per m3
- Chainsawing, delimbing, NE-NC: 31.034 h
  Based on a rate of 0.10 standard machine hours per m3
- Skidding, wheeled cable skidder, 120-160 HP: 58.11 h
  Based on a rate of 0.18 standard machine hours per m3
- Chainsawing, hand felling, NE-NC: 61.946 h
  Based on a rate of 0.19 standard machine hours per m3

## Inputs from nature
- Carbon dioxide, in air: 35933 kg
  Based on carbon content of bark
- Carbon dioxide, in air: 113560 kg
  Based on carbon content of roundwood
- Carbon dioxide, in air: 225430 kg
  Based on carbon content of pulpwood
- Wood, hard, NE-NC, standing: 352.84 m3

## Sampling procedure
Harvesting production, cost and fuel consumption rates were assimilated from existing studies of harvesting equipment typical of the systems used to harvest sites in the region. These studies included both personal interviews with timber harvesting contractors and published information. The costs, production and consumption rates were
developed for equipment options within each component of the system. Harvesting systems were developed as combinations of these harvesting components. Although there are many combinations of harvesting equipment and systems that can be used for harvesting timber, this analysis assumes the use of the most common systems.

## Sources
- Elaine Oneil
- Maureen Puettmann
