# Switchgrass, production, US, 2022

Dataset: openLCA process, unit process
Geography: RNA
Time period: 2010-01-01 to 2100-12-31
Generated by: Daniel Inman
Published in: Hsu, D.
restrictionsDescription: All information can be accessed by everybody.
copyright: false

## General comment
US switchgrass production (1 hectare) for 2022. Based on projections from Sokhansanj et al. 2009 and MacLaughlin and Kszos 2005. The mean swithgrass yield in the US in 2008 was estimated to be 11.3 Mg per ha, this includes both upland and lowland varieties. The projected 2022 yield was determined by the following (2022 yield = (2008 yield)*(1+.02)^14, where the 2008 yield = 11.2 Mg per hectare, 0.02 is the 2% annual yield improvement, and 14 is the number of years. The annual rate of yield increase is estimated to be 2%. This process Includes all crop productin processes from field preperation to harvest and baling. Assuming a 10-year stand. Transport and storage of bales is not included.

## Technology
Future technology

## Geography
North America

## Time period
2010 and after

## Reference product
- Switchgrass, production, US, 2022: 14800 kg

## Inputs from technosphere
- Pesticide, Switchgrass: 1 ha
  Fertilizer data based on ISU 2000 and Perrin et al., 2008
- Fertilizer, switchgrass, 2022: 1 ha
- Planting, switchgrass, 2022: 1 ha
- CUTOFF Tillage, rotary cultivator: 0.1 ha
  assuming only plowed once in 10yr
- CUTOFF Tillage, rolling: 0.1 ha
  assuming only plowed once in 10yr

## Inputs from nature
- Energy, from biomass: 226000 MJ
  energy balance for switchgrass. From Pyllis database http://www.ecn.nl/phyllis/
- Occupation, pasture and meadow, intensive: 10 ha
  occupation based on 10 years of production
- Transformation, from permanent crop: 0.333 ha
  transformation is equally divided between between the land classes. This is temporary pending better information
- Transformation, from pasture and meadow: 0.333 ha
  (same comment as for Transformation, from permanent crop)
- Transformation, from arable: 0.333 ha
  (same comment as for Transformation, from permanent crop)
- Carbon dioxide: 21800 kg
  Carbon balance, based on SG being 48% C, whole plant-NREL compositional analysis. Adjusted for 15% moisture

## Sources
- Hsu, D.
- SimaPro
