# Aluminum, secondary, ingot, from beverage cans, at plant

Dataset: openLCA process, unit process
Category: Other Aluminum Rolling and Drawing
Geography: RNA
Time period: 1998-01-01 to 1998-01-01
Generated by: James Littlefield, Franklin Associates
Published in: Franklin Associates
restrictionsDescription: All information can be accessed by everybody.
copyright: false

## General comment
Separate unit processes are shown for automotive and UBC (used beverage container) scrap; however, it was determined that the recovery rates and processing requirements for these 2 markets are similar, and thus the results for the 2 markets are the same. Atmospheric, waterborne, and solid waste emissions represent process emissions only, not fuel combustion emissions.,
Important note: although most of the data in the US LCI database has
undergone some sort of review, the database as a whole has not yet
undergone a formal validation process.
Please email comments to lci@nrel.gov.

## Geography
North America

## Reference product
- Aluminum, secondary, ingot, from beverage cans, at plant: 1 kg

## Inputs from technosphere
- Natural gas, combusted in industrial boiler: 0.22285 m3
- CUTOFF Filter media, at plant: 4.79e-5 kg
- CUTOFF Treatment salts, unspecified, at plant: 0.009 kg
- Quicklime, at plant: 2.35e-5 kg
- CUTOFF Disposal, solid waste, unspecified, to sanitary landfill: 0.084164 kg
- CUTOFF Alloying additives, at plant: 0.021 kg
- CUTOFF Grain refiners, at plant: 0.0003 kg
- CUTOFF Aluminum scrap, used beverage cans: 1.032 kg
- Electricity, at grid, US, 2000: 0.66794 kWh
- Aluminum recovery, transport, to plant: 1.032 kg
- CUTOFF Packaging, unspecified, at plant: 1.67e-5 kg
- CUTOFF Treatment gases, unspecified, at plant: 0.003 kg
- CUTOFF Chemicals, unspecified, used for wastewater treatment: 0.008 kg
- CUTOFF Lube oil, at plant: 8.75e-7 kg

## Emissions to nature
- Acids, unspecified: 4.31e-5 kg
- BOD5, Biological Oxygen Demand: 1.35e-9 kg
- NMVOC, non-methane volatile organic compounds: 4.7e-5 kg
- Organic substances, unspecified: 1.29e-6 kg
- Lead: 2.16e-7 kg
- COD, Chemical Oxygen Demand: 8.3e-7 kg
- Suspended solids, unspecified: 2.56e-5 kg
- Heavy metals, unspecified: 2.25e-5 kg
- Dissolved solids: 2.38e-8 kg
- Particulates, unspecified: 1.74e-7 kg

## Sources
- Franklin Associates
- The Aluminum Association
- unspecified
- unspecified
