# Residual fuel oil, combusted in industrial boiler

Dataset: openLCA process, unit process
Category: Steam and Air-Conditioning Supply
Geography: RNA
Time period: 1998-01-01 to 2001-01-01
Generated by: Franklin Associates
Published in: Franklin Associates
restrictionsDescription: All information can be accessed by everybody.
copyright: false

## General comment
Important note: although most of the data in the US LCI database has
undergone some sort of review, the database as a whole has not yet
undergone a formal validation process.
Please email comments to lci@nrel.gov.

## Technology
Residual oil combustion in average industrial boiler

## Geography
United States

## Reference product
- Residual fuel oil, combusted in industrial boiler: 1 l

## Inputs from technosphere
- Transport, combination truck, average fuel mix: 0.0052453 t*km
  Represents transportation from petroleum refinery to industrial combustion.
- Transport, train, diesel powered: 0.0033554 t*km
  Represents transportation from petroleum refinery to industrial combustion.
- Transport, barge, average fuel mix: 0.028425 t*km
  Represents transportation from petroleum refinery to industrial combustion.
- Residual fuel oil, at refinery: 1 l
- CUTOFF Disposal, solid waste, unspecified, to unspecified treatment: 0.0012702 kg

## Emissions to nature
- Radioactive species, unspecified: 0.099393 kBq
- Selenium: 8.1841e-8 kg
- Lead: 1.8094e-7 kg
- Hydrogen chloride: 8.3807e-5 kg
- Arsenic: 1.5817e-7 kg
- Copper, ion: 4.2906e-8 kg
- Sulfur oxides: 0.0051155 kg
- Iron: 4.2906e-8 kg
- Formaldehyde: 3.9543e-6 kg
- Dinitrogen monoxide: 1.4205e-5 kg
- Beryllium: 3.3312e-9 kg
- Methane, dichloro-, HCC-30: 5.7773e-7 kg
- Particulates, < 10 um: 0.00024267 kg
- Chloride: 8.5811e-9 kg
- Manganese: 3.5948e-7 kg
- Carbon monoxide, fossil: 0.00063922 kg
- Dioxins, measured as 2,3,7,8-tetrachlorodibenzo-p-dioxin: 1.7914e-12 kg
- Mercury: 1.354e-8 kg
- Phenols, unspecified: 4.3531e-7 kg
- Cadmium: 4.7691e-8 kg
- Suspended solids, unspecified: 1.2872e-6 kg
- VOC, volatile organic compounds: 3.5907e-5 kg
- Nitrogen oxides: 0.0070315 kg
- Oils, unspecified: 6.4359e-7 kg
- Carbon dioxide, fossil: 3.262 kg
- Benzene: 2.5643e-8 kg
- Nickel: 1.0125e-5 kg
- Naphthalene: 1.354e-7 kg
- Methane, fossil: 0.00012784 kg
- Ethene, tetrachloro-: 8.3916e-9 kg
- Cobalt: 7.2136e-7 kg
- Chromium: 1.0125e-7 kg

## Sources
- Center for Transportation Research, Argo
- U.S. EPA
- U.S. EPA
- EIA
- U.S. EPA Office of Solid Waste and Emerg
- Franklin Associates
- EPA
- unspecified
