# Injection molding, rigid LLDPE part, at plant

Dataset: openLCA process, unit process
Category: Plastics Product Manufacturing
Geography: RNA
Time period: 2010-01-01 to 2010-01-01
Generated by: Franklin Associates
Published in: THE RIGID PLASTICS PROCESSING GROUP (RPPG) OF THE AMERICAN CHEMISTRY COUNCIL
restrictionsDescription: All information can be accessed by everybody.
copyright: false

## General comment
For each kilogram of plastic part fabrication, the amount of incoming corrugated box material is equivalent to that coming out of the process as it is purchased to be used as shipping packaging. An average of 0.045 kg of rigid plastic part scrap is produced for every kilogram of injection molded parts produced; this scrap is sold for recycling. The remaining solid waste generated from the facilities surveyed in this analysis is landfilled. For every kilogram of injection molded plastic product, 0.0158 kg of solid waste is sent to landfill. Of this solid waste, an average of 84 percent by mass is process waste such as contaminated resin scrap, hydraulic oil, and/or inks; while, 16 percent is packaging waste from incoming materials. The small (<1%) mass imbalance is due to variability in data availability for, and weighting of, amounts of ancillary inputs and waste and emission outputs. The packaging inputs and printing emissions in this data set represent the average reported per kilogram of output across a range of procucts produced at manufacturing facilities. When using this data to represent a specific molded product, users should adjust the amount of packaging and printing emissions as needed based on the actual materials and processes used. Complete inventory data and metadata are available in full in the final report and appendices, Life Cycle Inventory of Plastic Fabrication Processes: Injection Molding and Thermoforming. This report has been extensively reviewed within Franklin Associates and has undergone partial critical review by ACC Rigid Plastics Processing Group (RPPG) members and is available at: www.americanchemistry.com. Quantities may vary slightly between the reference to main source and and this module due to rounding. Important note: although most of the data in the US LCI database has undergone some sort of review, the database as a whole has not yet undergone a formal validation process. Please email comments to lci@nrel.gov.

## Technology
Fabrication of rigid plastic parts by injection moldng. Of the product weight generated by facilities providing data for this analysis, 52 percent is produced from hydraulic machinery, 34 percent from hybrid machinery, and 15 percent from all-electric machines.

## Geography
RNA

## Reference product
- Injection molding, rigid LLDPE part, at plant: 1 kg

## By-products
- Corrugate packaging, from LDPE injection molding, for shipping: 0.1 kg
- LLDPE scrap, from LLDPE injection molding, at plant: 0.045 kg

## Inputs from technosphere
All rows: lognormal geomSd 1
- Petroleum refining, for olefins production, at plant: 0.0013 kg
- CUTOFF Colorant, at plant: 0.0194 kg
- Gasoline, combusted in equipment: 8.3e-5 l
- Polyethylene, linear low density, resin, at plant: 1.034 kg
- Transport, combination truck, diesel powered: 0.031 t*km
- Natural gas, combusted in industrial boiler: 0.0034 m3
- CUTOFF Disposal, solid waste, unspecified, to sanitary landfill: 0.016 kg
- Diesel, combusted in industrial equipment: 8.3e-6 l
- Electricity, at grid, US, 2008: 1.79 kWh
- CUTOFF Converted corrugated box, with average bleaching, at plant: 0.1 kg
- Liquefied petroleum gas, combusted in industrial boiler: 0.00083 l
- Transport, train, diesel powered: 1.87 t*km

## Inputs from nature
- Water, process, unspecified natural origin/m3: 0.00067 m3; lognormal geomSd 1

## Emissions to nature
All rows: lognormal geomSd 1
- Ethyl acetate: 0.0001 kg
- m-Xylene: 1e-6 kg
- Alcohols, c12-14, ethoxylated: 0.0001 kg
- Ethanol: 1e-5, 0.001 kg (2 entries, compartments not in this file)
- Methane, dichloro-, HCC-30: 1e-6 kg
- Methyl ethyl ketone: 0.0001 kg
- VOC, volatile organic compounds: 4.3e-5 kg
- 2-Propanol: 0.0001 kg
- Methanol: 1e-6 kg
- o-Xylene: 1e-7 kg
- p-Xylene: 1e-7 kg
- Particulates, unspecified: 6.7e-6 kg
- Toluene: 1e-5 kg
- Benzene, ethyl-: 1e-7 kg
- Propane: 1e-6 kg

## Sampling procedure
Data are from primary sources.

## Sources
- THE RIGID PLASTICS PROCESSING GROUP (RPPG) OF THE AMERICAN CHEMISTRY COUNCIL
