# Transport, intercity bus, diesel powered, Southeast

Dataset: openLCA process, unit process
Category: Interurban and Rural Bus Transportation
Geography: RNA
Time period: 2010-01-01 to 2010-01-01
Generated by: Nathan Hardesty
Published in: U.S. Environmental Protection Agency (EP
restrictionsDescription: All information can be accessed by everybody.
copyright: false

## General comment
This dataset represents the Southeastern U.S. (AL, FL, GA, NC, SC, VA (Reference 10)) average airborne emissions for operating a diesel powered intercity bus. The inventory includes all vehicle operation processes, including off-network and refueling activities.
The refinery-to-pump transportation and distribution data are calculated from Argonne National Laboratory's GREET 1.8d.1 model.
The vehicle operation data are calculated from EPA's MOVES2010a model, using the assumptions described in the corresponding detailed spreadsheet. Emissions factors in MOVES2010a are largely based on EPA's Mobile Source Observation Database, which in turn includes data from a variety of vehicle studies (References 6-8).
MOVES2010a acknowledges sources of uncertainty in the model structure, the population and acitivty data, and other model parameters. As of July 2011, the uncertainty calculation function of the model has not been activated.

## Technology
Combustion of diesel in an intercity bus.

## Geography
US

## Reference product
- Transport, intercity bus, diesel powered, Southeast: 1 p*km

## Inputs from technosphere
- Transport, ocean freighter, average fuel mix: 0.0340724 t*km
- Transport, barge, average fuel mix: 0.00482065 t*km
- Transport, pipeline, unspecified petroleum products: 0.0502366 t*km
- Transport, combination truck, average fuel mix: 0.00498396 t*km
- Transport, train, diesel powered: 0.00930068 t*km
- Diesel, at refinery: 0.0154609 l

## Emissions to nature
- Methane: 3.66375e-7 kg
- Ammonia: 5.50559e-7 kg
- Nitrogen oxides: 0.00034161 kg
- Sulfur dioxide: 6.72496e-7 kg
- Nitrogen oxide: 0.000315307 kg
- Particulates, < 10 um: 1.99768e-6 kg
  PM10 from brakewear.
- Dinitrogen monoxide: 5.52384e-8 kg
- VOC, volatile organic compounds: 1.58764e-5 kg
- Particulates, < 2.5 um: 5.22954e-7 kg
  PM2.5 from brakewear.
- Carbon monoxide, fossil: 9.49606e-5 kg
- Particulates, < 2.5 um: 1.91279e-5 kg
  PM2.5 from organic carbon, elemental carbon, and sulfate particulates.
- Carbon dioxide, fossil: 0.0405942 kg
- Nitrogen dioxide: 2.63025e-5 kg
- Particulates, < 10 um: 4.67288e-7 kg
  PM10 from tirewear.
- Particulates, < 10 um: 1.97187e-5 kg
  PM10 from organic carbon, elemental carbon, and sulfate particulates.
- Particulates, < 2.5 um: 1.1206e-7 kg
  PM2.5 from tirewear.
- Hydrocarbons (other than methane): 1.54059e-5 kg

## Sources
- U.S. Environmental Protection Agency (EP
- National Institute of Standards and Tech
- EPA
- U.S. Alternative Fuels and Advanced Vehi
- Eastern Research Group
- Assessment and Standards Division, Offic
- Assessment and Standards Division, Offic
- Wang, M.
- National Climatic Data Center, National
- J. Schwieterman
