# Acrylonitrile, at plant

Dataset: openLCA process, unit process
Category: Petrochemical Manufacturing
Geography: RNA
Time period: 2003-01-01 to 2004-01-01
Generated by: Franklin Associates
Published in: THE PLASTICS DIVISION OF THE ACC
restrictionsDescription: All information can be accessed by everybody.
copyright: false

## General comment
Complete inventory data and metadata are available in full in the final report and appendices, Cradle-to-Gate Life Cycle Inventory of Nine Plastic Resins and Four Polyurethane Precursors. This report has been extensively reviewed within Franklin Associates and has undergone partial critical review by ACC Plastics Division members and is available at: www.americanchemistry.com. Quantities may vary slightly between the reference to main source and and this module due to rounding. Important note: although most of the data in the US LCI database has undergone some sort of review, the database as a whole has not yet undergone a formal validation process. Please email comments to lci@nrel.gov.

## Technology
Acrylonitrile production in the U.S. and most of the world is based on the Sohio process. Under heat and pressure, propylene, air, and ammonia are catalytically converted to acrylonitrile using a fluidized bed reactor.

## Geography
Representative of North America (US and Canada)

## Reference product
- Acrylonitrile, at plant: 1 kg

## By-products
- Recovered energy, for acrylonitrile: 0.0051834 MJ

## Inputs from technosphere
- CUTOFF Disposal, solid waste, process, to sanitary landfill: 0.030274 kg
- CUTOFF Disposal, solid waste, process, to waste-to-energy: 4.3032e-6 kg
- CUTOFF Disposal, solid waste, fuel, to municipal incineration: 0.078415 kg
- CUTOFF Disposal, solid waste,process, to municipal incineration: 0.0072768 kg

## Inputs from nature
- Energy, from biomass: 0.0037481 MJ
- Salt, unspecified: 0.010777 kg
  Franklin Associates uses a default as opposed to Egalitarian approach in collecting data for water use. During data collection, water use data were only requested and compiled in terms of 'evaporative' or consumptive use (i.e., ultimate withdraws, evaporation, or incorporation into the product). Data were not collected to determine reliable averages for non-evaporative water use. In other words, averages for water inputs and outputs are not available for this unit process. Consumptive use includes: water incorporated into the product, water evaporated during the process, and/or water used and released to a body other than that from which it was drawn.
- Energy, solar: 0.00038198 MJ
- Gas, natural, in ground: 0.77769 kg
  This flow represents the amount of natural gas that is a material input for producing the resin output. The energy content of the natural gas used as EMR/feedstock is 49.8 MJ per kg. The energy content multiplied by the mass should be considered an Energy of Material Resource (EMR)/feedstock energy.
- Uranium oxide, 332 GJ per kg, in ore: 4.5087e-6 kg
- Water, consumptive use, unspecified origin/m3: 0.010777 m3
- Energy, kinetic (in wind), converted: 0.0090003 MJ
- Nitrogen, in air: 0.18774 kg
- Oil, crude, in ground: 0.10763 kg
  This flow represents the amount of crude oil that is used for fuel. The energy content of the crude oil used for fuel is 43.7 MJ per kg.
- Oil, crude, in ground: 0.37096 kg
  This flow represents the amount of crude oils that is a material input for producing the resin output. The energy content of the crude oil used as EMR/feedstock is 43.7 MJ per kg. The energy content multiplied by the mass should be considered an Energy of Material Resource (EMR)/feedstock energy.
- Energy, from hydro power: 0.17284 MJ
- Energy, unspecified: 0.012182 MJ
  Energy unspecified reflects "other fossil" fuels
- Oxygen, in air: 1.19 kg
- Gas, natural, in ground: 0.5519 m3
  This flow represents the amount of natural gas that is used for fuel. The energy content of the natural gas used for fuel is 36.7 MJ per m3.
- Coal, lignite, in ground: 0.017687 kg
- Coal, unprocessed bituminous, in ground: 0.18398 kg
- Energy, geothermal: 0.0090958 MJ

## Emissions to nature
- Suspended solids, unspecified: 0.0040512 kg
- Fluorene: 1.995e-9, 7.8494e-11 kg (2 entries, compartments not in this file)
- t-Butyl methyl ether: 1.4732e-12 kg
- Radionuclides (Including Radon): 6.409e-6 kg
- Cyanide: 1.0523e-10, 1.5958e-11 kg (2 entries, compartments not in this file)
- Lead-210/kg: 4.0837e-17 kg
- Antimony: 2.4793e-9, 2.2063e-8 kg (2 entries, compartments not in this file)
- Zinc: 9.0147e-7, 2.5334e-10 kg (2 entries, compartments not in this file)
- Biphenyl: 4.7772e-9, 1.4664e-10 kg (2 entries, compartments not in this file)
- Phenols, unspecified: 8.4502e-8, 1.1986e-8 kg (2 entries, compartments not in this file)
- 2-Hexanone: 2.6087e-9 kg
- Titanium, ion: 3.4747e-7 kg
- Benzo(a)anthracene: 6.9006e-12 kg
- Aluminum: 3.7848e-5 kg
- Magnesium: 9.4884e-7, 0.0001613 kg (2 entries, compartments not in this file)
- Hexane: 2.8201e-12 kg
- Acetaldehyde: 1.5389e-8 kg
- Cumene: 2.2309e-13 kg
- Cobalt: 2.4251e-8, 8.7052e-9 kg (2 entries, compartments not in this file)
- Ethylene dibromide: 1.9532e-9 kg
- Methane, chlorotrifluoro-, CFC-13: 9.993e-9 kg
- Particulates, > 2.5 um, and < 10um: 0.00011258 kg
- o-Xylene: 4.2275e-9 kg
- Beryllium: 2.1385e-9, 4.7364e-9 kg (2 entries, compartments not in this file)
- Organic acids: 8.7938e-10 kg
- o-Cresol: 1.132e-8 kg
- Acenaphthylene: 2.1565e-11 kg
- Thallium: 4.7645e-9 kg
- Radioactive species, Nuclides, unspecified: 7.4316 Bq
- Cadmium: 1.1767e-8 kg
- PAH, polycyclic aromatic hydrocarbons: 3.3656e-9 kg
- Bromide: 4.8588e-5 kg
- TOC, Total Organic Carbon: 9.78e-7 kg
- Sulfur: 9.8274e-7 kg
- Tetradecane: 9.2309e-9 kg
- Sulfuric acid, dimethyl ester: 2.0204e-12 kg
- Methane, monochloro-, R-40: 2.2309e-11, 8.9002e-12 kg (2 entries, compartments not in this file)
- Chrysene: 8.6259e-12 kg
- Dinitrogen monoxide: 2.4094e-5 kg
- Nitrogen oxides: 0.006023 kg
- Indeno(1,2,3-cd)pyrene: 5.2619e-12 kg
- Ethene, tetrachloro-: 3.929e-9 kg
- Benzene, 1-methyl-4-(1-methylethyl)-: 2.2096e-11 kg
- Manganese: 5.2324e-8, 1.7219e-6 kg (2 entries, compartments not in this file)
- Lead: 2.0567e-7, 4.3967e-8 kg (2 entries, compartments not in this file)
- Particulates, unspecified: 0.00042831 kg
- Benzene, chloro-: 9.2602e-13 kg
- Phenanthrene: 3.145e-10, 2.329e-10 kg (2 entries, compartments not in this file)
- Mercury: 9.1449e-9, 4.9017e-10 kg (2 entries, compartments not in this file)
- Phenol, 2,4-dimethyl-: 1.1009e-8 kg
- Fluoride: 8.3218e-7, 7.1102e-9 kg (2 entries, compartments not in this file)
- Radium-226/kg: 1.4207e-14 kg
- Benzoic acid: 3.9867e-7 kg
- Benzenes, alkylated, unspecified: 7.3778e-8 kg
- Oils, unspecified: 3.4805e-5 kg
- Surfactants: 5.5951e-8 kg
- Methyl ethyl ketone: 1.6416e-11, 1.78e-11 kg (2 entries, compartments not in this file)
- Naphthalene: 7.1334e-9, 7.3898e-9 kg (2 entries, compartments not in this file)
- Methane, fossil: 0.017066 kg
- Butadiene: 7.8328e-10 kg
- 5-methyl Chrysene: 1.8977e-12 kg
- Methane, chlorodifluoro-, HCFC-22: 9.78e-10 kg
- Furan: 3.8596e-13 kg
- Xylene: 9.877e-5, 1.8246e-7 kg (2 entries, compartments not in this file)
- p-Xylene: 4.2275e-9 kg
- Hydrocarbons, unspecified: 1.3812e-6 kg
- Chloroform: 2.4834e-12 kg
- Phthalate, dioctyl-: 3.0727e-12 kg
- Radioactive species, unspecified: 4882 Bq
- Ethane, 1,2-dichloro-: 1.6837e-12 kg
- n-Hexacosane: 1.4762e-10 kg
- Nickel: 2.5144e-7, 9.0891e-8 kg (2 entries, compartments not in this file)
- Chromium: 3.2907e-8, 9.67e-7 kg (2 entries, compartments not in this file)
- Acenaphthene: 4.3991e-11 kg
- Mercaptans, unspecified: 8.4385e-9 kg
- 4-Methyl-2-pentanone: 9.3302e-10 kg
- Copper: 3.8001e-10, 7.6719e-8 kg (2 entries, compartments not in this file)
- Boron: 1.2299e-6 kg
- Phenol: 1.116e-6, 6.7347e-13 kg (2 entries, compartments not in this file)
- Arsenic, ion: 7.6668e-8 kg
- Hydrogen chloride: 0.00010557 kg
- Naphthalenes, alkylated, unspecified: 1.209e-9 kg
- Benzene: 0.00010963, 4.2728e-7 kg (2 entries, compartments not in this file)
- Organic substances, unspecified: 0.0004685 kg
- Benzo(b,j,k)fluoranthene: 9.4884e-12 kg
- Acetophenone: 6.3138e-13 kg
- Dibenzofuran: 4.2046e-11 kg
- Hydrogen fluoride: 1.2937e-5 kg
- Methane, dichloro-, HCC-30: 3.909e-8 kg
- Hexanoic acid: 8.2564e-8 kg
- Particulates, < 10 um: 0.00012228 kg
- Benzene, ethyl-: 3.3128e-8, 1.3623e-5 kg (2 entries, compartments not in this file)
- Benzo(ghi)perylene: 2.329e-12 kg
- Selenium: 1.1494e-7, 2.3014e-8 kg (2 entries, compartments not in this file)
- Toluene, 2,4-dinitro-: 1.1786e-14 kg
- Carbon monoxide, fossil: 0.00078177 kg
- Propanal: 1.5995e-11 kg
- Sulfide: 8.6303e-8 kg
- Fluoranthene: 6.1244e-11 kg
- Chlorine: 9.78e-8 kg
- Silver: 4.889e-7 kg
- Octadecane: 5.8611e-9 kg
- Kerosene: 1.1461e-7 kg
- Ethane, chloro-: 1.7679e-12 kg
- Sulfur dioxide: 0.0047916 kg
- Dodecane: 2.1601e-8 kg
- Decane: 1.1391e-8 kg
- Vanadium: 3.4925e-8 kg
- Carbon disulfide: 5.4719e-12 kg
- Eicosane: 5.9308e-9 kg
- Dioxins, measured as 2,3,7,8-tetrachlorodibenzo-p-dioxin: 1.0456e-13 kg
- Ammonium chloride: 2.393e-7 kg
- Tin: 8.9907e-8 kg
- Methane, bromo-, Halon 1001: 6.7347e-12 kg
- Molybdenum: 9.0195e-9 kg
- Formaldehyde: 5.4869e-7 kg
- Styrene: 9.78e-10, 1.0523e-12 kg (2 entries, compartments not in this file)
- Aldehydes, unspecified: 8.2784e-8 kg
- Vinyl acetate: 3.199e-13 kg
- Anthracene: 1.8114e-11 kg
- Surfactants, unspecified: 1.4133e-7 kg
- Calcium, ion: 0.00080688 kg
- Methane, tetrachloro-, CFC-10: 6.3592e-10 kg
- Dissolved solids: 0.010102 kg
- Propene: 5.1685e-8 kg
- Ammonia: 0.0004487, 3.7816e-5 kg (2 entries, compartments not in this file)
- Docosane: 2.3662e-10 kg
- Radium-228/kg: 7.2673e-17 kg
- Hydrazine, methyl-: 7.1556e-12 kg
- Benzene, pentamethyl-: 1.6573e-11 kg
- m-Xylene: 1.1482e-8 kg
- Chromium VI: 6.8143e-9 kg
- Particulates, < 2.5 um: 9.7746e-5 kg
- Chloride: 0.0099966 kg
- Ethane, 1,1,1-trichloro-, HCFC-140: 8.4184e-13 kg
- Iron: 7.1525e-5 kg
- Acetone: 2.2745e-9 kg
- Naphthalene, 2-methyl-: 6.0302e-9 kg
- Lithium, ion: 0.00017138 kg
- Methacrylic acid, methyl ester: 8.4184e-13 kg
- Methane: 0.00063309 kg
- 2-Chloroacetophenone: 2.9464e-13 kg
- Carbon monoxide: 0.0021094 kg
- Polycyclic organic matter, unspecified: 2.5437e-8 kg
- Nitrogen, total: 1.2737e-7 kg
- Benzyl chloride: 2.9464e-11 kg
- Arsenic: 4.0177e-8 kg
- Copper, ion: 7.6709e-8 kg
- Cadmium, ion: 1.2412e-8 kg
- NMVOC, non-methane volatile organic compounds, unspecified origin: 0.0008257 kg
- Dibenzothiophene: 4.4321e-11 kg
- Isophorone: 2.4413e-11 kg
- Pyrene: 2.8465e-11 kg
- Sulfate: 0.00012024 kg
- Hydrogen cyanide: 4.7e-5 kg
- Strontium: 2.1393e-5 kg
- Benzo(a)pyrene: 3.2778e-12 kg
- VOC, volatile organic compounds: 0.00097247 kg
- Hexadecane: 2.3629e-8 kg
- Sulfur oxides: 0.00088834 kg
- Bromoform: 1.6416e-12 kg
- Toluene: 4.8327e-7, 0.00017029 kg (2 entries, compartments not in this file)
- p-Cresol: 1.2199e-8 kg
- Hydrogen: 5.0856e-6 kg
- Ethane, 1,2-dibromo-: 5.051e-14 kg
- Fluorene, 1-methyl-: 2.5166e-11 kg
- Yttrium: 2.6385e-9 kg
- Phenanthrenes, alkylated, unspecified: 5.013e-10 kg
- Carbon dioxide, fossil: 1.7661 kg
- Fluorenes, alkylated, unspecified: 4.2757e-9 kg
- Sodium, ion: 0.0023096 kg
- Ammonium, ion: 5.1164e-8 kg
- BOD5, Biological Oxygen Demand: 7.7906e-5 kg
- COD, Chemical Oxygen Demand: 0.0002823 kg
- Barium: 0.00048538 kg

## Sampling procedure
Data for acrylonitrile production is from one confidential source. The company provided ranges for the material inputs and coproducts. The median of these ranges was used in the acrylonitrile dataset.

## Sources
- THE PLASTICS DIVISION OF THE ACC
