# Fuels, burned at uncoated mechanical paper, average production, at mill

Dataset: openLCA process, unit process
Category: Pulp, Paper, and Paperboard Mills
Geography: RNA
Time period: 2006-01-01 to 2006-01-01
Generated by: Caroline Gaudreault
Reviewer: Martha Stevenson
Published in: AF&PA
restrictionsDescription: All information can be accessed by everybody.
copyright: false

## General comment
Uncoated mechanical paper, average North American production, at mill. All flows are production-weighted means. Data were developed for a full LCA that was critically reviewed. Reviewers were: • Martha Stevenson, Chairperson – Private Consultant to the public interest with ten years of experience in sustainability, environmental management, packaging and materials recovery; led the development of the Design Guidelines for Sustainable Packaging and the COMPASS software used to compare the environmental impacts of package designs; • Pascal Lesage – Life cycle assessment consultant, Researcher at École Polytechnique de Montréal [at the Inter-University Research Centre for the Life Cycle of Products, Processes and Services (CIRAIG) in Montreal]; and • Dale Phenicie, Environmental Affairs Consulting – Consultant with 35 years of experience in environmental protection and process consulting for the forest products industry. Has served on several U.S. EPA Task Forces dealing with water quality issues and authored several AF&PA Environmental, Health and Safety/Sustainability reports.

## Technology
current technology mix for uncoated mechanical paper

## Time period
Primary data collected from participating companies and associations for their operational activities are representative for 2006 and 2007.

## Reference product
- Fuels, burned at uncoated mechanical paper, average production, at mill: 8061 MJ

## Inputs from technosphere
- Gasoline, combusted in equipment, at pulp and paper mill (EXCL.): 0.072754 l
  Gasoline and kerosene, assumed to be gasoline.
- Bituminous coal, combusted in industrial boiler, at pulp and paper mill (EXCL.): 45.359 kg
- RFO, combusted in industrial boiler, at pulp and paper mill (EXCL.): 34.021 l
  All combusted on site. Actually received at supplier, not refinery.
- Diesel, combusted in industrial boiler, at pulp and paper mill (EXCL.): 0.7856 l
  Proxy for light fuel oil.
- Hog fuel, self-gen., combusted in ind. boiler, at pulp and paper mill (EXCL.): 55.754 kg
  Combustion of self-generated hogged fuel from pulpwood. Wood inputs are accounted for in the process named Uncoated mechanical paper, average production, at mill
- Hog fuel, pur., combusted in industrial boiler, at pulp and paper mill (EXCL.): 32.602 kg
  Purchased hogged fuel. Typically from wood products manufacturing.
- Natural gas, combusted in industrial boiler, at pulp and paper mill (EXCL.): 93.646 m3
- LPG, combusted in industrial boiler, at pulp and paper mill (EXCL.): 0.14981 l
- TDF, combusted in industrial boiler, at pulp and paper mill (EXCL.): 0.38086 kg
  All combusted. Not present in any database.

## Emissions to nature
- Formaldehyde: 0.00083502 kg
  From spent liquor recovery, non-recyclable paper combustion and wastewater residuals combustion
- Polycyclic organic matter, unspecified: 3.2678e-5 kg
  (same comment as for Formaldehyde)
- Aldehydes, C3: 0.00065719 kg
  (same comment as for Formaldehyde)
- Barium: 0.00032618 kg
  (same comment as for Formaldehyde)
- Cumene: 9.5626e-5 kg
  (same comment as for Formaldehyde)
- Hydrogen sulfide: 0.010243 kg
  Total reduced sulfur assumed to be hydrogen sulfide. From all combustion processes at pulp and paper mill.
- Xylene: 0.00011069 kg
  (same comment as for Formaldehyde)
- Methanol: 0.015504 kg
  (same comment as for Formaldehyde)
- Nickel: 3.9393e-6 kg
  (same comment as for Formaldehyde)
- Carbon disulfide: 6.6391e-5 kg
  (same comment as for Formaldehyde)
- Arsenic: 4.1285e-7 kg
  (same comment as for Formaldehyde)
- Manganese: 0.00012774 kg
  (same comment as for Formaldehyde)
- Biphenyl: 1.8184e-5 kg
  (same comment as for Formaldehyde)
- Selenium: 0.00019892 kg
  (same comment as for Formaldehyde)
- Chloroform: 5.2981e-6 kg
  (same comment as for Formaldehyde)
- Chromium: 1.8989e-5 kg
  (same comment as for Formaldehyde)
- Naphthalene: 2.1474e-5 kg
  (same comment as for Formaldehyde)
- Sulfur dioxide: 2.5249 kg
  From all combustion processes at pulp and paper mill.
- Methane, tetrachloro-, CFC-10: 5.8897e-6 kg
  (same comment as for Formaldehyde)
- Ethane, 1,1,1-trichloro-, HCFC-140: 7.8339e-6 kg
  (same comment as for Formaldehyde)
- Benzene, hexachloro-: 5.052e-10 kg
  (same comment as for Formaldehyde)
- Nitrogen dioxide: 1.1521 kg
  From all combustion processes at pulp and paper mill.
- Methane: 0.0087684 kg
  (same comment as for Formaldehyde)
- Hexane: 7.1085e-5 kg
  (same comment as for Formaldehyde)
- Hydrogen fluoride: 0.0001306 kg
  (same comment as for Formaldehyde)
- Beryllium: 0.00017685 kg
  (same comment as for Formaldehyde)
- Ethane, 1,1,2-trichloro-: 1.7327e-5 kg
  (same comment as for Formaldehyde)
- Vanadium: 2.1042e-7 kg
  (same comment as for Formaldehyde)
- Acrolein: 3.9094e-5 kg
  (same comment as for Formaldehyde)
- Zinc: 2.5777e-5 kg
  (same comment as for Formaldehyde)
- TSP: 0.039096 kg
  (same comment as for Formaldehyde)
- Benzene: 0.00010419 kg
  (same comment as for Formaldehyde)
- Benzene, 1,2,4-trichloro-: 2.2459e-5 kg
  (same comment as for Formaldehyde)
- Dioxin, 2,3,7,8 Tetrachlorodibenzo-p-: 2.3946e-13 kg
  (same comment as for Formaldehyde)
- Cresol: 0.00042899 kg
  (same comment as for Formaldehyde)
- Ethene, tetrachloro-: 2.6263e-6 kg
  (same comment as for Formaldehyde)
- Phenol: 0.001448 kg
  (same comment as for Formaldehyde)
- Dinitrogen monoxide: 0.0061777 kg
  (same comment as for Formaldehyde)
- Ethene, trichloro-: 4.086e-6 kg
  (same comment as for Formaldehyde)
- Antimony: 1.0046e-5 kg
  (same comment as for Formaldehyde)
- Cadmium: 1.0473e-5 kg
  (same comment as for Formaldehyde)
- Silver: 1.2559e-5 kg
  (same comment as for Formaldehyde)
- Methane, monochloro-, R-40: 0.0025835 kg
  (same comment as for Formaldehyde)
- Copper: 9.8354e-6 kg
  (same comment as for Formaldehyde)
- Lead: 2.1745e-6 kg
  (same comment as for Formaldehyde)
- Toluene: 7.5213e-5 kg
  (same comment as for Formaldehyde)
- Acetaldehyde: 0.00171 kg
  (same comment as for Formaldehyde)
- Carbon monoxide: 0.059292 kg
  (same comment as for Formaldehyde)
- Sulfuric acid: 0.0029436 kg
  (same comment as for Formaldehyde)
- Carbon dioxide, biogenic: 389.18 kg
  (same comment as for Formaldehyde)
- 4-Methyl-2-pentanone: 7.7111e-5 kg
  (same comment as for Formaldehyde)
- Methane, dichloro-, HCC-30: 4.5613e-5 kg
  (same comment as for Formaldehyde)
- Styrene: 3.0353e-5 kg
  (same comment as for Formaldehyde)
- Benzo(ghi)perylene: 3.9705e-7 kg
  (same comment as for Formaldehyde)
- Hydrogen chloride: 0.008645 kg
  (same comment as for Formaldehyde)
- Mercury: 3.8391e-7 kg
  (same comment as for Formaldehyde)

## Sampling procedure
The survey included results from 8 mills representing 1.7 million short tons per year (TPY), nearly 61% of 2006/2007 North American production volume.

## Sources
- AF&PA
