# Electricity, at eGrid, NYCW, 2010

Dataset: openLCA process, unit process
Category: Utilities
Geography: RNA
Time period: 2010-01-01 to 2010-01-01
Generated by: Samantha Wascavage
Published in: Chris Goemans, Athena Institute
restrictionsDescription: All information can be accessed by everybody.
copyright: false

## General comment
The methodology used to put together the grid information is outlined in reference 1.

## Technology
Typical

## Geography
New York City and Westchester County, NY

## Reference product
- Electricity, at eGrid, NYCW, 2010: 1 kWh

## Inputs from technosphere
- Electricity, diesel, at power plant: 0.303656 kWh
  Petroleum (DFO, JF, KER) - DFO – Distillate Fuel Oil (includes all Diesel and No. 1, No. 2, and No. 4 Fuel Oils)
- CUTOFF Electricity, biomass, solid, biogenic MSW, at power plant: 0.006333 kWh
  Solid Renewable Fuels (Biomass) MSB, AB, MSW, OBS, TDF, WDS – Municipal Solid Waste – Biogenic Component
- Electricity, nuclear, at power plant: 0.250534 kWh
  Nuclear Fission NUC - – Nuclear (Uranium, Plutonium, Thorium)
- CUTOFF Electricity, MSW, non-biogenic, at power plant: 0.004976 kWh
  Other Fuels MSN, OTH, PUR, WH – Municipal Solid Waste – Non-biogenic components
- Electricity, residual fuel oil, at power plant: 0.000935 kWh
  Petroleum (RFO) – Residual Fuel Oil (includes No. 5 and No. 6 Fuel Oils and Bunker C Fuel Oil)
- CUTOFF Electricity, hydropower, at power plant, unspecified: 1e-6 kWh
  Hydroelectric WAT – Water (Conventional, Pumped Storage)
- Electricity, natural gas, at power plant: 0.433565 kWh
  Natural Gas

## Sampling procedure
based on EIA electricity reports for all power plants in the US.

## Sources
- Chris Goemans, Athena Institute
- Statistics Canada
- unspecified
- USEPA
- Statistics Canada
- Statistics Canada
- Statistics Canada
- Statistics Canada
- USEPA
- EIA
- EIA
- EIA
- EIA
- EIA
- EIA
- EIA
- EIA
- EIA
- US DOE
- International Energy Agency
- EIA
