# Wood fuel, hardwood, generated at mill, combusted in industrial boiler, E

Dataset: openLCA process, unit process
Category: Steam and Air-Conditioning Supply
Geography: RNA
Time period: 2004-01-01 to 2004-01-01
Generated by: Maureen Puettmann
Published in: Franklin Associates
restrictionsDescription: All information can be accessed by everybody.
copyright: false

## General comment
Important note: although most of the data in the US LCI database has
undergone some sort of review, the database as a whole has not yet
undergone a formal validation process.
Please email comments to lci@nrel.gov.

## Technology
This process is a copy of the FAL "Wood waste, unspecified, combusted into industrial boilers" for which (1) the wood input was changed to an adapted version of the Franklin fuel wood dataset; (2) wood weight is expressed on oven dry basis; (3) outputs to nature have been scaled to reflect 1 kg of oven dry wood input and (4) waste flow is changed to waste treatment input.

## Geography
US

## Reference product
- Wood fuel, hardwood, generated at mill, combusted in industrial boiler, E: 1 kg
  Weight reported on an ovendry basis.

## Inputs from technosphere
- Wood fuel, hardwood, green, at veneer mill, E: 0.926 kg
  Weight reported on an ovendry basis. Assumes the actual moisture content is 85%.
- CUTOFF Disposal, solid waste, unspecified, to unspecified treatment: 0.0882 kg
- Wood fuel, hardwood, dry, at engineered wood flooring plant, E: 0.019 kg
  Weight reported on an ovendry basis. Assumes the actual moisture content is 85%.
- Wood fuel, hardwood, dry, at veneer mill, E: 0.024 kg
  Weight reported on an ovendry basis. Assumes the actual moisture content is 6%.
- Bark, hardwood, green, at veneer mill, E: 0.031 kg
  Weight reported on an ovendry basis. Assumes the actual moisture content is 85%.

## Emissions to nature
- Hydrogen chloride: 0.000171 kg
- Methane: 0.000189 kg
- Metals, unspecified: 0.000385 kg
- TOC, Total Organic Carbon: 3.68e-5 kg
- Carbon monoxide: 0.0054 kg
- Phenols, unspecified: 4.59e-7 kg
- Lead: 4.32e-7 kg
- BOD5, Biological Oxygen Demand: 0.0175 kg
- Particulates, > 2.5 um, and < 10um: 0.0045 kg
- Nickel: 2.97e-7 kg
- Manganese: 1.44e-5 kg
- Nitrogen oxides: 0.000117, 0.00198 kg (2 entries, compartments not in this file)
- Carbon dioxide, biogenic: 1.76 kg
- Cadmium: 3.69e-8 kg
- Selenium: 2.52e-8 kg
- Antimony: 7.11e-8 kg
- Dioxins, measured as 2,3,7,8-tetrachlorodibenzo-p-dioxin: 1.5e-8 kg
- Chromium: 1.89e-7 kg
- Arsenic: 1.98e-7 kg
- Beryllium: 9.9e-9 kg
- Acrolein: 3.6e-5 kg
- Cobalt: 5.85e-8 kg
- Methane, dichloro-, HCC-30: 2.61e-6 kg
- Acetaldehyde: 7.47e-6 kg
- Methane, tetrachloro-, CFC-10: 4.05e-7 kg
- Mercury: 3.15e-8 kg
- Naphthalene: 8.73e-7 kg
- Sulfur oxides: 0.000225 kg
- Benzene: 3.78e-5 kg
- Chlorine: 7.11e-6 kg
- Formaldehyde: 3.96e-5 kg

## Sources
- Maureen Puettmann
- Franklin Associates
- U.S. EPA
- Combustion Engineering Inc.
- Kaminski, Paul
- Argonne National Laboratory
- Sassenrath, Charles P
- U.S. DoE
