# Electricity, alumina refining regions

Dataset: openLCA process, unit process
Category: Electric Power Distribution
Geography: RNA
Time period: 2004-01-01 to 2004-01-01
Generated by: James Littlefield, Franklin Associates
Published in: Franklin Associates, A Division of ERG
restrictionsDescription: All information can be accessed by everybody.
copyright: false

## General comment
Primary fuels for electricity generation for alumina that is consumed by the U.S. are calculated based on the countries producing the alumina. 52 percent of alumina consumed in the U.S. is imported. Australia, Jamaica, Suriname, and Brazil produce the majority of this alumina. Based on import statistics, 32 percent of alumina imported by the U.S. comes from Australia, 5 percent comes from Jamaica, 13 percent comes from Suriname, and 1 percent comes from Brazil. Primary fuels used for electricity generation in these countries were calculated from worldwide energy data available from the U.S. EIA. Primary fuels used to generate electricity for alumina production facilities in the U.S. are calculated from the fuel mix for the North American Electricity Reliability Council (NERC) regional electricity grid in which the plants are located.

Important note: although most of the data in the US LCI database has
undergone some sort of review, the database as a whole has not yet
undergone a formal validation process.
Please email comments to lci@nrel.gov.

## Technology
Coal (36%), Nuclear (5%), Hydropower (14%), Fuel oil (10%), Natural gas (34%)

## Geography
US (49%), Australia (32%), Jamaica (5%), Suriname (13%), and Brazil (1%).

## Reference product
- Electricity, alumina refining regions: 1 kWh

## Inputs from technosphere
- CUTOFF Electricity, hydropower, at power plant, unspecified: 0.13882 kWh
- Electricity, diesel, at power plant: 0.098112 kWh
- Electricity, bituminous coal, at power plant: 0.35988 kWh
- Electricity, natural gas, at power plant: 0.34365 kWh
- Electricity, nuclear, at power plant: 0.046743 kWh
- CUTOFF Electricity, from renewable source, unspecified: 0.012793 kWh

## Sources
- Franklin Associates, A Division of ERG
- The Aluminum Association
- Energy Information Administration (EIA)
- US Geological Survey
- IAI Statistical Report: Electrical Power
- US EPA
