# Paraxylene, at plant

Dataset: openLCA process, unit process
Category: Petrochemical Manufacturing
Geography: RNA
Time period: 2003-01-01 to 2003-01-01
Generated by: Franklin Associates
Published in: THE PLASTICS DIVISION OF THE AMERICAN CH
restrictionsDescription: All information can be accessed by everybody.
copyright: false

## General comment
Important note: although most of the data in the US LCI database has
undergone some sort of review, the database as a whole has not yet
undergone a formal validation process.
Please email comments to lci@nrel.gov.

## Technology
Fractionation followed by refrigeration and centrifugation.

## Geography
North America (US and Canada)

## Reference product
- Paraxylene, at plant: 1 kg

## Inputs from technosphere
- Bituminous coal, combusted in industrial boiler: 0.0257 kg
- Liquefied petroleum gas, combusted in industrial boiler: 0.00759 l
- Natural gas, combusted in industrial boiler: 0.153 m3
- Electricity, at grid, US, 2000: 0.13 kWh
- Xylenes, mixed, at plant: 1 kg

## Sources
- THE PLASTICS DIVISION OF THE AMERICAN CH
