# Coal mine commissioning and decommissioning; Production mix, surface mine

Dataset: openLCA process, unit process
Category: Bit. Coal and Lignite Surface Mining
Geography: US
Time period: 2009-01-01 to 2009-12-31
Generated by: Timothy Skone
Owner: National Energy Technology Laboratory
Reviewer: Robert James
Published in: National Energy Technology Laboratory (NETL). 2010. Coal mine commissioning and decommissioning; Production mix, surface mine
restrictionsDescription: Use of this dataset is not restricted, but a statement of attribution is required. Please use the following attribution statement:
National Energy Technology Laboratory's (NETL) Unit Process Library
626 Cochrans Mill Road, P.O. Box 10940
Pittsburgh, PA 15236-0940
http://www.netl.doe.gov/research/energy-analysis/life-cycle-analysis/unit-process-library
Neither the U.S. Department of Energy (DOE) National Energy Technology Laboratory (NETL) nor any person acting on behalf of these organizations:
A. Makes any warranty or representation, express or implied, with respect to the accuracy, completeness, or usefulness of the information contained in this document, or that the use of any information, apparatus, method, or process disclosed in this document may not infringe on privately owned rights; or
B. Assumes any liability with this report as to its use, or damages resulting from the use of any information, apparatus, method, or process disclosed in this document.
Reference herein to any specific commercial product, process, or service by trade name, trademark, manufacturer, or otherwise, does not necessarily constitute or imply its endorsement, recommendation, or favoring by NETL. The views and opinions of the authors expressed herein do not necessarily state or reflect those of NETL.
copyright: true

## General comment
This process is part of the NETL Unit Process Library. To access the library and the original dataset:
1) Navigate to the NETL LCA home page (http://www.netl.doe.gov/lca)
2) Then navigate to the “Unit Process Library”
3) From the library, the unit process of interest can be found either through the "Complete Listing of the Unit Process Library link" or through the link to the "Unit Process Database" spreadsheet
4) For each process, a Data Sheet (DS) and Data File (DF) are available

BRIEF DESCRIPTION
This parameterized unit process calculates fuel consumption and resulting emissions to commission and decommission a surface mine for Powder River Basin sub-bituminous coal in Wyoming. Decommissioning values represented as a percentage of the commissioning values. Inputs and outputs are reported on the basis of 1 kg of coal.

GOAL AND SCOPE
The scope of this unit process covers the fuel combustion and emissions created during the construction (commissioning) and the end of life (decommissioning) of a Powder River Basin subbituminous surface coal mine located in Wyoming, for the extraction of raw materials in Life Cycle (LC) Stage #1. The unit process is based on the reference flow of 1 kg of cleaned, crushed (to approximately 3 inches) Powder River Basin coal, as described below and in the associated documentation (referenced in the Citation and Associated Documentation section below). This commissioning and decommissioning unit process includes the consumption of diesel fuel by construction/demolition machinery used to perform mine commissioning and decommissioning activities (including all on-site facilities), as well as combustion emissions associated with diesel fuel consumption. Construction of machinery used at the mine during mine operations, as well as input flows and emissions associated with mine operations, are addressed in separate unit processes.

BOUNDARY AND DESCRIPTION
The boundary for this unit process includes initial clearing and construction activities that take land in its natural state and to turn it into a Powder River Basin surface coal mine. These activities include clearing natural vegetation, excavation of soil and rock, grading, and construction of needed facilities. The boundary also includes decommissioning of the mine. That is, after all of the readily available coal has been extracted from the mine, decommissioning will result in the removal of infrastructure, re-contouring of land at the former mine site to the extent warranted, and planting of vegetation to help return the land to its natural state (TEEIC 2010).

The data for the commissioning of the Powder River Basin surface subbituminous coal mine came from a compilation of various sources. Many of the emission factors were taken from the Red Cliff Mine located in Colorado, which is a proposed underground bituminous coal mine. Additional references provide estimates on the distance of road needed to be built through the surface mine and the associated emission with its construction. More soil removal and grading is expected than for an underground mine, causing additional particulate matter emissions.

A graphical overview of the boundary of this unit process is available in the associated documentation (referenced in the Citation and Associated Documentation section below). Upstream emissions associated with the production and delivery of diesel fuel are accounted for outside of the boundary of this unit process, via proprietary profiles contained within the GaBi model. However, no machinery production is considered, since it is assumed that machinery would be used for numerous construction or demolition jobs before being replaced.

Since the commissioning and decommissioning process focuses on fuel inputs and their associated combustion, it is important to understand the data sources along with their underlying assumptions and relevance to the study. Fuel consumption was based on the estimated acreage of the mine and the associated length of road which must be built. The combustion emissions were based on the Red Cliff Mine Environmental Impact Statement, completed by the US Bureau of Land Management (BLM) for the proposed coal mine in western Colorado (BLM 2009a). The data were provided in tons of emission per year of commissioning. For this information to be useful in the context of this project, the data were converted to kilogram of emission per kilogram of coal that is anticipated to be produced over the lifetime of the coal mine, using the information shown in Table 1 of the DS (see Citation and Associated Documentation section below). Although Red Cliff Mine is producing less than the proposed surface mine, it was assumed that the commissioning emissions would be similar on a per kilogram of coal output value.

Red Cliff Mine documentation did not include mercury or ammonia emissions from fuel combustion. Mercury emissions data were therefore obtained from a separate source (Conway et al. 2005) and calculated based on the fuel demand. Ammonia emission factors were obtained from a U.S. Environmental Protection Agency (EPA) publication and used to calculate the commissioning emissions (Roe et al. 2004). Reliable data for water use during coal mine commissioning and decommissioning were unable to be located and were, therefore, taken as a minor data limitation.

Data were not readily available to model the decommissioning portion of the mine life cycle. Therefore, it was assumed that decommissioning would result in 10 percent of the total fuel use and emissions that would result from commissioning. An adjustable parameter was also included in the unit process, to enable the user to update this assumption. Should the commissioning and decommissioning of the mine prove to be significant, further analysis on this data point is suggested, which may result in an increase or decrease in the value of this adjustable parameter, in comparison to the default value of 10 percent.

Additional details regarding input and output flows, including calculation methods, are contained in the associated documentation (see Citation and Associated Documentation section below).

This process contains one or more surrogate product flows as replacements for proprietary product flows used in the NETL Unit Process Library. All surrogate flow were taken from the U.S. Life Cycle Inventory Database; a list of surrogate flows used in this process is provided below:
1) Diesel, at refinery

CITATION AND ASSOCIATED DOCUMENTATION
This document should be cited as:
National Energy Technology Laboratory (NETL). 2010. NETL Life Cycle Inventory Data - Unit Process: Coal mine commissioning and decommissioning; Production mix, surface mine. U.S. Department of Energy, National Energy Technology Laboratory. Last updated: September 2015 (Version 01). Retrieved on [DATE] from [URL for this dataset].

This dataset is part of the NETL Unit Process Library. The Library offers additional information concerning this dataset in the form of a Detailed Spreadsheet Documentation (DS) file and a Process Documentation File (DF). The DS file is an Excel file that contains all of the parameters, inputs, and outputs for a given system as well as background data, calculations and quality scores. The DF file is a PDF document that contains major assumptions and data sources that are the basis for each unit process. The NETL Unit Process Library is located on the NETL website (netl.doe.gov) under Research / Energy Analysis / Energy Trends and Issues / Life Cycle Analysis / Unit Process Library.

This dataset was converted directly from the DS with additional supporting information provided by the DF. Full citations for the DS and DF are given below.

DS File
National Energy Technology Laboratory (NETL). 2010. NETL Life Cycle Inventory Data - Unit Process: Commissioning and Decommissioning of Powder River Basin Coal Mine. U.S. Department of Energy, National Energy Technology Laboratory. Last updated: February 2010 (Version 01). Retrieved on 6/30/2014 from: http://www.netl.doe.gov/File%20Library/Research/Energy%20Analysis/Life%20Cycle%20Analysis/UP_Library/DS_Stage1_I_CommissionDecommission_PRB_CoalMine_2010-01.xls

DF File
National Energy Technology Laboratory (NETL). 2010. NETL Life Cycle Inventory Data - Unit Process: Commissioning and Decommissioning of Powder River Basin Coal Mine. U.S. Department of Energy, National Energy Technology Laboratory. Last updated: February 2010 (Version 01). Retrieved on 6/30/2014 from: http://www.netl.doe.gov/File%20Library/Research/Energy%20Analysis/Life%20Cycle%20Analysis/UP_Library/DF_Stage1_I_CommissionDecommission_PRB_CoalMine_2010-01.pdf

## Technology
The scope of this unit process covers the fuel combustion and emissions created during the construction (commissioning) and the end of life (decommissioning) of a Powder River Basin subbituminous surface coal mine located in Wyoming, for the extraction of raw materials in Life Cycle (LC) Stage #1. The boundary for this unit process includes initial clearing and construction activities that take land in its natural state and to turn it into a Powder River Basin surface coal mine. These activities include clearing natural vegetation, excavation of soil and rock, grading, and construction of needed facilities. The boundary also includes decommissioning of the mine. That is, after all of the readily available coal has been extracted from the mine, decommissioning will result in the removal of infrastructure, re-contouring of land at the former mine site to the extent warranted, and planting of vegetation to help return the land to its natural state (TEEIC 2010). Additional details regarding the technologies associated with this unit process are contained in the Supporting Information (referenced in the Citation and Associated Documentation section in the Description field).

## Geography
Wyoming

## Time period
This data set is representative of best available public data from 01/01/2009 to 12/31/2009 and is not subject to limited usability within sub-time spans (e.g. summer, winter).

## Parameters
- Hg_comm: 4.6654e-15
  [kg/kg coal] Amount of Hg released during commissioning of the coal mine per reference flow.
- tot_CO: 3.9413e-9; = CO_comm+(CO_comm*decomm_percent)
  [kg/kg coal] Total CO, per kg of PRB coal produced, released during commissioning and decommissionin
- decomm_percent: 0.1
  [%(x100)] Adjustable Parameter; percentage of commissioning emissions and fuel use assumed to accoun
- Diesel_Density: 837.521
  [kg/m^3] Density of Diesel
- tot_SO2: 9.84709e-12; = SO2_comm+(SO2_comm*decomm_percent)
  [kg/kg coal] Total SO2, per kg of PRB coal produced, released during commissioning and decommissioni
- NOx_comm: 1.0962e-8
  [kg/kg coal] Amount of NOx released during commissioning of the coal mine per reference flow.
- tot_PM: 5.79337e-10; = PM_comm+(PM_comm*decomm_percent)
  [kg/kg coal] Total PM, per kg of PRB coal produced, released during commissioning and decommissionin
- tot_NOx: 1.20582e-8; = NOx_comm+(NOx_comm*decomm_percent)
  [kg/kg coal] Total Nox, per kg of PRB coal produced, released during commissioning and decommissioni
- tot_N2O: 2.79004e-11; = N2O_comm+(N2O_comm*decomm_percent)
  [kg/kg coal] Total N2O, per kg of PRB coal produced, released during commissioning and decommissioni
- tot_CH4: 4.51319e-11; = CH4_comm+(CH4_comm*decomm_percent)
  [kg/kg coal] Total CH4, per kg of PRB coal produced, released during commissioning and decommissioni
- CO2_comm: 1.3736e-6
  [kg/kg coal] Amount of CO2 released during commissioning of the coal mine per reference flow.
- tot_NH3: 8.45856e-10; = NH3_comm+(NH3_comm*decomm_percent)
  [kg/kg coal] Total NH3, per kg of PRB coal produced, released during commissioning and decommissioni
- CH4_comm: 4.1029e-11
  [kg/kg coal] Amount of CH4 released during commissioning of the coal mine per reference flow.
- NH3_comm: 7.6896e-10
  [kg/kg coal] Amount of NH3 released during commissioning of the coal mine per reference flow.
- diesel_comm: 3.5067e-8
  [m^3/kg coal] Amount of diesel released during commissioning of the coal mine per reference flow.
- CO_comm: 3.583e-9
  [kg/kg coal] Amount of CO released during commissioning of the coal mine per reference flow.
- tot_CO2: 1.51096e-6; = CO2_comm+(CO2_comm*decomm_percent)
  [kg/kg coal] Total CO2, per kg of PRB coal produced, released during commissioning and decommissioni
- SO2_comm: 8.9519e-12
  [kg/kg coal] Amount of SO2 released during commissioning of the coal mine per reference flow.
- VOC_comm: 4.9459e-10
  [kg/kg coal] Amount of VOC released during commissioning of the coal mine per reference flow.
- tot_Hg: 5.13194e-15; = Hg_comm+(Hg_comm*decomm_percent)
  [kg/kg coal] Total Hg, per kg of PRB coal produced, released during commissioning and decommissionin
- PM_comm: 5.2667e-10
  [kg/kg coal] Amount of PM released during commissioning of the coal mine per reference flow.
- tot_diesel: 3.85737e-8; = diesel_comm+(diesel_comm*decomm_percent)
  [m^3/kg coal] Total diesel, per kg of PRB coal produced, used during commissioning and decommissioni
- N2O_comm: 2.5364e-11
  [kg/kg coal] Amount of N2O released during commissioning of the coal mine per reference flow.
- tot_VOC: 5.44049e-10; = VOC_comm+(VOC_comm*decomm_percent)
  [kg/kg coal] Total VOCs, per kg of PRB coal produced, released during commissioning and decommission

## Reference product
- Fuel consumption and emissions from coal mine commissioning and decommissioning; Surface mine: 1 Item(s); data quality (3,4,3,3,3)

## Emissions to nature
- Ammonia: 8.45856e-10 kg; = tot_NH3; data quality (3,4,2,2,2)
- NMVOC, non-methane volatile organic compounds, unspecified origin: 5.44049e-10 kg; = tot_VOC; data quality (3,4,3,3,3)
- Dinitrogen monoxide: 2.79004e-11 kg; = tot_N2O; data quality (3,4,3,3,3)
- Methane, fossil: 4.51319e-11 kg; = tot_CH4; data quality (3,4,3,3,3)
- Carbon dioxide: 1.51096e-6 kg; = tot_CO2; data quality (3,4,3,3,3)
- Mercury: 5.13194e-15 kg; = tot_Hg; data quality (3,4,3,3,3)
- Carbon monoxide: 3.9413e-9 kg; = tot_CO; data quality (3,4,3,3,3)
- Nitrogen oxides: 1.20582e-8 kg; = tot_NOx; data quality (3,4,3,3,3)
- Sulfur dioxide: 9.84709e-12 kg; = tot_SO2; data quality (3,4,3,3,3)
- Particulates, > 2.5 um, and < 10um: 5.79337e-10 kg; = tot_PM; data quality (3,4,3,3,3)

## Inventory method
Attributional

## Modelling constants
All elementary and technosphere flows are calculated on a functional unit basis. Calculations involving combustion primarily to generate useful work are done using lower heating values (LHV) and calculations involving combustion primarily to generate useful heat are done using higher heating values (HHV). Unless explicitly stated in the associated reference documents applicable calculations assumed standard atmospheric temperature and pressure (SATP).

## Completeness
Individual relevant flows captured

## Data selection
Best publically available data

## Data treatment
No allocation applied

## Data collection
No primary data collected

## Intended application
This is a gate-to-gate installation process and can be used for any type of LCA study.

## Project
National Energy Technology Laboratory (NETL) Unit Process Library

## Sources
- Heggies Pty Ltd. 2009. Majura Parkway Greenhouse Gas Assessment
- URS Corporation. 2004. Compendium of Greenhouse Gas Emission Methodologies for the Oil and Gas Industry.
- National Energy Technology Laboratory (NETL). 2010. Coal mine commissioning and decommissioning; Production mix, surface mine
- WWC Engineering. 2003. FINAL: South Powder River Basin Coal, Environmental Impact Statement
- National Mining Association (NMA). 2009. 2008 Coal Producer Survey
- Tribal Energy and Environmental Information. 2010. Coal Mining: Decommissioning and Site Reclamation Impacts
- U.S. Bureau of Land Management (BLM). 2009a. Red Cliff Mine Draft Environmental Impact Statement, Appendix H: Air Quality Analysis Modeling Report
- Roe et al. 2004. Estimating Ammonia Emissions from Anthropogenic Nonagricultural Sources - Draft Final Repor
- Conaway, et al. 2005. Estimate of mercury emission from gasoline and diesel consumption, San Francisco Bay area, California.
- Google Earth. 2006. 43°33'30.49" N, 105°16'56.98" W
- U.S. Bureau of Land Management (BLM). 2009b. Red Cliff Mine Draft Environmental Impact Statement, Maps, Figure 1-2 - Coal Lease Area
- U.S. Environmental Protection Agency (EPA). 1998. AP 42, Fifth Edition, Volume I, Chapter 11: Mineral Products Industry, Section 11.9: Western Surface Coal Mining
