# Automotive painting, top coat, per m2

Dataset: openLCA process, unit process
Category: Motor Vehicle Body Manufacturing
Geography: RNA
Time period: 2005-01-01 to 2005-01-01
Generated by: James Littlefield, Franklin Associates
Published in: VRP (Vehicle Recycling Partnership)
restrictionsDescription: All information can be accessed by everybody.
copyright: false

## General comment
Data are shown on 2 bases: 1) per 1,000 m2 of surface area and 2) per 1,000 vehicles., This unit process is on the basis of 1 square meter of vehicle surface area.
Important note: although most of the data in the US LCI database has
undergone some sort of review, the database as a whole has not yet
undergone a formal validation process.
Please email comments to lci@nrel.gov.

## Technology
Representative of current industry practices

## Geography
North America

## Reference product
- Automotive painting, top coat, per m2: 1 m2

## Inputs from technosphere
- CUTOFF Tinted clearcoat materials, at plant: 2.54e-6 m3
  (Tinted clearcoat includes Dipropylene Glycol Monomethyl Ether, Acetone, Butyl Alcohol, n-Butyl Acetate, Pseudocumene, Xylene, and Isostearic Acid. No data are available on the percent share by weight of each of these components in the tinted clearcoat.)
- CUTOFF Disposal, light aromatic solvent naphtha, to sanitary landfill: 4.53e-8, 2.4e-6 kg (2 entries)
  In sludge from wastewater treatment and painting operations
- CUTOFF Clearcoat material, at plant: 1.68e-5 m3
  (Clearcoat includes Dipropylene Glycol Monomethyl Ether, Acetone, Butyl Alcohol, n-Butyl Acetate, Pseudocumene, Xylene, and Amyl Alcohol. No data are available on the percent share by weight of each of these components in the clearcoat.)
- CUTOFF Disposal, 1-methoxy-2-propanol, to sanitary landfill: 1.13e-7 kg
  In sludge from wastewater treatment and painting operations
- CUTOFF Disposal, carbon black, to sanitary landfill: 1.96e-5 kg
  In sludge from wastewater treatment and painting operations
- CUTOFF Disposal, benzene, 1,2,4-trimethyl-, to sanitary landfill: 5.89e-7 kg
  In sludge from wastewater treatment and painting operations
- CUTOFF Materials for basecoat painting, at plant: 3.52e-5 m3
  (Basecoat materials depend on paint color, but common components include Dipropylene Glycol Monomethyl Ether, Propylene Glycols, and Odorless Mineral Spirits. Pigments include carbon black, titanium dioxide, and iron oxide. No data are available on the percent share by weight of each of these components in the basecoat.)
- CUTOFF Disposal, ferric oxide, to sanitary landfill: 8.17e-5 kg
  In sludge from wastewater treatment and painting operations
- CUTOFF Disposal, propylene glycol butyl ether, to sanitary landfill: 1.67e-5 kg
  In sludge from wastewater treatment and painting operations
- CUTOFF Disposal, acetone, to sanitary landfill: 6.79e-7 kg
  In sludge from wastewater treatment and painting operations
- CUTOFF Water, at user: 0.706 kg
- CUTOFF Disposal, stoddard solvent, to sanitary landfill: 2.94e-7 kg
  In sludge from wastewater treatment and painting operations
- Electricity, at grid, US, 2000: 0.939 kWh
- CUTOFF Disposal, copper compounds, to sanitary landfill: 1.99e-6 kg
  In sludge from wastewater treatment and painting operations
- CUTOFF Disposal, n-butyl alcohol, to sanitary landfill: 7.92e-7 kg
  In sludge from wastewater treatment and painting operations
- CUTOFF Disposal, chemical waste, unspecified, to sanitary landfill: 8.37e-7 kg
  In sludge from wastewater treatment and painting operations
- CUTOFF Disposal, heavy alkalide naphtha, to sanitary landfill: 8.37e-7 kg
  In sludge from wastewater treatment and painting operations

## Emissions to nature
- VOC, volatile organic compounds: 0.0156 kg
- 1-Butanol: 7.96e-7 kg
- Ferric oxide: 8.44e-10 kg
- Light aromatic solvent naphtha, unspecified: 5.47e-8, 2.41e-6 kg (2 entries, compartments not in this file)
- Acetone: 6.76e-7 kg
- Diethylene glycol butyl ether: 8.44e-10 kg
- Ethanol, 2-butoxy-: 5.26e-9 kg
- Carbon black: 1.95e-10 kg
- Copper compounds: 1.81e-10 kg
- Heavy alkalide naphtha, unspecified: 8.5e-7 kg
- Propylene glycol butyl ether, unspecified: 1.66e-6 kg
- Benzene, 1,2,4-trimethyl-: 5.79e-7 kg
- Propylene glycol methyl ether: 1.09e-7 kg
- Hydrocarbons, unspecified: 2.85e-7 kg

## Sources
- VRP (Vehicle Recycling Partnership)
