# Bituminous coal, combusted in industrial boiler, at pulp and paper mill (EXCL.)

Dataset: openLCA process, unit process
Category: Pulp, Paper, and Paperboard Mills
Geography: RNA
Time period: 1997-01-01 to 2003-01-01
Generated by: Caroline Gaudreault
Reviewer: Martha Stevenson
Published in: Franklin Associates
restrictionsDescription: All information can be accessed by everybody.
copyright: false

## General comment
This process was built to be used within the processes named "Fuels burned at bleached kraft market pulp mill", "Fuels burned at uncoated freesheet paper mill", "Fuels burned at coated freesheet paper mill", "Fuels burned at uncoated mechanical paper mill", "Fuels burned at coated mechanical paper mill" and "Fuels burned at bag and sack paper mill". It was built from the process named "Bituminous coal, combusted in industrial boiler" v.1.6 available in the US LCI database. Transport and waste processes were removed. The following emissions to air were excluded (excl.): Sulfur oxidesand Nitrogen oxides. These processes and emissions are reported in pulp and paper mill process chain in which this process is integrated.
In cases where industrial boiler data were not available, utility boiler data were adjusted accordingly., 100% inputs from technosphere and elementary flows allocated to the combustion of coal, and 0% to the production of ash and flue gas desulfurization sludge
Important note: although most of the data in the US LCI database has
undergone some sort of review, the database as a whole has not yet
undergone a formal validation process.
Please email comments to lci@nrel.gov.

## Technology
Surface mining is used to extract 58 percent of the U.S. supply of coal, while underground mining extracts 42 percent

## Geography
United States

## Reference product
- Bituminous coal, combusted in industrial boiler, at pulp and paper mill (EXCL.): 1 kg

## Inputs from technosphere
- Bituminous coal, at mine: 1 kg

## Emissions to nature
- Magnesium: 5.5e-6 kg
- Phenanthrene: 1.35e-9 kg
  Sources for PAH data are old or unverifiable. Use this PAH data with caution.
- Mercaptans, unspecified: 0.0001085 kg
- 2-Chloroacetophenone: 3.5e-9 kg
- Suspended solids, unspecified: 2.0108e-6 kg
- Vinyl acetate: 3.8e-9 kg
- Benzene, chloro-: 1.1e-8 kg
- Carbon monoxide, fossil: 0.0028911 kg
- Benzo(a)anthracene: 4e-11 kg
  Sources for PAH data are old or unverifiable. Use this PAH data with caution.
- Benzo(a)pyrene: 1.9e-11 kg
  Sources for PAH data are old or unverifiable. Use this PAH data with caution.
- Carbon dioxide, fossil: 2.634 kg
- Benzene: 4.7668e-5 kg
- Ethane, 1,2-dichloro-: 2e-8 kg
- Fluoranthene: 3.55e-10 kg
  Sources for PAH data are old or unverifiable. Use this PAH data with caution.
- Antimony: 9e-9 kg
- Hydrazine, methyl: 8.5e-8 kg
- Chromium: 9.9038e-8 kg
- Chromium VI: 3.95e-8 kg
- Nickel: 1.741e-7 kg
- Beryllium: 7.7597e-9 kg
- Arsenic: 1.5756e-7 kg
- Hexane: 3.35e-8 kg
- Naphthalene: 6.5e-9 kg
  Sources for PAH data are old or unverifiable. Use this PAH data with caution.
- Particulates, > 2.5 um, and < 10um: 0.002003 kg
- Cumene: 2.65e-9 kg
- Phenol: 8e-9 kg
- Cyanide: 1.25e-6 kg
- Methane, monochloro-, R-40: 2.65e-7 kg
- Indeno(1,2,3-cd)pyrene: 3.05e-11 kg
  Sources for PAH data are old or unverifiable. Use this PAH data with caution.
- Fluoride: 2.2297e-5 kg
- Cobalt: 5e-8 kg
- Ethane, 1,2-dibromo-: 6e-10 kg
- Benzo(ghi)perylene: 1.35e-11 kg
  Sources for PAH data are old or unverifiable. Use this PAH data with caution.
- Phenols, unspecified: 8e-9 kg
- Isophorone: 2.9e-7 kg
- Oils, unspecified: 1.0054e-6 kg
- Chloroform: 2.95e-8 kg
- Acenaphthene: 2.55e-10 kg
  Sources for PAH data are old or unverifiable. Use this PAH data with caution.
- Benzene, ethyl-: 4.7e-8 kg
- Acenaphthylene: 1.25e-10 kg
  Sources for PAH data are old or unverifiable. Use this PAH data with caution.
- Acrolein: 7.4696e-8 kg
- Acetophenone: 7.5e-9 kg
- Chrysene, 5-methyl-: 1.1e-11 kg
  Sources for PAH data are old or unverifiable. Use this PAH data with caution.
- Methane, bromo-, Halon 1001: 8e-8 kg
- Hydrogen chloride: 0.00030654 kg
- Bromoform: 1.95e-8 kg
- VOC, volatile organic compounds: 0.00014006 kg
- Propanal: 1.9e-7 kg
- t-Butyl methyl ether: 1.75e-8 kg
- Formaldehyde: 3.383e-6 kg
- Toluene, 2,4-dinitro-: 1.4e-10 kg
- Lead: 1.7862e-6 kg
- Anthracene: 1.05e-10 kg
  Sources for PAH data are old or unverifiable. Use this PAH data with caution.
- Carbon disulfide: 6.5e-8 kg
- Cadmium: 4.4278e-8 kg
- Ethane, chloro-: 2.1e-8 kg
- Sulfuric acid, dimethyl ester: 2.4e-8 kg
- Chrysene: 5e-11 kg
  Sources for PAH data are old or unverifiable. Use this PAH data with caution.
- Manganese: 1.7876e-7 kg
- Biphenyl: 8.5e-10 kg
  Sources for PAH data are old or unverifiable. Use this PAH data with caution.
- Phthalate, dioctyl-: 3.65e-8 kg
- Dinitrogen monoxide: 0.000368 kg
- Ethene, tetrachloro-: 2.15e-8 kg
- Hydrogen fluoride: 5.2357e-5 kg
- Selenium: 6.5e-7 kg
- Styrene: 1.25e-8 kg
- Fluorene: 4.55e-10 kg
  Sources for PAH data are old or unverifiable. Use this PAH data with caution.
- Methane, dichloro-, HCC-30: 1.45e-7 kg
- Toluene: 1.2e-7 kg
- Organic substances, unspecified: 3.0287e-6 kg
- Methyl ethyl ketone: 1.95e-7 kg
- Ethane, 1,1,1-trichloro-, HCFC-140: 1e-8 kg
- Methane, fossil: 0.00011543 kg
- Xylene: 1.85e-8 kg
- Pyrene: 1.65e-10 kg
  Sources for PAH data are old or unverifiable. Use this PAH data with caution.
- Acetaldehyde: 2.85e-7 kg
- Benzyl chloride: 3.5e-7 kg
- Benzo(b,j,k)fluoranthene: 5.5e-11 kg
  Sources for PAH data are old or unverifiable. Use this PAH data with caution.
- Mercury: 6.5409e-7 kg
- Methacrylic acid, methyl ester: 1e-8 kg

## Sources
- EPA
- EIA
- EPA
- DOE
- unspecified
- unspecified
- Franklin Associates
- unspecified
- Minerals Yearbook
- unspecified
- Speight
- Franklin Associates
- EPA
- EPA
- AF&PA
