# Diesel consumption; Diesel fired equipment; Variable power rating

Dataset: openLCA process, unit process
Category: Bit. Coal and Lignite Surface Mining
Geography: US
Time period: 2012-01-01 to 2012-12-31
Generated by: Timothy Skone
Owner: National Energy Technology Laboratory
Reviewer: Robert James
Published in: National Energy Technology Laboratory (NETL). 2010. Diesel consumption; Diesel fired construction equipment; Variable power rating
restrictionsDescription: Use of this dataset is not restricted, but a statement of attribution is required. Please use the following attribution statement:
National Energy Technology Laboratory's (NETL) Unit Process Library
626 Cochrans Mill Road, P.O. Box 10940
Pittsburgh, PA 15236-0940
http://www.netl.doe.gov/research/energy-analysis/life-cycle-analysis/unit-process-library
Neither the U.S. Department of Energy (DOE) National Energy Technology Laboratory (NETL) nor any person acting on behalf of these organizations:
A. Makes any warranty or representation, express or implied, with respect to the accuracy, completeness, or usefulness of the information contained in this document, or that the use of any information, apparatus, method, or process disclosed in this document may not infringe on privately owned rights; or
B. Assumes any liability with this report as to its use, or damages resulting from the use of any information, apparatus, method, or process disclosed in this document.
Reference herein to any specific commercial product, process, or service by trade name, trademark, manufacturer, or otherwise, does not necessarily constitute or imply its endorsement, recommendation, or favoring by NETL. The views and opinions of the authors expressed herein do not necessarily state or reflect those of NETL.
copyright: false

## General comment
This process is part of the NETL Unit Process Library. To access the library and the original dataset:
1) Navigate to the NETL LCA home page (http://www.netl.doe.gov/lca)
2) Then navigate to the “Unit Process Library”
3) From the library, the unit process of interest can be found either through the "Complete Listing of the Unit Process Library link" or through the link to the "Unit Process Database" spreadsheet
4) For each process, a Data Sheet (DS) and Data File (DF) are available

BRIEF DESCRIPTION
This parameterized unit process models air emissions and heat produced by a generic piece of diesel powered machinery (at least 55.9 kW (75 HP)) used during construction of buildings, roadways, infrastructure, pipelines, etc. Emission factors are for non-road equipment.

GOAL AND SCOPE
The scope of this unit process includes diesel consumption and fuel emissions associated with the use of diesel fired construction equipment. The unit process models a generalized off-road diesel engine emissions profile, where the diesel engines in question can be modeled as either between 55.9 and 130.5 kW (75 and 175 horsepower (HP)), or greater than 130.5 kW (175 HP). The process is based on the reference flow of 1 megajoule (MJ) of thermal energy from diesel fuel, as described below and shown in the associated documentation (see Citation and Associated Documentation section below).

This unit process is considered to be applicable across the United States. However, the analyst should note that some states or regions, such as California, may require adherence to more stringent emissions criteria than those contained in this process. This is considered a data limitation, since emissions factors for most of the pollutants addressed in this unit process do not include air pollutant emissions control/mitigation measures that are common in some states or regions.

This unit process is used under Life Cycle (LC) Stage #1 or #3, and may be applied for a variety of purposes where operation of construction machinery is needed. These may include, but are not limited to, facility commissioning and facility decommissioning. This unit process is typically modeled in parallel to other operations unit processes, in order to assess diesel consumption rates and airborne emissions factors associated with construction. Outputs from this process are not tracked, as reflected in the associated documentation (referenced below)

BOUNDARY AND DESCRIPTION
The rate of diesel consumption included in this unit process is based on a default lower heating value (LHV) for diesel of 39.02 MJ/L. Thus, the production of 1 MJ of thermal energy from diesel (i.e., the reference flow for this unit process) requires 0.256 L of diesel. Diesel LHV is included as an adjustable parameter, and can be modified as warranted, within the typical range for diesel LHV.

Air emissions are calculated on a per MJ basis, based on data available from the US Environmental Protection Agency (EPA), the US Department of Energy (DOE), and other sources. Emissions of carbon dioxide, particulate matter, nitrogen oxides, and non-methane volatile organic carbons are estimated based on US EPA and DOE emissions factors (DOE 2007; Federal Register 2004). Emissions of sulfur dioxide were calculated stoichiometrically, based on the presumed use of 15 parts per million, ultra low sulfur diesel (ULSD) (DieselNet 2009a). Carbon monoxide is the only air emission factor that is modeled as dependent on engine horsepower: 0.0148 kg CO/L diesel for 55.9 through 130.5 kW (75 and 175 horsepower (HP)) engines, and 0.0104 kg CO/L for engines larger than 130.5 kW (175 HP) (DieselNet 2009b). Engine size is included as an adjustable parameter, and can toggled via a binary switch between the two different power options. Finally, nitrous oxide, methane, and ammonia emissions were modeled based on data available from the DOE (2006).

An overview of the boundary of this unit process can be found in the associated documentation (see Citation and Associated Documentation section below). Emissions associated with the production and transport of diesel fuel are considered outside the boundary of this unit process. Within the boundary of the unit process, energy use and air emissions are quantified, as discussed previously. Unlike most unit processes, this process does not include any tracked output flows. Therefore, the process does not directly feed into another portion of the model, although energy use and air emissions are of course incorporated into model results.

The associated documentation (referenced below) contains: summaries of the relevant properties and assumptions used to calculate diesel use and air emissions; modeled input and output flows; and additional detail regarding input and output flows, including calculation methods.

CITATION AND ASSOCIATED DOCUMENTATION
This document should be cited as:
National Energy Technology Laboratory (NETL). 2015. NETL Life Cycle Inventory Data – Unit Process: Diesel consumption; Diesel fired construction equipment; Variable power rating. U.S. Department of Energy, National Energy Technology Laboratory. Last Updated: September 2015 (version 01). Retrieved on [DATE] from [URL for this dataset].

This dataset is part of the NETL Unit Process Library. The Library offers additional information concerning this dataset in the form of a Detailed Spreadsheet Documentation (DS) file and a Process Documentation File (DF). The DS file is an Excel file that contains all of the parameters, inputs, and outputs for a given system as well as background data, calculations and quality scores. The DF file is a PDF document that contains major assumptions and data sources that are the basis for each unit process. The NETL Unit Process Library is located on the NETL website (netl.doe.gov) under Research / Energy Analysis / Energy Trends and Issues / Life Cycle Analysis / Unit Process Library.

Full citations for the DS and DF are given below:

DS File
National Energy Technology Laboratory (NETL). 2010. NETL Life Cycle Inventory Data – Unit Process: Combustion of Diesel. U.S. Department of Energy, National Energy Technology Laboratory. Last Updated: January 2015 (version 02). Retrieved on 09/30/2015 from:http://www.netl.doe.gov/File%20Library/Research/Energy%20Analysis/Life%20Cycle%20Analysis/UP_Library/DS_Stage5_O_Combustion_Of_Diesel_2015-02.xlsx.

DF File
National Energy Technology Laboratory (NETL). 2010. NETL Life Cycle Inventory Data – Unit Process: Combustion of Diesel. U.S. Department of Energy, National Energy Technology Laboratory. Last Updated: January 2015 (version 02). Retrieved on 09/30/2015 from: http://www.netl.doe.gov/File%20Library/Research/Energy%20Analysis/Life%20Cycle%20Analysis/UP_Library/DS_Stage5_O_Combustion_Of_Diesel_2015-02.pdf.

## Technology
The unit process models a generalized off-road diesel engine emissions profile, where the diesel engines in question can be modeled as either between 55.9 and 130.5 kW (75 and 175 horsepower (HP)), or greater than 130.5 kW (175 HP). This unit process is considered to be applicable across the United States. However, the analyst should note that some states or regions, such as California, may require adherence to more stringent emissions criteria than those contained in this process. This is considered a data limitation, since emissions factors for most of the pollutants addressed in this unit process do not include air pollutant emissions control/mitigation measures that are common in some states or regions.

## Time period
This data set is representative of best available public data from 01/01/2010 to 12/31/2010 and is not subject to limited usability within sub-time spans (e.g. summer, winter).

## Parameters
- Mercury: 5.56851e-9
  [kg/kg diesel] Mercury emissions per kg of combusted diesel
- Dib_anth: 1.07712e-8
  [kg/kg diesel] Dibenzo(a,h) anthracene emissions per kg of combusted diesel
- Benz_k_fluor: 2.8637e-9
  [kg/kg diesel] Benzo (k) fluroanthene emissions per kg of combusted diesel
- PM25_PM10: 0
  [kg/kg diesel] Particulate matter between 2.5 and 10 microns emissions per kg of combusted diesel
- Manganese: 0
  [kg/kg diesel] Manganese emissions per kg of combusted diesel
- Pyrene: 8.83127e-8
  [kg/kg diesel] Pyrene emissions per kg of combusted diesel
- Beryllium: 0
  [kg/kg diesel] Beryllium emissions per kg of combusted diesel
- Ace_yde: 1.41707e-5
  [kg/kg diesel] Acetaldehyde emissions per kg of combusted diesel
- Diesel_EDensity: 43.2
  [MJ/kg diesel] Diesel's energy density of diesel taken from the Excel model of NETL's 2008 Petroleum Baseline (http://netl.doe.gov/File%20Library/Research/Energy%20Analysis/Life%20Cycle%20Analysis/PetroBasedFuelsLCGHGAnlys2005BslnModel.xls)
- Naph: 1.56672e-6
  [kg/kg diesel] Naphthalene emissions per kg of combusted diesel
- NH3: 0
  [kg/kg diesel] Ammonia emissions per kg of combusted diesel
- CO2: 3.19898
  [kg/kg diesel] Carbon dioxide emissions per kg of combusted diesel
- Benzene: 1.72376e-5
  [kg/kg diesel] Benzene emissions per kg of combusted diesel
- Diesel_MDensity: 846.671
  [kg diesel/m^3 diesel] Diesel's mass density of diesel taken from the Excel model of NETL's 2008 Petroleum Baseline (http://netl.doe.gov/File%20Library/Research/Energy%20Analysis/Life%20Cycle%20Analysis/PetroBasedFuelsLCGHGAnlys2005BslnModel.xls)
- Chrysene: 6.52184e-9
  [kg/kg diesel] Chrysene emissions per kg of combusted diesel
- NOx: 0.0858399
  [kg/kg diesel] Nitrogen oxides emissions per kg of combusted diesel
- But_1_3: 7.22391e-7
  [kg/kg diesel] 1,3-Butadiene emissions per kg of combusted diesel
- PAH: 3.10388e-6
  [kg/kg diesel] Polycyclic aromatic hydrocarbon emissions per kg of combusted diesel
- Prop: 4.76667e-5
  [kg/kg diesel] Propylene emissions per kg of combusted diesel
- Selenium: 0
  [kg/kg diesel] Selenium emissions per kg of combusted diesel
- Toluene: 7.55647e-6
  [kg/kg diesel] Toluene emissions per kg of combusted diesel
- VOC: 0
  [kg/kg diesel] Volatile organic compound emissions per kg of combusted diesel
- Lead: 0
  [kg/kg diesel] Lead emissions per kg of combusted diesel
- Fluoran: 1.40598e-7
  [kg/kg diesel] Fluoroanthene emissions per kg of combusted diesel
- CH4: 0.000128461
  [kg/kg diesel] Methane emissions per kg of combusted diesel
- N2O: 2.50655e-5
  [kg/kg diesel] Nitrous oxide emissions per kg of combusted diesel
- Arsenic: 0
  [kg/kg diesel] Arsenic emissions per kg of combusted diesel
- HC: 0
  [kg/kg diesel] Hydrocarbon emissions per kg of combusted diesel
- SO2: 0
  [kg/kg diesel] Sulfur dioxide emissions per kg of combusted diesel
- Nickel: 0
  [kg/kg diesel] Nickel emissions per kg of combusted diesel
- Chromium: 0
  [kg/kg diesel] Chromium emissions per kg of combusted diesel
- Zinc: 0
  [kg/kg diesel] Zinc emissions per kg of combusted diesel
- Ind_pyr: 6.9283e-9
  [kg/kg diesel] Indeno(1,2,3,c,d)pyrene particle emissions per kg of combusted diesel
- Cadmium: 0
  [kg/kg diesel] Cadmium emissions per kg of combusted diesel
- Ace_ene: 2.62352e-8
  [kg/kg diesel] Acenaphthene emissions per kg of combusted diesel
- Benz_per: 9.03451e-9
  [kg/kg diesel] Benzo (g,h,i) perylene emissions per kg of combusted diesel
- Ethyl_b: 0
  [kg/kg diesel] Ethyl Benzene emissions per kg of combusted diesel
- Phen: 5.43179e-7
  [kg/kg diesel] Phenanthrene emissions per kg of combusted diesel
- Iso_xylene: 5.26551e-6
  [kg/kg diesel] Isomers of xylene emissions per kg of combusted diesel
- Benz_b_fluor: 1.83092e-9
  [kg/kg diesel] Benzo (b) fluoranthene emissions per kg of combusted diesel
- Anthracene: 3.45491e-8
  [kg/kg diesel] Anthracene emissions per kg of combusted diesel
- SO3: 0
  [kg/kg diesel] Sulfur trioxide emissions per kg of combusted diesel
- Ace_ylene: 9.34859e-8
  [kg/kg diesel] Acenaphthylene emissions per kg of combusted diesel
- NO2: 0.00389445
  [kg/kg diesel] Nitrogen dioxide emissions per kg of combusted diesel
- Benz_pyr: 3.47339e-9
  [kg/kg diesel] Benzo (a) pyrene emissions per kg of combusted diesel
- SOX: 0.00564212
  [kg/kg diesel] Sulfur oxides emissions per kg of combusted diesel
- Acrolein: 1.70898e-6
  [kg/kg diesel] Acrolein emissions per kg of combusted diesel
- Benz_cene: 3.10388e-8
  [kg/kg diesel] Benzo (a) anthracene emissions per kg of combusted diesel
- Copper: 0
  [kg/kg diesel] Copper emissions per kg of combusted diesel
- Form: 2.18011e-5
  [kg/kg diesel] Formaldehyde emissions per kg of combusted diesel
- Diesel: 1
  [kg] Diesel for combustion
- PM25: 0.00604006
  [kg/kg diesel] Particulate matter less than 2.5 microns emissions per kg of combusted diesel
- TOC: 0.00700647
  [kg/kg diesel] Total organic carbon emissions per kg of combusted diesel
- PM10_Great: 0.779167
  [kg/kg diesel] Particulate matter greater than 10 microns emissions per kg of combusted diesel
- NO: 0.0819454
  [kg/kg diesel] Nitric Oxide emissions per kg of combusted diesel
- CO: 0.0184755
  [kg/kg diesel] Carbon monoxide emissions per kg of combusted diesel
- Aldehydes: 0.00129328
  [kg/kg diesel] Aldehydes emissions per kg of combusted diesel
- BC: 0.00465084
  [kg/kg diesel] Black carbon particulates less than 2.5 microns emissions per kg of combusted diesel
- Fluor: 5.39484e-7
  [kg/kg diesel] Fluorene emissions per kg of combusted diesel
- TNMOC: 0
  [kg/kg diesel] Total non-methane organic carbon emissions per kg of combusted diesel
- OC: 0.000930169
  [kg/kg diesel] Organic carbon particulates less than 2.5 microns emissions per kg of combusted diesel

## Reference product
- Thermal energy; From diesel fired equipment; Production mix: 43.2 MJ; = Diesel*Diesel_EDensity; data quality (3,4,4,2,1)

## Inputs from technosphere
- Diesel, at refinery: 0.0011811 m3; = Diesel * (1/Diesel_MDensity); data quality (3,4,4,2,1)

## Emissions to nature
All rows: data quality (3,4,4,2,1)
- Polycyclic aromatic hydrocarbons (carcinogenic) [Group PAH to air]: 3.10388e-6 kg; = PAH
- Cadmium [Heavy metals to air]: 0 kg; = Cadmium
- Fluorene [Group NMVOC to air]: 5.39484e-7 kg; = Fluor
- Indeno[1,2,3-cd]pyrene [Group PAH to air]: 6.9283e-9 kg; = Ind_pyr
- Manganese [Heavy metals to air]: 0 kg; = Manganese
- Acetaldehyde (Ethanal) [Group NMVOC to air]: 1.41707e-5 kg; = Ace_yde
- Xylene (dimethyl benzene) [Group NMVOC to air]: 5.26551e-6 kg; = Iso_xylene
- Fluoranthene [Group NMVOC to air]: 1.40598e-7 kg; = Fluoran
- Sulphur dioxide [Inorganic emissions to air]: 0 kg; = SO2
- Carbon monoxide [Inorganic emissions to air]: 0.0184755 kg; = CO
- Dibenz(a,h)anthracene [Group PAH to air]: 1.07712e-8 kg; = Dib_anth
- Lead [Heavy metals to air]: 0 kg; = Lead
- TOC, Total Organic Carbon [unspecified]: 0.00700647 kg; = TOC
- Ethyl benzene [Group NMVOC to air]: 0 kg; = Ethyl_b
- Benzo{ghi}perylene [Group PAH to air]: 9.03451e-9 kg; = Benz_per
- Benzo{a}anthracene [Group PAH to air]: 3.10388e-8 kg; = Benz_cene
- Acrolein [Group NMVOC to air]: 1.70898e-6 kg; = Acrolein
- NMVOC (unspecified) [Group NMVOC to air]: 0 kg; = VOC
- Dust (PM2,5 - PM10) [Particles to air]: 0 kg; = PM25_PM10
- Acenaphthene [unspecified]: 2.62352e-8 kg; = Ace_ene
- Arsenic (+V) [Heavy metals to air]: 0 kg; = Arsenic
- Organic carbon [Emissions to air]: 0.000930169 kg; = OC
- Selenium [Heavy metals to air]: 0 kg; = Selenium
- Phenanthrene [Group PAH to air]: 5.43179e-7 kg; = Phen
- Formaldehyde (methanal) [Group NMVOC to air]: 2.18011e-5 kg; = Form
- Aldehyde (unspecified) [Group NMVOC to air]: 0.00129328 kg; = Aldehydes
- Pyrene [Group PAH to air]: 8.83127e-8 kg; = Pyrene
- Methane [Organic emissions to air]: 0.000128461 kg; = CH4
- Dust (> PM10) [Particles to air]: 0.779167 kg; = PM10_Great
- Beryllium [Inorganic emissions to air]: 0 kg; = Beryllium
- Benzo{k}fluoranthene [Group PAH to air]: 2.8637e-9 kg; = Benz_k_fluor
- Nitrogen monoxide [Inorganic emissions to air]: 0.0819454 kg; = NO
- Benzo{b}fluoranthene [Group PAH to air]: 1.83092e-9 kg; = Benz_b_fluor
- Sulfur trioxide [Inorganic emissions to air]: 0 kg; = SO3
- Acenaphthylene [Organic emissions to air (group VOC)]: 9.34859e-8 kg; = Ace_ylene
- Black carbon [Particles to air]: 0.00465084 kg; = BC
- Toluene (methyl benzene) [Group NMVOC to air]: 7.55647e-6 kg; = Toluene
- TNMOC, Total non-methane organic carbon [unspecified]: 0 kg; = TNMOC
- Naphthalene [Group PAH to air]: 1.56672e-6 kg; = Naph
- Nitrogen oxides [Inorganic emissions to air]: 0.0858399 kg; = NOx
- 1,3-Butadiene [Group NMVOC to air]: 7.22391e-7 kg; = But_1_3
- Propene (propylene) [Group NMVOC to air]: 4.76667e-5 kg; = Prop
- Ammonia [Inorganic emissions to air]: 0 kg; = NH3
- Benzo{a}pyrene [Group PAH to air]: 3.47339e-9 kg; = Benz_pyr
- Dust (PM2.5) [Particles to air]: 0.00604006 kg; = PM25
- Chromium (unspecified) [Heavy metals to air]: 0 kg; = Chromium
- Chrysene [Group PAH to air]: 6.52184e-9 kg; = Chrysene
- Anthracene [Group PAH to air]: 3.45491e-8 kg; = Anthracene
- Zinc [Inorganic emissions to air]: 0 kg; = Zinc
- Nitrogen dioxide [Inorganic emissions to air]: 0.00389445 kg; = NO2
- Copper [Inorganic emissions to air]: 0 kg; = Copper
- Sulphur oxide [Inorganic emissions to air]: 0.00564212 kg; = SOX
- Hydrocarbons (unspecified) [Organic emissions to air (group VOC)]: 0 kg; = HC
- Benzene [Group NMVOC to air]: 1.72376e-5 kg; = Benzene
- Mercury [Heavy metals to air]: 5.56851e-9 kg; = Mercury
- Nickel (+II) [Heavy metals to air]: 0 kg; = Nickel
- Carbon dioxide [Inorganic emissions to air]: 3.19898 kg; = CO2
- Nitrous oxide (laughing gas) [Inorganic emissions to air]: 2.50655e-5 kg; = N2O

## Inventory method
Attributional

## Modelling constants
All elementary and technosphere flows are calculated on a functional unit basis. Calculations involving combustion primarily to generate useful work are done using lower heating values (LHV) and calculations involving combustion primarily to generate useful heat are done using higher heating values (HHV). Unless explicitly stated in the associated reference documents applicable calculations assumed standard atmospheric temperature and pressure (SATP).

## Completeness
Individual relevant flows captured

## Data selection
Best publically available data

## Data treatment
No allocation applied

## Data collection
No primary data collected

## Intended application
This is a gate-to-gate extraction process and can be used for any type of LCA study.

## Project
National Energy Technology Laboratory (NETL) Unit Process Library

## Sources
- State of New Jersey Department of Environmental Protection Division of Air Quality 2003
- U.S. Environmental Protection Agency (EPA). 2007. Diesel Generator Exhaust, Speciate 4.2
- U.S. Environmental Protection Agency (EPA). 2014. A-400 DRAFT Inventory of U.S. Greenhouse Gas Emissions and Sinks: 1990–2012
- U.S. Environmental Protection Agency (EPA). 2003. Regulatory Announcement: Emission Standards Adopted for New Marine Diesel Engines.
- National Renewable Energy Laboratory (NREL). 2011. Transport, passenger car, diesel powered.
- U.S. Energy Information Administration (EIA). 2014. Definitions of EIA Distillate Categories and Fuels Contained in the Distillate Grouping
- U.S. Environmental Protection Agency (EPA). 2007. Diesel Exhaust, Speciate 4.2
- National Energy Technology Laboratory (NETL). 2010. Diesel consumption; Diesel fired construction equipment; Variable power rating
- U.S. Environmental Protection Agency (EPA). 2012. Report to Congress on Black Carbon
- Argonne National Laboratory (2013). Life Cycle Analysis of Conventional and Alternative Marine Fuels in GREET.
- U.S. Environmental Protection Agency (EPA). 2012. WebFIRE.
- National Renewable Energy Laboratory (NREL). 2011. Transport, passenger truck, gasoline powered.
- U.S. Environmental Protection Agency (EPA). 2012. MOVES 2010b model
- U.S. Environmental Protection Agency (EPA). 2009. Regulatory Impact Analysis: Control of Emissions of Air Pollution from Category 3 Marine Diesel Engines
- U.S. Environmental Protection Agency (EPA). 1999. AP-42, Compilation of Air Pollutant Emission Factors, Version 5, Chapter 1 Section 3
- U.S. Environmental Protection Agency (EPA). 2000. Analysis of Commercial Marine Vessels Emissions and Fuel Consumption Data
- U.S. Environmental Protection Agency (EPA). 2011. Emission factors for greenhouse gas inventories.
- National Energy Technology Laboratory (NETL). 2008. Development of baseline data and analysis of life cycle greenhouse gas emissions of petroleum-based fuels
- U.S. Environmental Protection Agency (EPA). 2007. Lists of Potential Control Measures for PM 2.5 and Precursors
- U.S. Environmental Protection Agency (EPA). 1999. Nitrogen Oxides (NOx), Why and How They Are Controlled
- U.S. Environmental Protection Agency (EPA). 1994. Development and Selection of Ammonia Emission Factors
- U.S. Environmental Protection Agency (EPA). 2008. Direct Emissions from Stationary Combustion Sources
- Eastern Research Group, Inc. 2001. Uncontrolled Emission Factor Listing for Criteria Air Pollutants.
