# Softwood logs with bark, harvested at high intensity site, at mill, US SE

Dataset: openLCA process, unit process
Category: Logging
Geography: RNA
Time period: 2003-01-01 to 2004-01-01
Generated by: Jamie Meil
Published in: Leonard R. Johnson
restrictionsDescription: All information can be accessed by everybody.
copyright: true

## General comment
Base process data presented with allocations to within process co-products noted. Refer to allocation worksheet for specifics. All allocations performed using mass or volume., harvesting on a high productivity site
Important note: although most of the data in the US LCI database has
undergone some sort of review, the database as a whole has not yet
undergone a formal validation process.
Please email comments to lci@nrel.gov.

## Technology
Typical

## Geography
US Southeast

## Reference product
- Softwood logs with bark, harvested at high intensity site, at mill, US SE: 1 m3

## Inputs from technosphere
- CUTOFF Lubricants, unspecified, at plant: 0.038201 kg
- Reforesting, high intensity site, US SE: 28.14 m2
- Diesel, combusted in industrial equipment: 2.391 l
- Transport, combination truck, average fuel mix: 147.7 t*km

## Sources
- Leonard R. Johnson
- Maureen Puetmann
- Michael Milota
