# Glue laminated beam processing, at plant, US SE

Dataset: openLCA process, unit process
Category: Engineered Wood Member (ex. Truss) Manufacturing
Geography: RNA
Time period: 2000-01-01 to 2000-01-01
Generated by: Jamie Meil
Published in: Maureen E. Puettman
restrictionsDescription: All information can be accessed by everybody.
copyright: true

## General comment
Base process data presented with allocations to within process co-products noted. Refer to allocation worksheet for specifics. All allocations performed using mass or volume. To take profile back to cradle the user must add LCI profile information for PNW dry and rough green lumber from PNW dry lumber LCI module. Cradle-to-gate LCI information presented for PRF and MUF resins and hardeners which were derived from secondary source., number of co-products produced (reported here in aggregate)
Important note: although most of the data in the US LCI database has
undergone some sort of review, the database as a whole has not yet
undergone a formal validation process.
Please email comments to lci@nrel.gov.

## Technology
typical

## Geography
US Southeast

## Reference product
- Glue laminated beam processing, at plant, US SE: 14741.8 kg

## By-products
- Co-products of glue laminated beam production, at plant, unspecified, US SE: 0.21541 kg

## Inputs from technosphere
- Electricity, at grid, Eastern US, 2000: 0.17945 kWh
- Melamine urea formaldehyde resin, at plant: 0.0013953 kg
- CUTOFF Disposal, wood waste, to unspecified treatment: 0.010233 kg
- Natural gas, combusted in industrial boiler: 0.004791 m3
- Diesel, combusted in industrial boiler: 1.2009e-6 l
- Dry rough lumber, at kiln, US SE: 1.226 kg
- Liquefied petroleum gas, combusted in industrial boiler: 7.1324e-7 l
- Transport, combination truck, average fuel mix: 1.129 t*km
- Gasoline, combusted in equipment: 7.0111e-7 l
- Phenol resorcinol formaldehyde hardener, at plant: 0.0020029 kg
- Phenol resorcinol formaldehyde resin, at plant: 0.014448 kg
- Melamine urea formaldehyde hardener, at plant: 0.00013343 kg

## Inputs from nature
- Water, unspecified natural origin: 0.056914 l

## Emissions to nature
- Hazardous Air Pollutants (HAPs), unspecified: 0.00076163 kg
- Particulates, unspecified: 0.0016279 kg
- VOC, volatile organic compounds: 0.0015058 kg

## Sources
- Maureen E. Puettman
