# Lignite coal, at surface mine

Dataset: openLCA process, unit process
Category: Bit. Coal and Lignite Surface Mining
Geography: RNA
Time period: 1993-01-01 to 2002-01-01
Generated by: Franklin Associates
Published in: Franklin Associates
restrictionsDescription: All information can be accessed by everybody.
copyright: false

## General comment
Important note: although most of the data in the US LCI database has
undergone some sort of review, the database as a whole has not yet
undergone a formal validation process.
Please email comments to lci@nrel.gov.

## Technology
Surface mining of shallow lignite deposits.

## Geography
United States

## Reference product
- Lignite coal, at surface mine: 1 kg

## Inputs from technosphere
- CUTOFF Disposal, solid waste, unspecified, to unspecified treatment: 0.235 kg
- Diesel, combusted in industrial boiler: 0.015 l
- Residual fuel oil, combusted in industrial boiler: 0.00145 l
- Electricity, at grid, US, 2000: 0.0533 kWh
- Lignite coal, combusted in industrial boiler: 0.000362 kg
- Gasoline, combusted in equipment: 0.00141 l
- Natural gas, combusted in industrial boiler: 0.000251 m3

## Inputs from nature
- Coal, bituminous, 24.8 MJ per kg: 1 kg

## Emissions to nature
- Iron: 2.65e-8 kg
- Suspended solids, unspecified: 1.98e-6 kg
- Manganese: 1.76e-7 kg
- Methane, fossil: 0.00113 kg
- Particulates, unspecified: 9.8e-5 kg

## Sources
- Hong, B.D
- Energy Information Administration
- Energy Information Administration
- unspecified
- Energy Information Administration
- Energy Information Administration
- D.A. Kirchgessner
- U.S. Census bureau
- U.S. EPA
- Franklin Associates
- unspecified
- U.S. Department of Energy
- USGS
- unspecified
- unspecified
- unspecified
- unspecified
- Energy Information Administration
- Energy Information Administration
- U.S. EPA
- US LCI Mini-Report with Sources Detail
