# Polyvinyl chloride, resin, at plant

Dataset: openLCA process, unit process
Category: Petrochemical Manufacturing
Geography: RNA
Time period: 2003-01-01 to 2004-01-01
Generated by: Franklin Associates
Published in: THE PLASTICS DIVISION OF THE ACC
restrictionsDescription: All information can be accessed by everybody.
copyright: false

## General comment
Scrap is produced as a coproduct during this process. A mass basis was used to partition the credit for the scrap. Complete inventory data and metadata are available in full in the final report and appendices, Cradle-to-Gate Life Cycle Inventory of Nine Plastic Resins and Four Polyurethane Precursors. This report has been extensively reviewed within Franklin Associates by Rebe Feraldi and Melissa Huff and has undergone partial critical review by ACC Plastics Division members and is available at: www.americanchemistry.com. Quantities may vary slightly between the reference to main source and this module due to rounding. Important note: although most of the data in the US LCI database has undergone some sort of review, the database as a whole has not yet undergone a formal validation process. Please email comments to lci@nrel.gov.

## Technology
Suspension polymerization of PVC resin.

## Geography
US

## Reference product
- Polyvinyl chloride, resin, at plant: 1 kg

## Inputs from technosphere
- Electricity, at grid, US, 2008: 0.16402 kWh
- Electricity, at cogen, for natural gas turbine: 0.091116 kWh
- CUTOFF Disposal, solid waste, unspecified, to municipal incineration: 5.2e-7 kg
  Hazardous wastes
- Natural gas, combusted in industrial boiler: 0.057745 m3
- Transport, train, diesel powered: 0.28059 t*km
  Transport is specific to chlorine transported to PVC producers. Individual amounts of each incoming material were multiplied by the incoming distance travelled. These are totaled weighted averages of the primary incoming transport data from each participating facility.
- Transport, pipeline, unspecified petroleum products: 0.0038603 t*km
  (same comment as for Transport, train, diesel powered)
- Ethylene dichloride-vinyl chloride monomer, at plant: 1.001 kg
- CUTOFF Disposal, solid waste, unspecified, to sanitary landfill: 0.00109 kg
  Solid waste consists of sludge and incoming packaging materials.

## Inputs from nature
- Water, process, unspecified natural origin/m3: 0.0010096 m3
  Franklin Associates uses a default as opposed to Egalitarian approach in collecting data for water use. During data collection, water use data were only requested and compiled in terms of 'evaporative' or consumptive use (i.e., ultimate withdraws, evaporation, or incorporation into the product). Data were not collected to determine reliable averages for non-evaporative water use. In other words, averages for water inputs and outputs are not available for this unit process. Consumptive use includes: water incorporated into the product, water evaporated during the process, and/or water used and released to a body other than that from which it was drawn.

## Emissions to nature
- Ammonia: 1e-6 kg
  This emission was reported by fewer than three companies. To indicate known emissions while protecting the confidentiality of individual company responses, the emission is reported only by order of magnitude.
- Suspended solids, unspecified: 0.00016 kg
- Organic substances, unspecified: 3.9e-5 kg
- Oil and grease, unspecified: 1e-6 kg
  (same comment as for Ammonia)
- Ethene, chloro-: 3.15e-5 kg
  This vinyl chloride emission was provided by the Vinyl Institute, based on 2011 Vinyl Chloride TRI reported values and 2011 PVC production reported by ACC Resin Statistic Report. This amount includes both the EDC/VCM plant as well as the PVC plant. This value was used to represent a more industry wide average value to account for facilities that did not participate in the LCI inventory. Actual reported figures were lower than the industry average.
- Nitrates: 1e-5 kg
  (same comment as for Ammonia)
- Phenol compounds, unspecified: 9.9e-8 kg
- Dioxins, measured as 2,3,7,8-tetrachlorodibenzo-p-dioxin: 2.15e-13 kg
  This emission was provided by the Vinyl Institute based on 2011 Dioxin TRI values and accounts for the entire EDC/VCM/PVC production emissions. These amounts were calculated as toxic equivalent values (TEQ). U98% of dioxin emissions are process related and 2% are fuel-related.
- COD, Chemical Oxygen Demand: 6.8e-5 kg
- Dioxins, measured as 2,3,7,8-tetrachlorodibenzo-p-dioxin: 8.67e-13 kg
  This emission was provided by the Vinyl Institute based on 2011 Dioxin TRI values and accounts for the entire EDC/VCM/PVC production emissions. These amounts were calculated as toxic equivalent values (TEQ).
- BOD5, Biological Oxygen Demand: 1.2e-5 kg
- Zinc: 1e-7 kg
  (same comment as for Ammonia)
- Cyanide: 1e-9 kg
  (same comment as for Ammonia)
- Chlorine: 1e-5 kg
  (same comment as for Ammonia)
- Methane, difluromonochloro-, HCFC-22: 1e-6 kg
  (same comment as for Ammonia)
- Chromium, unspecified: 1e-7 kg
  (same comment as for Ammonia)
- Hydrogen chloride: 1e-7 kg
  (same comment as for Ammonia)
- Particulates, unspecified: 8.7e-5 kg

## Sampling procedure
Data are from primary sources. Data for the production of PVC were provided by three leading producers (3 plants) in North America. At the time this data was collected, there were 12 companies and 25 plants producing PVC. The companies that provided data were the 3 largest producers of PVC at the time. Due to this, we are estimating that these companies produced greater than 50% of the PVC market share. The PVC producers who provided data for this module verified that the characteristics of their plants are representative of a majority of North American PVC suspension technology production.

## Sources
- THE PLASTICS DIVISION OF THE ACC
