# Transport, transit bus, CNG powered

Dataset: openLCA process, unit process
Category: Urban Transit Systems
Geography: RNA
Time period: 2010-01-01 to 2010-01-01
Generated by: Nathan Hardesty
Published in: U.S. Environmental Protection Agency (EP
restrictionsDescription: All information can be accessed by everybody.
copyright: false

## General comment
This dataset represents the U.S. average airborne emissions for operating a CNG (compressed natural gas) powered transit bus. The inventory includes all vehicle operation processes, including off-network and refueling activities.
The refinery-to-pump transportation and distribution data are calculated from Argonne National Laboratory's GREET 1.8d.1 model.
The vehicle operation data are calculated from EPA's MOVES2010a model, using the assumptions described in the corresponding detailed spreadsheet. Emissions factors in MOVES2010a are largely based on EPA's Mobile Source Observation Database, which in turn includes data from a variety of vehicle studies (References 6-8).
MOVES2010a acknowledges sources of uncertainty in the model structure, the population and acitivty data, and other model parameters. As of July 2011, the uncertainty calculation function of the model has not been activated.

## Technology
Combustion of compressed natural gas in a transit bus.

## Geography
US

## Reference product
- Transport, transit bus, CNG powered: 1 p*km

## Inputs from technosphere
- Transport, pipeline, unspecified petroleum products: 0.00541315 t*km
- CUTOFF Compressed natural gas, at plant: 0.0251011 kg

## Emissions to nature
- Nitrogen oxides: 0.000269019 kg
- Particulates, < 2.5 um: 6.72914e-7 kg
  PM2.5 from brakewear.
- Particulates, < 2.5 um: 1.56443e-7 kg
  PM2.5 from tirewear.
- Particulates, < 10 um: 6.52369e-7 kg
  PM10 from tirewear.
- Dinitrogen monoxide: 8.90008e-6 kg
- Carbon dioxide, fossil: 0.0698404 kg
- Hydrocarbons (other than methane): 8.89287e-5 kg
- Particulates, < 2.5 um: 5.8849e-7 kg
  PM2.5 from organic carbon, elemental carbon, and sulfate particulates.
- Particulates, < 10 um: 5.8849e-7 kg
  PM10 from organic carbon, elemental carbon, and sulfate particulates.
- Carbon monoxide, fossil: 0.00328113 kg
- Methane: 2.05378e-6 kg
- Particulates, < 10 um: 2.57053e-6 kg
  PM10 from brakewear.

## Sources
- U.S. Environmental Protection Agency (EP
- National Institute of Standards and Tech
- EPA
- U.S. Alternative Fuels and Advanced Vehi
- Eastern Research Group
- Assessment and Standards Division, Offic
- Assessment and Standards Division, Offic
- Wang, M.
- unspecified
