# Mixed recyclables, sorted at MRF

Dataset: openLCA process, unit process
Category: Sorting, separating mixed recyclables
Geography: RNA
Time period: 2007-01-01 to 2009-01-01
Generated by: Franklin Associates
restrictionsDescription: All information can be accessed by everybody.
copyright: false

## General comment
Important note: although most of the data in the US LCI database has
undergone some sort of review, the database as a whole has not yet
undergone a formal validation process.
Please email comments to lci@nrel.gov.

## Technology
Single-sort high tech 26.3%; dual-sort high tech 25.7%; dual-sort low tech 26.7%; multi-sort low tech 21.3%

## Geography
United States

## Reference product
- Mixed recyclables, sorted at MRF: 1 kg
  Because the MRF operating data were allocated over all the pounds of recovered recyclables, this data set can be applied to a kg of any recyclable material output (plastics, paper, steel, aluminum, etc.)

## Inputs from technosphere
- Transport, combination truck, diesel powered: 0.0282 t*km
  Represents transport of inbound material to be sorted, including contaminants
- Transport, single unit truck, diesel powered: 0.0261 t*km
  Represents transport of inbound material to be sorted, including contaminants
- Mixed recyclables, to MRF: 1.09 kg
  Includes wt of contaminants in incoming material.
- Liquefied petroleum gas, combusted in industrial boiler: 0.0025 l
- Electricity, at grid, US, 2000: 0.016 kWh
- Diesel, combusted in industrial boiler: 0.0018 l
- Natural gas, combusted in industrial boiler: 2.2e-6 m3
- CUTOFF Disposal, solid waste, unspecified, to unspecified landfill: 0.087 kg
  Disposal of contaminants removed from material at sorting facility

## Sources
- THE PLASTICS DIVISION OF THE AMERICAN CH
