# Electricity, at grid, US, 2000

Dataset: openLCA process, unit process
Category: Electric Power Distribution
Geography: RNA
Time period: 2000-01-01 to 2000-01-01
Generated by: Franklin Associates
Published in: Franklin Associates
restrictionsDescription: All information can be accessed by everybody.
copyright: false

## General comment
Important note: although most of the data in the US LCI database has
undergone some sort of review, the database as a whole has not yet
undergone a formal validation process.
Please email comments to lci@nrel.gov.

## Technology
Representative of year 2000 mix of fuels used for utility electricity generation in the U.S. Fuels include coals, fuel oil, nuclear, hydroelectric, and unconventional energy sources. Data are weighted according to percent share of consumption. Includes line loss factor of 9.91%, which represents the difference between electricity generated and electricity sold.

## Geography
United States, excluding Alaska and Hawaii.

## Reference product
- Electricity, at grid, US, 2000: 1 kWh

## Inputs from technosphere
- Electricity, biomass, at power plant: 0.0158 kWh
  Accounts for average line losses of 9.91%
- Electricity, residual fuel oil, at power plant: 0.031 kWh
  Accounts for average line losses of 9.91%
- CUTOFF Electricity, geothermal, unspecified: 0.00401 kWh
  Accounts for average line losses of 9.91%
- Electricity, lignite coal, at power plant: 0.0287 kWh
  Accounts for average line losses of 9.91%
- Electricity, bituminous coal, at power plant: 0.545 kWh
  Accounts for average line losses of 9.91%
- Electricity, nuclear, at power plant: 0.216 kWh
  Accounts for average line losses of 9.91%
- CUTOFF Electricity, fossil, unspecified, at power plant: 0.00666 kWh
  Accounts for average line losses of 9.91%
- CUTOFF Electricity, photovoltaic, unspecified: 0.000181 kWh
  Accounts for average line losses of 9.91%
- CUTOFF Electricity, at wind power plant, unspecified: 0.0016 kWh
  Accounts for average line losses of 9.91%
- CUTOFF Electricity, hydropower, at power plant, unspecified: 0.0778 kWh
  Accounts for average line losses of 9.91%
- Electricity, natural gas, at power plant: 0.173 kWh
  Accounts for average line losses of 9.91%

## Sources
- Franklin Associates
- U.S. Environmental Protection Agency
- U.S. Energy Information Administration
