# Hog fuel, pur., combusted in industrial boiler, at pulp and paper mill (EXCL.)

Dataset: openLCA process, unit process
Category: Pulp, Paper, and Paperboard Mills
Geography: RNA
Time period: 2004-01-01 to 2004-01-01
Generated by: Caroline Gaudreault
Reviewer: Martha Stevenson
Published in: Franklin Associates
restrictionsDescription: All information can be accessed by everybody.
copyright: false

## General comment
This process, "Hog fuel, purchased (pur.), combusted in industrial boiler, at pulp and paper mill (EXCL.), was built to be used within the processes named "Fuels burned at bleached kraft market pulp mill", "Fuels burned at uncoated freesheet paper mill", "Fuels burned at coated freesheet paper mill", "Fuels burned at uncoated mechanical paper mill", "Fuels burned at coated mechanical paper mill" and "Fuels burned at bag and sack paper mill". It was built from the process named "Wood fuel, SE hardwood, purchased, combusted in industrial boiler" v.1.0 available in the US LCI database. Transport and waste processes were removed. The following emissions to air were excluded (excl.): Sulfur oxidesand Nitrogen oxides. These processes and emissions are reported in pulp and paper mill process chain in which this process is integrated.
Important note: although most of the data in the US LCI database has
undergone some sort of review, the database as a whole has not yet
undergone a formal validation process.
Please email comments to lci@nrel.gov.

## Technology
This process is a copy of the FAL "Wood waste, unspecified, combusted into industrial boilers" for which (1) the wood input was changed to an adapted version of the Franklin fuel wood dataset; (2) wood weight is expressed on oven dry basis; (3) outputs to nature have been scaled to reflect 1 kg of oven dry wood input and (4) waste flow is changed to waste treatment input.

## Geography
US

## Reference product
- Hog fuel, pur., combusted in industrial boiler, at pulp and paper mill (EXCL.): 1 kg
  Weight reported on an ovendry basis.

## Inputs from technosphere
- Wood fuel, unspecified: 1 kg
  Weight reported on an ovendry basis.

## Emissions to nature
- Manganese: 1.44e-5 kg
- Methane, tetrachloro-, CFC-10: 4.05e-7 kg
- Benzene: 3.78e-5 kg
- TOC, Total Organic Carbon: 3.681e-5 kg
- Cadmium: 3.69e-8 kg
- Arsenic: 1.98e-7 kg
- Methane: 0.000189 kg
- Chromium: 1.89e-7 kg
- Carbon dioxide, biogenic: 1.83 kg
  1.83 kg CO2/kg of wood to preserve mass balance (Printing & Writing Papers Life-Cycle Assessment Summary Report)
- Antimony: 7.11e-8 kg
- Particulates, > 2.5 um, and < 10um: 0.0045 kg
- BOD5, Biological Oxygen Demand: 0.0175 kg
- Naphthalene: 8.73e-7 kg
- Dioxins, measured as 2,3,7,8-tetrachlorodibenzo-p-dioxin: 1.503e-8 kg
- Hydrogen chloride: 0.000171 kg
- Beryllium: 9.9e-9 kg
- Phenols, unspecified: 4.59e-7 kg
- Methane, dichloro-, HCC-30: 2.61e-6 kg
- Acetaldehyde: 7.47e-6 kg
- Acrolein: 3.6e-5 kg
- Nickel: 2.97e-7 kg
- Metals, unspecified: 0.00038494 kg
- Formaldehyde: 3.96e-5 kg
- Cobalt: 5.85e-8 kg
- Chlorine: 7.11e-6 kg
- Carbon monoxide: 0.0054 kg
- Lead: 4.32e-7 kg
- Mercury: 3.15e-8 kg
- Selenium: 2.52e-8 kg

## Sources
- AF&PA
- Maureen Puettmann
- Franklin Associates
- U.S. EPA
- Combustion Engineering Inc.
- Kaminski, Paul
- Argonne National Laboratory
- Sassenrath, Charles P
- U.S. DoE
