# Roundwood, hardwood, green, at logyard, NE-NC

Dataset: openLCA process, unit process
Category: Logging
Geography: RNA
Time period: 2005-01-01 to 2006-01-01
Generated by: Maureen Puetmann
Published in: Richard D. Bergman
restrictionsDescription: All information can be accessed by everybody.
copyright: false

## General comment
All weights given on an ovendry basis.
Both logs and bark were transported jointly - however, these were seperated in themodel based on mass allocation. This unit process only accounts for the transport of logs and excludes the transport of bark.
Important note: although most of the data in the US LCI database has
undergone some sort of review, the database as a whole has not yet
undergone a formal validation process.
Please email comments to lci@nrel.gov.

## Technology
Average transport distance.

## Geography
NE/NC = Northeast (NE) and Northcentral (NC) United States. The 20 states are Connecticut, Delaware, Illinois, Indiana, Iowa, Maine, Maryland, Massachusetts, Michigan, Minnesota, Missouri, New Hampshire, New Jersey, New York, Ohio, Pennsylvania, Rhode Island, Vermont, West Virginia, Wisconsin.

## Reference product
- Roundwood, hardwood, green, at logyard, NE-NC: 1 m3
  Based on a weighted average green density of 854 kg/m3; specific gravity of 0.511; 87%MC

## By-products
- Bark, hardwood, green, at logyard, NE-NC: 58.7 kg
  Weight reported on an ovendry basis. Moisture content (ovendry basis) = 87%

## Inputs from technosphere
- Natural gas, combusted in industrial equipment: 0.0375 l
  40% of mill use based on Softwood SE CORRIM Report: transporation on-site
- Roundwood, hardwood, green, at mill, NE-NC: 1 m3
  526 OD kg/m3
- Electricity, onsite boiler, hardwood mill, average, NE-NC: 0.0999 kWh
  5% of total electricity is used for logyard and based on 1.0 m^3 planed dried lumber
- Electricity, at grid, Eastern US, 2000: 5.84 kWh
  5% of total electricity is used for logyard and based on 1.0 m^3 planed dried lumber
- Gasoline, combusted in equipment: 0.16 l
  40% of mill use based on Softwood SE CORRIM Report: transporation on-site
- Diesel, combusted in industrial equipment: 1.84 l
  40% of mill use based on Softwood SE CORRIM Report: transporation on-site
- Bark, hardwood, green, at mill, NE-NC: 58.7 kg

## Inputs from nature
- Water, well: 104 l
  Spraying or soaking logs for stain prevention

## Sampling procedure
Questionnaires from 20 mills (17 companies) from the 20 states of Forest Service (FS) Northeastern (NE) Region. Hardwood sawmills were members of the Hardwood Manufacturer Association (HMA).

## Sources
- Richard D. Bergman
- Maureen Puettmann
