# Sawn lumber, softwood, rough, green, at sawmill, NE-NC

Dataset: openLCA process, unit process
Category: Sawmills
Geography: RNA
Time period: 2006-01-01 to 2007-01-01
Generated by: Maureen Puetmann
Published in: Richard D. Bergman
restrictionsDescription: All information can be accessed by everybody.
copyright: false

## General comment
Allocation based on mass.
Important note: although most of the data in the US LCI database has
undergone some sort of review, the database as a whole has not yet
undergone a formal validation process.
Please email comments to lci@nrel.gov.

## Technology
Average technology. Some data extrapolated from similar processes.

## Geography
NE/NC = Northeast (NE) and Northcentral (NC) United States. Some states are however omitted: Connecticut, Delaware, Illinois, Iowa, New Jersey, and Ohio.

## Reference product
- Sawn lumber, softwood, rough, green, at sawmill, NE-NC: 1 kg
  Weight reported on an ovendry basis. Moisture content (ovendry basis) = 51%

## By-products
- Wood chips, softwood, green, at sawmill, NE-NC: 0.702 kg
  Weight reported on an ovendry basis. Moisture content (ovendry basis) = 108%
- Bark, softwood, green, at sawmill, NE-NC: 0.256 kg
  Weight reported on an ovendry basis. Moisture content (ovendry basis) = 96.5%
- Sawdust, softwood, green, at sawmill, NE-NC: 0.0839 kg
  Weight reported on an ovendry basis. Moisture content (ovendry basis) = 107%
- Fuel wood, softwood, green, at sawmill, NE-NC: 0.0913 kg
  Weight reported on an ovendry basis. Moisture content (ovendry basis) = 42.9%

## Inputs from technosphere
- Electricity, at grid, Eastern US, 2000: 0.0845 kWh
  Represents 49.7% of total mill consumption of grid electricity.
- Gasoline, combusted in equipment: 1.5e-5 l
  Gasoline used for on-site transportation. Represents 20% of mill use of gasoline for transport.
- Bark, softwood, green, at logyard, NE-NC: 0.103 kg
  Weight reported on an ovendry basis.
- Diesel, combusted in industrial equipment: 0.00082 l
  Diesel used for on-site transportation. Represents 20% of mill use of diesel for transport.
- CUTOFF Recycling, solid waste, unspecified: 8.47e-5 kg
  Based on one mill reporting data only.
- Roundwood, softwood, green, at logyard, NE-NC: 0.0021 m3
  Weight reported on an ovendry basis.
- Electricity, onsite boiler, softwood mill, average, NE-NC: 0.0142 kWh
  Represents 49.7% of total mill consumption of electricity generated onsite.
- CUTOFF Disposal, solid waste, unspecified, to inert material landfill: 0.00106 kg
  Based on one mill reporting data only.

## Inputs from nature
- Water, process and cooling, surface: 1.635 l
  Amount of water consumed as makeup water, water spray for logs and lumber yard

## Sampling procedure
Questionnaires from 6 mills member of the Northeastern Lumber Manufacturer’s Association (NeLMA). Mills of the NeLMA are assumed to be representative of the softwood industry in the NE/NC region.

## Sources
- Forest Products Laboratory
- Richard D. Bergman
- Maureen Puettmann
- Andrew J. Baker
- Forest Products Laboratory
- USDC
- M. A. Fosenca
- W.T. Simpson
