# Soy oil, refined, at plant

Dataset: openLCA process, unit process
Category: All Other Basic Organic Chemical Manufacturing
Geography: RNA
Time period: 2005-01-01 to 2009-01-01
Generated by: Anne Landfield Greig
Published in: Omni Tech International
restrictionsDescription: All information can be accessed by everybody.
copyright: false

## General comment
1. Energy data: late 2000s, other data: theoretical. 2. The study (Main Data Source) underwent external peer review prior to this submission to the US LCI database. 3. CARBON SEQUESTRATION should be accounted for after the product is built in its LCA model, and should be included depending on the use of end of life fate of that product.
REFINED SOY OIL: 80.6% C --> 2.955 kg CO2/kg refined soy oil

## Technology
average

## Geography
US

## Reference product
- Soy oil, refined, at plant: 1000 kg

## By-products
- Soap stock, at plant: 7.4 kg

## Inputs from technosphere
- Transport, combination truck, diesel powered: 33.6 t*km
- Electricity, at grid, US, 2000: 4.46 kWh
- Sodium hydroxide, production mix, at plant: 2.3 kg
  NaOH
- CUTOFF Disposal, liquid wastes, unspecified to waste water treatment: 90 l
- Natural gas, combusted in industrial boiler: 1.56 m3
- Soybean oil, crude, degummed, at plant: 1040 kg

## Inputs from nature
- Water: 156 l

## Emissions to nature
- Saponifiable oils and fats: 18 kg
- Unsaponifiable matter: 15 kg

## Sources
- Omni Tech International
