# Coal mine commissioning and decommissioning; Production mix, underground mine

Dataset: openLCA process, unit process
Category: Bit. Coal and Lignite Surface Mining
Geography: US
Time period: 2004-01-01 to 2004-12-31
Generated by: Timothy Skone
Owner: National Energy Technology Laboratory
Reviewer: Robert James
Published in: National Energy Technology Laboratory (NETL). 2010. Coal mine commissioning and decommissioning; Production mix, underground mine
restrictionsDescription: Use of this dataset is not restricted, but a statement of attribution is required. Please use the following attribution statement:
National Energy Technology Laboratory's (NETL) Unit Process Library
626 Cochrans Mill Road, P.O. Box 10940
Pittsburgh, PA 15236-0940
http://www.netl.doe.gov/research/energy-analysis/life-cycle-analysis/unit-process-library
Neither the U.S. Department of Energy (DOE) National Energy Technology Laboratory (NETL) nor any person acting on behalf of these organizations:
A. Makes any warranty or representation, express or implied, with respect to the accuracy, completeness, or usefulness of the information contained in this document, or that the use of any information, apparatus, method, or process disclosed in this document may not infringe on privately owned rights; or
B. Assumes any liability with this report as to its use, or damages resulting from the use of any information, apparatus, method, or process disclosed in this document.
Reference herein to any specific commercial product, process, or service by trade name, trademark, manufacturer, or otherwise, does not necessarily constitute or imply its endorsement, recommendation, or favoring by NETL. The views and opinions of the authors expressed herein do not necessarily state or reflect those of NETL.
copyright: true

## General comment
This process is part of the NETL Unit Process Library. To access the library and the original dataset:
1) Navigate to the NETL LCA home page (http://www.netl.doe.gov/lca)
2) Then navigate to the “Unit Process Library”
3) From the library, the unit process of interest can be found either through the "Complete Listing of the Unit Process Library link" or through the link to the "Unit Process Database" spreadsheet
4) For each process, a Data Sheet (DS) and Data File (DF) are available

BRIEF DESCRIPTION
This parameterized unit process calculates fuel consumption and resulting emissions to commission and decommission an Illinosis No. 6 underground, bituminous coal mine in Illinois. Decommissioning values represented as a percentage of the commissioning values. Inputs and outputs are reported on the basis of 1 kg of coal.

GOAL AND SCOPE
The scope of this unit process covers the fuel combustion and emissions created for the construction (commissioning) and the end of life (decommissioning) of an Illinois No. 6 bituminous underground coal mine located in Saline County, IL, for the extraction of raw materials in Life Cycle (LC) Stage #1. The unit process is based on the reference flow of 1 kg of cleaned, crushed (to approximately 3 inches) Illinois No. 6 coal, as described below and in the associated documentation (referenced below). The commissioning and decommissioning unit process includes the consumption of diesel fuel and gasoline by construction/demolition machinery used to perform mine commissioning and decommissioning activities (including all on-site facilities), as well as combustion emissions associated with diesel fuel and gasoline consumption. Construction of machinery used at the mine during mine operations, as well as input flows and emissions associated with mine operations, are addressed in separate unit processes.

BOUNDARY AND DESCRIPTION
The boundary for this unit process includes initial clearing and construction activities that take land in its natural state and to turn it into an Illinois No. 6 underground coal mine. These activities include clearing of natural vegetation, excavation of soil and rock, grading, and construction of needed facilities. The boundary also includes decommissioning of the mine. That is, after all of the readily available coal has been extracted from the mine, decommissioning will result in the removal of infrastructure, recontouring the land around the mine to the extent warranted, and planting of vegetation to help return the land to its natural state (TEEIC 2010).

Much of the information used to model Illinois No. 6 underground bituminous coal mine operations (contained in a separate unit process) was collected from data available for the Galatia Mine, located in Saline County, IL. However, no information was available for the commissioning or decommissioning of the Galatia Mine, or of other nearby mines. As a substitute, information from the Red Cliff Mine, located in Colorado, was used. The Red Cliff Mine is a proposed underground mine that would produce a low-sulphur coal by longwall and pillar mining techniques (BLM 2009a). Information regarding the specific type of coal to be mined at Red Cliff was not available; however, the McClane Canyon Mine is located three miles north of the proposed Red Cliff Mine and produces bituminous coal. Based on the proximity of the two mines, and because Colorado is known to have substantial bituminous coal reserves, it is assumed that bituminous coal will also be produced at the Red Cliff Mine.

An overview of the boundary for this unit process can be found in the associated documentation (referenced in the Citation and Associated Documentation section below). Upstream emissions associated with the production and delivery of gasoline and diesel fuel are accounted for outside of the boundary of this unit process via proprietary profiles contained within the GaBi model. However, no machinery production is considered, since it is assumed that machinery would be used for numerous construction or demolition jobs before being replaced.

Since the commissioning and decommissioning process focuses on fuel inputs and their associated combustion, it is important to understand the data sources along with their underlying assumptions and relevance to the study. Fuel consumption and emissions data were taken from the Red Cliff Mine Environmental Impact Statement completed by the US Bureau of Land Management (BLM) for the proposed coal mine in western Colorado (BLM 2009a). The data were provided in tons of emission per year of commissioning. For this information to be useful in the context of this project, the data were converted to kilogram of emission per kilogram of coal that is anticipated to be produced over the lifetime of the coal mine. The projected production rate for the Red Cliff Mine is 8.0 million short tons per year, while the average production rate for the Galatia Mine used for this study is approximately 6.6 million short tons per year. Although the Red Cliff Mine would have a somewhat larger production rate as compared to the Galatia Mine, it was assumed that commissioning and decommissioning fuel usage and emissions would be similar for both mines.

Red Cliff Mine documentation did not include mercury or ammonia emissions from fuel combustion. Mercury emissions data were therefore obtained from a separate source, (Conway et al. 2005) and calculated based on the fuel demand. Ammonia emission factors were obtained from a U.S. Environmental Protection Agency (EPA) publication and used to calculate the commissioning emissions (Roe et al. 2004). Reliable data for water use during coal mine commissioning and decommissioning were unable to be located and were, therefore, taken as a minor data limitation.

Data were not readily available to model the decommissioning portion of the mine life cycle. Therefore, it was assumed that decommissioning would result in 10 percent of the total fuel use and emissions that would result from commissioning. An adjustable parameter was also included in the unit process, to enable the user to update this assumption. Should the commissioning and decommissioning of the mine prove to be significant, further analysis on this data point is suggested, which may result in an increase or decrease in the value of this adjustable parameter, in comparison to the default value of 10 percent.

Additional details regarding input and output flows, including calculation methods, are contained in the Citation and Associated Documentation section below.

This process contains one or more surrogate product flows as replacements for proprietary product flows used in the NETL Unit Process Library. All surrogate flow were taken from the U.S. Life Cycle Inventory Database; a list of surrogate flows used in this process is provided below:
1) Diesel, at refinery
2) Gasoline, at refinery

CITATION AND ASSOCIATED DOCUMENTATION
This document should be cited as:
National Energy Technology Laboratory (NETL). 2015. NETL Life Cycle Inventory Data - Unit Process: Coal mine commissioning and decommissioning; Production mix, underground mine. U.S. Department of Energy, National Energy Technology Laboratory. Last Updated: September 2015 (version 01). Retrieved on [DATE] from [URL for this dataset].

This dataset is part of the NETL Unit Process Library. The Library offers additional information concerning this dataset in the form of a Detailed Spreadsheet Documentation (DS) file and a Process Documentation File (DF). The DS file is an Excel file that contains all of the parameters, inputs, and outputs for a given system as well as background data, calculations and quality scores. The DF file is a PDF document that contains major assumptions and data sources that are the basis for each unit process. The NETL Unit Process Library is located on the NETL website (netl.doe.gov) under Research / Energy Analysis / Energy Trends and Issues / Life Cycle Analysis / Unit Process Library.

This dataset was converted directly from the DS with additional supporting information provided by the DF. Full citations for the DS and DF are given below.

DS File
National Energy Technology Laboratory (NETL). 2010. NETL Life Cycle Inventory Data - Unit Process: Commissioning and Decommissioning of Illinois No. 6 Coal Mine. U.S. Department of Energy, National Energy Technology Laboratory. Last Updated: January 2010 (version 01). Retrieved on 6/30/2014 from: http://www.netl.doe.gov/File%20Library/Research/Energy%20Analysis/Life%20Cycle%20Analysis/UP_Library/DS_Stage1_I_CommissionDecommission_I6_CoalMine_2010-01.xls

DF File
National Energy Technology Laboratory (NETL). 2010. NETL Life Cycle Inventory Data - Unit Process: Commissioning and Decommissioning of Illinois No. 6 Coal Mine. U.S. Department of Energy, National Energy Technology Laboratory. Last Updated: January 2010 (version 01). Retrieved on 6/30/2014 from: http://www.netl.doe.gov/File%20Library/Research/Energy%20Analysis/Life%20Cycle%20Analysis/UP_Library/DF_Stage1_I_CommissionDecommission_I6_CoalMine_2010-01.pdf

## Technology
The scope of this unit process covers the fuel combustion and emissions created for the construction (commissioning) and the end of life (decommissioning) of an Illinois No. 6 bituminous underground coal mine located in Saline County, IL, for the extraction of raw materials in Life Cycle (LC) Stage #1. The boundary for this unit process includes initial clearing and construction activities that take land in its natural state and to turn it into an Illinois No. 6 underground coal mine. These activities include clearing of natural vegetation, excavation of soil and rock, grading, and construction of needed facilities. The boundary also includes decommissioning of the mine. That is, after all of the readily available coal has been extracted from the mine, decommissioning will result in the removal of infrastructure, recontouring the land around the mine to the extent warranted, and planting of vegetation to help return the land to its natural state (TEEIC 2010). Additional information regarding the technologies included with this unit process are available in the Supporting Information which is referenced in the Description field.

## Geography
Illinois

## Time period
This data set is representative of best available public data from 01/01/2004 to 12/31/2004 and is not subject to limited usability within sub-time spans (e.g. summer, winter).

## Parameters
- tot_CH4: 3.78125e-10; = CH4_comm+(CH4_comm*decomm_percent)
  [kg/kg coal] Total CH4, per kg of IL No. 6 coal produced, released during commissioning and decommis
- tot_CO2: 1.26588e-5; = CO2_comm+(CO2_comm*decomm_percent)
  [kg/kg coal] Total CO2, per kg of IL No. 6 coal produced, released during commissioning and decommis
- diesel_density: 850.768
  [kg/m^3] Density of Diesel
- gas_density: 735.024
  [kg/m^3] Density of Gas
- tot_diesel: 2.89168e-9; = diesel_comm+(diesel_comm*decomm_percent)
  [m^3/kg coal] Total diesel, per kg of IL No. 6 coal produced, used during commissioning and decommis
- tot_VOC: 4.55818e-9; = VOC_comm+(VOC_comm*decomm_percent)
  [kg/kg coal] Total VOCs, per kg of IL No. 6 coal produced, released during commissioning and decommi
- NH3_comm: 5.7644e-11
  [kg/kg coal] Amount of NH3 released during commissioning of the coal mine per reference flow. Calcul
- SO2_comm: 7.5e-11
  [kg/kg coal] Amount of SO2 released during commissioning of the coal mine per reference flow. Calcul
- tot_NH3: 6.34084e-11; = NH3_comm+(NH3_comm*decomm_percent)
  [kg/kg coal] Total NH3, per kg of IL No. 6 coal produced, released during commissioning and decommis
- PM_comm: 4.0781e-7
  [kg/kg coal] Amount of PM released during commissioning of the coal mine per reference flow. Calcula
- tot_CO: 3.30209e-8; = CO_comm+(CO_comm*decomm_percent)
  [kg/kg coal] Total CO, per kg of IL No. 6 coal produced, released during commissioning and decommiss
- tot_Hg: 3.86452e-16; = Hg_comm+(Hg_comm*decomm_percent)
  [kg/kg coal] Total Hg, per kg of IL No. 6 coal produced, released during commissioning and decommiss
- tot_gas: 3.49987e-12; = gas_comm+(gas_comm*decomm_percent)
  [m^3/kg coal] Total gasoline , per kg of IL No. 6 coal produced, used during commissioning and decom
- VOC_comm: 4.1438e-9
  [kg/kg coal] Amount of VOC released during commissioning of the coal mine per reference flow. Calcul
- N2O_comm: 2.125e-10
  [kg/kg coal] Amount of N2O released during commissioning of the coal mine per reference flow. Calcul
- tot_NOx: 1.01028e-7; = NOx_comm+(NOx_comm*decomm_percent)
  [kg/kg coal] Total Nox, per kg of IL No. 6 coal produced, released during commissioning and decommis
- CH4_comm: 3.4375e-10
  [kg/kg coal] Amount of CH4 released during commissioning of the coal mine per reference flow. Calcul
- tot_N2O: 2.3375e-10; = N2O_comm+(N2O_comm*decomm_percent)
  [kg/kg coal] Total N2O, per kg of IL No. 6 coal produced, released during commissioning and decommis
- CO2_comm: 1.1508e-5
  [kg/kg coal] Amount of CO2 released during commissioning of the coal mine per reference flow. Calcul
- gas_comm: 3.1817e-12
  [m^3/kg coal] Amount of gasoline released during commissioning of the coal mine per reference flow.
- tot_SO2: 8.25e-11; = SO2_comm+(SO2_comm*decomm_percent)
  [kg/kg coal] Total SO2, per kg of IL No. 6 coal produced, released during commissioning and decommis
- Hg_comm: 3.5132e-16
  [kg/kg coal] Amount of Hg released during commissioning of the coal mine per reference flow. Calcula
- NOx_comm: 9.1844e-8
  [kg/kg coal] Amount of NOx released during commissioning of the coal mine per reference flow. Calcul
- diesel_comm: 2.6288e-9
  [m^3/kg coal] Amount of diesel released during commissioning of the coal mine per reference flow. Ca
- decomm_percent: 0.1
  [%(x100)] Adjustable Parameter; percentage of commissioning emissions and fuel use assumed to accoun
- CO_comm: 3.0019e-8
  [kg/kg coal] Amount of CO released during commissioning of the coal mine per reference flow. Calcula
- tot_PM: 4.48591e-7; = PM_comm+(PM_comm*decomm_percent)
  [kg/kg coal] Total PM, per kg of IL No. 6 coal produced, released during commissioning and decommiss

## Reference product
- Fuel consumption and emissions from coal mine commissioning and decommissioning; Underground mine: 1 Item(s); data quality (2,2,2,2,2)

## Emissions to nature
All rows: data quality (2,2,2,2,2)
- Ammonia: 6.34084e-11 kg; = tot_NH3
- Nitrogen dioxide: 1.01028e-7 kg; = tot_NOx
- Mercury: 3.86452e-16 kg; = tot_Hg
- Dinitrogen monoxide: 2.3375e-10 kg; = tot_N2O
- Carbon monoxide: 3.30209e-8 kg; = tot_CO
- Methane: 3.78125e-10 kg; = tot_CH4
- Sulfur dioxide: 8.25e-11 kg; = tot_SO2
- Particulates, > 2.5 um, and < 10um: 4.48591e-7 kg; = tot_PM
- NMVOC, non-methane volatile organic compounds, unspecified origin: 4.55818e-9 kg; = tot_VOC
- Carbon dioxide: 1.26588e-5 kg; = tot_CO2

## Inventory method
Attributional

## Modelling constants
All elementary and technosphere flows are calculated on a functional unit basis. Calculations involving combustion primarily to generate useful work are done using lower heating values (LHV) and calculations involving combustion primarily to generate useful heat are done using higher heating values (HHV). Unless explicitly stated in the associated reference documents applicable calculations assumed standard atmospheric temperature and pressure (SATP).

## Completeness
Individual relevant flows captured

## Data selection
Best publically available data

## Data treatment
No allocation applied

## Data collection
No primary data collected

## Intended application
This is a gate-to-gate installation process and can be used for any type of LCA study.

## Project
National Energy Technology Laboratory (NETL) Unit Process Library

## Sources
- URS Corporation. 2004. Compendium of Greenhouse Gas Emission Methodologies for the Oil and Gas Industry.
- National Energy Technology Laboratory (NETL). 2010. Coal mine commissioning and decommissioning; Production mix, underground mine
- Tribal Energy and Environmental Information. 2010. Coal Mining: Decommissioning and Site Reclamation Impacts
- U.S. Bureau of Land Management (BLM). 2009a. Red Cliff Mine Draft Environmental Impact Statement, Appendix H: Air Quality Analysis Modeling Report
- Roe et al. 2004. Estimating Ammonia Emissions from Anthropogenic Nonagricultural Sources - Draft Final Repor
- Conaway, et al. 2005. Estimate of mercury emission from gasoline and diesel consumption, San Francisco Bay area, California.
