# Bucked and debarked log, hardwood, green, at veneer mill, E

Dataset: openLCA process, unit process
Category: Softwood Veneer and Plywood Manufacturing
Geography: RNA
Time period: 2007-01-01 to 2007-01-01
Generated by: Maureen Puettmann
Published in: Richard D. Bergman
restrictionsDescription: All information can be accessed by everybody.
copyright: false

## General comment
All weights given on an ovendry basis. All moisture contents are on an ovendry basis. MC% =(weight of water in wood / weight of oven dry wood) *100. Reference to specific gravities use oven dry mass and volumes at specified moisture contents. Reference to densities use mass and volume at specified moistrue contents. Important note: although most of the data in the US LCI database has undergone some sort of review, the database as a whole has not yet undergone a formal validation process. Please email comments to lci@nrel.gov.

## Technology
Typical

## Geography
E= Eastern US United States. The states included MN, IA, MO, WI, IL, NJ, OH, IN, MI, WV, PA, MD, DW, NJ, NY, ME, VT, NH, RI, MA, CT, VA, KY, AR, LA, MS, AL, FL,GA, NC, SC, and TN

## Reference product
- Bark, hardwood, green, at veneer mill, E: 24.7482 kg

## By-products
- Bucked and debarked log, hardwood, green, at veneer mill, E: 1 m3
- Wood fuel, hardwood, green, at veneer mill, E: 2.43825 kg

## Inputs from technosphere
- Bark, hardwood, green, at mill, E: 27.1865 kg
- Gasoline, combusted in equipment: 0.0348263 l
- Roundwood, hardwood, green, at mill, E: 1 m3
- Natural gas, combusted in industrial equipment: 0.000180024 m3
- Diesel, combusted in industrial equipment: 0.284462 l
- Electricity, at grid, Eastern US, 2000: 36.1222 kWh
- CUTOFF Disposal, solid waste, unspecified, to inert material landfill: 0.340135 kg
- CUTOFF Recycling, waste, unspecified: 0.873705 kg

## Sampling procedure
Questionnaires from 4 veneer mills and 5 flooring plants in the E. United States representing 32 states.

## Sources
- Richard D. Bergman
- Maureen Puettmann
