# Natural gas, extracted

Dataset: openLCA process, unit process
Category: Crude Petroleum and Natural Gas Extraction
Geography: RNA
Time period: 2003-01-01 to 2003-01-01
Generated by: Franklin Associates
Published in: THE PLASTICS DIVISION OF THE AMERICAN C
restrictionsDescription: All information can be accessed by everybody.
copyright: false

## General comment
This module includes data for natural gas co-extracted with crude oil as well as natural gas produced independently. In cases where data represent both crude oil and natural gas extraction, the data module allocates environmental emissions based on the percent weight of natural gas produced. No allocation was given if the data were specific to the natural gas extraction. The data module also apportions environmental emissions according to the percent share of onshore and offshore extraction. Complete inventory data and metadata are available in full in the final report and appendices, Cradle-to-Gate Life Cycle Inventory of Nine Plastic Resins and Four Polyurethane Precursors. This report has been extensively reviewed within Franklin Associates and has undergone partial critical review by ACC Plastics Division members and is available at: www.americanchemistry.com. Quantities may vary slightly between the reference to main source and and this module due to rounding. Important note: although most of the data in the US LCI database has undergone some sort of review, the database as a whole has not yet undergone a formal validation process. Please email comments to lci@nrel.gov.

## Technology
Onshore and offshore underground well extraction using automated pumps when co-produced with crude oil. An estimated 80 percent of natural gas is extracted onshore and 20 percent is extracted offshore .

## Geography
US

## Reference product
- Natural gas, extracted: 1 kg

## Inputs from technosphere
- Natural gas, combusted in industrial boiler: 0.0328 m3
- Diesel, combusted in industrial equipment: 0.00129 l
  Includes diesel fuel and distillate oil amounts.
- Residual fuel oil, combusted in industrial boiler: 0.000798 l
- Gasoline, combusted in equipment: 0.000684 l
- Electricity, at grid, US, 2008: 0.039 kWh
- CUTOFF Disposal, solid waste, unspecified, to sanitary landfill: 0.0247 kg

## Inputs from nature
- Gas, natural, 49.8 MJ per kg, in ground: 1.04 kg
  This weight reflects material loss at extraction.

## Emissions to nature
- Zinc: 5.26e-7 kg
- Benzene: 2.6e-7 kg
- Dodecane: 1.4e-8 kg
- m-Xylene: 7.52e-9 kg
- Xylene: 1.12e-7 kg
  Additional unspeciated xylenes
- Barium: 0.00031 kg
- Dibenzofuran: 3.33e-11 kg
- Boron: 7.98e-7 kg
- Phenol, 2,4-dimethyl-: 7.13e-9 kg
- Cyanide: 1.27e-11 kg
- Surfactants, unspecified: 1.24e-7 kg
- Lead: 1.26e-7 kg
- Methyl ethyl ketone: 1.41e-11 kg
- Phenanthrene: 2.04e-10 kg
- Naphthalenes, alkylated, unspecified: 7.74e-10 kg
- Lithium, ion: 0.00015 kg
- Chromium: 6.19e-7 kg
- Iron: 4.29e-5 kg
- Benzenes, alkylated, unspecified: 4.73e-8 kg
- o-Cresol: 7.33e-9 kg
- Dissolved solids: 0.00623 kg
- Tetradecane: 6.04e-9 kg
- Vanadium: 6.79e-9 kg
- Decane: 7.39e-9 kg
- Tin: 5.78e-8 kg
- Magnesium: 0.000101 kg
- Copper: 6.72e-8 kg
- Titanium, ion: 2.23e-7 kg
- Sulfur: 6.48e-7 kg
- Benzene, 1-methyl-4-(1-methylethyl)-: 1.75e-11 kg
- Yttrium: 1.71e-9 kg
- Fluorenes, alkylated, unspecified: 2.74e-9 kg
- Beryllium: 2.99e-9 kg
- Antimony: 1.4e-8 kg
- Benzoic acid: 2.58e-7 kg
- Methane: 0.0034 kg
- Sulfate: 1.02e-5 kg
- Nickel: 5.78e-8 kg
- Lead-210/kg: 2.65e-17 kg
- Octadecane: 3.8e-9 kg
- Hexadecane: 1.53e-8 kg
- 2-Hexanone: 1.7e-9 kg
- Silver: 3.02e-7 kg
- n-Hexacosane: 1.17e-10 kg
- p-Cresol: 7.9e-9 kg
- Sodium, ion: 0.00143 kg
- Calcium, ion: 0.000504 kg
- o-Xylene: 2.76e-9 kg
- Naphthalene: 4.64e-9 kg
- Fluorene, 1-methyl-: 2e-11 kg
- Docosane: 1.88e-10 kg
- 4-Methyl-2-pentanone: 7.4e-10 kg
- Acetone: 1.8e-9 kg
- Arsenic, ion: 4.7e-8 kg
- Biphenyl: 3.06e-9 kg
- Carbon dioxide, fossil: 0.017 kg
- Fluorene: 1.28e-9 kg
- Aluminum: 2.3e-5 kg
- Benzene, pentamethyl-: 1.31e-11 kg
- Selenium: 2.81e-9 kg
- COD, Chemical Oxygen Demand: 4.02e-5 kg
- Toluene: 2.4e-7 kg
- p-Xylene: 2.76e-9 kg
- Strontium: 1.39e-5 kg
- Radium-228/kg: 4.71e-17 kg
- Phenols, unspecified: 7.4e-8 kg
- Molybdenum: 5.85e-9 kg
- BOD5, Biological Oxygen Demand: 2.43e-5 kg
- Suspended solids, unspecified: 0.00256 kg
- Methane, monochloro-, R-40: 7.06e-12 kg
- Ammonia: 2.5e-6 kg
- Manganese: 1.42e-7 kg
- Mercury: 2.54e-10 kg
- Hexanoic acid: 5.35e-8 kg
- Chloride: 0.0063 kg
- Phenanthrenes, alkylated, unspecified: 3.21e-10 kg
- Eicosane: 3.85e-9 kg
- Radium-226/kg: 9.21e-15 kg
- Thallium: 3.05e-9 kg
- Bromide: 3e-5 kg
- Oils, unspecified: 4.5e-6 kg
- Benzene, ethyl-: 1.46e-8 kg
- Cadmium, ion: 7.31e-9 kg
- Cobalt: 5.64e-9 kg
- Naphthalene, 2-methyl-: 3.94e-9 kg
- Dibenzothiophene: 3.64e-11 kg

## Sampling procedure
Data collected from secondary sources.

## Sources
- THE PLASTICS DIVISION OF THE AMERICAN C
