# Stainless steel; Manufacture; Production mix, at plant; 316 2B, 80% recycled

Dataset: openLCA process, unit process
Category: Iron and Steel Mills
Geography: GLO
Time period: 1999-01-01 to 2004-12-31
Generated by: Timothy Skone
Owner: National Energy Technology Laboratory
Reviewer: Robert James
Published in: National Energy Technology Laboratory (NETL). 2013. Stainless steel; Manufacture; Production mix, at plant; 316 2B, 80% recycled
restrictionsDescription: Use of this dataset is not restricted, but a statement of attribution is required. Please use the following attribution statement:
National Energy Technology Laboratory's (NETL) Unit Process Library
626 Cochrans Mill Road, P.O. Box 10940
Pittsburgh, PA 15236-0940
http://www.netl.doe.gov/research/energy-analysis/life-cycle-analysis/unit-process-library
Neither the U.S. Department of Energy (DOE) National Energy Technology Laboratory (NETL) nor any person acting on behalf of these organizations:
A. Makes any warranty or representation, express or implied, with respect to the accuracy, completeness, or usefulness of the information contained in this document, or that the use of any information, apparatus, method, or process disclosed in this document may not infringe on privately owned rights; or
B. Assumes any liability with this report as to its use, or damages resulting from the use of any information, apparatus, method, or process disclosed in this document.
Reference herein to any specific commercial product, process, or service by trade name, trademark, manufacturer, or otherwise, does not necessarily constitute or imply its endorsement, recommendation, or favoring by NETL. The views and opinions of the authors expressed herein do not necessarily state or reflect those of NETL.
copyright: true

## General comment
This process is part of the NETL Unit Process Library. To access the library and the original dataset:
1) Navigate to the NETL LCA home page (http://www.netl.doe.gov/lca)
2) Then navigate to the “Unit Process Library”
3) From the library, the unit process of interest can be found either through the "Complete Listing of the Unit Process Library link" or through the link to the "Unit Process Database" spreadsheet
4) For each process, a Data Sheet (DS) and Data File (DF) are available

BRIEF DESCRIPTION
This unit process encompasses the manufacturing of stainless steel 316 2B.

GOAL AND SCOPE
This unit process provides a summary of relevant input and output flows associated with the manufacturing of stainless steel 316 2B. The data represents a world-wide, cradle-to-gate average of type 316 stainless steel production with 80 percent recycled steel. The key inputs are raw materials, scrap, water, and power. Key outputs are air and water emissions from the manufacturing of stainless steel 316 2B such as carbon dioxide, nickel, and ammonia. The unit process is based on the reference flow of 1 kg of stainless steel 316 2B. The relevant flows of this unit process are described below and shown in the associated documentation (referenced in the Citation and Associated Documentation section below).

BOUNDARY AND DESCRIPTION
A visual representation of the boundary of this unit process is available in the associated documentation (referenced in the Citation and Associated Documentation section below). Upstream power and scrap emissions are not included in this study. This unit process accounts for manufacturing emissions but does not account for acquisition of raw materials, which are accounted for outside the boundary of this unit process.

Data for the manufacturing of stainless steel 316 2B were taken from the World Stainless Steel life cycle inventory (LCI) provided by the International Stainless Steel Forum (World Stainless Steel LCI, 2005). The data for World (Mean) with credit was used since the steel is 80 percent recycled. All inputs and outputs were divided by 1,000 since the data was for 1,000 kg of steel, scaling the items to the reference flow of 1 kg of stainless steel 316 2B.

This process contains one or more surrogate product flows as replacements for proprietary product flows used in the NETL Unit Process Library. All surrogate flow were taken from the U.S. Life Cycle Inventory Database; a list of surrogate flows used in this process is provided below:
1) Steel, stainless 304, scrap
2) Electricity, at Grid, US, 2010

CITATION AND ASSOCIATED DOCUMENTATION
This dataset should be cited as:
National Energy Technology Laboratory (NETL). 2015. NETL Life Cycle Inventory Data – Unit Process: Stainless steel; Manufacture; Production mix, at plant; 316 2B, 80% recycled. U.S. Department of Energy, National Energy Technology Laboratory. Last Updated: September 2015 (Version 01). Retrieved on [DATE] from [URL for this dataset].

This dataset is part of the NETL Unit Process Library. The Library offers additional information concerning this dataset in the form of a Detailed Spreadsheet Documentation (DS) file and a Process Documentation File (DF). The DS file is an Excel file that contains all of the parameters, inputs, and outputs for a given system as well as background data, calculations and quality scores. The DF file is a PDF document that contains major assumptions and data sources that are the basis for each unit process. The NETL Unit Process Library is located on the NETL website (netl.doe.gov) under Research / Energy Analysis / Energy Trends and Issues / Life Cycle Analysis / Unit Process Library.

This dataset was converted directly from the DS with additional supporting information provided by the DF. Full citations for the DS and DF are given below.

DS File
National Energy Technology Laboratory (NETL). 2013. NETL Life Cycle Inventory Data – Unit Process: Stainless Steel 316 2B (80% Recycled), Manufacturing. U.S. Department of Energy, National Energy Technology Laboratory. Last Updated: June 2013 (version 01). Retrieved on 09/29/2015 from: http://www.netl.doe.gov/File%20Library/Research/Energy%20Analysis/Life%20Cycle%20Analysis/UP_Library/DS_Stage1_O_Steel_316_2B_2013-01.xlsx.

DF File
National Energy Technology Laboratory (NETL). 2013. NETL Life Cycle Inventory Data – Unit Process: Stainless Steel 316 2B (80% Recycled), Manufacturing. U.S. Department of Energy, National Energy Technology Laboratory. Last Updated: June 2013 (version 01). Retrieved on 09/29/2015 from: http://www.netl.doe.gov/File%20Library/Research/Energy%20Analysis/Life%20Cycle%20Analysis/UP_Library/DS_Stage1_O_Steel_316_2B_2013-01.pdf.

## Technology
This unit process provides a summary of relevant input and output flows associated with the manufacturing of stainless steel 316 2B. The data represents a world-wide, cradle-to-gate average of type 316 stainless steel production with 80 percent recycled steel. The key inputs are raw materials, scrap, water, and power. Key outputs are air and water emissions from the manufacturing of stainless steel 316 2B such as carbon dioxide, nickel, and ammonia. A visual representation of the boundary of this unit process is available in the associated documentation (referenced in the Citation and Associated Documentation section in the Description field). Data for the manufacturing of stainless steel 316 2B were taken from the World Stainless Steel life cycle inventory (LCI) provided by the International Stainless Steel Forum (World Stainless Steel LCI, 2005).

## Time period
This data set is representative of best available public data from 01/01/1999 to 12/31/2004 and is not subject to limited usability within sub-time spans (e.g. summer, winter).

## Reference product
- Stainless steel; Manufacture; Production mix, at plant; 316 2B, 80% recycled: 1 kg; data quality (2,3,3,1,1)

## By-products
- Solid waste; From steel works, for disposal; Production mix: 0.159 kg; data quality (2,3,3,1,1)
- Solid waste; For disposal; Production mix: 10.3 kg; data quality (2,3,3,1,1)

## Inputs from technosphere
- Steel, stainless 304, scrap: 0.0455, 0.827 kg (2 entries); data quality (2,3,3,1,1)
- Electricity, at Grid, US, 2010: 8.75 MJ; data quality (2,3,3,1,1)

## Inputs from nature
All rows: data quality (2,3,3,1,1)
- Coal, hard, unspecified, in ground: 0.713 kg
- Molybdenum: 0.0278 kg
- Nickel: 0.0197 kg
- Iron: 0.205 kg
- Water: 41.7 kg
- Oil, crude, 42 MJ per kg, in ground: 0.19 kg
- Chromium: 0.0812 kg
- Manganese: 0.0194 kg
- natural gas; 44.1 MJ/kg: 10.8045 MJ; = 2.45E-01*44.1
- Dolomite, in ground: 0.0509 kg
- Calcium carbonate, in ground: 0.258 kg
- Lignite, 11 MJ per kg, in ground: 0.0521 kg

## Emissions to nature
All rows: data quality (2,3,3,1,1)
- Dioxins, measured as 2,3,7,8-tetrachlorodibenzo-p-dioxin: 8.5e-13 kg
- COD, Chemical Oxygen Demand: 0.00169 kg
- Manganese: 7.8e-6 kg
- Fluoride: 0.000114 kg
- Nickel: 3.01e-5 kg
- Chlorides, unspecified: 0.00733 kg
- Ammonia: 9.84e-5 kg
- Carbon dioxide: 5.4 kg
- Hydrocarbons, unspecified: 7.84e-5 kg
- Copper: 3e-7 kg
- Particulates, unspecified: 0.00715 kg
- Chromium: 0.000108, 1.36e-5 kg (2 entries, compartments not in this file)
- Chromium VI: 1e-7, 1.07e-5 kg (2 entries, compartments not in this file)
- Cadmium: 1e-7 kg
- Lead: 9e-7 kg
- Nitrate: 0.00278 kg
- Nitrogen oxides: 0.0123 kg
- Zinc: 2.5e-6 kg
- Molybdenum: 5.7e-6, 1.37e-5 kg (2 entries, compartments not in this file)
- Iron: 0.000115 kg
- Acidity, unspecified: 8.14e-5 kg
- Sulfur: 0.0016 kg
- Carbon monoxide: 0.00971 kg
- Sulfur oxides: 0.025 kg
- Silicon dioxide (silica): 0.000385 kg
- Aluminium: 2.72e-5 kg
- Nitrogenous Matter, unspecified, as N: 0.000192 kg
- Phosphate: 4.90643e-6 kg; = 1.6E-6*94.97/30.97
- Nickel, ion: 7.3e-6 kg
- Tin: 0.000317738 kg

## Allocation factors
- causal, , for Nickel: 0
- causal, Solid waste; From steel works, for disposal; Production mix, for Carbon dioxide: 0
- causal, , for Carbon monoxide: 0
- causal, , for Sulfur dioxide: 0
- causal, , for Water, ground: 0
- causal, , for Nickel: 0
- causal, , for Lead: 0
- causal, , for Carbon monoxide: 0
- causal, Solid waste; From steel works, for disposal; Production mix, for Cadmium: 0
- causal, , for Chromium: 0
- causal, , for Nitrogen oxides: 0
- causal, , for Steel, stainless 304, scrap: 0
- causal, , for Aluminium: 0
- causal, , for Calcium carbonate, in ground: 1
- causal, , for natural gas; 44.1 MJ/kg: 0
- causal, , for Zinc: 0
- causal, , for Aluminium: 0
- causal, , for NMVOC, non-methane volatile organic compounds, unspecified origin: 0
- causal, , for COD, Chemical Oxygen Demand: 0
- causal, , for Sulfur: 0
- causal, , for Chromium: 0
- causal, , for Cadmium: 0
- causal, , for Chromium VI: 0
- causal, , for Dolomite, in ground: 0
- causal, , for Cadmium: 0
- causal, , for Chromium: 0
- causal, , for Nickel: 0
- causal, , for Solid waste; For disposal; Production mix: 1
- causal, , for Carbon monoxide: 0
- causal, Solid waste; From steel works, for disposal; Production mix, for Carbon monoxide: 0
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
## Inventory method
Attributional

## Modelling constants
All elementary and technosphere flows are calculated on a functional unit basis. Calculations involving combustion primarily to generate useful work are done using lower heating values (LHV) and calculations involving combustion primarily to generate useful heat are done using higher heating values (HHV). Unless explicitly stated in the associated reference documents applicable calculations assumed standard atmospheric temperature and pressure (SATP).

## Completeness
Individual relevant flows captured

## Data selection
Best publically available data

## Data treatment
No allocation applied

## Data collection
No primary data collected

## Intended application
This is a cradle-to-gate manufacturing process and can be used for any type of LCA study.

## Project
National Energy Technology Laboratory (NETL) Unit Process Library

## Sources
- World Stainless Steel. 2005. World Stainless Steel LCI
- National Energy Technology Laboratory (NETL). 2013. Stainless steel; Manufacture; Production mix, at plant; 316 2B, 80% recycled
