# Transport, barge, diesel powered

Dataset: openLCA process, unit process
Category: Inland Water Freight Transportation
Geography: RNA
Time period: 2001-01-01 to 2001-01-01
Generated by: Franklin Associates
Published in: Franklin Associates
restrictionsDescription: All information can be accessed by everybody.
copyright: false

## General comment
Important note: although most of the data in the US LCI database has
undergone some sort of review, the database as a whole has not yet
undergone a formal validation process.
Please email comments to lci@nrel.gov.

## Technology
Combustion of diesel in barge.

## Geography
United States

## Reference product
- Transport, barge, diesel powered: 1 t*km

## Inputs from technosphere
- Diesel, at refinery: 0.0095933 l

## Emissions to nature
- Nitrogen oxides: 0.00035753 kg
- VOC, volatile organic compounds: 1.3237e-5 kg
- Methane, fossil: 6.4861e-7 kg
- Particulates, < 10 um: 8.8651e-6 kg
- Carbon dioxide, fossil: 0.028149 kg
- Carbon monoxide, fossil: 3.5254e-5 kg
- Sulfur oxides: 6.1985e-6 kg

## Sources
- Center for Transportation Research, Argo
- Franklin Associates
- unspecified
