# Cold rolled sheet, steel, at plant

Dataset: openLCA process, unit process
Category: Rolling and Drawing of Purchased Steel
Geography: RNA
Time period: 1993-01-01 to 2002-01-01
Generated by: Jamie K. Meil, Vice-President of the ATH
Published in: Markus Engineering Services
restrictionsDescription: All information can be accessed by everybody.
copyright: false

## General comment
Important note: although most of the data in the US LCI database has
undergone some sort of review, the database as a whole has not yet
undergone a formal validation process.
Please email comments to lci@nrel.gov.

## Technology
Data represent U.S and Canadian average technologies.

## Geography
North America

## Reference product
- Cold rolled sheet, steel, at plant: 1 kg

## Inputs from technosphere
- CUTOFF Disposal, BOF slag, to unspecified treatment: 0.086216 kg
- CUTOFF Steel scrap, at plant: 0.30826 kg
- CUTOFF Disposal, slag, to unspecified treatment: 0.22712 kg
- CUTOFF Disposal, solid waste, unspecified, to unspecified treatment: 0.085995 kg
- CUTOFF Disposal, BOF dust, to unspecified treatment: 0.017772 kg

## Inputs from nature
- Gas, natural, 46.8 MJ per kg, in ground: 0.08357 kg
- Coal, 26.4 MJ per kg, in ground: 0.17508 kg
- Uranium, 2291 GJ per kg, in ground: 6.9237e-7 kg
- Limestone, in ground: 0.21142 kg
- Oxygen, in air: 0.095477 kg
- Coal, bituminous, 24.8 MJ per kg, in ground: 0.6615 kg
- Iron ore, in ground: 1.336 kg
- Energy, from hydro power: 0.24912 MJ
- Oil, crude, 42 MJ per kg, in ground: 0.071222 kg
- Wood and wood waste, 9.5 MJ per kg: 0.0001775 kg

## Emissions to nature
- Kerosene: 1.5259e-7 kg
- Dioxins, measured as 2,3,7,8-tetrachlorodibenzo-p-dioxin: 3.2634e-14 kg
- Ethene, tetrachloro-: 5.6889e-9 kg
- Hydrogen fluoride: 4.1675e-6 kg
- Organic substances, unspecified: 1.215e-7, 1.5788e-5, 5.0054e-6 kg (3 entries, compartments not in this file)
- Carbon monoxide, fossil: 0.025799 kg
- Phenol: 1.689e-8, 5.3361e-9 kg (2 entries, compartments not in this file)
- Benzene: -5.1817e-5, 8.5113e-9 kg (2 entries, compartments not in this file)
- Cadmium, ion: 2.0198e-7 kg
- Ethene, trichloro-: 5.6448e-9 kg
- Ammonium, ion: -0.012172 kg
- NMVOC, non-methane volatile organic compounds, unspecified origin: 0.0012083 kg
- Nitrate: 5.733e-8 kg
- VOC, volatile organic compounds: 0.00021896 kg
- Radioactive species, unspecified: 18.47 kBq
- Naphthalene: 4.0572e-10, -4.2336e-5 kg (2 entries, compartments not in this file)
- Methane, tetrachloro-, CFC-10: 9.4374e-9 kg
- Hydrogen chloride: 3.0209e-5 kg
- Formaldehyde: 2.0948e-6 kg
- Oils, unspecified: 0.017883 kg
- Manganese: 6.7694e-8, 1.3693e-5 kg (2 entries, compartments not in this file)
- Dinitrogen monoxide: 3.7265e-6 kg
- BOD5, Biological Oxygen Demand: 4.9833e-6 kg
- Methane: 0.0014487 kg
- Acidity, unspecified: 7.7396e-11 kg
- Sulfate: 0.00023373 kg
- COD, Chemical Oxygen Demand: 0.002011 kg
- Sodium, ion: 2.4035e-7 kg
- Cadmium: 5.5566e-9 kg
- Chromate: 4.8951e-9 kg
- Sulfide: 0.0018632 kg
- Carbon dioxide, fossil: 2.58 kg
- Phosphate: -6.5268e-6 kg
- Sulfur dioxide: 0.0020749 kg
- Mercury: 1.5832e-11, 1.1576e-8 kg (2 entries, compartments not in this file)
- Sulfur oxides: 0.0054905 kg
- Boron: 1.6229e-5 kg
- Fluoride: 0.00018787 kg
- Zinc, ion: -6.4386e-5 kg
- Selenium: 4.2777e-8 kg
- Suspended solids, unspecified: 0.035501 kg
- Carbon monoxide: 0.00051377 kg
- Benzo(a)pyrene: 5.5346e-6 kg
- Chloride: 0.0068355 kg
- Phenols, unspecified: 6.5268e-6 kg
- Carbon dioxide, biogenic: 0.00023153 kg
- Beryllium: 2.4917e-9 kg
- Particulates, unspecified: 0.00049987 kg
- Antimony: 2.9988e-9 kg
- Chromium: 3.4398e-8, -1.4685e-6 kg (2 entries, compartments not in this file)
- Iron: 0.00024696 kg
- Calcium, ion: 1.3142e-7 kg
- Dissolved solids: 0.0044762 kg
- Metals, unspecified: 9.3272e-8 kg
- Particulates, > 2.5 um, and < 10um: 9.8784e-5 kg
- N-Nitrodimethylamine: 1.2613e-9 kg
- Aldehydes, unspecified: 5.3582e-6 kg
- Nickel: 9.1508e-8 kg
- Ammonia: 1.8941e-6, 3.8588e-7 kg (2 entries, compartments not in this file)
- Cyanide: 0.00063284 kg
- Chlorine: 1.4619e-8 kg
- Nickel, ion: 1.4707e-6 kg
- Nitrogen oxides: 0.0034839 kg
- Acrolein: 5.9756e-9 kg
- Cobalt: 8.5334e-9 kg
- Arsenic: 2.1433e-8 kg
- Phosphorus: 1.3936e-5 kg
- Methane, dichloro-, HCC-30: 2.5358e-8 kg
- Lead: 2.0948e-8, 0.00013473 kg (2 entries, compartments not in this file)
- Metallic ions, unspecified: 1.6493e-6 kg
- Nitrogen, total: 0.00069017 kg
- Sulfuric acid: 4.0572e-6 kg

## Sources
- Markus Engineering Services
- Franklin Associates Ltd.
- Stelco Technical Services Limited
