# Roundwood, softwd, state or private dry forest, gentle slope, at forest rd, INW

Dataset: openLCA process, unit process
Category: Logging
Geography: RNA
Time period: 1989-01-01 to 1996-01-01
Generated by: Maureen Puetmann
Published in: Leonard R. Johnson
restrictionsDescription: All information can be accessed by everybody.
copyright: false

## General comment
FIA inventory were from 1989 to 1996 depending on jurisdiction Allocation on a mass basis.
Important note: although most of the data in the US LCI database has
undergone some sort of review, the database as a whole has not yet
undergone a formal validation process.
Please email comments to lci@nrel.gov.

## Technology
Average technology. Some data extrapolated from similar processes.

## Geography
US Inland West including Montana, Idaho, and eastern Washington

## Reference product
- Roundwood, softwd, state or private dry forest, gentle slope, at forest rd, INW: 174.41 m3
  Ovendry density = 450 kg/m3

## By-products
- Pulpwood, softwd, state or private dry forest, gentle slope, at forest rd, INW: 42.248 m3
  Ovendry density = 450 kg/m3
- Bark, softwd, state or private dry forest, gentle slope, at forest rd, INW: 8677.2 kg
  Ovendry density = 450 kg/m3. Bark volume evaluated at 19.3 m3/ha

## Inputs from technosphere
- Site preparation, state or private dry softwood forest, gentle slope, INW: 1 ha
- Loader operation, large, INW: 8.854 h
  Based on a rate of 0.041 standard machine hours per m3
- Skidding, wheeled skidder, 120-140 HP: 17.715 h
  Skidding of thinning and final harvest. Based on a rate of 0.082 standard machine hours per m3
- Reforesting, average state or private dry softwood forest, INW: 1 ha
- Felling, feller buncher, > 200 HP, INW: 3.4726 h
  Mechanical Felling of thinning and final harvest. Based on a rate of 0.016 standard machine hours per m3
- Delimbing, slide boom delimber: 2.9513 h
  Delimbing and processing of thinning and final harvest. Based on a rate of 0.014 standard machine hours per m3

## Inputs from nature
- Carbon dioxide, in air: 143790 kg
  Based on carbon content of roundwood
- Carbon dioxide, in air: 34831 kg
  Based on carbon content of pulpwood
- Wood, soft, INW, standing: 235.94 m3
- Carbon dioxide, in air: 15897 kg
  Based on carbon content of bark

## Sampling procedure
Harvesting production, cost and fuel consumption rates were assimilated from existing studies of harvesting equipment typical of the systems used to harvest sites in the Inland West. These studies included both published information and personal interviews with timber harvesting contractors.
The costs, production and consumption rates were developed for equipment options within each component of the system. Harvesting systems were developed as combinations of these harvesting components. Although there are many combinations of harvesting equipment and systems that can be used for harvesting timber, this analysis assumes the use of the most common systems operating on the range of slope classifications identified for the harvested sites.

## Sources
- Maureen Puettmann
- Leonard R. Johnson
