# Electricity, at Grid, MRO, 2010

Dataset: openLCA process, unit process
Category: Utilities
Geography: RNA
Time period: 2010-01-01 to 2010-01-01
Generated by: Samantha Wascavage
Published in: EIA
restrictionsDescription: All information can be accessed by everybody.
copyright: false

## General comment
The methodology used to put together the grid information is outlined in reference 1.

## Technology
Typical

## Geography
Manitoba, Minnesota, Nebraska, North Dakota, Saskatchewan and parts of Illinois, Michigan, South Dakota and Wisconsin.

## Reference product
- Electricity, at Grid, MRO, 2010: 1 kWh

## Inputs from technosphere
- Electricity, bituminous coal, at power plant: 0.402866 kWh
  SUB – Subbituminous Coal
- CUTOFF Electricity, petroleum coke, at power plant: 0.002912 kWh
  PC, SG, WO – Petroleum Coke
- Electricity, diesel, at power plant: 0.000981 kWh
  DFO, JF, KER – Distillate Fuel Oil (includes all Diesel and No. 1, No. 2, and No. 4 Fuel Oils)
- CUTOFF Electricity, biomass, gas, landfill, at power plant: 0.002017 kWh
  LFG, OBG – Landfill Gas
- Electricity, bituminous coal, at power plant: 0.010618 kWh
  BIT, SC, SGC, WC - Anthracite Coal, and Bituminous Coal.
- CUTOFF Electricity, other fuels, unspecified, at power plant: 0.001601 kWh
  PUR, OTH, MSN, WH – Purchased Steam
- CUTOFF Electricity, biomass, solid, agriculture by-products, at power plant: 0.006683 kWh
  AB, MSB, MSW, OBS, TDF, WDS – Agriculture Crop By-products / Straw / Energy Crops
- CUTOFF Electricity, biomass,liquid, unspecified, at power plant: 0.004204 kWh
  BLQ, OBL, SLW, WDL – Black Liquor
- Electricity, nuclear, at power plant: 0.130285 kWh
  NUC – Nuclear (Uranium, Plutonium, Thorium)
- Electricity, lignite coal, at power plant: 0.149493 kWh
  LIG – Lignite Coal
- CUTOFF Electricity, hydropower, at power plant, unspecified: 0.186962 kWh
  WAT – Water (Conventional, Pumped Storage)
- CUTOFF Electricity, other gases, unspecified, at power plant: 0.000136 kWh
  OG, BFG, PG – Other Gas (Butane, Coal Processes, Coke-Oven, Refinery, and other processes)
- Electricity, natural gas, at power plant: 0.040596 kWh
  NG – Natural Gas
- CUTOFF Electricity, at wind power plant, unspecified: 0.060609 kWh
  WND – Wind
- Electricity, residual fuel oil, at power plant: 3e-5 kWh
  RFO – Residual Fuel Oil (includes No. 5 and No. 6 Fuel Oils and Bunker C Fuel Oil)
- CUTOFF Electricity, solar, unspecified, at power plant: 7e-6 kWh
  SUN – Solar (Photovoltaic, Thermal)

## Sampling procedure
based on EIA electricity reports for all power plants in the US.

## Sources
- Chris Goemans, Athena Institute
- Statistics Canada
- unspecified
- USEPA
- Statistics Canada
- Statistics Canada
- Statistics Canada
- Statistics Canada
- USEPA
- EIA
- EIA
- EIA
- EIA
- EIA
- EIA
- EIA
- EIA
- EIA
- US DOE
- International Energy Agency
- EIA
