# Crude palm kernel oil, at plant

Dataset: openLCA process, unit process
Category: Oilseed (except Soybean) Farming
Geography: RNA
Time period: 1985-01-01 to 1989-01-01
Generated by: Franklin Associates
Published in: THE PLASTICS DIVISION OF THE AMERICAN C
restrictionsDescription: All information can be accessed by everybody.
copyright: false

## General comment
Industry sources have indicated solvent extraction of palm kernel oil accounts for only a minor portion of the crude palm kernel oil production. Mechanical extraction may be carried out in either a single-or double-press system. Data for this module assumes only one-third of all crude palm kernel oil is produced by way of a double-press system. The remainder was assumed produced from a single-press system. Cake and pellets are produced as coproducts. Mass partitioning was used to give credit to these coproducts. Complete inventory data and metadata are available in full in the final report and appendices, Cradle-to-Gate Life Cycle Inventory of Nine Plastic Resins and Four Polyurethane Precursors. This report has been extensively reviewed within Franklin Associates and has undergone partial critical review by ACC Plastics Division members and is available at: www.americanchemistry.com. Quantities may vary slightly between the reference to main source and and this module due to rounding. Important note: although most of the data in the US LCI database has undergone some sort of review, the database as a whole has not yet undergone a formal validation process. Please email comments to lci@nrel.gov.

## Technology
Mechanical extraction using high-pressure screw pressing, solvent extraction with hexane, or preprocessing followed by solvent extraction

## Geography
North America (US and Canada)

## Reference product
- Crude palm kernel oil, at plant: 1 kg
  Mass imbalance is due to unavailability of the weight of empty fruit bunches, fiber, and kernel shells sent to incineration.

## Inputs from technosphere
- Diesel, combusted in industrial equipment: 0.0319575 l
  Includes diesel fuel and distillate oil amounts.
- Transport, ocean freighter, diesel powered: 0.516446 t*km
  Values for ocean freighter transport are calculated based on average fuel consumption rates as determined from a personal communication with Rich Sonnenschein, U.S. Department of Transportation, Maritime Administration in February 2004: 10% of ocean freighters use diesel fuel, 90% use residual fuel, and a freighter that consumes residual fuel consumes 1.9 gallons per 1,000 ton-miles
- Transport, ocean freighter, residual fuel oil powered: 4.64801 t*km
  (same comment as for Transport, ocean freighter, diesel powered)
- Transport, single unit truck, diesel powered: 0.021297 t*km
- Electricity, at grid, US, 2008: 0.302028 kWh
- Palm kernels, at plant: 1.064 kg
- CUTOFF Disposal, solid waste, unspecified, to sanitary landfill: 0.0172 kg
- Natural gas, combusted in industrial boiler: 0.00225361 m3

## Emissions to nature
- Suspended solids, unspecified: 0.00184 kg

## Sampling procedure
Data are from secondary sources.

## Sources
- THE PLASTICS DIVISION OF THE AMERICAN C
