# Electricity, at eGrid, RMPA, 2010

Dataset: openLCA process, unit process
Category: Utilities
Geography: RNA
Time period: 2010-01-01 to 2010-01-01
Generated by: Samantha Wascavage
Published in: Chris Goemans, Athena Institute
restrictionsDescription: All information can be accessed by everybody.
copyright: false

## General comment
The methodology used to put together the grid information is outlined in reference 1.

## Technology
Typical

## Geography
RMPA Rockies electricity grid to include Colorado, eastern Wyoming (less NWPP) and small portions of South Dakota, Nebraska and New Mexico

## Reference product
- Electricity, at eGrid, RMPA, 2010: 1 kWh

## Inputs from technosphere
- Electricity, natural gas, at power plant: 0.159051 kWh
  Natural Gas
- CUTOFF Electricity, solar, unspecified, at power plant: 0.000304 kWh
  Solar (Photovoltaic, Thermal)
- Electricity, diesel, at power plant: 0.000555 kWh
  Petroleum (DFO, JF, KER) – Distillate Fuel Oil (includes all Diesel and No. 1, No. 2, and No. 4 Fuel Oils)
- CUTOFF Electricity, other fuels, unspecified, at power plant: 0.000684 kWh
  Other Fuels WH, OTH, MSN, PUR – Waste heat not directly attributed to a fuel source. Note that WH should only be reported where the fuel source for the waste heat is undetermined, and for combined cycle steam turbines that are not supplementary fired
- Electricity, biomass, at power plant: 3.2e-5 kWh
  Solid Renewable Fuels (Biomass) WDS, AB, MSB, MSW, OBS, TDF – Wood/Wood Waste Solids (Paper Pellets, Railroad Ties, Utility Poles, Wood Chips, and other wood solids)
- CUTOFF Electricity, biomass, gas, landfill, at power plant: 0.000836 kWh
  Gaseous Renewable Fuels (Biomass) LFG, OBG - landfill gas
- CUTOFF Electricity, petroleum, waste oil, at power plant: 4.2e-5 kWh
  Petroleum (Other Fossil) WO, PC, SG – Waste/Other Oil (including Crude Oil, Liquid Butane, Liquid Propane, Oil Waste, Re-Refined Motor Oil, Sludge Oil, Tar Oil, or other petroleum-based liquid wastes)
- Electricity, bituminous coal, at power plant: 0.611767 kWh
  Subbituminous Coal
- Electricity, bituminous coal, at power plant: 0.1462 kWh
  Bituminous Coal BIT, SC, SGC, WC - Anthracite Coal, and Bituminous Coal.
- CUTOFF Electricity, hydropower, at power plant, unspecified: 0.02885 kWh
  Hydroelectric WAT – Water (Conventional, Pumped Storage)
- CUTOFF Electricity, at wind power plant, unspecified: 0.051679 kWh
  Wind

## Sampling procedure
based on EIA electricity reports for all power plants in the US.

## Sources
- Chris Goemans, Athena Institute
- Statistics Canada
- unspecified
- USEPA
- Statistics Canada
- Statistics Canada
- Statistics Canada
- Statistics Canada
- USEPA
- EIA
- EIA
- EIA
- EIA
- EIA
- EIA
- EIA
- EIA
- EIA
- US DOE
- International Energy Agency
- EIA
