# Anode, at plant

Dataset: openLCA process, unit process
Category: Misc. Fabricated Metal Product Manufacturing
Geography: RNA
Time period: 1998-01-01 to 1998-01-01
Generated by: James Littlefield, Franklin Associates
Published in: Franklin Associates, A Division of ERG
restrictionsDescription: All information can be accessed by everybody.
copyright: false

## General comment
The two types of aluminum smelting technologies are distinguished by the type of anode that is used in the reduction process: soderberg and prebake. Soderberg design has a single anode that covers most of the top surface of a reduction cell (pot). Anode paste (briquettes) is fed to the top of the anode and as the anode is consumed in the process, the paste feeds downward by gravity. Heat from the pot bakes the paste into a monolithic mass before it gets to the electrolytic bath interface. The prebake design has prefired blocks of solid carbon suspended from axial busbars. The busbars both hold the anodes in place and carry the current for electrolysis. The process for making the aggregate for briquettes or prebake blocks is identical. Coke is calcined, ground and blended with pitch to form a paste that is subsequently extruded into blocks or briquettes and allowed to cool. While the briquettes are sent direct to the pots for consumption, the blocks are then sent to a separate baking furnace. Baking furnace technology has evolved from simple pits that discharged volatiles to atmosphere during the baking cycle to closed loop type designs that convert the caloric heat of the volatile into a process fuel that reduces energy consumption for the process.
Important note: although most of the data in the US LCI database has
undergone some sort of review, the database as a whole has not yet
undergone a formal validation process.
Please email comments to lci@nrel.gov.

## Technology
Coke is calcined and blended with pitch.

## Geography
North America

## Reference product
- Anode, at plant: 1 kg

## Inputs from technosphere
- Liquefied petroleum gas, combusted in industrial boiler: 0.0011684 l
- Electricity, at grid, US, 2000: 0.26676 kWh
- Petroleum coke, at refinery: 0.316 kg
- Residual fuel oil, combusted in industrial boiler: 0.0049238 l
- Gasoline, combusted in equipment: 4.5065e-5 l
- Diesel, combusted in industrial boiler: 0.00010849 l
- Natural gas, combusted in industrial boiler: 0.097138 m3
- CUTOFF Disposal, solid waste, unspecified, to unspecified treatment: 0.02441 kg
- Metallurgical coke, at plant: 0.82 kg

## Emissions to nature
- Cyanide: 6.3e-10 kg
- Nitrogen: 2.2e-8 kg
- Ammonium, ion: 1.5e-7 kg
- Hydrocarbons, unspecified: 2e-8 kg
- Fluoride: 1.3e-5 kg
- COD, Chemical Oxygen Demand: 0.00018 kg
- Phenol: 2.3e-10 kg
- NMVOC, non-methane volatile organic compounds: 0.00024 kg
- BOD5, Biological Oxygen Demand: 1.5e-5 kg
- Organic substances, unspecified: 1.3e-6 kg
- Nitrogen oxides: 0.00011 kg
- Sulfuric acid: 4.4e-6 kg
- CFCs and HCFCs, unspecified: 1.1e-8 kg
- Sulfur oxides: 0.00322 kg
- Hydrogen fluoride: 2.3e-5 kg
- Magnesium: 4.7e-6 kg
- PAH, polycyclic aromatic hydrocarbons: 1.4e-5 kg
- Lead: 4.5e-12, 5.7e-9 kg (2 entries, compartments not in this file)
- Iron: 4.2e-7 kg
- Dissolved solids: 2.3e-6 kg
- Suspended solids, unspecified: 4.3e-5 kg
- Sulfate: 2.3e-5 kg
- Carbon dioxide, fossil: 0.388 kg
- Oils, unspecified: 1.2e-5 kg
- Metallic ions, unspecified: 1.3e-5 kg
- Particulates, unspecified: 0.00247 kg
- Dissolved organic matter: 3.9e-6 kg
- Detergents, unspecified: 9.4e-9 kg
- Carbon monoxide: 0.00207 kg
- Metals, unspecified: 3.3e-8 kg
- Chloride: 1.4e-9 kg
- Nitrogen, total: 1.6e-6 kg

## Sources
- Franklin Associates, A Division of ERG
- The Aluminum Association
- Energy Information Administration (EIA)
- US Geological Survey
- IAI Statistical Report: Electrical Power
- US EPA
