# Coal crusher facility; Construction; At underground mine

Dataset: openLCA process, unit process
Category: Bit. Coal and Lignite Surface Mining
Geography: GLO
Time period: 2001-01-01 to 2001-12-31
Generated by: Timothy Skone
Owner: National Energy Technology Laboratory
Reviewer: Robert James
Published in: National Energy Technology Laboratory (NETL). 2013. Coal crusher facility; Construction; At underground mine
restrictionsDescription: Use of this dataset is not restricted, but a statement of attribution is required. Please use the following attribution statement:
National Energy Technology Laboratory's (NETL) Unit Process Library
626 Cochrans Mill Road, P.O. Box 10940
Pittsburgh, PA 15236-0940
http://www.netl.doe.gov/research/energy-analysis/life-cycle-analysis/unit-process-library
Neither the U.S. Department of Energy (DOE) National Energy Technology Laboratory (NETL) nor any person acting on behalf of these organizations:
A. Makes any warranty or representation, express or implied, with respect to the accuracy, completeness, or usefulness of the information contained in this document, or that the use of any information, apparatus, method, or process disclosed in this document may not infringe on privately owned rights; or
B. Assumes any liability with this report as to its use, or damages resulting from the use of any information, apparatus, method, or process disclosed in this document.
Reference herein to any specific commercial product, process, or service by trade name, trademark, manufacturer, or otherwise, does not necessarily constitute or imply its endorsement, recommendation, or favoring by NETL. The views and opinions of the authors expressed herein do not necessarily state or reflect those of NETL.
copyright: true

## General comment
This process is part of the NETL Unit Process Library. To access the library and the original dataset:
1) Navigate to the NETL LCA home page (http://www.netl.doe.gov/lca)
2) Then navigate to the “Unit Process Library”
3) From the library, the unit process of interest can be found either through the "Complete Listing of the Unit Process Library link" or through the link to the "Unit Process Database" spreadsheet
4) For each process, a Data Sheet (DS) and Data File (DF) are available

BRIEF DESCRIPTION
This parameterized unit process encompasses the total amount of materials used in the construction of a crushing facility and the coal crusher.

GOAL AND SCOPE
The scope of this unit process encompasses the materials and weights of those materials necessary to construct a single coal crusher facility, to be used for the preparation of underground Illinois No. 6 coal. The unit process is based on the reference flow of 1 coal crusher facility, as described below, and as shown in the associated documentation (referenced below). The crusher facility is assumed to be constructed of steel plate, reinforcement bar (rebar) wire and ready mixed concrete. Other materials are assumed to be negligible. This unit process is used during LC Stage #1 to assist in the preparation of underground coal. It is combined with other mine equipment construction unit processes in the coal preparation facility assembly unit process for underground coal, Coal mine equipment assembly; Production mix; Underground coal mine, Illinois No. 6 Coal. This assembly unit process quantifies the fraction of each piece of equipment needed under LC Stage #1 to produce 1 kg of coal ready for transport (LC Stage #2) to the energy conversion facility (LC Stage #3).

BOUNDARY AND DESCRIPTION
The electricity requirements for coal beneficiation of a generic eastern coal mine are reported in Chapter 2, Table 2-7 of the EIA report “Energy and Environmental Profile of the U.S. Mining Industry”(DOE and NMA 2002). Beneficiation refers to the sizing, handling and washing of run-of-mine (ROM) coal. The energy consumption values reported for coal crushing (or grinding as it is referred to in the EIA report) is 93,200 Btu/ton of coal, and is one of the more energy intensive processes during coal mining. When converted to metric units, coal crushing consumes 30.1 KWh/ton of coal processed. The electricity requirements for the other phases of beneficiation are included in the coal cleaning section of this report.

Coal mining accounts for approximately 30 percent of methane (CH4) emissions in the U.S., with underground mines contributing the largest share of coal mining CH4 emissions (EPA 2008b). During coal acquisition, CH4 is released during both the underground coal extraction and the post mining coal preparation activities. From the EPA inventory of greenhouse gas emissions from 1990-2006, 90% of CH4 emitted from underground mining is a result of coal extraction, with the remaining 10% emitted during preparation (EPA 2008b).

In a report identifying opportunities for methane recovery from U.S. coal plants, the U.S. EPA Coalbed Methane outreach program surveyed methane emissions from 50 mines in 12 states, including the Galatia mine in Illinois(EPA 2008a). Data from the Galatia mine is used throughout this study due to its similarities to the studied mine, and therefore Galatia methane values are also used. Data are summarized in the associated documentation (referenced in the Citation and Associated Documentation section below).

In 2006, 13 coal mines had invested in degasification systems to collect CH4. Collecting CH4 reduced the overall greenhouse gas emissions from the mine, and the CH4 can then be used on- site or sold to a pipeline for energy generation (EPA 2008b). This technique is especially cost-effective in gassy mines. Coal mines in Illinois are generally less gassy than other regions, and to date no CH4 recovery systems have been implemented in an Illinois mine (EPA 2008a). Therefore for this study, it is assumed that no CH4 recovery system is in place and all 360 ft3 CH4/ton coal is emitted.

As previously mentioned, 90 percent of emission are from coal extraction while 10 percent are from post mining activities. Due to a lack of more specific data, all post mining CH4 emissions have been allocated to the coal crushing operation. As defined in Section X, this study considers the use of both longwall and continuous miners for coal extraction. The EIA Annual Coal Report states that a typical longwall mining operation performs longwall 80 percent of the time and uses continuous mining for the remaining 20 percent (EIA 2007). Therefore, the remaining 90 percent of CH4 emissions is allocated 80 percent to longwall and 20 percent to continuous operations. A table outlining the allocation of underground mining CH4 emissions is available in the associated documentation (referenced in the Citation and Associated Documentation section below). As a check, these values were summed to insure that the allocated emissions totaled the overall value of 360 ft3 CH4/ton coal.

This process contains one or more surrogate product flows as replacements for proprietary product flows used in the NETL Unit Process Library. All surrogate flow were taken from the U.S. Life Cycle Inventory Database; a list of surrogate flows used in this process is provided below:
1) Portland cement, at plant: This flow is a proxy for Ready Mixed Concrete. This process calculates the required mass of Portland Cement as a fraction of the required mass of Ready Mixed Concrete to construct one coal crusher facility. The default parameter setting assumes that Portland Cement comprises 14.1% (by mass) of Ready Mixed Concrete (NIST 2009); however, this parameter may be modified by the user. This process does not consider other material and energy inputs for producing Ready Mixed Concrete.

CITATION AND ASSOCIATED DOCUMENTATION
This dataset should be cited as:
National Energy Technology Laboratory (NETL). 2015. NETL Life Cycle Inventory Data – Unit Process: Coal crusher facility; Construction; At underground mine. U.S. Department of Energy, National Energy Technology Laboratory. Last Updated: September 2015 (version 01). Retrieved on [DATE] from [URL for this dataset].

This dataset is part of the NETL Unit Process Library. The Library offers additional information concerning this dataset in the form of a Detailed Spreadsheet Documentation (DS) file and a Process Documentation File (DF). The DS file is an Excel file that contains all of the parameters, inputs, and outputs for a given system as well as background data, calculations and quality scores. The DF file is a PDF document that contains major assumptions and data sources that are the basis for each unit process. The NETL Unit Process Library is located on the NETL website (netl.doe.gov) under Research / Energy Analysis / Energy Trends and Issues / Life Cycle Analysis / Unit Process Library.

This dataset was converted directly from the DS with additional supporting information provided by the DF. Full citations for the DS and DF are given below.

DS File
National Energy Technology Laboratory (NETL). 2013. NETL Life Cycle Inventory Data – Unit Process: Coal Crusher Facility, Construction. U.S. Department of Energy, National Energy Technology Laboratory. Last Updated: June 2008 (version 01). Retreived on 10/05/2015 from: URL

DF File
National Energy Technology Laboratory (NETL). 2013. NETL Life Cycle Inventory Data – Unit Process: Coal Crusher Facility, Construction. U.S. Department of Energy, National Energy Technology Laboratory. Last Updated: December 2008 (version 01). Retreived on 10/05/2015 from: URL

## Technology
The scope of this unit process encompasses the materials and weights of those materials necessary to construct a single coal crusher facility, to be used for the preparation of underground Illinois No. 6 coal. The crusher facility is assumed to be constructed of steel plate, reinforcement bar (rebar) wire and ready mixed concrete. Other materials are assumed to be negligible. This unit process is used during LC Stage #1 to assist in the preparation of underground coal. The electricity requirements for coal beneficiation of a generic eastern coal mine are reported in Chapter 2, Table 2-7 of the EIA report “Energy and Environmental Profile of the U.S. Mining Industry”(DOE and NMA 2002). Beneficiation refers to the sizing, handling and washing of run-of-mine (ROM) coal. The energy consumption values reported for coal crushing (or grinding as it is referred to in the EIA report) is 93,200 Btu/ton of coal, and is one of the more energy intensive processes during coal mining. When converted to metric units, coal crushing consumes 30.1 KWh/ton of coal processed. The electricity requirements for the other phases of beneficiation are included in the coal cleaning section of this report.

## Time period
This data set is representative of best available public data from 01/01/2001 to 12/31/2001 and is not subject to limited usability within sub-time spans (e.g. summer, winter).

## Parameters
- Cement_Fraction: 0.141
  [kg/kg] Mass of Portland Cement per kilogram of Ready Mixed Concrete
- Concrete: 2.259e6
  [kg/item] Mass of Ready Mixed Concrete for the contruction of one Coal crusher facility
- Portland_Cement: 318519; = Concrete*Cement_Fraction
  [kg/item] Mass of Portland cement required for the contruction of one coal crusher facility

## Reference product
- Coal crusher facility; Construction; At underground mine: 1 Item(s); data quality (3,3,4,3,1)

## Inputs from technosphere
- Portland cement, at plant: 318519 kg; = Portland_Cement; data quality (3,3,4,3,1)
- Steel plate; Blast furnace route; Production mix; 85% recovery rate: 130635 kg; data quality (3,3,4,3,1)
- Steel reinforcement bar; Blast furnace route; Production mix: 250000 kg; data quality (3,3,4,3,1)

## Inventory method
Attributional

## Modelling constants
All elementary and technosphere flows are calculated on a functional unit basis. Calculations involving combustion primarily to generate useful work are done using lower heating values (LHV) and calculations involving combustion primarily to generate useful heat are done using higher heating values (HHV). Unless explicitly stated in the associated reference documents applicable calculations assumed standard atmospheric temperature and pressure (SATP).

## Completeness
Individual relevant flows captured

## Data selection
Best publically available data

## Data treatment
No allocation applied

## Data collection
No primary data collected

## Intended application
This is a gate-to-gate basic process and can be used for any type of LCA study.

## Project
National Energy Technology Laboratory (NETL) Unit Process Library

## Sources
- U.S. Environmental Protection Agency (EPA). 2008b. Inventory of U.S. Greenhouse Gas Emissions and Sinks: 1990-2006
- Leed Engineering & Construction. 2006. Onesteel SMR Crushing Plant Upgrade Concrete Works and Reinforced Earth Wall Construction, Iron Duke, SA
- Pennsylvania Crusher. 2004. Bradford Breaker
- Walker, Roger. 2007. Density of Materials - Bulk Materials
- Pennsylvania Crusher. 2001. Reversible Impactor
- U.S. Environmental Protection Agency (EPA). 2008a. Identifying Opportunities for Methane Recovery at U.S. Coal Mines: Profiles of Selected Gassy Underground Coal Mines 2002-2006
- National Institute of Standards and Technology (NIST). 2009. Product List: Generic 100% Portland Cement
- U.S. Department of Energy (DOE) and National Mining Association (NMA). 2002. Energy and Environmental Profile of the U.S. Mining Industry: Chapter 2 Coal
- National Energy Technology Laboratory (NETL). 2013. Coal crusher facility; Construction; At underground mine
- Colstrip Energy Limited Partnership. 2008. Administrative Amendment to Montana Air Quality Permit
- U.S. Energy Information Administration (EIA). 2007. Annual Coal Report
