# Grinding

Dataset: openLCA process, unit process
Category: Support activities for crop production
Geography: RNA
Time period: 2009-01-01 to 2009-01-01
Generated by: Daniel Inman
Published in: Hsu, D.
restrictionsDescription: All information can be accessed by everybody.
copyright: false

## Technology
average

## Geography
North America

## Time period
2009

## Reference product
- Grinding: 2000 kg

## Inputs from technosphere
- Corn wet milling, operations, AP-42: 2000 kg
- Electricity, at grid, US, 2008: 61.876 kWh
  From INL design report (4/09), Table 4-9. Includes the conveyor feed electricity
- CUTOFF Agricultural machinery, general, production: 0.822 kg
  8.42 comes from the "chopping, maize" ecoinvent process for 1 ha. converted for 1 short ton of corn.

## Sources
- Hsu, D.
