# Cellulosic fiberboard, uncoated, at plant

Dataset: openLCA process, unit process
Category: Reconstituted Wood Product Manufacturing
Geography: RNA
Time period: 2010-01-01 to 2010-12-31
Generated by: Richard Bergman
Reviewer: Maureen Puetmann
Published in: Bergman, R.
restrictionsDescription: All information can be accessed by everybody.
copyright: false

## General comment
North American cellulosic fiberboard is used in residential and commercial construction. Various uses and applications for fiberboard include: 1. Sound-deadening board, 2. Structural sheathing, and 3. Roofing substrate (i.e., roof fiberboard). Asphalt is both used internally as a binder to improve strength properties and externally as a coating. Cellulosic fiberboard is a panel product developed to utilize industrial wood residue. Wood residues originate from industrial wood waste such as shavings, sawdust, and chips produced during other wood manufacturing processes and from under-utilized whole trees. Additional feedstock sources include mixed paper and construction wood waste. Cellulosic fiberboard falls into the Standard Industrial Classification of reconstituted wood products. Over the last several decades cellulosic fiberboard has evolved into a highly engineered product designed to meet specific end-use requirements. The most common dimensions of cellulosic fiberboard panels are 0.5 inch (12.7 mm) thick, 4.0 feet (1.22 m) wide and 8.0 (2.44 m) long. However thickness, width, and length can vary to meet end-use requirements.

Base process data presented with allocations to within process co-products noted. Refer to allocation worksheet for specifics. All allocations performed using mass or volume. This sheet sets out each unit process in the production of one cubic meter of cellulosic fiberbaord as produced in the North America.

Important note: although most of the data in the US LCI database has undergone some sort of review, the database as a whole has not yet undergone a formal validation process. Please email comments to lci@nrel.gov.; Geography: North America

## Technology
typical

## Geography
North America

## Time period
2010 and after

## Reference product
- Cellulosic fiberboard, uncoated, at plant: 254 kg
  1 m3 of uncoated cellulosic fiberboard

## By-products
- Pins and fines, at cellulosic fiberboard plant: 1.9 kg
- Other, not specified, at cellulosic fiberboard plant: 1.5 kg
- Molasses, at cellulosic fiberboard plant: 5.8 kg
- Culled boards, wood fuel, at cellulosic fiberboard plant: 1.1 kg
  internal fuel to boiler

## Inputs from technosphere
- Electricity, biomass, at power plant: 0.11581 kWh
  Chipper; 1.20%
- Natural gas, combusted in industrial boiler: 0.00043, 46.66 m3 (2 entries)
  Fiberboard production
- Electricity, bituminous coal, at power plant: 72.365 kWh
  Fiberboard production;35%
- Recycled postconsumer PET flake: 0.0763 kg
  Final packaging material
- Slack wax, at plant, US SE: 2.94 kg
  Slack wax production process represents 1.1% of main product by mass
- CUTOFF Water, at user: 24.4 kg
  No upstream impacts
- Wood Combusted, at boiler, at cellulosic fiberboard mill: 24.8 kg
  Wood boiler process; 2015
- Transport, single unit truck, diesel powered: 3.00048 t*km
  Feedstock transport; 11.2% of wood residue comes from the NE-NC US
- CUTOFF Electricity, hydropower, at power plant, unspecified: 70.315 kWh
  Fiberboard production;34%
- Gasoline, combusted in equipment, at pulp and paper mill (EXCL.): 0.137 l
  Fiberboard production
- Transport, combination truck, average fuel mix: 0.39102 t*km
  Starch production
- Potato, at field: 15.6408 kg
  Starch production
- Planer shavings, from dried lumber, at planer mill, US PNW: 29.9936 kg
  Feedstock input; updated 11/2015;
- Polyethylene, low density, resin, at plant: 0.00989 kg
  Final packaging material; wrapping
- Surfaced dried lumber, at planer mill, US SE: 1.39 kg
  Final packaging material
- CUTOFF Sodium aluminate, cellulosic fiberboard: 1.57 kg
  No upstream impacts represents 0.6% of main product by mass
- Electricity, nuclear, at power plant: 31.98 kWh
  Fiberboard production;16%
- CUTOFF Carbon black, at plant: 0.44 kg
  No upstream impacts; thermal energy at fiberboard production
- Softwood logs with bark, harvested at average intensity site, at mill, US SE: 0.14028 m3
  Feedstock input
- Other, not specified, at cellulosic fiberboard plant: 0.7901 kg
  Feedstock input; updated 11/2015;
- CUTOFF Adhesives and binders, at plant: 0.02 kg
  No upstream impacts
- Electricity, residual fuel oil, at power plant: 0.82 kWh
  Fiberboard production;0.40%
- Wood chips, hardwood, green, at sawmill, NE-NC: 5.9768 kg
  Feedstock input; updated 11/2015;
  on the USLCI, but not in Simapro is Chips, hardwood, green, at sawmill, kg / SE_US
- CUTOFF Electricity, from renewable source, unspecified: 0.41 kWh
  Fiberboard production;0.20%
- CUTOFF Cardboard - Cellulosic fiberboard: 0.0118 kg
  Final packaging material; <1%
- Mixed recyclables, at collection, commercial: 6.45 kg
  Fiberboard production
- Gasoline, at refinery: 0.0308 l
  Fiberboard production; hydraulic fluid
- Electricity, at grid, US, 2008: 0.66833 kWh
  Starch production
- Electricity, biomass, at power plant: 2.46 kWh
  Fiberboard production;1.20%
- Anthracite coal, combusted in industrial boiler: 13.04 kg
  Fiberboard production
- Natural gas, combusted in industrial equipment: 0.00109 m3
  Fiberboard production; proxy for propane
- Paper, bag and sack, unbleached kraft, average production, at mill: 0.03626 kg
  Final packaging material; wrapping
- Electricity, natural gas, at power plant: 1.12919 kWh
  Chipper; 12%
- Electricity, nuclear, at power plant: 1.50558 kWh
  Chipper; 16%
- Transport, single unit truck, diesel powered: 10.1223 t*km
  Feedstock transport; 27.6% of wood residue comes from Canada
- CUTOFF Mixed paper: 4.9745 kg
  Feedstock input;updated 11/2015;
- Electricity, natural gas, at power plant: 23.985 kWh
  Fiberboard production; 12%
- CUTOFF Electricity, hydropower, at power plant, unspecified: 3.31035 kWh
  Chipper; 34%
- CUTOFF Materials for basecoat painting, at plant: 0.000317 m3
  No upstream impacts
- CUTOFF Electricity, at wind power plant, unspecified: 2.665 kWh
  Fiberboard production;1.30%
- Pulp chips, at sawmill, US SE: 81.0801 kg
  Feedstock input; updated 11/2015;
- CUTOFF Electricity, at wind power plant, unspecified: 0.12547 kWh
  Chipper; 1.3%
- Electricity, residual fuel oil, at power plant: 0.0386 kWh
  Chipper; 0.40%
- Gasoline, combusted in equipment, at pulp and paper mill (EXCL.): 0.34 l
  Fiberboard production; boiler startup
- Transport, combination truck, diesel powered: 8.71 t*km
  Fiberboard production; total transportation for all additives
- Gasoline, at refinery: 0.0315 l
  Fiberboard production; lubricant oils
- CUTOFF Adhesives and binders, asphalt flake, cellulosic fiberboard: 10.21 kg
  No upstream impacts represents 3.9% of main product by mass
- Natural gas, combusted in industrial boiler: 0.16918 m3
  Starch production
- Sawdust, from dried lumber, at planer mill, US PNW: 0.4877 kg
  Feedstock input
- Polyethylene, high density, resin, at plant: 0.03626 kg
  Final packaging material; wrapping
- Transport, single unit truck, diesel powered: 16.6897 t*km
  Feedstock transport; Other residue
- CUTOFF Electricity, from renewable source, unspecified: 0.0193 kWh
  Chipper; 0.20%
- Pulp chips, at rough green lumber production, US PNW: 26.4797 kg
  Feedstock input; updated value 11/2015
- Softwood logs with bark, harvested at average intensity site, at mill, US PNW: 0.06326 m3
  Feedstock input
- CUTOFF Sodium aluminate, cellulosic fiberboard: 0.15 kg
  No upstream impacts; represents 0.06% of main product by mass
- CUTOFF Ink: 0.0305 kg
  No upstream impacts
  <1%
- Electricity, bituminous coal, at power plant: 3.40687 kWh
  Chipper; 35%
- CUTOFF Disposal, wood waste, to unspecified treatment: 2.38 kg
  Fiberboard production
- Gasoline, at refinery: 0.00331 l
  Fiberboard production; oils and grease
- Hot rolled sheet, steel, at plant: 0.0043 kg
  Final packaging material
- Diesel, combusted in industrial equipment: 0.53 l
  Fiberboard production
- Roundwood, hardwood, average, at forest road, NE-NC: 0.02567 m3
  Feedstock input; chipped onsite but electricity is embedded in mill usage.
- Transport, train, diesel powered: 0.23 t*km
  Fiberboard production: coal transport for thermal energy use on-site
- CUTOFF Wood chips, at cellulosic fiberboard, NA: 39.59 kg
  Feedstock input; updated 11/2015;
- Transport, single unit truck, diesel powered: 14.83 t*km
  Feedstock transport; 61.2% of wood residue comes from the SE; three different harvesting intensities; SE US
- CUTOFF Disposal, solid waste, unspecified, to unspecified treatment: 5.63 kg
  Fiberboard production
- CUTOFF Construction waste: 31.2177 kg
  Feedstock input updated 11/2015;

## Inputs from nature
- Water, well: 1.23 m3
  Fiberboard production; ground water
- Water, cooling, surface: 943 m3
  Fiberboard production; surface water
- Water, process, surface: 14.8707 m3
  Starch production
- Water, process, surface: 353 m3
  Fiberboard production; municipal
- Carbon, organic, in soil or biomass stock: 485 kg
  renewable materials

## Emissions to nature
- Lead: 2.64e-5 kg
  Fiberboard production
- Phenol: 0.00393 kg
  Fiberboard production
- Cumene: 0.00519 kg
  Fiberboard production
- Acetone: 0.00964 kg
  Fiberboard production
- Formaldehyde: 0.0164 kg
  Fiberboard production
- BOD5, Biological Oxygen Demand: 0.2712 kg
  Fiberboard production
- Acetaldehyde: 0.0199 kg
  Fiberboard production
- Particulates, > 2.5 um, and < 10um: 0.128 kg
  Fiberboard production
- Sulfur dioxide: 0.000276 kg
  Fiberboard production
- Acrolein: 0.00705 kg
  Fiberboard production
- Methanol: 0.0624 kg
  Fiberboard production
- Particulates, unspecified: 0.151 kg
  Fiberboard production
- Carbon monoxide: 0.0409 kg
  Fiberboard production
- Benzene: 0.000882 kg
  Fiberboard production
- Particulates, < 2.5 um: 0.0446 kg
  Fiberboard production
- Propanal: 0.014 kg
  Fiberboard production
- Dinitrogen monoxide: 0.0487 kg
  Fiberboard production
- VOC, volatile organic compounds: 0.21 kg
  Fiberboard production
- Oils, unspecified: 0.01515 kg
  Fiberboard production
- Suspended solids, unspecified: 1.113 kg
  Fiberboard production; TDS, Total Dissolved Solids
- COD, Chemical Oxygen Demand: 0.2029 kg
  Fiberboard production
- Limonene: 0.00763 kg
  Fiberboard production
- Toluene: 0.00111 kg
  Fiberboard production
- Particulates, < 10 um: 0.172 kg
  Fiberboard production
- Suspended solids, unspecified: 0.223 kg
  Fiberboard production
- Mercury: 0 kg
  Fiberboard production
- alpha-Pinene: 0.11 kg
  Fiberboard production
- Methyl ethyl ketone: 0.00202 kg
  Fiberboard production

## Sampling procedure
Industry survey

## Sources
- Bergman, R.
- Puettmann, et. al.
