# Acrylonitrile-butadiene-styrene copolymer, resin, at plant

Dataset: openLCA process, unit process
Category: Petrochemical Manufacturing
Geography: RNA
Time period: 2003-01-01 to 2004-01-01
Generated by: Franklin Associates
Published in: THE PLASTICS DIVISION OF THE AMERICAN C
restrictionsDescription: All information can be accessed by everybody.
copyright: false

## General comment
Scrap and heat are produced as coproducts during this process. A mass basis was used to partition the credit for scrap, while the energy amount for the heat is reported separately as recovered energy. Mass imbalance is due to data not shown for acrylonitrile production to provide confidentiality. Complete inventory data and metadata are available in full in the final report and appendices, Cradle-to-Gate Life Cycle Inventory of Nine Plastic Resins and Four Polyurethane Precursors. This report has been extensively reviewed within Franklin Associates and has undergone partial critical review by ACC Plastics Division members and is available at: www.americanchemistry.com. Quantities may vary slightly between the reference to main source and and this module due to rounding. Important note: although most of the data in the US LCI database has undergone some sort of review, the database as a whole has not yet undergone a formal validation process. Please email comments to lci@nrel.gov.

## Technology
Suspension and mass polymerization

## Geography
US and Mexico

## Reference product
- Acrylonitrile-butadiene-styrene copolymer, resin, at plant: 1 kg
  Mass imbalance is due to data not shown for acrylonitrile production to provide confidentiality.

## By-products
- Recovered energy: 1.69884 MJ
  Credit for steam or heat co-product sold externally.

## Inputs from technosphere
- Transport, barge, diesel powered: 0.0348669 t*km
  Tranport is specific to ethylbenzene styrene delivered to ABS resin producers. Values for barge transport are calculated based on average fuel consumption rates as reported in Transportation Energy Data Book: Edition 22 from Oak Ridge National Laboratory, September 2002: 22% of barges use diesel fuel in their engines, 78% use residual oil to generate steam for steam turbines, and a barge that consumes residual oil consumes 3.4 gallons per 1,000 ton-miles
- Ethylbenzene styrene, at plant: 0.672 kg
- Electricity, at grid, US, 2008: 0.652557 kWh
- CUTOFF Disposal, solid waste, unspecified, to waste-to-energy: 0.0008 kg
- Natural gas, combusted in industrial boiler: 0.0468827 m3
- Acrylonitrile, at plant: 0.22 kg
- CUTOFF Disposal, solid waste, unspecified, to sanitary landfill: 0.0137 kg
- Transport, train, diesel powered: 0.0409717 t*km
  Transport is specific to thylbenzene styrene and polybutadiene deliverd to ABS producers.
- Transport, barge, residual fuel oil powered: 0.115932 t*km
  (same comment as for Transport, barge, diesel powered)
- Electricity, at cogen, for natural gas turbine: 0.0412257 kWh
- Polybutadiene, at plant: 0.144 kg
- Transport, pipeline, unspecified petroleum products: 6.93086e-5 t*km
- Transport, combination truck, diesel powered: 0.0181057 t*km
  Transport is specific to polybutadiene deliverd to ABS producers.
- Residual fuel oil, combusted in industrial boiler: 0.00037548 l
- Transport, ocean freighter, residual fuel oil powered: 0.0800579 t*km
  Transport is specific to thylbenzene styrene and polybutadiene deliverd to ABS producers. Values for ocean freighter transport are calculated based on average fuel consumption rates as determined from a personal communication with Rich Sonnenschein, U.S. Department of Transportation, Maritime Administration in February 2004: 10% of ocean freighters use diesel fuel, 90% use residual fuel, and a freighter that consumes residual fuel consumes 1.9 gallons per 1,000 ton-miles
- Transport, ocean freighter, diesel powered: 0.00889532 t*km
  (same comment as for Transport, ocean freighter, residual fuel oil powered)
- Bituminous coal, combusted in industrial boiler: 0.0684 kg
- CUTOFF Disposal, solid waste, unspecified, to municipal incineration: 0.00229 kg

## Inputs from nature
- Water, process, unspecified natural origin/m3: 0.00118879 m3
  Consumptive use includes: water incorporated into the product, water evaporated during the process, and/or water used and released to a body other than that from which it was drawn.

## Emissions to nature
- Nitrogen oxides: 1e-5 kg
  This emission was reported by fewer than three companies. To indicate known emissions while protecting the confidentiality of individual company responses, the emission is reported only by order of magnitude.
- Dissolved solids: 0.001 kg
  (same comment as for Nitrogen oxides)
- COD, Chemical Oxygen Demand: 0.00291 kg
- Organic substances, unspecified: 3.6e-5 kg
- Carbon monoxide: 1e-5 kg
  (same comment as for Nitrogen oxides)
- Suspended solids, unspecified: 0.00098 kg
- Particulates, unspecified: 0.00011 kg
- Organic substances, unspecified: 1e-7 kg
  (same comment as for Nitrogen oxides)
- Metallic ions, unspecified: 1e-7 kg
  (same comment as for Nitrogen oxides)
- Ammonia: 0.0001 kg
  (same comment as for Nitrogen oxides)
- BOD5, Biological Oxygen Demand: 1e-5 kg
  (same comment as for Nitrogen oxides)
- Zinc: 1e-7 kg
  (same comment as for Nitrogen oxides)
- Methane, difluromonochloro-, HCFC-22: 1e-7 kg
  (same comment as for Nitrogen oxides)
- Phosphate: 1e-5 kg
  (same comment as for Nitrogen oxides)
- NMVOC, non-methane volatile organic compounds, unspecified: 0.00012 kg
- Nitrates: 1e-5 kg
  (same comment as for Nitrogen oxides)
- Oil and grease, unspecified: 0.0001 kg
  (same comment as for Nitrogen oxides)

## Sampling procedure
Data are from primary sources.

## Sources
- THE PLASTICS DIVISION OF THE AMERICAN C
