# Veneer, hardwood, green, at veneer mill, E

Dataset: openLCA process, unit process
Category: Softwood Veneer and Plywood Manufacturing
Geography: RNA
Time period: 2007-01-01 to 2007-01-01
Generated by: Maureen Puettmann
Published in: Richard D. Bergman
restrictionsDescription: All information can be accessed by everybody.
copyright: false

## General comment
All weights given on an ovendry basis. All moisture contents are on an ovendry basis. MC% =(weight of water in wood / weight of oven dry wood) *100. Reference to specific gravities use oven dry mass and volumes at specified moisture contents. Reference to densities use mass and volume at specified moistrue contents.

Important note: although most of the data in the US LCI database has
undergone some sort of review, the database as a whole has not yet
undergone a formal validation process.
Please email comments to lci@nrel.gov.

## Technology
Typical

## Geography
E= Eastern US United States. The states included MN, IA, MO, WI, IL, NJ, OH, IN, MI, WV, PA, MD, DW, NJ, NY, ME, VT, NH, RI, MA, CT, VA, KY, AR, LA, MS, AL, FL,GA, NC, SC, and TN

## Reference product
- Veneer, hardwood, green, at veneer mill, E: 1 kg
  Weight reported on an ovendry basis. Moisture content (ovendry basis) = 85%

## By-products
- Wood fuel, hardwood, green, at veneer mill, E: 0.32965 kg
  Weight reported on an ovendry basis. Moisture content (ovendry basis) = 85%
- Wood chips, hardwood, green, at veneer mill, E: 0.98158 kg
  Weight reported on an ovendry basis. Moisture content (ovendry basis) = 85%

## Inputs from technosphere
- Diesel, combusted in industrial equipment: 0.00065377 l
  Amount of diesel consumed during conditioning. Represents 5% of mill use of diesel
- Natural gas, combusted in industrial equipment: 8.1584e-7 m3
  Amount of natural gas consumed during conditioning. Represents 14.3% of mill use of natural gas; proxy for propane
- Conditioned log, hardwood, green, at veneer mill, E: 0.0045318 m3
  Based on a weighted average specific gravity 0.510. 2.46 M3 = 1255 KG Moisture content (ovendry basis) = 85%.
- Gasoline, combusted in equipment: 0.00015783 l
  Amount of gasoline consumed during conditioning. Represents 14.3% of mill use of gasoline.
- Electricity, at grid, Eastern US, 2000: 0.24504 kWh
  Amount of electricity consumed during conditions. Represents 60% of mill use of electricity.

## Sampling procedure
Questionnaires from 4 veneer mills and 5 flooring plants in the E. United States representing 32 states.

## Sources
- Richard D. Bergman
