# Rough green lumber processing, at sawmill, US PNW

Dataset: openLCA process, unit process
Category: Sawmills
Geography: RNA
Time period: 1999-01-01 to 2000-01-01
Generated by: Jamie Meil
Published in: Michael Milota
restrictionsDescription: All information can be accessed by everybody.
copyright: true

## General comment
Base process data presented with allocations to within process co-products noted. Refer to allocation worksheet for specifics. All allocations performed using mass or volume.,
Important note: although most of the data in the US LCI database has
undergone some sort of review, the database as a whole has not yet
undergone a formal validation process.
Please email comments to lci@nrel.gov.

## Technology
typical

## Geography
US Pacific Northwest

## Reference product
- Rough green lumber, softwood, at sawmill, US PNW: 1 kg

## By-products
- Pulp chips, at rough green lumber production, US PNW: 0.469 kg
- Sawdust, at rough green lumber production, US PNW: 0.152 kg
- Bark, at rough green lumber sawmill, softwood, US PNW: 0.137 kg

## Inputs from technosphere
- Softwood logs with bark, harvested at average intensity site, at mill, US PNW: 0.00407 m3
- Liquefied petroleum gas, combusted in industrial boiler: 5.56e-7 l
- Electricity, at grid, Western US, 2000: 0.106 kWh
- Diesel, combusted in industrial boiler: 0.00208 l
- Gasoline, combusted in equipment: 0.000217 l

## Emissions to nature
- Acetaldehyde: 1.08e-6 kg
- Phenol: 1.9e-7 kg
- Particulates, unspecified: 2.6e-5 kg
- Acrolein: 1.66e-9 kg
- Methanol: 1.84e-6 kg
- VOC, volatile organic compounds: 7.11e-5 kg
- Formaldehyde: 1.59e-10 kg
- Dust, unspecified: 0.000268 kg
- Bark: 0.00429 kg
  Represents amount of bark lost during manipulation of the log

## Sampling procedure
survey method

## Sources
- Leonard R. Johnson
- Michael Milota
- Maureen Puetmann
