# Methylene diphenyl diisocyanate resin, at plant, CTR

Dataset: openLCA process, unit process
Category: All Other Basic Organic Chemical Manufacturing
Geography: RNA
Time period: 2003-01-01 to 2004-01-01
Generated by: Franklin Associates
Published in: THE PLASTICS DIVISION OF THE ACC
restrictionsDescription: All information can be accessed by everybody.
copyright: false

## General comment
A large amount of hydrogen chloride is produced as a coproduct during this process. A mass basis was used to partition the credit for each product. Complete inventory data and metadata are available in full in the final report and appendices, Cradle-to-Gate Life Cycle Inventory of Nine Plastic Resins and Four Polyurethane Precursors. This report has been extensively reviewed within Franklin Associates and has undergone partial critical review by ACC Plastics Division members and is available at: www.americanchemistry.com. Quantities may vary slightly between the reference to main source and and this module due to rounding. Important note: although most of the data in the US LCI database has undergone some sort of review, the database as a whole has not yet undergone a formal validation process. Please email comments to lci@nrel.gov.

## Technology
Condensation of aniline and formaldehyde in the presence of an acid to produce 4,4-methylenedianiline (MDA), followed by phosgenation of MDA

## Geography
US

## Reference product
- Methylene diphenyl diisocyanate resin, at plant, CTR: 1 kg

## By-products
- Recovered energy, for Methylene diphenyl diisocyanate, CTR: 2.2224 MJ

## Inputs from technosphere
- CUTOFF Disposal, solid waste,process, to municipal incineration: 0.0033171 kg
- CUTOFF Disposal, solid waste, process, to waste-to-energy: 0.00076864 kg
- CUTOFF Disposal, solid waste, process, to sanitary landfill: 0.021612 kg
- CUTOFF Disposal, solid waste, fuel, to municipal incineration: 0.089238 kg

## Inputs from nature
- Energy, geothermal: 0.0099949 MJ
- Energy, unspecified: 0.013386 MJ
  Energy unspecified reflects "other fossil" fuels
- Energy, solar: 0.00041973 MJ
- Energy, from biomass: 0.0041186 MJ
- Coal, unprocessed bituminous, in ground: 0.22017 kg
- Energy, from hydro power: 0.18993 MJ
- Gas, natural, in ground: 0.52777 m3
  This flow represents the amount of natural gas that is used for fuel. The energy content of the natural gas used for fuel is 36.7 MJ per m3.
- Uranium oxide, 332 GJ per kg, in ore: 4.9543e-6 kg
- Oil, crude, in ground: 0.34721 kg
  This flow represents the amount of crude oils that is a material input for producing the resin output. The energy content of the crude oil used as EMR/feedstock is 43.7 MJ per kg. The energy content multiplied by the mass should be considered an Energy of Material Resource (EMR)/feedstock energy.
- Nitrogen, in air: 0.04032 kg
- Oxygen, in air: 0.36032 kg
- Energy, kinetic (in wind), converted: 0.00989 MJ
- Oil, crude, in ground: 0.072504 kg
  This flow represents the amount of crude oil that is used for fuel. The energy content of the crude oil used for fuel is 43.7 MJ per kg.
- Water, consumptive use, unspecified origin/m3: 0.01008 m3
- Coal, lignite, in ground: 0.019435 kg
- Gas, natural, in ground: 0.37564 kg
  This flow represents the amount of natural gas that is a material input for producing the resin output. The energy content of the natural gas used as EMR/feedstock is 49.8 MJ per kg. The energy content multiplied by the mass should be considered an Energy of Material Resource (EMR)/feedstock energy.
- Salt, unspecified: 0.38982 kg

## Emissions to nature
- Methane, fossil: 0.011089 kg
- Hydrogen: 7.1114e-7 kg
- Fluorene: 1.4114e-9, 9.3313e-11 kg (2 entries, compartments not in this file)
- Pyrene: 3.3839e-11 kg
- Nickel: 3.8383e-7, 7.4706e-8 kg (2 entries, compartments not in this file)
- Methane, monochloro-, R-40: 4.1367e-9, 5.942e-12 kg (2 entries, compartments not in this file)
- Toluene, 2,4-dinitro-: 2.1854e-12 kg
- Ethane, 1,2-dichloro-: 3.122e-10 kg
- Organic substances, unspecified: 0.00084157 kg
- 2-Hexanone: 1.8389e-9 kg
- Zinc: 4.9387e-10, 6.6942e-7 kg (2 entries, compartments not in this file)
- Ammonia: 0.00026649, 3.0853e-5 kg (2 entries, compartments not in this file)
- Chromium: 4.0617e-8, 6.8469e-7 kg (2 entries, compartments not in this file)
- Acetone: 1.5122e-9 kg
- Hydrogen chloride: 0.00012216 kg
- Lithium, ion: 0.00011066 kg
- Phosphate: 7.1e-6 kg
- Hexanoic acid: 5.828e-8 kg
- Benzene, pentamethyl-: 1.1064e-11 kg
- Butadiene: 1.4634e-9 kg
- Radium-228/kg: 5.1299e-17 kg
- Phenols, unspecified: 1.5455e-7, 1.9013e-8 kg (2 entries, compartments not in this file)
- Indeno(1,2,3-cd)pyrene: 6.2553e-12 kg
- Cobalt: 3.4839e-8, 6.1447e-9 kg (2 entries, compartments not in this file)
- Methyl ethyl ketone: 3.044e-9, 1.1884e-11 kg (2 entries, compartments not in this file)
- Ammonium chloride: 2.6296e-7 kg
- Methane, chlorodifluoro-, HCFC-22: 4.8014e-7 kg
- Sulfide: 4.9157e-7 kg
- Chloroform: 1e-9, 4.605e-10 kg (2 entries, compartments not in this file)
- Naphthalenes, alkylated, unspecified: 8.558e-10 kg
- Kerosene: 1.2594e-7 kg
- Antimony: 2.6584e-9, 1.5651e-8 kg (2 entries, compartments not in this file)
- Sulfur oxides: 0.0010545 kg
- Cadmium, ion: 9.1293e-9 kg
- Tetradecane: 6.5014e-9 kg
- Phenanthrenes, alkylated, unspecified: 3.5485e-10 kg
- Beryllium: 2.6811e-9, 3.3649e-9 kg (2 entries, compartments not in this file)
- Radioactive species, unspecified: 5366.2 Bq
- TOC, Total Organic Carbon: 0.00010886, 2.4941e-5 kg (2 entries, compartments not in this file)
- p-Cresol: 8.6107e-9 kg
- Acenaphthene: 5.2296e-11 kg
- Acetophenone: 1.1708e-10 kg
- Barium: 0.00034381 kg
- Toluene: 0.00010995, 2.8843e-7 kg (2 entries, compartments not in this file)
- PAH, polycyclic aromatic hydrocarbons: 6.2876e-9 kg
- Thallium: 3.3724e-9 kg
- Chrysene: 1.0254e-11 kg
- Strontium: 1.5099e-5 kg
- Arsenic: 4.8643e-8 kg
- Benzene, ethyl-: 8.7954e-6, 1.7986e-8 kg (2 entries, compartments not in this file)
- Bromide: 3.4699e-5 kg
- Surfactants: 4.9069e-8 kg
- NMVOC, non-methane volatile organic compounds, unspecified origin: 0.00083772 kg
- 2-Chloroacetophenone: 5.4635e-11 kg
- Methanol: 1e-6 kg
- Naphthalene: 5.0238e-9, 1.0377e-8 kg (2 entries, compartments not in this file)
- Benzo(b,j,k)fluoranthene: 1.128e-11 kg
- Carbon dioxide, fossil: 2.0246 kg
- Biphenyl: 3.3816e-9, 1.7433e-10 kg (2 entries, compartments not in this file)
- Ethylene dibromide: 1.7129e-9 kg
- Xylene: 6.3772e-5, 1.2974e-7 kg (2 entries, compartments not in this file)
- Radium-226/kg: 1.0028e-14 kg
- Acetaldehyde: 3.3154e-8 kg
- Carbon disulfide: 1.0147e-9 kg
- Nitrogen oxides: 0.0038469 kg
- Sulfate: 0.00012576 kg
- t-Butyl methyl ether: 2.7318e-10 kg
- Phenanthrene: 2.2183e-10, 2.7687e-10 kg (2 entries, compartments not in this file)
- COD, Chemical Oxygen Demand: 0.00062046 kg
- Benzyl chloride: 5.4635e-9 kg
- Lead: 8.3796e-8, 1.4859e-7 kg (2 entries, compartments not in this file)
- Sulfur dioxide: 0.0045197 kg
- Phthalate, dioctyl-: 5.6977e-10 kg
- Bromoform: 3.044e-10 kg
- Manganese: 6.4723e-8, 1.8929e-6 kg (2 entries, compartments not in this file)
- Polycyclic organic matter, unspecified: 2.2308e-8 kg
- Octadecane: 4.1372e-9 kg
- Methane, dichloro-, HCC-30: 5.2794e-8 kg
- VOC, volatile organic compounds: 0.00066626 kg
- Magnesium: 0.00011475, 1.128e-6 kg (2 entries, compartments not in this file)
- Ethane, 1,2-dichloro-1,1,2-trifluoro-, HCFC-123: 3.8544e-8 kg
- Nitrogen, total: 1.3996e-7 kg
- o-Xylene: 2.9788e-9 kg
- Methacrylic acid, methyl ester: 1.561e-10 kg
- Dodecane: 1.5241e-8 kg
- Formaldehyde: 8.1013e-7 kg
- Yttrium: 1.862e-9 kg
- Benzene: 7.1724e-5, 2.9926e-7 kg (2 entries, compartments not in this file)
- Ethane, 1,1,1,2-tetrafluoro-, HFC-134a: 3.8544e-8 kg
- Ethane, chloro-: 3.2781e-10 kg
- Mercaptans, unspecified: 1.6929e-6 kg
- Dinitrogen monoxide: 3.4712e-5, 4.7263e-7 kg (2 entries, compartments not in this file)
- Radionuclides (Including Radon): 7.0425e-6 kg
- Furan: 4.2411e-13 kg
- Ethane, 1,2-dibromo-: 9.3661e-12 kg
- Copper: 4.8741e-8, 5.0581e-8 kg (2 entries, compartments not in this file)
- Anthracene: 2.1534e-11 kg
- Phenol, 2,4-dimethyl-: 7.7709e-9 kg
- Phenol: 1.2488e-10, 2.5767e-7 kg (2 entries, compartments not in this file)
- Naphthalene, 2-methyl-: 4.247e-9 kg
- Selenium: 1.3806e-7, 2.3415e-8 kg (2 entries, compartments not in this file)
- 4-Methyl-2-pentanone: 6.2283e-10 kg
- Styrene: 1.9513e-10, 1.3668e-10 kg (2 entries, compartments not in this file)
- Particulates, unspecified: 0.00036267 kg
- Oils, unspecified: 3.1979e-5 kg
- Ethane, 1,1,1-trichloro-, HCFC-140: 1.561e-10 kg
- Organic acids: 9.663e-10 kg
- Nitrate compounds: 1e-11 kg
- Isophorone: 4.5269e-9 kg
- Decane: 8.0372e-9 kg
- Benzoic acid: 2.8141e-7 kg
- Benzene, 1-methyl-4-(1-methylethyl)-: 1.4752e-11 kg
- Hexadecane: 1.6675e-8 kg
- Dissolved solids: 0.036093 kg
- Hydrogen fluoride: 1.5028e-5 kg
- Cyanide: 1.9513e-8, 1.0107e-9 kg (2 entries, compartments not in this file)
- Chlorine: 6.8283e-7 kg
- Surfactants, unspecified: 9.1242e-8 kg
- Aldehydes, unspecified: 3.2097e-7 kg
- Benzo(a)anthracene: 8.2034e-12 kg
- Carbon monoxide, fossil: 0.00082396 kg
- Chromium VI: 8.1008e-9 kg
- Molybdenum: 6.3659e-9 kg
- Propene: 9.6559e-8 kg
- Sulfuric acid, dimethyl ester: 3.7464e-10 kg
- Vinyl acetate: 5.9318e-11 kg
- Benzo(ghi)perylene: 2.7687e-12 kg
- Fluoride: 3.5381e-7, 9.1444e-7 kg (2 entries, compartments not in this file)
- Methane: 0.00075762 kg
- Benzo(a)pyrene: 3.8967e-12 kg
- Dibenzothiophene: 2.9362e-11 kg
- Copper, ion: 7.8517e-8 kg
- Eicosane: 4.1838e-9 kg
- Chloride: 0.0071038 kg
- Calcium, ion: 0.00057456 kg
- Acenaphthylene: 2.5636e-11 kg
- BOD5, Biological Oxygen Demand: 0.00036276 kg
- Fluorene, 1-methyl-: 1.6801e-11 kg
- Benzenes, alkylated, unspecified: 5.2224e-8 kg
- Iron: 5.252e-5 kg
- Ethene, tetrachloro-: 4.7657e-9 kg
- Boron: 8.6798e-7 kg
- Arsenic, ion: 5.5172e-8 kg
- Cadmium: 1.5677e-8 kg
- Suspended solids, unspecified: 0.0029173 kg
- p-Xylene: 2.9788e-9 kg
- Radioactive species, Nuclides, unspecified: 8.1662 Bq
- 5-methyl Chrysene: 2.256e-12 kg
- o-Cresol: 7.9928e-9 kg
- m-Xylene: 8.0837e-9 kg
- Dioxins, measured as 2,3,7,8-tetrachlorodibenzo-p-dioxin: 1.3843e-13 kg
- Carbon monoxide: 0.0022112 kg
- Lead-210/kg: 2.8826e-17 kg
- Sulfuric acid: 4.8e-9 kg
- Particulates, < 10 um: 0.00017204 kg
- Hexane: 5.2294e-10 kg
- Hydrazine, methyl-: 1.3269e-9 kg
- Aluminum: 2.7536e-5 kg
- Particulates, > 2.5 um, and < 10um: 0.00010745 kg
- n-Hexacosane: 9.8552e-11 kg
- Cumene: 4.1367e-11 kg
- Hydrocarbons, unspecified: 1.5177e-6 kg
- Vanadium: 2.8836e-8 kg
- Dibenzofuran: 2.8071e-11 kg
- Mercury: 4.4318e-10, 4.9782e-8 kg (2 entries, compartments not in this file)
- Methane, tetrachloro-, CFC-10: 9.3778e-8 kg
- Sodium, ion: 0.0016492 kg
- Silver: 3.489e-7 kg
- Tin: 6.3577e-8 kg
- Titanium, ion: 2.4596e-7 kg
- Dimethyl ether: 1e-6 kg
- Propanal: 2.9659e-9 kg
- Sulfur: 6.9081e-7 kg
- Benzene, chloro-: 1.7171e-10 kg
- Fluorenes, alkylated, unspecified: 3.0266e-9 kg
- Methane, bromo-, Halon 1001: 1.2488e-9 kg
- Ammonium, ion: 5.6222e-8 kg
- Nickel compounds: 4.8e-7 kg
- PFC (perfluorocarbons): 4.8e-6 kg
- Fluoranthene: 7.2806e-11 kg
- Particulates, < 2.5 um: 0.00014957 kg
- Methane, chlorotrifluoro-, CFC-13: 8.7638e-9 kg
- Docosane: 1.5797e-10 kg

## Sampling procedure
Data are from both primary and secondary sources. Data for the production of phosgene, MDA, PMDI/MDI were provided by four leading producers (4 plants) in North America. The PMDI/MDI data collected represents a majority of the total North American PMDI/MDI production amount. The PMDI/MDI producers who provided data for this module verified that the characteristics of their plants are representative of a majority of North American PMDI/MDI production.

## Sources
- THE PLASTICS DIVISION OF THE ACC
