# Polystyrene, high impact, resin, at plant, CTR

Dataset: openLCA process, unit process
Category: All Other Basic Organic Chemical Manufacturing
Geography: RNA
Time period: 2000-01-01 to 2003-01-01
Generated by: Franklin Associates
Published in: THE PLASTICS DIVISION OF THE ACC
restrictionsDescription: All information can be accessed by everybody.
copyright: false

## General comment
Scrap is produced as a coproduct during this process. A mass basis was used to partition the credit for scrap. Complete inventory data and metadata are available in full in the final report and appendices, Cradle-to-Gate Life Cycle Inventory of Nine Plastic Resins and Four Polyurethane Precursors. This report has been extensively reviewed within Franklin Associates and has undergone partial critical review by ACC Plastics Division members and is available at: www.americanchemistry.com. Quantities may vary slightly between the reference to main source and and this module due to rounding. Important note: although most of the data in the US LCI database has undergone some sort of review, the database as a whole has not yet undergone a formal validation process. Please email comments to lci@nrel.gov.

## Technology
Mass polymerization

## Geography
US

## Reference product
- Polystyrene, high impact, resin, at plant, CTR: 1 kg

## By-products
- Recovered energy, for Polystyrene, high impact, resin, at plant, CTR: 0.0099229 MJ

## Inputs from technosphere
- CUTOFF Disposal, solid waste, process, to sanitary landfill: 0.034239 kg
- CUTOFF Disposal, solid waste, process, to waste-to-energy: 0.0011079 kg
- CUTOFF Disposal, solid waste, fuel, to municipal incineration: 0.087253 kg
- CUTOFF Disposal, solid waste,process, to municipal incineration: 0.0036178 kg

## Inputs from nature
- Energy, solar: 0.00039435 MJ
- Oil, crude, in ground: 0.15723 kg
  This flow represents the amount of crude oil that is used for fuel. The energy content of the crude oil used for fuel is 43.7 MJ per kg.
- Energy, geothermal: 0.0093904 MJ
- Energy, from hydro power: 0.17844 MJ
- Energy, kinetic (in wind), converted: 0.0092918 MJ
- Oil, crude, in ground: 0.72105 kg
  This flow represents the amount of crude oils that is a material input for producing the resin output. The energy content of the crude oil used as EMR/feedstock is 43.7 MJ per kg. The energy content multiplied by the mass should be considered an Energy of Material Resource (EMR)/feedstock energy.
- Energy, from biomass: 0.0038695 MJ
- Gas, natural, in ground: 0.43018 kg
  This flow represents the amount of natural gas that is a material input for producing the resin output. The energy content of the natural gas used as EMR/feedstock is 49.8 MJ per kg. The energy content multiplied by the mass should be considered an Energy of Material Resource (EMR)/feedstock energy.
- Water, consumptive use, unspecified origin/m3: 0.011693 m3
- Coal, lignite, in ground: 0.018259 kg
- Coal, unprocessed bituminous, in ground: 0.18994 kg
- Gas, natural, in ground: 0.84586 m3
  This flow represents the amount of natural gas that is used for fuel. The energy content of the natural gas used for fuel is 36.7 MJ per m3.
- Energy, unspecified: 0.012577 MJ
  Energy unspecified reflects "other fossil" fuels
- Uranium oxide, 332 GJ per kg, in ore: 4.6547e-6 kg

## Emissions to nature
- Chloroform: 2.5638e-12 kg
- Nitrogen oxides: 0.0060073 kg
- Ethylene dibromide: 3.5844e-9 kg
- Toluene: 0.00015151, 5.0724e-7 kg (2 entries, compartments not in this file)
- Copper: 4.1851e-10, 6.825e-8 kg (2 entries, compartments not in this file)
- Sulfur dioxide: 0.0047299 kg
- Aldehydes, unspecified: 8.5465e-8 kg
- Selenium: 1.2185e-7, 2.4829e-8 kg (2 entries, compartments not in this file)
- Oils, unspecified: 3.5514e-5 kg
- 4-Methyl-2-pentanone: 9.1371e-10 kg
- Carbon dioxide, fossil: 2.746 kg
- Zinc: 2.7901e-10, 6.1023e-5 kg (2 entries, compartments not in this file)
- Ethane, 1,2-dibromo-: 5.2146e-14 kg
- Phosphate: 1e-6 kg
- Radionuclides (Including Radon): 6.6165e-6 kg
- Ammonia: 3.0723e-6, 1.7546e-5 kg (2 entries, compartments not in this file)
- Dibenzothiophene: 4.2489e-11 kg
- Benzene, pentamethyl-: 1.6236e-11 kg
- Isophorone: 2.5204e-11 kg
- Phenol: 6.9528e-13, 8.3889e-7 kg (2 entries, compartments not in this file)
- Chrysene: 8.9052e-12 kg
- Particulates, > 2.5 um, and < 10um: 8.7309e-5 kg
- BOD5, Biological Oxygen Demand: 0.00044625 kg
- Antimony: 3.3034e-9, 2.5381e-8 kg (2 entries, compartments not in this file)
- p-Xylene: 4.7808e-9 kg
- Propene: 1.6335e-7 kg
- Hexadecane: 2.6823e-8 kg
- Bromoform: 1.6947e-12 kg
- Arsenic, ion: 8.8728e-8 kg
- COD, Chemical Oxygen Demand: 0.0011332 kg
- Naphthalenes, alkylated, unspecified: 1.3831e-9 kg
- Suspended solids, unspecified: 0.0047358 kg
- 2-Chloroacetophenone: 3.0418e-13 kg
- Carbon monoxide: 0.0007026 kg
- Chromium VI: 7.035e-9, 1.566e-9 kg (2 entries, compartments not in this file)
- Ethane, 1,1,1-trichloro-, HCFC-140: 8.691e-13 kg
- Aluminum: 4.3129e-5 kg
- Lithium, ion: 0.00015253 kg
- Pyrene: 2.9387e-11 kg
- Methacrylic acid, methyl ester: 8.691e-13 kg
- Lead: 2.4592e-7, 5.4625e-8 kg (2 entries, compartments not in this file)
- Sulfur: 1.1046e-6 kg
- m-Xylene: 1.2957e-8 kg
- Biphenyl: 1.5139e-10, 5.4653e-9 kg (2 entries, compartments not in this file)
- Yttrium: 2.9952e-9 kg
- Acetaldehyde: 4.8585e-8 kg
- Calcium, ion: 0.00093695 kg
- Benzyl chloride: 3.0418e-11 kg
- Cumene: 2.3031e-13 kg
- Hydrazine, methyl-: 7.3873e-12 kg
- Benzene, ethyl-: 1.2119e-5, 9.6894e-7 kg (2 entries, compartments not in this file)
- Fluorene: 8.1035e-11, 2.2793e-9 kg (2 entries, compartments not in this file)
- Benzo(a)anthracene: 7.124e-12 kg
- Methane, chlorotrifluoro-, CFC-13: 1.8339e-8 kg
- Carbon disulfide: 5.6491e-12 kg
- Fluorene, 1-methyl-: 2.4654e-11 kg
- Fluoride: 8.5913e-7, 7.3404e-9 kg (2 entries, compartments not in this file)
- Cobalt: 9.8884e-9, 5.1936e-8 kg (2 entries, compartments not in this file)
- Mercury: 1.128e-8, 5.722e-10 kg (2 entries, compartments not in this file)
- VOC, volatile organic compounds: 0.0009903 kg
- Chromium: 1.1351e-6, 4.5103e-8 kg (2 entries, compartments not in this file)
- Surfactants, unspecified: 1.2573e-7 kg
- Benzoic acid: 4.5286e-7 kg
- Fluorenes, alkylated, unspecified: 4.8916e-9 kg
- Anthracene: 1.8701e-11 kg
- Butadiene: 2.4756e-9 kg
- Benzene: 4.922e-7, 9.8071e-5 kg (2 entries, compartments not in this file)
- Methane: 0.00065461 kg
- Iron: 8.1463e-5 kg
- Magnesium: 0.00018686, 9.7956e-7 kg (2 entries, compartments not in this file)
- Phenanthrenes, alkylated, unspecified: 5.735e-10 kg
- Phenols, unspecified: 2.8454e-8, 9.1374e-8 kg (2 entries, compartments not in this file)
- Sulfuric acid, dimethyl ester: 2.0858e-12 kg
- Cadmium, ion: 1.4262e-8 kg
- Radioactive species, unspecified: 5044.9 Bq
- Acetophenone: 6.5182e-13 kg
- Thallium: 5.4501e-9 kg
- Barium: 0.00055624 kg
- Naphthalene: 8.0736e-9, 1.5715e-8 kg (2 entries, compartments not in this file)
- PAH, polycyclic aromatic hydrocarbons: 1.0637e-8 kg
- Particulates, < 2.5 um: 0.00024451 kg
- t-Butyl methyl ether: 1.5209e-12 kg
- Methane, fossil: 0.017667 kg
- Cyanide: 1.0864e-10, 1.0156e-9 kg (2 entries, compartments not in this file)
- Ethene, tetrachloro-: 4.3666e-9 kg
- Phenanthrene: 3.5656e-10, 2.4044e-10 kg (2 entries, compartments not in this file)
- Manganese: 1.8086e-6, 6.9178e-8 kg (2 entries, compartments not in this file)
- Radium-228/kg: 8.2555e-17 kg
- Organic substances, unspecified: 1.0528e-5 kg
- Hexane: 2.9115e-12 kg
- Kerosene: 1.1832e-7 kg
- Lead-210/kg: 4.639e-17 kg
- Hydrogen: 2.3809e-6 kg
- Acenaphthene: 4.5415e-11 kg
- Xylene: 8.788e-5, 2.1288e-7 kg (2 entries, compartments not in this file)
- Nickel: 6.4397e-7, 1.1447e-7 kg (2 entries, compartments not in this file)
- Tetradecane: 1.0426e-8 kg
- Tin: 1.0259e-7 kg
- Chlorine: 1.2527e-7 kg
- Dibenzofuran: 4.119e-11 kg
- Methane, dichloro-, HCC-30: 6.1698e-8 kg
- Ammonium chloride: 2.4705e-7 kg
- Methane, tetrachloro-, CFC-10: 1.167e-9 kg
- Ethane, chloro-: 1.8251e-12 kg
- Formaldehyde: 1.1451e-6 kg
- Dinitrogen monoxide: 1.0268e-6, 3.9138e-5 kg (2 entries, compartments not in this file)
- Indeno(1,2,3-cd)pyrene: 5.4323e-12 kg
- Methane, monochloro-, R-40: 8.7191e-12, 2.3031e-11 kg (2 entries, compartments not in this file)
- Surfactants: 1.0268e-7 kg
- Furan: 3.9846e-13 kg
- Sulfur oxides: 0.0021118 kg
- Mercaptans, unspecified: 8.7118e-9 kg
- Benzo(b,j,k)fluoranthene: 9.7956e-12 kg
- Naphthalene, 2-methyl-: 6.8109e-9 kg
- Radioactive species, Nuclides, unspecified: 7.6723 Bq
- Styrene: 1.0864e-12, 9.3658e-7 kg (2 entries, compartments not in this file)
- Sulfate: 0.00012639 kg
- 5-methyl Chrysene: 1.9591e-12 kg
- NMVOC, non-methane volatile organic compounds, unspecified origin: 0.0015057 kg
- Particulates, < 10 um: 0.00030365 kg
- Beryllium: 5.4684e-9, 2.4045e-9 kg (2 entries, compartments not in this file)
- Acetone: 2.2197e-9 kg
- Carbon monoxide, fossil: 0.0014636 kg
- TOC, Total Organic Carbon: 5.9205e-7 kg
- Boron: 1.3964e-6 kg
- Benzene, 1-methyl-4-(1-methylethyl)-: 2.1646e-11 kg
- Hexanoic acid: 9.3789e-8 kg
- Docosane: 2.318e-10 kg
- Bromide: 5.6836e-5 kg
- Methane, bromo-, Halon 1001: 6.9528e-12 kg
- Benzene, chloro-: 9.5601e-13 kg
- Methyl ethyl ketone: 1.7437e-11, 1.8e-6 kg (2 entries, compartments not in this file)
- Eicosane: 6.7263e-9 kg
- Octadecane: 6.6578e-9 kg
- Benzo(ghi)perylene: 2.4044e-12 kg
- Arsenic: 4.8416e-8 kg
- Hydrogen chloride: 0.00011208 kg
- Dissolved solids: 0.014398 kg
- Titanium, ion: 3.9752e-7 kg
- Dioxins, measured as 2,3,7,8-tetrachlorodibenzo-p-dioxin: 1.7412e-13 kg
- Phenol, 2,4-dimethyl-: 1.2506e-8 kg
- n-Hexacosane: 1.4461e-10 kg
- o-Cresol: 1.2868e-8 kg
- Nitrogen, total: 1.3149e-7 kg
- Particulates, unspecified: 0.00034763 kg
- Vanadium: 5.6768e-8 kg
- Phthalate, dioctyl-: 3.1722e-12 kg
- Sodium, ion: 0.0027005 kg
- Organic acids: 9.0785e-10 kg
- Vinyl acetate: 3.3026e-13 kg
- Benzo(a)pyrene: 3.384e-12 kg
- Decane: 1.2926e-8 kg
- Ammonium, ion: 5.2821e-8 kg
- Chloride: 0.011549 kg
- Cadmium: 1.9533e-8 kg
- o-Xylene: 4.7808e-9 kg
- Propanal: 1.6513e-11 kg
- Hydrocarbons, unspecified: 1.4259e-6 kg
- Toluene, 2,4-dinitro-: 1.2167e-14 kg
- Sulfide: 8.9127e-7 kg
- Silver: 5.709e-7 kg
- Methane, chlorodifluoro-, HCFC-22: 1.0006e-6 kg
- Ethane, 1,2-dichloro-: 1.7382e-12 kg
- Acenaphthylene: 2.2263e-11 kg
- p-Cresol: 1.3857e-8 kg
- Dodecane: 2.4511e-8 kg
- Radium-226/kg: 1.6139e-14 kg
- Copper, ion: 1.0366e-7 kg
- Fluoranthene: 6.3227e-11 kg
- Hydrogen fluoride: 1.3356e-5 kg
- Acid gases: 1e-9 kg
- Benzenes, alkylated, unspecified: 8.4404e-8 kg
- 2-Hexanone: 2.953e-9 kg
- Strontium: 2.4296e-5 kg
- Polycyclic organic matter, unspecified: 4.668e-8 kg
- Molybdenum: 1.0243e-8 kg

## Sampling procedure
Data are from both primary and secondary sources. Data for the production of HIPS resin were provided by four leading producers (6 plants) in North America. The HIPS producers who provided data for this module verified that the characteristics of their plants are representative of a majority of North American HIPS production.

## Sources
- THE PLASTICS DIVISION OF THE ACC
