# Tractor-propelled coal crusher; Manufacture; For surface mine, at plant

Dataset: openLCA process, unit process
Category: Bit. Coal and Lignite Surface Mining
Geography: US
Time period: 2009-01-01 to 2009-12-31
Generated by: Timothy Skone
Owner: National Energy Technology Laboratory
Reviewer: Robert James
Published in: National Energy Technology Laboratory (NETL). 2010. Tractor-propelled coal crusher; Manufacture; For surface mine, at plant
restrictionsDescription: Use of the datasets in the National Energy Technology Laboratory's (NETL) Unit Process Library is not restricted, but a statement of
attribution is required. Please use the following attribution statement:
National Energy Technology Laboratory's (NETL) Unit Process Library
626 Cochrans Mill Road, P.O. Box 10940
Pittsburgh, PA 15236-0940
http://www.netl.doe.gov/research/energy-analysis/life-cycle-analysis/unit-process-library
Neither the U.S. Department of Energy (DOE) National Energy Technology Laboratory (NETL) nor any person acting on behalf of these organizations:
A. Makes any warranty or representation, express or implied, with respect to the accuracy, completeness, or usefulness of the information contained in this document, or that the use of any information, apparatus, method, or process disclosed in this document may not infringe on privately owned rights;
or
B. Assumes any liability with this report as to its use, or damages resulting from the use of any information, apparatus, method, or process disclosed in this document.
Reference herein to any specific commercial product, process, or service by trade name, trademark, manufacturer, or otherwise, does not necessarily constitute or imply its endorsement, recommendation, or favoring by NETL. The views and opinions of the authors expressed herein do not necessarily state or reflect those of NETL.
copyright: true

## General comment
This process is part of the NETL Unit Process Library. To access the library and the original dataset:
1) Navigate to the NETL LCA home page (http://www.netl.doe.gov/lca)
2) Then navigate to the “Unit Process Library”
3) From the library, the unit process of interest can be found either through the "Complete Listing of the Unit Process Library link" or through the link to the "Unit Process Database" spreadsheet
4) For each process, a Data Sheet (DS) and Data File (DF) are available

BRIEF DESCRIPTION
Based on manufacturer specifications for a Gundlach Braker model 12048 (115,212 kg; 254,000 lb.), used in crushing coal, this unit process quantifies the amount of steel needed to produce the coal crusher.

GOAL AND SCOPE
The scope of this unit process encompasses the materials and weights of those materials necessary to construct a single 254,000 lb coal crusher, to be used for the preparation of surface-mined Powder River Basin sub-bituminous coal. The unit process is based on the reference flow of 1 piece of coal crusher, 254,000 lbs, as described below, and as shown in the associated documentation (referenced below). The crusher is assumed to be constructed entirely of cold rolled steel; therefore cold rolled steel is assumed to be the only material required for crusher construction. Other materials are assumed to be negligible. This unit process is used during LC Stage #1 to assist in the preparation of subbituminous coal. It is combined with other mine equipment construction unit processes in the assembly unit process for sub-bituminous coal,Coal mine equipment assembly; Production mix; Surface coal mine, Powder river basin, U.S. This assembly unit process quantifies the fraction of each piece of equipment needed under LC Stage #1 to produce 1 kg of coal ready for transport (LC Stage #2) to the energy conversion facility (LC Stage #3).

BOUNDARY AND DESCRIPTION
Construction of the coal crusher is based on manufacturer specifications for a Gundlach Braker model 12048 coal crusher. The crusher is used to crush the extracted coal into smaller pieces which is then stored, and later transported. The associated documentation (referenced below) provides an overview of the boundary of this unit process. Emissions related to the physical assembly of the crusher (e.g., that are emitted while putting together the components of a crusher, including transport of those components) are not considered in this study. Upstream emissions from the production of raw materials used for the construction of the crusher (e.g., cold rolled steel) are calculated outside the boundary of this unit process, based on proprietary profiles available within the GaBi model. As shown in the associated documentation and discussed above, the crusher constructed in this unit process is incorporated into the surface mine assembly processes for LC Stage #1 for surface mined Powder River Basin sub-bituminous coal. The total weight of a crusher was readily available but reliable data for the material breakdown of crusher subcomponents were not. Therefore, the crusher was assumed to be composed entirely of cold rolled steel (Steel cold rolled (St) [Metals]). Total weight for one crusher is estimated to be approximately 115,213 kg (254,000 lbs) (Gundlach 2009). Based on the assumption that the crusher is constructed entirely out of cold rolled steel, the total weight is assigned to this material. Additional detail regarding input and output flows, including calculation methods, is contained in the associated documentation sheets which are referenced below.

This process contains one or more surrogate product flows as replacements for proprietary product flows used in the NETL Unit Process Library. All surrogate flow were taken from the U.S. Life Cycle Inventory Database; a list of surrogate flows used in this process is provided below:
1) Cold rolled sheet, steel, at plant

CITATION AND ASSOCIATED DOCUMENTATION
This document should be cited as:
National Energy Technology Laboratory (NETL). 2015. NETL Life Cycle Inventory Data – Unit Process: Tractor-propelled coal crusher; Manufacture; For surface mine, at plant. U.S. Department of Energy, National Energy Technology Laboratory. Last Updated: September 2015 (Version 01). Retrieved on [DATE] from [URL for this dataset].

This dataset is part of the NETL Unit Process Library. The Library offers additional information concerning this dataset in the form of a Detailed Spreadsheet Documentation (DS) file and a Process Documentation File (DF). The DS file is an Excel file that contains all of the parameters, inputs, and outputs for a given system as well as background data, calculations and quality scores. The DF file is a PDF document that contains major assumptions and data sources that are the basis for each unit process. The NETL Unit Process Library is located on the NETL website (netl.doe.gov) under Research / Energy Analysis / Energy Trends and Issues / Life Cycle Analysis / Unit Process Library.

This dataset was converted directly from the DS with additional supporting information provided by the DF. Full citations for the DS and DF are given below.

DS File
National Energy Technology Laboratory (NETL). 2010. NETL Life Cycle Inventory Data – Unit Process: Coal Crusher, 254,000 lbs. U.S. Department of Energy, National Energy Technology Laboratory. Last Updated: Fabruary, 2010 (version 01). Retrieved on 6/30/2014 from: http://www.netl.doe.gov/File%20Library/Research/Energy%20Analysis/Life%20Cycle%20Analysis/UP_Library/DS_Stage1_C_Coal_Crusher_254000lb_2010-01.xls

DF File
National Energy Technology Laboratory (NETL). 2010. NETL Life Cycle Inventory Data – Unit Process: Coal Crusher, 254,000 lbs. U.S. Department of Energy, National Energy Technology Laboratory. Last Updated: Fabruary, 2010 (version 01). Retrieved on 6/30/2014 from: http://www.netl.doe.gov/File%20Library/Research/Energy%20Analysis/Life%20Cycle%20Analysis/UP_Library/DF_Stage1_C_Coal_Crusher_254000lb_2010-01.pdf

## Technology
This coal crusher is used for mining in a large scale surface mine. Construction of the coal crusher is based on manufacturer specifications for a Gundlach Braker model 12048 coal crusher, which weighs 115,213 kg (254,000 lbs) (Gundlach 2009). The crusher is used to crush the extracted coal into smaller pieces which is then stored, and later transported.

## Geography
Powder River Basin

## Time period
This data set is representative of best available public data from 01/01/2009 to 12/31/2009 and is not subject to limited usability within sub-time spans (e.g. summer, winter).

## Reference product
- Tractor-propelled coal crusher; Manufacture; For surface mine, at plant: 1 Item(s); data quality (2,3,1,1,1)

## Inputs from technosphere
- Cold rolled sheet, steel, at plant: 115212 kg; data quality (2,3,1,1,1)

## Inventory method
Attributional

## Modelling constants
All elementary and technosphere flows are calculated on a functional unit basis. Calculations involving combustion primarily to generate useful work are done using lower heating values (LHV) and calculations involving combustion primarily to generate useful heat are done using higher heating values (HHV). Unless explicitly stated in the associated reference documents applicable calculations assumed standard atmospheric temperature and pressure (SATP).

## Completeness
Individual relevant flows captured

## Data selection
Best publically available data

## Data treatment
No allocation applied

## Data collection
No primary data collected

## Intended application
This is a gate-to-gate manufacturing process and can be used for any type of LCA study.

## Project
National Energy Technology Laboratory (NETL) Unit Process Library

## Sources
- Gundlach Equipment Corporation. 2009. Gundlach Breakers
- National Energy Technology Laboratory (NETL). 2010. Tractor-propelled coal crusher; Manufacture; For surface mine, at plant
