# Gasoline, combusted in equipment

Dataset: openLCA process, unit process
Category: Steam and Air-Conditioning Supply
Geography: RNA
Time period: 1996-01-01 to 2003-01-01
Generated by: Franklin Associates
Published in: Franklin Associates
restrictionsDescription: All information can be accessed by everybody.
copyright: false

## General comment
Important note: although most of the data in the US LCI database has
undergone some sort of review, the database as a whole has not yet
undergone a formal validation process.
Please email comments to lci@nrel.gov.

## Technology
Gasoline combustion in equipment such as mobile refrigeration units, generators, pumps, and portable well-drilling equipment.

## Geography
United States

## Reference product
- Gasoline, combusted in equipment: 1 l

## Inputs from technosphere
- Transport, train, diesel powered: 0.0033554 t*km
  Represents transportation from petroleum refinery to gasoline equipment.
- Transport, pipeline, unspecified petroleum products: 0.041307 t*km
  Represents transportation from petroleum refinery to gasoline equipment.
- Transport, combination truck, average fuel mix: 0.0052453 t*km
  Represents transportation from petroleum refinery to gasoline equipment.
- Transport, barge, average fuel mix: 0.028425 t*km
  Represents transportation from petroleum refinery to gasoline equipment.
- Gasoline, at refinery: 1 l

## Emissions to nature
- PAH, polycyclic aromatic hydrocarbons: 2.5164e-6 kg
- Particulates, < 10 um: 0.00026521 kg
- Carbon monoxide, fossil: 0.13535 kg
- Toluene: 6.1261e-6 kg
- Carbon dioxide, fossil: 2.085 kg
- Propene: 3.8644e-5 kg
- Formaldehyde: 1.7674e-5 kg
- VOC, volatile organic compounds: 0.0028351 kg
- Acrolein: 1.3855e-6 kg
- Methane, fossil: 0.00092063 kg
- Dinitrogen monoxide: 6.0969e-5 kg
- Nitrogen oxides: 0.033472 kg
- Sulfur oxides: 0.00050092 kg
- Acetaldehyde: 1.1488e-5 kg
- Butadiene: 5.8565e-7 kg
- Xylene: 4.2688e-6 kg
- Benzene: 1.3975e-5 kg

## Sources
- Center for Transportation Research, Argo
- EPA
- Franklin Associates
