# Mixed recyclables, at collection, commercial

Dataset: openLCA process, unit process
Category: Collection of postconsumer products
Geography: RNA
Time period: 2007-01-01 to 2008-01-01
Generated by: Franklin Associates
restrictionsDescription: All information can be accessed by everybody.
copyright: false

## General comment
Important note: although most of the data in the US LCI database has
undergone some sort of review, the database as a whole has not yet
undergone a formal validation process.
Please email comments to lci@nrel.gov.

## Technology
Typical

## Geography
United States

## Reference product
- Mixed recyclables, at collection, commercial: 1 kg
  Applies to one kg of any material collected from a commercial location

## Inputs from technosphere
- Transport, combination truck, diesel powered: 1.15848 t*km
  Fuel use per kg of material collected from commercial locations
- CUTOFF Mixed recyclables, at source: 1 kg
  Based on wastes removed at MRF, the collected material contains about 0.087 kg waste per kg of usable material.

## Sources
- THE PLASTICS DIVISION OF THE AMERICAN CH
