# Electricity, at Grid, SERC, 2008

Dataset: openLCA process, unit process
Category: Utilities
Geography: RNA
Time period: 2008-01-01 to 2008-01-01
Generated by: Alberta Carpenter
Published in: Chris Goemans, Athena Institute
restrictionsDescription: All information can be accessed by everybody.
copyright: false

## General comment
The methodology used to put together the grid information is outlined in reference 1.

## Technology
Typical

## Geography
Alabama, Georgia, Mississippi, North Carolina, South Carolina and parts of Arkansas, Florida, Illinois, Iowa, Kentucky, Louisiana, Missouri, Tennessee, Texas and Virginia.

## Reference product
- Electricity, at Grid, SERC, 2008: 1 kWh

## Inputs from technosphere
- Electricity, bituminous coal, at power plant: 0.375705 kWh
  BIT - Anthracite Coal, and Bituminous Coal.
- CUTOFF Electricity, tire derived fuel, at power plant: 0.000253479 kWh
  TDF – Tired (tire derived fuel)
- CUTOFF Electricity, petroleum coke, at power plant: 0.00487368 kWh
  PC – Petroleum Coke
- CUTOFF Electricity, biomass, solid, biogenic MSW, at power plant: 0.000535938 kWh
  MSB – Municipal Solid Waste – Biogenic Component
- CUTOFF Electricity, biomass,liquid, unspecified, at power plant: 2.60023e-6 kWh
  OBL – Other Biomass Liquid (Ethanol, Fish Oil, Liquid Acetonitrile Waste, Medical Waste, Tall Oil, Waste Alcohol, and other Biomass not specified)
- Electricity, biomass, at power plant: 0.00555235 kWh
  WDS – Wood/Wood Waste Solids (Paper Pellets, Railroad Ties, Utility Poles, Wood Chips, and other wood solids)
- CUTOFF Electricity, other fuels, unspecified, at power plant: 1.49402e-5 kWh
  WH – Waste heat not directly attributed to a fuel source. Note that WH should only be reported where the fuel source for the waste heat is undetermined, and for combined cycle steam turbines that are not supplementary fired
- CUTOFF Electricity, biomass, gas, landfill, at power plant: 0.000683074 kWh
  LFG – Landfill Gas
- Electricity, bituminous coal, at power plant: 0.188321 kWh
  SUB – Subbituminous Coal
- CUTOFF Electricity, biomass,solid, unspecified, at power plant: 7.19239e-5 kWh
  OBS – Other Biomass Solid (Animal Manure and Waste, Solid By-products, and other solid biomass not specified)
- Electricity, residual fuel oil, at power plant: 0.00122361 kWh
  RFO – Residual Fuel Oil (includes No. 5 and No. 6 Fuel Oils and Bunker C Fuel Oil)
- Electricity, diesel, at power plant: 0.0013362 kWh
  DFO – Distillate Fuel Oil (includes all Diesel and No. 1, No. 2, and No. 4 Fuel Oils)
- CUTOFF Electricity, hydropower, at power plant, unspecified: 0.0197054 kWh
  WAT – Water (Conventional, Pumped Storage)
- CUTOFF Electricity, petroleum, waste oil, at power plant: 7.42486e-5 kWh
  WO – Waste/Other Oil (including Crude Oil, Liquid Butane, Liquid Propane, Oil Waste, Re-Refined Motor Oil, Sludge Oil, Tar Oil, or other petroleum-based liquid wastes)
- CUTOFF Electricity, MSW, non-biogenic, at power plant: 0.000421087 kWh
  MSN – Municipal Solid Waste – Non-biogenic components
- CUTOFF Electricity, other gases, unspecified, at power plant: 0.00171579 kWh
  OG – Other Gas (Butane, Coal Processes, Coke-Oven, Refinery, and other processes)
- Electricity, lignite coal, at power plant: 0.00242832 kWh
  LIG – Lignite Coal
- Electricity, bituminous coal, at power plant: 0.000557107 kWh
  WC - Waste/Other Coal (Anthracite Culm, Bituminous Gob, Fine Coal, Lignite Waste, Waste Coal) .
- CUTOFF Electricity, at wind power plant, unspecified: 0.000236522 kWh
  WND – Wind
- CUTOFF Electricity, solar, unspecified, at power plant: 1.65542e-6 kWh
  SUN – Solar (Photovoltaic, Thermal)
- Electricity, bituminous coal, at power plant: 8.06718e-6 kWh
  SC - Coal Synfuel. Coal-based solid fuel that has been processed by a coal synfuel plant, and coal-based fuels such as briquettes, pellets, or extrusions, which are formed from fresh or recycled coal and binding materials.
- CUTOFF Electricity, biomass,liquid, unspecified, at power plant: 0.00987235 kWh
  BLQ – Black Liquor
- CUTOFF Electricity, biomass, liquid, sludge, at power plant: 7.74175e-5 kWh
  SLW – Sludge Waste
- Electricity, nuclear, at power plant: 0.251896 kWh
  NUC – Nuclear (Uranium, Plutonium, Thorium)
- CUTOFF Electricity, other fuels, unspecified, at power plant: 0.000348249 kWh
  OTH – Other (Batteries, Chemicals, Coke Breeze, Hydrogen, Pitch, Sulfur, Tar Coal, and miscellaneous technologies)
- Electricity, natural gas, at power plant: 0.133673 kWh
  NG – Natural Gas
- CUTOFF Electricity, other fuels, unspecified, at power plant: 0.000183745 kWh
  PUR – Purchased Steam
- CUTOFF Electricity, biomass, solid, agriculture by-products, at power plant: 7.8966e-5 kWh
  AB – Agriculture Crop By-products / Straw / Energy Crops
- CUTOFF Electricity, other gases, unspecified, at power plant: 9.239e-6 kWh
  PG – Propane
- CUTOFF Electricity, biomass, gas, unspecified, at power plant: 9.53572e-6 kWh
  OBG – Other Biomass Gases (Digester Gas, Methane, and other biomass gases)
- CUTOFF Electricity, other gases, unspecified, at power plant: 0.00012886 kWh
  BFG – Blast Furnace Gas

## Sampling procedure
based on EIA electricity reports for all power plants in the US.

## Sources
- Chris Goemans, Athena Institute
- unspecified
- USEPA
- Statistics Canada
- Statistics Canada
- Statistics Canada
- Statistics Canada
- Statistics Canada
- Statistics Canada
- USEPA
- EIA
- EIA
- EIA
- EIA
- EIA
- EIA
- EIA
- EIA
- EIA
- EIA
- EIA
- US DOE
- International Energy Agency
- US DOE
