# LPG, combusted in industrial boiler, at pulp and paper mill (EXCL.)

Dataset: openLCA process, unit process
Category: Pulp, Paper, and Paperboard Mills
Geography: RNA
Time period: 2001-01-01 to 2001-01-01
Generated by: Caroline Gaudreault
Reviewer: Martha Stevenson
Published in: Franklin Associates
restrictionsDescription: All information can be accessed by everybody.
copyright: false

## General comment
This process was built to be used within the processes named "Fuels burned at bleached kraft market pulp mill", "Fuels burned at uncoated freesheet paper mill", "Fuels burned at coated freesheet paper mill", "Fuels burned at uncoated mechanical paper mill", "Fuels burned at coated mechanical paper mill" and "Fuels burned at bag and sack paper mill". It was built from the process named "Liquefied petroleum gas (LPG), combusted in industrial boiler" v.1.6 available in the US LCI database. Transport and waste processes were removed. The following emissions to air were excluded (excl.): Sulfur oxidesand Nitrogen oxides. These processes and emissions are reported in pulp and paper mill process chain in which this process is integrated.
Important note: although most of the data in the US LCI database has
undergone some sort of review, the database as a whole has not yet
undergone a formal validation process.
Please email comments to lci@nrel.gov.

## Technology
LPG combustion in average industrial boiler.

## Geography
United States

## Reference product
- LPG, combusted in industrial boiler, at pulp and paper mill (EXCL.): 1 l
  100% propane

## Inputs from technosphere
- Liquefied petroleum gas, at refinery: 1 l

## Emissions to nature
- Carbon monoxide: 0.00044339 kg
- Methane: 2.6025e-5 kg
- Particulates, > 2.5 um, and < 10um: 7.8147e-5 kg
- Dinitrogen monoxide: 0.00011711 kg
- VOC, volatile organic compounds: 4.5544e-5 kg
- Carbon dioxide, fossil: 1.724 kg

## Sources
- AF&PA
- Center for Transportation Research, Argo
- Franklin Associates
