# Tillage, conservation, corn production

Dataset: openLCA process, unit process
Category: Corn Farming
Geography: RNA
Time period: 2005-01-01 to 2009-12-31
Generated by: Daniel Inman
Published in: Hsu, D.
restrictionsDescription: All information can be accessed by everybody.
copyright: false

## General comment
This process includes all field operations associated with conservation tillage of one hectare of average US corn. Conservation tillage is defined as tillage and field operations that leave greater than 30% residue on the soil surface.

## Technology
Modern technology

## Geography
North America

## Time period
2005-2009

## Reference product
- Tillage, conservation, corn production: 1 m2
  Chisel plowing is used for conservation tillage systems.

## Inputs from technosphere
- CUTOFF Fertilising, by broadcaster: 2 ha
  Assuming fertilizer is broad cast or applied through irrigation (irrigated only)
- CUTOFF Tillage, cultivating, chiselling: 1 ha

## Emissions to nature
- Carbon dioxide: 0 kg
  Soil organic mater CO2 respiration after O2 exposure.

## Sources
- Hsu, D.
- Conservation Tech Info Ctr, Univ Purdue
- USDA NASS
