# Galvanized steel sheet, at plant

Dataset: openLCA process, unit process
Category: Iron and Steel Mills
Geography: RNA
Time period: 1993-01-01 to 2002-01-01
Generated by: Jamie K. Meil, Vice-President of the ATH
Published in: Markus Engineering Services
restrictionsDescription: All information can be accessed by everybody.
copyright: false

## General comment
Important note: although most of the data in the US LCI database has
undergone some sort of review, the database as a whole has not yet
undergone a formal validation process.
Please email comments to lci@nrel.gov.

## Technology
Data represent U.S and Canadian average technologies.

## Geography
North America

## Reference product
- Galvanized steel sheet, at plant: 1 kg

## Inputs from technosphere
- CUTOFF Disposal, solid waste, unspecified, to unspecified treatment: 0.093051 kg
- CUTOFF Disposal, BOF dust, to unspecified treatment: 0.017089 kg
- CUTOFF Disposal, slag, to unspecified treatment: 0.21852 kg
- CUTOFF Galvanized steel scrap, at plant: 0.29679 kg
- CUTOFF Disposal, BOF slag, to unspecified treatment: 0.082908 kg

## Inputs from nature
- Coal, 26.4 MJ per kg, in ground: 0.19073 kg
- Wood and wood waste, 9.5 MJ per kg: 0.000185 kg
- Energy, from hydro power: 0.27143 MJ
- Uranium, 2291 GJ per kg, in ground: 7.5411e-7 kg
- Gas, natural, 46.8 MJ per kg, in ground: 0.084231 kg
- Iron ore, in ground: 1.286 kg
- Oil, crude, 42 MJ per kg, in ground: 0.069458 kg
- Oxygen, in air: 0.091949 kg
- Coal, bituminous, 24.8 MJ per kg, in ground: 0.63504 kg
- Limestone, in ground: 0.2046 kg

## Emissions to nature
- Chlorine: 1.4288e-8 kg
- Benzene: -5.1817e-5, 9.261e-9 kg (2 entries, compartments not in this file)
- Antimony: 3.2193e-9 kg
- Calcium, ion: 1.431e-7 kg
- Phenol: 5.2038e-9, 1.8235e-8 kg (2 entries, compartments not in this file)
- Chloride: 0.0068355 kg
- Dinitrogen monoxide: 4.0572e-6 kg
- Suspended solids, unspecified: 0.035501 kg
- Chromium: 3.7485e-8, -1.4663e-6 kg (2 entries, compartments not in this file)
- Lead: 0.00013473, 2.2712e-8 kg (2 entries, compartments not in this file)
- Methane, tetrachloro-, CFC-10: 1.0253e-8 kg
- Hydrogen chloride: 3.2855e-5 kg
- Beryllium: 2.7122e-9 kg
- Kerosene: 1.6626e-7 kg
- Phenols, unspecified: 6.5268e-6 kg
- Naphthalene: 4.2998e-10, -4.2336e-5 kg (2 entries, compartments not in this file)
- Sulfate: 0.00024255 kg
- Organic substances, unspecified: 1.6163e-5, 1.1687e-7, 5.0274e-6 kg (3 entries, compartments not in this file)
- Sulfur dioxide: 0.0028224 kg
- Ammonium, ion: -0.012172 kg
- Boron: 1.7662e-5 kg
- Methane: 0.0015237 kg
- Cobalt: 9.1508e-9 kg
- Carbon dioxide, biogenic: 0.00024255 kg
- Methane, dichloro-, HCC-30: 2.7563e-8 kg
- Formaldehyde: 2.0176e-6 kg
- Sulfide: 0.0018632 kg
- Particulates, unspecified: 0.00053846 kg
- Nitrate: 6.2402e-8 kg
- Iron: 0.00024917 kg
- Zinc, ion: -6.4386e-5 kg
- Phosphorus: 1.3936e-5 kg
- Nickel: 9.7682e-8 kg
- Carbon dioxide, fossil: 2.668 kg
- Sulfuric acid: 4.41e-6 kg
- Metals, unspecified: 9.7902e-8 kg
- Sulfur oxides: 0.005733 kg
- Dioxins, measured as 2,3,7,8-tetrachlorodibenzo-p-dioxin: 3.5501e-14 kg
- Nickel, ion: 1.4707e-6 kg
- Sodium, ion: 2.624e-7 kg
- COD, Chemical Oxygen Demand: 0.002011 kg
- Acidity, unspecified: 7.5411e-11 kg
- Particulates, > 2.5 um, and < 10um: 0.0001065 kg
- Cadmium, ion: 2.0352e-7 kg
- Ammonia: 4.0572e-7, 2.022e-6 kg (2 entries, compartments not in this file)
- Mercury: 1.5964e-11, 1.2591e-8 kg (2 entries, compartments not in this file)
- Oils, unspecified: 0.017883 kg
- Arsenic: 2.3373e-8 kg
- BOD5, Biological Oxygen Demand: 5.0054e-6 kg
- Dissolved solids: 0.0044982 kg
- Carbon monoxide: 0.00052479 kg
- NMVOC, non-methane volatile organic compounds, unspecified origin: 0.0012039 kg
- Phosphate: -6.3504e-6 kg
- Hydrogen fluoride: 4.5423e-6 kg
- Nitrogen oxides: 0.0037926 kg
- Cadmium: 5.9094e-9 kg
- Selenium: 4.6526e-8 kg
- Cyanide: 0.00063284 kg
- Acrolein: 6.5048e-9 kg
- Aldehydes, unspecified: 5.3141e-6 kg
- Ethene, tetrachloro-: 6.1961e-9 kg
- Manganese: 1.4928e-5, 7.3647e-8 kg (2 entries, compartments not in this file)
- VOC, volatile organic compounds: 0.00021212 kg
- Radioactive species, unspecified: 20.13 kBq
- N-Nitrodimethylamine: 1.3759e-9 kg
- Nitrogen, total: 0.00069017 kg
- Chromate: 5.2038e-9 kg
- Carbon monoxide, fossil: 0.024917 kg
- Ethene, trichloro-: 6.152e-9 kg
- Benzo(a)pyrene: 5.5346e-6 kg
- Metallic ions, unspecified: 1.6052e-6 kg
- Fluoride: 0.00018787 kg

## Sources
- Markus Engineering Services
- Franklin Associates Ltd.
- Stelco Technical Services Limited
