# Soy-based resin, at plant

Dataset: openLCA process, unit process
Category: All Other Basic Organic Chemical Manufacturing
Geography: RNA
Time period: 2008-01-01 to 2008-01-01
Generated by: Anne Landfield Greig
Published in: Omni Tech International
restrictionsDescription: All information can be accessed by everybody.
copyright: false

## General comment
1. CARBON SEQUESTRATION should be accounted for after the product is built in its LCA model, and should be included depending on the use of end of life fate of that product.
REFINED SOY OIL: 80.6% C --> 2.955 kg CO2/kg refined soy oil
2. This system is part cradle-to-gate, part unit process. 3. The study (Main Data Source) underwent external peer review prior to this submission to the US LCI database.

## Technology
Data from 1 company but represents current technology

## Geography
US

## Reference product
- Soy-based resin, at plant: 1 kg

## Inputs from technosphere
- Natural gas, combusted in industrial boiler: 91 m3
- Electricity, at grid, US, 2000: 258 kWh
- Soy oil, refined, at plant: 120 kg
- CUTOFF Disposal, solid waste, unspecified, to unspecified landfill: 171 kg

## Inputs from nature
- Carbon dioxide: 331 kg
  This biomass carbon comes from a biobased ingredient other than (in addition to) the soy oil
- Coal, bituminous, 24.8 MJ per kg: 275 kg
- Natural gas, at extraction site: 666 kg
- Potassium Chloride: 1.62 kg
- Oil, crude: 777 kg
- Water: 37700 l
- Uranium ore: 0.991 kg
- Lignite coal, at surface mine: 0.11 kg
- Sodium Chloride: 1.69 kg
- Calcium carbonate: 0.161 kg

## Emissions to nature
- Atrazine: 0.00906 kg
  C8H14ClN5
- Ethanol: 77.3 kg
  C2H5OH
- Calcium: 12.4 kg
- Oils, unspecified: 0.115 kg
- Hydrogen fluoride: 0.0192 kg
  HF
- Chloride: 414 kg
- Toluene: 0.00639, 0.0447 kg (2 entries, compartments not in this file)
  C6H5CH3
- Particulates, unspecified: 0.978 kg
- Propylene: 0.396, 0.165 kg (2 entries, compartments not in this file)
  CH2CHCH3
- Aldehydes (unspecified): 0.0132 kg
- Nickel: 0.00206 kg
- TOC, Total Organic Carbon: 5.89 kg
- Xylene: 0.044, 0.00315 kg (2 entries, compartments not in this file)
  C6H4(CH3)2
- Boron: 0.0122 kg
  B III
- Methane: 12.7 kg
  CH4
- Ethyl benzene: 0.043 kg
  C6H5C2H5
- Heptane: 0.00323 kg
  C7H16
- Benzene: 0.0486, 0.00648 kg (2 entries, compartments not in this file)
  C6H6
- Particulates, > 10 um: 0.35 kg
- Fluoride: 0.116 kg
- Pentane: 0.0162 kg
  C5H12
- Organic substances, unspecified: 0.0249 kg
- Aromatics, unspecified: 0.0145 kg
- Magnesium: 2.43, 0.00145 kg (2 entries, compartments not in this file)
- Lead: 0.00179 kg
- Nitrogen dioxide: 10.8 kg
- Strontium: 0.211 kg
- Sulfur dioxide: 19.3 kg
- Phosphate: 0.0867 kg
- BOD5, Biological Oxygen Demand: 30 kg
- Phosphorus: 0.00849 kg
- Aluminum: 0.198 kg
- Potassium: 0.00168 kg
- Sodium, ion: 124 kg
- Particulates, <10 um: 0.0141 kg
- Hydrogen: 0.00497 kg
- Hydrocarbons, unspecified: 4.33 kg
  26% excludes methane
- Butane: 0.0221 kg
  C4H10
- COD, Chemical Oxygen Demand: 62.3 kg
- Nitrate: 0.00346 kg
  NO3-
- Nitrogen: 0.465 kg
- Phenol: 0.00232 kg
  C6H5OH
- Iron: 0.438 kg
- Ammonia: 0.249 kg
  NH3
- Sulfate: 0.576 kg
- Ammonia, as N: 0.06 kg
- Chlorine: 0.275 kg
- Ethylene: 0.0194 kg
  C2H4
- Chromium compounds: 0.00547 kg
- Dissolved substances, unspecified: 172 kg
- Mercaptans, unspecified: 0.00307 kg
- Hydrocarbons, unspecified: 0.0276 kg
- Barium: 2.75 kg
- Acids, unspecified: 0.0132 kg
- Hydrogen sulfide: 0.0013 kg
  H2S
- Dissolved substances, organic: 0.00275 kg
- Carbon monoxide: 5.46 kg
  CO
- Sulfur: 0.0104 kg
- Formaldehyde: 0.00142 kg
  CH2O
- Propane: 0.0129 kg
  C3H8
- Dinitrogen monoxide: 0.141 kg
- Hexane: 0.00647 kg
  C6H14
- Hydrogen chloride: 0.176 kg
  HCl
- Ethylene oxide: 0.00155 kg
  C2H4O
- Carbon dioxide, fossil: 3940 kg
- Suspended solids, unspecified: 188 kg
  SS from soybean crushing is sent to a WWTP; SS from agriculture is discharged to surface water.
- Ethane: 0.00324 kg
  C2H6
- Carbonate: 0.0275 kg
- Metals, unspecified: 0.0943 kg

## Sources
- Omni Tech International
- Ashland Composite Polymers
