# Tillage, reduce, corn production

Dataset: openLCA process, unit process
Category: Corn Farming
Geography: RNA
Time period: 2005-01-01 to 2009-12-31
Generated by: Daniel Inman
Published in: Hsu, D.
restrictionsDescription: All information can be accessed by everybody.
copyright: false

## General comment
This process involves all operations associated with reduced tillage on one hectare of US average corn. Reduce tillage is defined as operations leaving between 15 and 30% residue on the soil surface. The field is left as-is between harvest and planting.

## Technology
Modern technology

## Geography
North America

## Time period
2005-2009

## Reference product
- Tillage, reduce, corn production: 1 ha
  Rolling is used for seedbed preparation following reduced tillage

## Inputs from technosphere
- CUTOFF Tillage, rolling: 1 ha
  Chisel plow is a conservation tillage operation.
- CUTOFF Tillage, rotary cultivator: 1 ha
  fertilizers applied with cultivator "side dressing"
- CUTOFF Fertilising, by broadcaster: 1 ha
- CUTOFF Tillage, cultivating, chiselling: 1 ha

## Sources
- Hsu, D.
- Conservation Tech Info Ctr, Univ Purdue
- USDA NASS
