# Wastewater treatment plant; Construction; For underground coal mine

Dataset: openLCA process, unit process
Category: Bit. Coal and Lignite Surface Mining
Geography: US
Time period: 2005-01-01 to 2005-12-31
Generated by: Timothy Skone
Owner: National Energy Technology Laboratory
Reviewer: Robert James
Published in: National Energy Technology Laboratory (NETL). 2010. Wastewater treatment plant; Construction; For underground coal mine
restrictionsDescription: Use of this dataset is not restricted, but a statement of attribution is required. Please use the following attribution statement:
National Energy Technology Laboratory's (NETL) Unit Process Library
626 Cochrans Mill Road, P.O. Box 10940
Pittsburgh, PA 15236-0940
http://www.netl.doe.gov/research/energy-analysis/life-cycle-analysis/unit-process-library
Neither the U.S. Department of Energy (DOE) National Energy Technology Laboratory (NETL) nor any person acting on behalf of these organizations:
A. Makes any warranty or representation, express or implied, with respect to the accuracy, completeness, or usefulness of the information contained in this document, or that the use of any information, apparatus, method, or process disclosed in this document may not infringe on privately owned rights; or
B. Assumes any liability with this report as to its use, or damages resulting from the use of any information, apparatus, method, or process disclosed in this document.
Reference herein to any specific commercial product, process, or service by trade name, trademark, manufacturer, or otherwise, does not necessarily constitute or imply its endorsement, recommendation, or favoring by NETL. The views and opinions of the authors expressed herein do not necessarily state or reflect those of NETL.
copyright: true

## General comment
This process is part of the NETL Unit Process Library. To access the library and the original dataset:
1) Navigate to the NETL LCA home page (http://www.netl.doe.gov/lca)
2) Then navigate to the “Unit Process Library”
3) From the library, the unit process of interest can be found either through the "Complete Listing of the Unit Process Library link" or through the link to the "Unit Process Database" spreadsheet
4) For each process, a Data Sheet (DS) and Data File (DF) are available

BRIEF DESCRIPTION
This parameterized unit process includes material requirements for construction of the underground Illinois No. 6 bituminous coal mine wastewater treatment plant, which consists of settling ponds plus minor supporting infrastructure: pumps, pipes, wiring, and cement structures.

GOAL AND SCOPE
The scope of this unit process encompasses the materials and weights of those materials necessary to construct a wastewater treatment plant for use at an underground Illinois No. 6 bituminous coal mine located in Southern Illinois. The unit process is based on the reference flow of a single wastewater treatment plant, as described below and shown in the associated documentation (referenced in the Citation and Associated Documentation section below). The layout and materials required for the wastewater treatment plant are based on a combination of data from the Galatia mine and the Deer Run Mine, two Illinois No. 6 underground (longwall) mines located in southern Illinois.

This process is used during Life Cycle (LC) Stage #1 for the production of Illinois No. 6 coal. It is combined with other coal mine equipment construction unit processes in an assembly process for construction of a coal preparation facility, Coal preparation facility; Multiple processes; Illinois No. 6 Coal, Underground coal mine, U.S. This assembly unit process quantifies the fraction of each piece of equipment needed under LC Stage #1 to produce 1 kg of Illinois No. 6 bituminous coal ready for transport (LC Stage #2) to an energy conversion facility (LC Stage #3).

BOUNDARY AND DESCRIPTION
Construction of the wastewater treatment plant at the underground coal mine is based on the layout and materials required for a combination of the Galatia and Deer Run Mines, two underground Illinois No. 6 bituminous (longwall) mines located in southern Illinois. The coal preparation facility prepares mined coal for transport to the energy conversion facility. Coal preparation activities in the representative mine require the wastewater treatment plant modeled in this unit process, as well as a coal stockpile stacker, a coal crusher facility, a coal cleaning facility, and a coal loading silo.

A visual representation of the boundary of this unit process is available in the associated documentation (referenced in the Citation and Associated Documentation section below). Emissions related to the physical assembly of plant components and installation of components at the plant site (e.g., emitted while putting together the components of a wastewater treatment plant, including transport of those components) are not considered in this study. Upstream emissions from the production of raw materials used for the construction of the plant (e.g., polyvinylchloride (PVC) tube) are calculated outside the boundary of this unit process, based on proprietary profiles available within the GaBi model. As discussed above and shown in the associated documentation (referenced in the Citation and Associated Documentation section below), the wastewater treatment plant constructed in this unit process is incorporated into the coal preparation facility assembly processes for LC Stage #1 for Illinois No. 6 bituminous coal.

The wastewater treatment plant for the study consists of a series of sedimentation ponds that receive storm water flows from coal and refuse storage areas and mining operations areas throughout the mine site. The wastewater treatment plant does not receive discharge water from the coal mine or coal cleaning processes. Note that water treatment for the coal cleaning process consists of a slurry cell that is designed to facilitate re-use of water within the coal cleaning cycle, and the construction of the slurry cell is therefore not included in the wastewater treatment facility.

Characteristics of the wastewater treatment facility, including sizing of sediment ponds and details about their operation, were gathered first from documentation from a proposed expansion of Deer Run Mine. The proposed expansion would be an Illinois No. 6 mine that is also located in southern Illinois. This mine was selected primarily for its reasonable similarity to the mine used for this project, including its geographic location, as well as public availability of sufficient documentation (Hillsboro Energy LLC 2007). To ensure that the resulting assumptions were reasonable, they were cross-checked with Galatia Mine staff, and revised as needed.

As shown in the associated documentation (referenced below), the wastewater treatment plant includes approximately 15 acres of storm water retention ponds. The Deer Run document includes schematics of the seven on-site settling ponds. Using these diagrams, the size of each was estimated and summed to estimate the total surface area of 15 acres (Hillsboro Energy LLC 2007). These ponds are lined using compacted sediments, which are assumed to be present on site. Water flow into and out of ponds is facilitated by a series of earthen channels/drainages, as well as PVC piping with associated pumps, and cement lined outfall/discharge structures (Hillsboro Energy LLC 2007).

Pumps are required to convey a portion of the flow to, within, and out of the wastewater treatment facility. For the purposes of this study, we have assumed that 20 percent of maximum storm water flows would require pumps, and scaled pump installation to that amount. The maximum flow rate of the storm water was calculated by summing the total discharges of each of the seven sediment ponds for a total of 1,893 ft3/sec (Hillsboro Energy LLC 2007). Taking 20 percent of the total resulted in a maximum pump capacity requirement of 169,927 gallons per minute (gpm). Assuming that this flow would be carried using 5,000 gpm pumps, a total of 34 pumps would be necessary to provide for the required storm flow.

The weight of a representative pump was obtained from a table listing the weights of various pumps, and a skid assembly of 7,900 lb was used from a 5,000 gpm DV-300 pump (Power Prime Pumps 2005a). Pump materials were estimated based upon literature obtained from the manufacturer (Power Prime Pumps 2005, 2008a, and 2008b). Each pump is constructed of 316 stainless steel (impeller and wear plates), 431 stainless steel (shaft), cast iron (much of the body and framework), and hot-dip galvanized steel (skid) (Power Prime Pumps 2008b). Based on schematics and vendor information, we estimated that each pump would include, by weight, 10 percent 316 stainless steel, 10 percent 431 stainless steel, 50 percent cast iron, and 30 percent hot-dip galvanized steel. Using the pump weight of 7,900 lb, each pump would include 790 lb of both 316 and 431 stainless steel, 3,950 lb of cast iron, and 2,370 lb of hot-dip galvanized steel. Multiplying by 34 pumps and converting to kilograms gives a total of 12,178.3 kg of 316 stainless steel, 12,178.3 kg of 431 stainless steel, 60,891.5 kg of cast iron, and 36,534.9 kg of hot-dip galvanized steel.

Pumped flows would be conveyed within either 4” or 8” PVC pipes. Based on the design of the Deer Run facility and anticipated proximity to stockpile areas, it was estimated that a total of 8,500 ft of 4” and 3,500 ft of 8” schedule 80 PVC pipe would be required. Each diameter pipe was multiplied by the weight of PVC per 100 feet (275 lb/100 ft for the 4”, 805 lb/100 ft for the 8”) and then converted to kilograms (Engineering Toolbox 2008). This would result in a mass of 10,603 kg of 4” pipe and 12,780 kg of 8” pipe, for a total of 23,383 kg of PVC required.

Based on the design of the Deer Run facility, cement would be used for water flow dissipating structures and for a limited amount of canal lining. Based on 12,500 ft2 of cement at an average thickness of 1.5 ft, we estimate that 18,750 ft3 of cement would be required (Hillsboro Energy LLC 2007). Assuming a density of 94 lb/ft3 for Portland cement (Reade Advanced Materials 2006), this is equivalent to 799,456.55 kg of cement.

Wiring would be used primarily to supply electricity to pumps, although it was also assumed that wiring would supply minor additional loads such as facility lighting. It was assumed that operations for the facility would be housed separately with operations for the remainder of the mine. Wiring lengths were calculated based upon the design of the Deer Run facility and the anticipated proximity of stockpile areas to the treatment facility (Hillsboro Energy LLC 2007). There were calculated to be 12,000 total feet of piping, so the length of wire necessary to power the pumps was assumed to be half of the required length of pipeline, or 6,000 ft. There was an additional 20 percent of total wire length included to support lights and other auxiliary uses. The 20 percent was broken up into two categories: 20 percent of that number is 2-strand gauge 1 wire (e.g. gauge 1 / 2), and the remaining 80 percent is gauge 12 / 3. Herein, 6,000 ft of gauge 1 / 2 wire would be required for pumps, 240 ft for auxiliary wiring, and an additional 960 ft of gauge 12 / 3 wire for auxiliary wiring. The gauge 1 / 2 wire has a length of 3.947 feet per pound of wire (ft/lb) per strand, while gauge 12 / 3 wire is 50.59 ft/lb (Davis 2008). Each wire was divided by its length per pound and then multiplied by the number of strands in the wire. After converting to kilograms, this gives 1,379 kg of gauge 1 / 2 wire for the main pump wiring, 55 kg of 1 / 2 wire for auxiliary wiring, and 26 kg of 12 / 3 wire for auxiliary wiring. Since all wiring is assumed to be copper, there would be a total mass of approximately 1,460 kilograms.

Clay/sediment lining would be required for the proposed sedimentation ponds. It was assumed that these materials would be available on site, and could be recycled from the pond-digging process. It was also assumed that remaining spoils from pond construction would be used as berms around the ponds to provide flood flow protection, or for grading and fill purposes during construction of other facilities at the mine site.

Additional details regarding input and output flows, calculation methods, and other relevant properties and assumptions are contained in the associated documentation (referenced below).

This process contains one or more surrogate product flows as replacements for proprietary product flows used in the NETL Unit Process Library. All surrogate flow were taken from the U.S. Life Cycle Inventory Database; a list of surrogate flows used in this process is provided below:
1) Galvanized steel sheet, at plant
2) Iron, sand casted
3) Polyvinyl chloride, resin, at plant
4) Portland cement, at plant: This flow is a proxy for Ready Mixed Concrete. This process calculates the required mass of Portland Cement as a fraction of the required mass of Ready Mixed Concrete to construct one wastewater treatment plant for an underground coal mine. The default parameter setting assumes that Portland Cement comprises 14.1% (by mass) of Ready Mixed Concrete (NIST 2009); however, this parameter may be modified by the user. This process does not consider other material and energy inputs for producing Ready Mixed Concrete.

CITATION AND ASSOCIATED DOCUMENTATION
This document should be cited as:
National Energy Technology Laboratory (NETL). 2015. NETL Life Cycle Inventory Data – Unit Process: Wastewater treatment plant; Construction; For underground coal mine. U.S. Department of Energy, National Energy Technology Laboratory. Last Updated:September 2015 (version 01). Retrieved on [DATE] from [URL for this dataset].

This dataset is part of the NETL Unit Process Library. The Library offers additional information concerning this dataset in the form of a Detailed Spreadsheet Documentation (DS) file and a Process Documentation File (DF). The DS file is an Excel file that contains all of the parameters, inputs, and outputs for a given system as well as background data, calculations and quality scores. The DF file is a PDF document that contains major assumptions and data sources that are the basis for each unit process. The NETL Unit Process Library is located on the NETL website (netl.doe.gov) under Research / Energy Analysis / Energy Trends and Issues / Life Cycle Analysis / Unit Process Library.

Full citations for the DS and DF are given below.

DS File
National Energy Technology Laboratory (NETL). 2010. NETL Life Cycle Inventory Data – Unit Process: Wastewater Treatment Plant, Underground Coal Mine, Construction. U.S. Department of Energy, National Energy Technology Laboratory. Last Updated: January 2010 (version 01). Retrieved on 6/30/2014 from: http://www.netl.doe.gov/File%20Library/Research/Energy%20Analysis/Life%20Cycle%20Analysis/UP_Library/DS_Stage1_C_Wastewater_Treatment_Plant_Underground_Coal_Mine_2010-01.xls

DF File
National Energy Technology Laboratory (NETL). 2010. NETL Life Cycle Inventory Data – Unit Process: Wastewater Treatment Plant, Underground Coal Mine, Construction. U.S. Department of Energy, National Energy Technology Laboratory. Last Updated: January 2010 (version 01). Retrieved on 6/30/2014 from: http://www.netl.doe.gov/File%20Library/Research/Energy%20Analysis/Life%20Cycle%20Analysis/UP_Library/DF_Stage1_C_Wastewater_Treatment_Plant_Underground_Coal_Mine_2010-01.pdf

## Technology
The scope of this unit process encompasses the materials and weights of those materials necessary to construct a wastewater treatment plant for use at an underground Illinois No. 6 bituminous coal mine located in Southern Illinois. The unit process is based on the reference flow of a single wastewater treatment plant, as described below and shown in the associated documentation (referenced in the Citation and Associated Documentation section in the Description field). The layout, material requirements and construction of the wastewater treatment plant are based on a combination of data from the Galatia mine and the Deer Run Mine, two Illinois No. 6 underground (longwall) mines located in southern Illinois. Both mines are for Illinois No. 6 bituminous coal. The coal preparation facility prepares mined coal for transport to the energy conversion facility. Coal preparation activities in the representative mine require the wastewater treatment plant modeled in this unit process, as well as a coal stockpile stacker, a coal crusher facility, a coal cleaning facility, and a coal loading silo.

A visual representation of the boundary of this unit process is available in the associated documentation (referenced in the Citation and Associated Documentation section in the Description field).

The wastewater treatment plant for the study consists of a series of sedimentation ponds that receive storm water flows from coal and refuse storage areas and mining operations areas throughout the mine site. The wastewater treatment plant does not receive discharge water from the coal mine or coal cleaning processes. Note that water treatment for the coal cleaning process consists of a slurry cell that is designed to facilitate re-use of water within the coal cleaning cycle, and the construction of the slurry cell is therefore not included in the wastewater treatment facility.

Characteristics of the wastewater treatment facility, including sizing of sediment ponds and details about their operation, were gathered first from documentation from a proposed expansion of Deer Run Mine. The proposed expansion would be an Illinois No. 6 mine that is also located in southern Illinois. This mine was selected primarily for its reasonable similarity to the mine used for this project, including its geographic location, as well as public availability of sufficient documentation (Hillsboro Energy LLC 2007). To ensure that the resulting assumptions were reasonable, they were cross-checked with Galatia Mine staff, and revised as needed.

As shown in the associated documentation (referenced in the Citation and Associated Documentation section in the Description field), the wastewater treatment plant includes approximately 15 acres of storm water retention ponds. The Deer Run document includes schematics of the seven on-site settling ponds. Using these diagrams, the size of each was estimated and summed to estimate the total surface area of 15 acres (Hillsboro Energy LLC 2007). These ponds are lined using compacted sediments, which are assumed to be present on site. Water flow into and out of ponds is facilitated by a series of earthen channels/drainages, as well as PVC piping with associated pumps, and cement lined outfall/discharge structures (Hillsboro Energy LLC 2007).

## Geography
Southern Illinois

## Time period
This data set is representative of best available public data from 01/01/2005 to 12/31/2005 and is not subject to limited usability within sub-time spans (e.g. summer, winter).

## Parameters
- Concrete: 799457
  [kg/item] Mass of Ready Mixed Concrete for the contruction of one Coal Cleaning Facility
- Cement_Fraction: 0.141
  [kg/kg] Mass of Portland Cement per kilogram of Ready Mixed Concrete
- Portland_Cement: 112723; = Concrete*Cement_Fraction
  [kg/item] Mass of cement required for the contruction of one wastewater treatment plant

## Reference product
- Wastewater treatment plant; Construction; For underground coal mine: 1 Item(s); data quality (2,4,2,1,1)

## Inputs from technosphere
All rows: data quality (2,4,2,1,1)
- Portland cement, at plant: 112723 kg; = Portland_Cement
- Polyvinyl chloride, resin, at plant: 23383 kg
- Iron, sand casted: 60891 kg
- Galvanized steel sheet, at plant: 36535 kg
- Stainless steel; Manufacture; Production mix, at plant; 316 2B, 80% recycled: 12178.3 kg
- CUTOFF Copper sheet; Production mix: 1460 kg

## Inventory method
Attributional

## Modelling constants
All elementary and technosphere flows are calculated on a functional unit basis. Calculations involving combustion primarily to generate useful work are done using lower heating values (LHV) and calculations involving combustion primarily to generate useful heat are done using higher heating values (HHV). Unless explicitly stated in the associated reference documents applicable calculations assumed standard atmospheric temperature and pressure (SATP).

## Completeness
Individual relevant flows captured

## Data selection
Best publically available data

## Data treatment
No allocation applied

## Data collection
No primary data collected

## Intended application
This is a gate-to-gate manufacturing process and can be used for any type of LCA study.

## Project
National Energy Technology Laboratory (NETL) Unit Process Library

## Sources
- Power Prime Pumps. 2008a. DV-300E
- National Energy Technology Laboratory (NETL). 2010. Wastewater treatment plant; Construction; For underground coal mine
- The Engineering Toolbox. 2005. PVC and CPVC Pipes - Schedule 40 & 80
- National Institute of Standards and Technology (NIST). 2009. Product List: Generic 100% Portland Cement
- Power Prime Pumps. 2005. Diesel Pump Specifications
- Reade Advanced Materials. 2006. Weight Per Cubic Foot And Specific Gravity
- Davis, L. 2008. Reference & Information: AWG Cable Description
- Hillsboro Energy LLC. 2007. Applications for Underground Mine Permits, #399
- Power Prime Pumps. 2008b. Pump Details
