# Diesel, combusted in industrial equipment

Dataset: openLCA process, unit process
Category: Steam and Air-Conditioning Supply
Geography: RNA
Generated by: Franklin Associates
Published in: Franklin Associates
restrictionsDescription: All information can be accessed by everybody.
copyright: false

## General comment
Important note: although most of the data in the US LCI database has
undergone some sort of review, the database as a whole has not yet
undergone a formal validation process.
Please email comments to lci@nrel.gov.

## Technology
Diesel combustion in industrial applications such as mobile refrigeration units, generators, pumps, and portable well-drilling equipment.

## Geography
United States

## Reference product
- Diesel, combusted in industrial equipment: 1 l

## Inputs from technosphere
- Transport, barge, average fuel mix: 0.028425 t*km
  Represents transportation from petroleum refinery to diesel equipment.
- Diesel, at refinery: 1 l
- Transport, combination truck, average fuel mix: 0.0052453 t*km
  Represents transportation from petroleum refinery to diesel equipment.
- Transport, train, diesel powered: 0.0033554 t*km
  Represents transportation from petroleum refinery to diesel equipment.
- Transport, pipeline, unspecified petroleum products: 0.041307 t*km
  Represents transportation from petroleum refinery to diesel equipment.

## Emissions to nature
- Formaldehyde: 1.9612e-5 kg
- Carbon dioxide, fossil: 2.701 kg
- Xylene: 4.7367e-6 kg
- Butadiene: 6.4984e-7 kg
- Sulfur oxides: 0.0005986 kg
- PAH, polycyclic aromatic hydrocarbons: 2.7921e-6 kg
- Toluene: 6.7975e-6 kg
- Methane, fossil: 0.00013363 kg
- Acetaldehyde: 1.2747e-5 kg
- Benzene: 1.5506e-5 kg
- Nitrogen oxides: 0.052813 kg
- Dinitrogen monoxide: 6.7831e-5 kg
- Acrolein: 1.5373e-6 kg
- VOC, volatile organic compounds: 0.0013519 kg
- Particulates, < 10 um: 0.0016503 kg
- Propene: 4.2879e-5 kg
- Carbon monoxide, fossil: 0.014029 kg

## Sources
- Center for Transportation Research, Argo
- Franklin Associates
- EPA
