# Tillage, intensive, corn production

Dataset: openLCA process, unit process
Category: Corn Farming
Geography: RNA
Time period: 2005-01-01 to 2009-12-31
Generated by: Daniel Inman
Published in: Hsu, D.
restrictionsDescription: All information can be accessed by everybody.
copyright: false

## General comment
Intensive tillage operations for one hectare of average US corn. Intensive tillage leaves less than 15% crop residue on the soil surface.

## Technology
Modern technology

## Geography
North America

## Time period
2005-2009

## Reference product
- Tillage, intensive, corn production: 1 ha
  Seedbed preparation with roller

## Inputs from technosphere
- CUTOFF Tillage, ploughing: 2 ha
  Includes 2 plowing operations prior to planting
- CUTOFF Tillage, rotary cultivator: 2 ha
  Includes disking and cultivator application of N
- CUTOFF Fertilising, by broadcaster: 1 ha
- CUTOFF Tillage, rolling: 1 ha

## Sources
- Hsu, D.
- USDA NASS
- Conservation Tech Information Center
