# Automotive painting, electrocoating, per vehicle

Dataset: openLCA process, unit process
Category: Motor Vehicle Body Manufacturing
Geography: RNA
Time period: 2005-01-01 to 2005-01-01
Generated by: James Littlefield, Franklin Associates
Published in: VRP (Vehicle Recycling Partnership)
restrictionsDescription: All information can be accessed by everybody.
copyright: false

## General comment
Data are shown on 2 bases: 1) per 1,000 m2 of surface area and 2) per 1,000 vehicles., This unit process is on the basis of 1 vehicle.
Important note: although most of the data in the US LCI database has
undergone some sort of review, the database as a whole has not yet
undergone a formal validation process.
Please email comments to lci@nrel.gov.

## Technology
Representative of current industry practices

## Geography
North America

## Reference product
- Automotive painting, electrocoating, per vehicle: 1 Item(s)

## Inputs from technosphere
- Electricity, at grid, US, 2000: 24.9 kWh
- CUTOFF Treatment, electrocoating wastewater, unspecified treatment: 1060 l
- CUTOFF Disposal, carbon black, to residual material landfill: 0.00201 kg
- CUTOFF Water, at user: 1120 kg
- CUTOFF Pigment, at plant: 0.000409 m3
- CUTOFF Electrocoat resin, at plant: 0.00481 m3
- CUTOFF Disposal, carbon black, to wastewater treatment: 3.5e-6 kg

## Emissions to nature
- VOC, volatile organic compounds: 0.00638 kg
  From pigment
- VOC, volatile organic compounds: 0.0633 kg
  From resin

## Sources
- VRP (Vehicle Recycling Partnership)
