# Transport, light commercial truck, gasoline powered, Northeast

Dataset: openLCA process, unit process
Category: General Freight Trucking
Geography: RNA
Time period: 2010-01-01 to 2010-01-01
Generated by: Nathan Hardesty
Published in: U.S. Environmental Protection Agency (EP
restrictionsDescription: All information can be accessed by everybody.
copyright: false

## General comment
This dataset represents the Northeastern U.S. (CT, DC, DE, ME, MD, MA, NH, NJ, NY, PA, RI, VT (Reference 10)) average airborne emissions for operating a gasoline powered light commercial truck. The inventory includes all vehicle operation processes, including off-network and refueling activities.
The refinery-to-pump transportation and distribution data are calculated from Argonne National Laboratory's GREET 1.8d.1 model.
The vehicle operation data are calculated from EPA's MOVES2010a model, using the assumptions described in the corresponding detailed spreadsheet. Emissions factors in MOVES2010a are largely based on EPA's Mobile Source Observation Database, which in turn includes data from a variety of vehicle studies (References 6-8).
MOVES2010a acknowledges sources of uncertainty in the model structure, the population and acitivty data, and other model parameters. As of July 2011, the uncertainty calculation function of the model has not been activated.

## Technology
Combustion of gasoline in a light commercial truck.

## Geography
US

## Reference product
- Transport, light commercial truck, gasoline powered, Northeast: 1 t*km

## Inputs from technosphere
- Transport, train, diesel powered: 0.126435 t*km
- Transport, combination truck, average fuel mix: 0.0677198 t*km
- Transport, ocean freighter, average fuel mix: 0.578982 t*km
- Transport, barge, average fuel mix: 0.0438739 t*km
- Transport, pipeline, unspecified petroleum products: 0.664713 t*km
- Gasoline, at refinery: 0.232556 l

## Emissions to nature
- Dinitrogen monoxide: 4.07928e-5 kg
- Sulfur dioxide: 1.0557e-5 kg
- Particulates, < 10 um: 2.13326e-5 kg
  PM10 from brakewear.
- VOC, volatile organic compounds: 0.0012307 kg
- Ammonia: 3.96074e-5 kg
- Carbon monoxide, fossil: 0.0157266 kg
- Particulates, < 2.5 um: 2.82008e-5 kg
  PM2.5 from organic carbon, elemental carbon, and sulfate particulates.
- Particulates, < 2.5 um: 5.58446e-6 kg
  PM2.5 from brakewear.
- Methane: 6.44761e-5 kg
- Carbon dioxide, fossil: 0.540788 kg
- Nitrogen oxide: 0.00156084 kg
- Particulates, < 10 um: 3.06261e-5 kg
  PM10 from organic carbon, elemental carbon, and sulfate particulates.
- Nitrogen dioxide: 0.000171568 kg
- Particulates, < 10 um: 6.16184e-6 kg
  PM10 from tirewear.
- Hydrocarbons (other than methane): 0.00119732 kg
- Particulates, < 2.5 um: 1.47766e-6 kg
  PM2.5 from tirewear.
- Nitrogen oxides: 0.00173241 kg

## Sources
- U.S. Environmental Protection Agency (EP
- National Institute of Standards and Tech
- EPA
- U.S. Alternative Fuels and Advanced Vehi
- Transportation Characteristics Branch, U
- Eastern Research Group
- Assessment and Standards Division, Offic
- Assessment and Standards Division, Offic
- Wang, M.
- National Climatic Data Center, National
