# Polyethylene, high density, resin, at plant

Dataset: openLCA process, unit process
Category: Petrochemical Manufacturing
Geography: RNA
Time period: 2003-01-01 to 2003-01-01
Generated by: Franklin Associates
Published in: THE PLASTICS DIVISION OF THE AMERICAN C
restrictionsDescription: All information can be accessed by everybody.
copyright: false

## General comment
Scrap is produced as a coproduct during this process. A mass basis was used to partition the credit for each product. Complete inventory data and metadata are available in full in the final report and appendices, Cradle-to-Gate Life Cycle Inventory of Nine Plastic Resins and Four Polyurethane Precursors. This report has been extensively reviewed within Franklin Associates and has undergone partial critical review by ACC Plastics Division members and is available at: www.americanchemistry.com. Quantities may vary slightly between the reference to main source and and this module due to rounding. Important note: although most of the data in the US LCI database has undergone some sort of review, the database as a whole has not yet undergone a formal validation process. Please email comments to lci@nrel.gov.

## Technology
Polymerization of ethylene via a combination of slurry and UNIPOL gas phase processes

## Geography
North America (US and Canada)

## Reference product
- Polyethylene, high density, resin, at plant: 1 kg

## Inputs from technosphere
- CUTOFF Disposal, solid waste, unspecified, to waste-to-energy: 4e-6 kg
- CUTOFF Disposal, solid waste, unspecified, to municipal incineration: 0.00026 kg
- CUTOFF Electricity, cogenerated, at plant: 0.220459 kWh
- Transport, pipeline, unspecified petroleum products: 0.191149 t*km
- CUTOFF Disposal, solid waste, unspecified, to sanitary landfill: 0.00036 kg
- Ethylene, at plant: 0.99 kg
- Liquefied petroleum gas, combusted in industrial boiler: 3.7548e-5 l
- Residual fuel oil, combusted in industrial boiler: 0.00600768 l
- Electricity, at grid, US, 2008: 0.17791 kWh
- Natural gas, combusted in industrial boiler: 0.035521 m3

## Inputs from nature
- Water, process, unspecified natural origin/m3: 0.000679162 m3
  Consumptive use includes: water incorporated into the product, water evaporated during the process, and/or water used and released to a body other than that from which it was drawn.

## Emissions to nature
- Suspended solids, unspecified: 5.2e-5 kg
- Chromium, unspecified: 1e-8 kg
  This emission was reported by fewer than three companies. To indicate known emissions while protecting the confidentiality of individual company responses, the emission is reported only by order of magnitude.
- COD, Chemical Oxygen Demand: 1e-6 kg
  (same comment as for Chromium, unspecified)
- Particulates, unspecified: 1.8e-5 kg
- Nitrogen oxides: 2.9e-5 kg
- Phenol compounds, unspecified: 1e-8 kg
  (same comment as for Chromium, unspecified)
- Phosphorus: 1e-7 kg
  (same comment as for Chromium, unspecified)
- Hydrocarbons, unspecified: 1e-6 kg
  (same comment as for Chromium, unspecified)
- Process solvents, unspecified: 1e-7 kg
  (same comment as for Chromium, unspecified)
- BOD5, Biological Oxygen Demand: 5.6e-6 kg
- NMVOC, non-methane volatile organic compounds, unspecified: 0.00042 kg
- Zinc: 8.5e-8 kg
- Methane: 1.4e-5 kg
- Chlorides, unspecified: 1e-9 kg
  (same comment as for Chromium, unspecified)
- Sulfur oxides: 4.8e-8 kg
- Particulates, < 2.5 um: 1.2e-5 kg
- Dissolved solids: 4.4e-5 kg
- Particulates, > 2.5 um, and < 10um: 4.1e-5 kg
- Furans: 1e-9 kg
  (same comment as for Chromium, unspecified)
- Aluminum: 1e-6 kg
  (same comment as for Chromium, unspecified)
- Organic substances, unspecified: 1e-5 kg
  (same comment as for Chromium, unspecified)
- Carbon monoxide: 0.00016 kg
- Oil and grease, unspecified: 4.3e-6 kg

## Sampling procedure
Data are from primary sources.

## Sources
- THE PLASTICS DIVISION OF THE AMERICAN C
