# Nitrogen fertilizer, production mix, at plant

Dataset: openLCA process, unit process
Category: Nitrogenous Fertilizer Manufacturing
Geography: RNA
Generated by: Jamie Meil
Published in: Maureen Puetmann
restrictionsDescription: All information can be accessed by everybody.
copyright: false

## General comment
Base process data presented with allocations to within process co-products noted. Refer to allocation worksheet for specifics. All allocations performed using mass or volume., adapted from European data (IDEMAT 2001) in SimaPro
Important note: although most of the data in the US LCI database has
undergone some sort of review, the database as a whole has not yet
undergone a formal validation process.
Please email comments to lci@nrel.gov.

## Technology
Typical

## Geography
US Southeast

## Reference product
- Nitrogen fertilizer, production mix, at plant: 1 kg

## Inputs from technosphere
- Natural gas, processed, at plant: 0.946 m3
  Used as feedstock
- CUTOFF Disposal, inert solid waste, to inert material landfill: 9e-5 kg
- Transport, train, diesel powered: 0.62 t*km
- CUTOFF Disposal, chemical waste, unspecified, to sanitary landfill: 9e-5 kg
- Transport, combination truck, average fuel mix: 0.204 t*km
- CUTOFF Energy, unspecified: 0.73 MJ
- Bituminous coal, combusted in industrial boiler: 0.0081 kg
- Electricity, at grid, US, 2000: 0.0507 kWh

## Emissions to nature
- Ammonia: 0.000405 kg
- Dust, unspecified: 0.000265 kg
- Carbon dioxide: 0.531 kg
- Methane: 0.000215 kg
- Nitrogen, total: 0.00012 kg
- Carbon monoxide: 3.5e-5 kg
- Zinc: 5e-7 kg
- Dinitrogen monoxide: 0.0031 kg
- VOC, volatile organic compounds: 4.5e-5 kg
- Nitrogen oxides: 0.00014 kg

## Sources
- Leonard R. Johnson
- Maureen Puetmann
- Michael Milota
