# Electricity, at eGrid, AKMS, 2008

Dataset: openLCA process, unit process
Category: Utilities
Geography: RNA
Time period: 2008-01-01 to 2008-01-01
Generated by: Alberta Carpenter
Published in: Chris Goemans, Athena Institute
restrictionsDescription: All information can be accessed by everybody.
copyright: false

## General comment
The methodology used to put together the grid information is outlined in reference 1.

## Technology
Typical

## Geography
Alaska electricity grid for all Alaskan regions except the South (Anchorage area) and Central (Fairbanks area) Alaskan regions (AKGD)

## Reference product
- Electricity, at eGrid, AKMS, 2008: 1 kWh

## Inputs from technosphere
- CUTOFF Electricity, at wind power plant, unspecified: 5.18604e-5 kWh
- Electricity, natural gas, at power plant: 0.0364508 kWh
- CUTOFF Electricity, biomass,liquid, unspecified, at power plant: 0.00357051 kWh
  Liquid Renewable Fuels (Biomass) OBL - Other Biomass Liquid (Ethanol, Fish Oil, Liquid Acetonitrile Waste, Medical Waste, Tall Oil, Waste Alcohol, and other Biomass not specified)
- Electricity, diesel, at power plant: 0.0368621 kWh
  Petroleum (DFO) - JF - Jet Fuel
- Electricity, diesel, at power plant: 0.304892 kWh
  Petroleum (DFO) - Distillate Fuel Oil (includes all Diesel and No. 1, No. 2, and No. 4 Fuel Oils)
- CUTOFF Electricity, hydropower, at power plant, unspecified: 0.618173 kWh

## Sampling procedure
based on EIA electricity reports for all power plants in the US.

## Sources
- Chris Goemans, Athena Institute
- unspecified
- USEPA
- Statistics Canada
- Statistics Canada
- Statistics Canada
- Statistics Canada
- Statistics Canada
- Statistics Canada
- USEPA
- EIA
- EIA
- EIA
- EIA
- EIA
- EIA
- EIA
- EIA
- EIA
- EIA
- EIA
- US DOE
- International Energy Agency
- US DOE
