# Crude oil, in refinery

Dataset: openLCA process, unit process
Category: Petroleum Refineries
Geography: RNA
Time period: 1997-01-01 to 2003-01-01
Generated by: Franklin Associates
Published in: Franklin Associates
restrictionsDescription: All information can be accessed by everybody.
copyright: false

## General comment
Important note: although most of the data in the US LCI database has
undergone some sort of review, the database as a whole has not yet
undergone a formal validation process.
Please email comments to lci@nrel.gov.

## Technology
Transportation data represent average modes and distances for crude oil delivered to U.S. refineries. Refinery data include desalting, distillation (vacuum and atmospheric), and hydrotreating operations.

## Geography
United States

## Reference product
- Diesel, at refinery: 0.244 l
  Mass (0.2118 kg/kg crude) used for allocation. Conversion to volume used 7.24lb/gal as density factor (or alternatively 1.153 liter/kg)

## By-products
- Liquefied petroleum gas, at refinery: 0.0482 l
  100% propane. Mass (0.026112 kg/kg crude) used for allocation. Conversion to volume used 4.52lb/gal as density factor (or alternatively 1.85 liter/kg)
- Bitumen, at refinery: 0.0358 kg
- Petroleum refining coproduct, unspecified, at refinery: 0.0503 kg
- Refinery gas, at refinery: 0.0591 m3
  Mass (0.04352 kg/kg crude) used for allocation. Conversion to volume used density factor of natural gas, i.e. 0.046 lg/ft3 (or alternatively 1.357 m3/kg)
- Kerosene, at refinery: 0.109 l
  Mass (0.0880077 kg/kg crude) used for allocation. Conversion to volume used 6.75 lb/gal as density factor (or alternatively 1.236 liter/kg)
- Petroleum coke, at refinery: 0.058 kg
- Gasoline, at refinery: 0.525 l
  Mass (0.40716 kg/kg crude) used for allocation. Conversion to volume used 6.47 lb/gal as density factor (or alternatively 1.290 liter/kg)
- Residual fuel oil, at refinery: 0.0502 l
  Mass (0.047389 kg/kg crude) used for allocation. Conversion to volume used 7.88 lb/gal as density factor (or alternatively 1.059 liter/kg)

## Inputs from technosphere
- Natural gas, combusted in industrial boiler: 0.00885 m3
- Transport, pipeline, unspecified petroleum products: 0.631 t*km
  represents transportation from site of crude oil extraction to petroleum refinery.
- Electricity, at grid, US, 2000: 0.134 kWh
- CUTOFF Disposal, solid waste, unspecified, to sanitary landfill: 0.00542 kg
- Transport, ocean freighter, average fuel mix: 4.58 t*km
  represents transportation from site of crude oil extraction to petroleum refinery
- Crude oil, at production: 1 kg
- Transport, barge, average fuel mix: 0.00115 t*km
  represents transportation from site of crude oil extraction to petroleum refinery
- Liquefied petroleum gas, combusted in industrial boiler: 0.000916 l
- Residual fuel oil, combusted in industrial boiler: 0.0217 l

## Emissions to nature
- Nitrogen oxides: 0.000319 kg
- Methane, tetrachloro-, CFC-10: 1.16e-11 kg
- COD, Chemical Oxygen Demand: 0.000222 kg
- BOD5, Biological Oxygen Demand: 3.29e-5 kg
- Phenols, unspecified: 2.22e-7 kg
- Chromium, ion: 5.51e-7 kg
- Aldehydes, unspecified: 4.06e-5 kg
- Ammonia: 1.45e-5, 2.03e-5 kg (2 entries, compartments not in this file)
- Carbon monoxide, fossil: 0.0129 kg
- NMVOC, non-methane volatile organic compounds: 0.00196 kg
- Sulfide: 1.84e-7 kg
- Particulates, unspecified: 0.000232 kg
- Suspended solids, unspecified: 2.71e-5 kg
- Oils, unspecified: 1.06e-5 kg
- Sulfur oxides: 0.00227 kg
- Methane, fossil: 6.87e-5 kg
- Chromium VI: 3.58e-8 kg
- Ethane, 1,1,1-trichloro-, HCFC-140: 9.38e-11 kg
- Methane, dichlorodifluoro-, CFC-12: 1.16e-10 kg

## Sources
- Franklin Associates
- U.S. EPA
- Energy Information Administration
- WORLD BANK GROUP
- Oak Ridge National Laboratory
- Association of Oil Pipelines
- unspecified
- U.S. EPA
