# Metal composite material (MCM) panel, at plant

Dataset: openLCA process, unit process
Category: Architectural and Structural Metals Manufacturing
Geography: RNA
Time period: 2014-02-01 to 2015-02-28
Generated by: PE INTERNATIONAL
Published in: PE INTERNATIONAL
restrictionsDescription: All information can be accessed by everybody.
copyright: false

## General comment
MCM sheets are formed by bonding two metal skins to a highly engineered plastic core placed between them. This occurs under very precise conditions of temperature, pressure and tension. The result is a strong composite sheet of metal and plastic. Properly designed and installed, these metal composite panels provide a very reliable building envelope that resists the elements and protects against air and water infiltration. Producing the panels requires a five-stage process. The metal coils are introduced from two pay-off reels (1). Next the laminating rollers bond the aluminum to the continuously extruded thermoplastic core (2). The laminated material then enters the cooling chamber and is constantly moved at a steady rate by the pulling rollers (3). A protective masking film is then applied to the MCM to protect the surface finish (4). Finally, the MCM is trimmed to the required width, sheared to the required length, and stacked for inspection and final packaging (5). The process is finalized by machining, curving, and cutting the MCM sheets to specification into finished MCM panels. The MCM panel process includes all material and inbound transportation necessary for construction-ready products: coated aluminum coils, thermoplastic core, and packaging materials. Energy and utility inputs include electricity, natural gas, process water, and propane. All known solid waste, air, and water emissions are captured in the output.

## Technology
Composite building material of aluminum skin bonded to plastic core, machined, curved, and cut to specifications. Technology based on companies identified by Metal Construction Association to be representative of industry.

## Geography
North America

## Reference product
- Metal composite material (MCM) panel, at plant: 1 m2

## Inputs from technosphere
- CUTOFF Silicone sealing compound: 0.0119292 kg
- CUTOFF Disposal, wood waste, to unspecified treatment: 0.233406 kg
- CUTOFF Lubricants, unspecified, at plant: 0.000224146 kg
- CUTOFF Thermal energy from propane (MJ): 1.25914 MJ
- Electricity, at grid, US, 2008: 22.3775 MJ
- Natural gas, combusted in industrial equipment: 0.328349 m3
- Metal composite material (MCM) sheet, at plant: 0.963173 m2
- Transport, single unit truck, long-haul, diesel powered: 6914.11 kg*km
- CUTOFF Expandable polystyrene, at plant: 0.0859156 kg
- CUTOFF Steel cast part (machined): 0.0772889 kg
- CUTOFF Recycling, Aluminum scrap: 1.38333 kg
- Surfaced dried lumber, at planer mill, US PNW: 1.20977 kg
- CUTOFF Disposal, solid waste, unspecified, to unspecified treatment: 0.175786 kg
- CUTOFF Disposal, inert solid waste, to unspecified treatment: 0.000854116 kg

## Emissions to nature
- VOC, volatile organic compounds: 0.000248975 kg

## Sources
- PE INTERNATIONAL
