# Electricity, biomass, at power plant

Dataset: openLCA process, unit process
Category: Other Electric Power Generation
Geography: RNA
Time period: 1997-01-01 to 1997-01-01
Generated by: Franklin Associates
Published in: Franklin Associates
restrictionsDescription: All information can be accessed by everybody.
copyright: false

## General comment
Biomass production is represented by a poplar tree crop with a seven-year growing cycle. Electricity generation is accomplished by gasification of biomass followed by a gas turbine. Biomass is produced within the boundaries of this system and is thus not shown as a fuel input. This is cradle-to-gate data, spanning the extraction of fuels and raw materials through the production of electricity. Infrastructure requirments for biomass production, biomass gasification, and biomass electricity generation are also included. Process and fuel emissions are reported together in the original data source and cannot be separated.,
Important note: although most of the data in the US LCI database has
undergone some sort of review, the database as a whole has not yet
undergone a formal validation process.
Please email comments to lci@nrel.gov.

## Technology
Biomass production is represented by a poplar tree plantation with a seven-year growing cycle. Electricity generation is accomplished by gasification of biomass followed by a gas turbine.

## Geography
United States

## Reference product
- Electricity, biomass, at power plant: 1 kWh

## Inputs from technosphere
- Transport, combination truck, average fuel mix: 0.024604 t*km
  Represents transportation from biomass production to powerplant.
- CUTOFF Disposal, solid waste, unspecified, to unspecified treatment: 0.00059859 kg
  Includes process and fuel emissions from biomass production and biomass gasification/combustion.
- Transport, train, diesel powered: 0.010545 t*km
  Represents transportation from biomass production to powerplant.

## Inputs from nature
- Carbon dioxide, in air: 0.84323 kg

## Emissions to nature
- Sulfate: 7.8222e-10 kg
  (same comment as for CUTOFF Disposal, solid waste, unspecified, to unspecified treatment)
- Hydrogen chloride: 2.0154e-9 kg
  (same comment as for CUTOFF Disposal, solid waste, unspecified, to unspecified treatment)
- Isoprene: 0.021181 kg
  (same comment as for CUTOFF Disposal, solid waste, unspecified, to unspecified treatment)
- Sulfide: 8.4867e-11 kg
  (same comment as for CUTOFF Disposal, solid waste, unspecified, to unspecified treatment)
- Phenol: 1.2916e-10 kg
  (same comment as for CUTOFF Disposal, solid waste, unspecified, to unspecified treatment)
- Acids, unspecified: 1.3574e-8 kg
  (same comment as for CUTOFF Disposal, solid waste, unspecified, to unspecified treatment)
- Methane: 4.8527e-6 kg
  (same comment as for CUTOFF Disposal, solid waste, unspecified, to unspecified treatment)
- Nitrogen oxides: 0.00065865 kg
  (same comment as for CUTOFF Disposal, solid waste, unspecified, to unspecified treatment)
- COD, Chemical Oxygen Demand: 8.9751e-7 kg
  (same comment as for CUTOFF Disposal, solid waste, unspecified, to unspecified treatment)
- Tar: 7.2682e-10, 1.0397e-11 kg (2 entries, compartments not in this file)
  (same comment as for CUTOFF Disposal, solid waste, unspecified, to unspecified treatment)
- Dinitrogen monoxide: 9.3122e-6 kg
  (same comment as for CUTOFF Disposal, solid waste, unspecified, to unspecified treatment)
- Sodium, ion: 7.766e-10 kg
  (same comment as for CUTOFF Disposal, solid waste, unspecified, to unspecified treatment)
- Dissolved solids: 4.1395e-5 kg
  (same comment as for CUTOFF Disposal, solid waste, unspecified, to unspecified treatment)
- NMVOC, non-methane volatile organic compounds, unspecified origin: 0.00058674 kg
  (same comment as for CUTOFF Disposal, solid waste, unspecified, to unspecified treatment)
- Sulfur oxides: 0.00029479 kg
  (same comment as for CUTOFF Disposal, solid waste, unspecified, to unspecified treatment)
- Cyanide: 4.2482e-11 kg
  (same comment as for CUTOFF Disposal, solid waste, unspecified, to unspecified treatment)
- Nitrate compounds: 1.8396e-10 kg
  (same comment as for CUTOFF Disposal, solid waste, unspecified, to unspecified treatment)
- Nitric acid: 4.1263e-7 kg
  (same comment as for CUTOFF Disposal, solid waste, unspecified, to unspecified treatment)
- Organic substances, unspecified: 1.0146e-6 kg
  (same comment as for CUTOFF Disposal, solid waste, unspecified, to unspecified treatment)
- Ammonia: 3.5133e-5, 7.4433e-6 kg (2 entries, compartments not in this file)
  (same comment as for CUTOFF Disposal, solid waste, unspecified, to unspecified treatment)
- Ammonia, as N: 6.817e-9 kg
  (same comment as for CUTOFF Disposal, solid waste, unspecified, to unspecified treatment)
- Solids, inorganic: 1.0491e-9 kg
  (same comment as for CUTOFF Disposal, solid waste, unspecified, to unspecified treatment)
- Carbon dioxide, biogenic: 0.84323 kg
- Fluoride: 8.0566e-9, 6.5387e-9 kg (2 entries, compartments not in this file)
  (same comment as for CUTOFF Disposal, solid waste, unspecified, to unspecified treatment)
- Metallic ions, unspecified: 6.3676e-10 kg
  (same comment as for CUTOFF Disposal, solid waste, unspecified, to unspecified treatment)
- BOD5, Biological Oxygen Demand: 3.0016e-7 kg
  (same comment as for CUTOFF Disposal, solid waste, unspecified, to unspecified treatment)
- Hydrogen sulfide: 2.0888e-11 kg
  (same comment as for CUTOFF Disposal, solid waste, unspecified, to unspecified treatment)
- Dissolved organic matter: 4.1681e-11 kg
  (same comment as for CUTOFF Disposal, solid waste, unspecified, to unspecified treatment)
- Chloride: 4.7096e-9, 6.4622e-10 kg (2 entries, compartments not in this file)
  (same comment as for CUTOFF Disposal, solid waste, unspecified, to unspecified treatment)
- Hydrocarbons, unspecified: 5.2153e-11 kg
  (same comment as for CUTOFF Disposal, solid waste, unspecified, to unspecified treatment)
- Particulates, unspecified: 3.8155e-5 kg
  (same comment as for CUTOFF Disposal, solid waste, unspecified, to unspecified treatment)
- Hydrogen fluoride: 3.681e-10 kg
  (same comment as for CUTOFF Disposal, solid waste, unspecified, to unspecified treatment)
- Carbon monoxide: 7.2228e-5 kg
  (same comment as for CUTOFF Disposal, solid waste, unspecified, to unspecified treatment)
- Nitrate: 4.5692e-12 kg
  (same comment as for CUTOFF Disposal, solid waste, unspecified, to unspecified treatment)
- Metals, unspecified: 2.3963e-12 kg
  (same comment as for CUTOFF Disposal, solid waste, unspecified, to unspecified treatment)
- Carbon dioxide, fossil: 0.040356 kg
  (same comment as for CUTOFF Disposal, solid waste, unspecified, to unspecified treatment)
- Suspended solids, unspecified: 2.2612e-7 kg
  (same comment as for CUTOFF Disposal, solid waste, unspecified, to unspecified treatment)
- Iron: 1.5025e-12 kg
  (same comment as for CUTOFF Disposal, solid waste, unspecified, to unspecified treatment)
- Oils, unspecified: 8.4302e-7 kg
  (same comment as for CUTOFF Disposal, solid waste, unspecified, to unspecified treatment)
- Aldehydes, unspecified: 1.378e-7 kg
  (same comment as for CUTOFF Disposal, solid waste, unspecified, to unspecified treatment)

## Sources
- Franklin Associates
- Margaret K. Mann
