# Steel plate; Blast furnace route; Production mix; 85% recovery rate

Dataset: openLCA process, unit process
Category: Iron and Steel Mills
Geography: GLO
Time period: 1999-01-01 to 2004-12-31
Generated by: Timothy Skone
Owner: National Energy Technology Laboratory
Reviewer: Robert James
Published in: National Energy Technology Laboratory (NETL). 2013. Steel plate; Blast furnace route; Production mix; 85% recovery rate
restrictionsDescription: Use of this dataset is not restricted, but a statement of attribution is required. Please use the following attribution statement:
National Energy Technology Laboratory's (NETL) Unit Process Library
626 Cochrans Mill Road, P.O. Box 10940
Pittsburgh, PA 15236-0940
http://www.netl.doe.gov/research/energy-analysis/life-cycle-analysis/unit-process-library
Neither the U.S. Department of Energy (DOE) National Energy Technology Laboratory (NETL) nor any person acting on behalf of these organizations:
A. Makes any warranty or representation, express or implied, with respect to the accuracy, completeness, or usefulness of the information contained in this document, or that the use of any information, apparatus, method, or process disclosed in this document may not infringe on privately owned rights; or
B. Assumes any liability with this report as to its use, or damages resulting from the use of any information, apparatus, method, or process disclosed in this document.
Reference herein to any specific commercial product, process, or service by trade name, trademark, manufacturer, or otherwise, does not necessarily constitute or imply its endorsement, recommendation, or favoring by NETL. The views and opinions of the authors expressed herein do not necessarily state or reflect those of NETL.
copyright: true

## General comment
This process is part of the NETL Unit Process Library. To access the library and the original dataset:
1) Navigate to the NETL LCA home page (http://www.netl.doe.gov/lca)
2) Then navigate to the “Unit Process Library”
3) From the library, the unit process of interest can be found either through the "Complete Listing of the Unit Process Library link" or through the link to the "Unit Process Database" spreadsheet
4) For each process, a Data Sheet (DS) and Data File (DF) are available

BRIEF DESCRIPTION
This project encompasses the manufacturing of steel blast furnace (BF) plate.

GOAL AND SCOPE
This unit process provides a summary of relevant input and output flows associated with the manufacturing of steel BF plate. The data represents a world-wide, cradle-to-gate average of type BF plate steel production with an 85 percent recovery rate. The key inputs are raw materials and water. Key outputs are air and water emissions from the manufacturing of steel BF plate such as carbon dioxide, nickel, and ammonia. The unit process is based on the reference flow of 1 kg of steel BF plate. The relevant flows of this unit process are described below and shown in the associated documentation (referenced in the Citation and Associated Documentation section below).

BOUNDARY AND DESCRIPTION
A visual representation of the boundary of this unit process is available in the associated documentation (referenced in the Citation and Associated Documentation section below). Upstream emissions are not included in this study. This unit process accounts for manufacturing emissions but does not account for acquisition of raw materials, which are accounted for outside the boundary of this unit process.

Data for the manufacturing of steel BF plate were taken from a report on recycling scenarios for the International Iron and Steel Institute’s life cycle inventory (LCI). Several datasets for steel products were in the report including a dataset for BF plate. The data was already scaled for 1 kg of steel; therefore, all inputs and outputs in this study were converted, if applicable, since the reference flow is 1 kg of steel BF plate.

CITATION AND ASSOCIATED DOCUMENTATION
This dataset should be cited as:
National Energy Technology Laboratory (NETL). 2015. NETL Life Cycle Inventory Data – Unit Process: Steel plate; Blast furnace route; Production mix; 85% recovery rate. U.S. Department of Energy, National Energy Technology Laboratory. Last Updated: September 2015 (Version 01). Retrieved on [DATE] from [URL for this dataset].

This dataset is part of the NETL Unit Process Library. The Library offers additional information concerning this dataset in the form of a Detailed Spreadsheet Documentation (DS) file and a Process Documentation File (DF). The DS file is an Excel file that contains all of the parameters, inputs, and outputs for a given system as well as background data, calculations and quality scores. The DF file is a PDF document that contains major assumptions and data sources that are the basis for each unit process. The NETL Unit Process Library is located on the NETL website (netl.doe.gov) under Research / Energy Analysis / Energy Trends and Issues / Life Cycle Analysis / Unit Process Library.

This dataset was converted directly from the DS with additional supporting information provided by the DF. Full citations for the DS and DF are given below.

DS File
National Energy Technology Laboratory (NETL). 2013. NETL Life Cycle Inventory Data – Unit Process: Steel BF Plate, Manufacturing. U.S. Department of Energy, National Energy Technology Laboratory. Last Updated: June 2013 (version 01). Retrieved on 09/29/2015 from: URL.

DF File
National Energy Technology Laboratory (NETL). 2013. NETL Life Cycle Inventory Data – Unit Process: Steel BF Plate, Manufacturing. U.S. Department of Energy, National Energy Technology Laboratory. Last Updated: June 2013 (version 01). Retrieved on 09/29/2015 from: URL

## Technology
This unit process provides a summary of relevant input and output flows associated with the manufacturing of steel blast furnace (BF) plate. The data represents a world-wide, cradle-to-gate average of type BF plate steel production with an 85 percent recovery rate. The key inputs are raw materials and water. Key outputs are air and water emissions from the manufacturing of steel BF plate such as carbon dioxide, nickel, and ammonia. A visual representation of the boundary of this unit process is available in the associated documentation (referenced in the Citation and Associated Documentation section below). Data for the manufacturing of steel BF plate were taken from a report on recycling scenarios for the International Iron and Steel Institute’s life cycle inventory (LCI).

## Time period
This data set is representative of best available public data from 01/01/1999 to 12/31/2004 and is not subject to limited usability within sub-time spans (e.g. summer, winter).

## Reference product
- Steel plate; Blast furnace route; Production mix; 85% recovery rate: 1 kg; data quality (2,3,3,1,1)

## By-products
- Solid waste; From steel works, for disposal; Production mix: 0.554967 kg; data quality (2,3,3,1,1)
- Non-allocated byproducts; Production mix: 0.025838 kg; data quality (2,3,3,1,1)

## Inputs from nature
- Zinc: -0.00319 kg; data quality (2,3,3,1,1)
- Dolomite, in ground: 0.00497 kg; data quality (2,3,3,1,1)
- Iron: 0.423 kg; data quality (2,3,3,1,1)
- Gas, natural, at extraction site: 0.0567 kg; data quality (2,3,3,1,1)
- Oil, crude, in ground: 0.06 kg; data quality (2,3,2,1,1)
- Calcium carbonate, in ground: 0.0953 kg; data quality (2,3,3,1,1)
- Coal, 26.4 MJ per kg, in ground: 0.4 kg; data quality (2,3,3,1,1)
- Water, ground: 6.12 kg; data quality (2,3,3,1,1)

## Emissions to nature
All rows: data quality (2,3,3,1,1)
- NMVOC, non-methane volatile organic compounds, unspecified origin: 0.000172207 kg
- Nitrate: 0.000254395 kg
- Dioxins, measured as 2,3,7,8-tetrachlorodibenzo-p-dioxin: -4.49e-12 kg
- Cadmium: 5.52e-8, 1.11e-8 kg (2 entries, compartments not in this file)
- Methane: 0.000878378 kg
- Zinc: 1.48242e-5, 2.84948e-7 kg (2 entries, compartments not in this file)
- Ammonia: 3.63641e-5 kg
- Sulfur dioxide: 0.00263445 kg
- Phosphate: 1.19594e-5 kg; = 3.90E-06*94.97/30.97
- Lead: 2.29337e-6, 4.76847e-7 kg (2 entries, compartments not in this file)
- Chromium: 1.03856e-7, 8.13393e-7 kg (2 entries, compartments not in this file)
- Iron: 3.74105e-5 kg
- COD, Chemical Oxygen Demand: 4.16857e-5 kg
- Carbon dioxide: 1.158 kg
- Carbon monoxide: 0.00976734 kg
- Hydrogen sulfide: 3.37628e-5 kg
- Nitrogen dioxide: 0.00193853 kg
- Dinitrogen monoxide: 6.01597e-5 kg
- Particulates, > 2.5 um, and < 10um: 0.000277585 kg
- Suspended solids, unspecified: 0.000101026 kg
- Nickel: 6.47e-8 kg
- Mercury: 1.44039e-7 kg
- Hydrogen chloride: 5.79631e-5 kg

## Allocation factors
- causal, , for Zinc: 0
- causal, Solid waste; From steel works, for disposal; Production mix, for Nitrogen dioxide: 0
- causal, , for Chromium: 0
- causal, Non-allocated byproducts; Production mix, for Phosphate: 0
- physical, Non-allocated byproducts; Production mix: 0
- causal, Solid waste; From steel works, for disposal; Production mix, for Zinc: 0
- causal, Non-allocated byproducts; Production mix, for Cadmium: 0
- causal, Solid waste; From steel works, for disposal; Production mix, for Hydrogen sulfide: 0
- causal, Non-allocated byproducts; Production mix, for Nitrate: 0
- causal, , for Lead: 0
- causal, Non-allocated byproducts; Production mix, for Dolomite, in ground: 0
- causal, Non-allocated byproducts; Production mix, for Gas, natural, at extraction site: 0
- causal, Solid waste; From steel works, for disposal; Production mix, for Calcium carbonate, in ground: 0
- causal, Solid waste; From steel works, for disposal; Production mix, for Particulates, > 2.5 um, and < 10um: 0
- causal, Solid waste; From steel works, for disposal; Production mix, for Nickel: 0
- causal, Solid waste; From steel works, for disposal; Production mix, for Zinc: 0
- causal, Non-allocated byproducts; Production mix, for Iron: 0
- causal, Solid waste; From steel works, for disposal; Production mix, for Hydrogen chloride: 0
- causal, Non-allocated byproducts; Production mix, for Iron: 0
- causal, Solid waste; From steel works, for disposal; Production mix, for Carbon dioxide: 0
- causal, , for Dinitrogen monoxide: 0
- causal, , for Chromium: 0
- causal, Non-allocated byproducts; Production mix, for Sulfur dioxide: 0
- causal, Non-allocated byproducts; Production mix, for Lead: 0
- causal, Solid waste; From steel works, for disposal; Production mix, for Chromium: 0
- causal, Non-allocated byproducts; Production mix, for Zinc: 0
- causal, Non-allocated byproducts; Production mix, for Cadmium: 0
- causal, Non-allocated byproducts; Production mix, for Nickel: 0
- causal, Solid waste; From steel works, for disposal; Production mix, for Phosphate: 0
- causal, Solid waste; From steel works, for disposal; Production mix, for Dinitrogen monoxide: 0
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
## Inventory method
Attributional

## Modelling constants
All elementary and technosphere flows are calculated on a functional unit basis. Calculations involving combustion primarily to generate useful work are done using lower heating values (LHV) and calculations involving combustion primarily to generate useful heat are done using higher heating values (HHV). Unless explicitly stated in the associated reference documents applicable calculations assumed standard atmospheric temperature and pressure (SATP).

## Completeness
Individual relevant flows captured

## Data selection
Best publically available data

## Data treatment
No allocation applied

## Data collection
No primary data collected

## Intended application
This is a cradle-to-gate manufacturing process and can be used for any type of LCA study.

## Project
National Energy Technology Laboratory (NETL) Unit Process Library

## Sources
- World Steel Association. 2005. Applications of the IISI LCI Data to Recycling Scenarios
- National Energy Technology Laboratory (NETL). 2013. Steel plate; Blast furnace route; Production mix; 85% recovery rate
