# Benzene, at plant

Dataset: openLCA process, unit process
Category: All Other Basic Organic Chemical Manufacturing
Geography: RNA
Time period: 1992-01-01 to 2003-01-01
Generated by: Franklin Associates
Published in: THE PLASTICS DIVISION OF THE AMERICAN C
restrictionsDescription: All information can be accessed by everybody.
copyright: false

## General comment
Numerous aromatic coproduct streams are produced during this process. Fuel gas and off-gas were two of the coproducts produced that were exported to another process for fuel use. Pyrolysis gas and catalytic reformate account for 70 percent of the world production of benzene. It is estimated that one-third of benzene production is from pyrolysis gasoline and two-thirds are produced from catalytic reforming. The collected datasets for benzene production were weighted using these fractions. Numerous aromatic coproduct streams are produced during this process. Fuel gas and off-gas were two of the coproducts produced that were exported to another process for fuel use. When these fuel coproducts are exported from the aromatics separation process, they carry with them the allocated share of the inputs and outputs for their production. The ratio of the mass of the exported fuel over the total mass output was removed from the total inputs and outputs, and the remaining inputs and outputs are allocated over the material aromatics products. No energy credit is applied for the exported fuels, since both the inputs and outputs for the exported fuels have been removed from the data set. Complete inventory data and metadata are available in full in the final report and appendices, Cradle-to-Gate Life Cycle Inventory of Nine Plastic Resins and Four Polyurethane Precursors. This report has been extensively reviewed within Franklin Associates and has undergone partial critical review by ACC Plastics Division members and is available at: www.americanchemistry.com. Quantities may vary slightly between the reference to main source and and this module due to rounding. Important note: although most of the data in the US LCI database has undergone some sort of review, the database as a whole has not yet undergone a formal validation process. Please email comments to lci@nrel.gov.

## Technology
Separation from pyrolysis gas using fractional distillation of the pyrolysis gas dissolved in a polar solvent and solvent extraction followed by fractional distillation of catalytic reformate

## Geography
US

## Reference product
- Benzene, at plant: 1 kg

## Inputs from technosphere
- CUTOFF Natural gas, processed, for olefins production, at plant, internal offgas use: 0.0221 kg
  A portion of the material feed combusts within the hydrocracker and produces an offgas, which provides an internal energy source.
- Electricity, at cogen, for natural gas turbine: 0.00958995 kWh
- Natural gas, combusted in industrial boiler: 0.0393977 m3
- Electricity, at grid, US, 2008: 0.0159171 kWh
- Pyrolysis gasoline, at plant: 0.335 kg
- Transport, train, diesel powered: 0.151283 t*km
- Transport, combination truck, diesel powered: 0.0300011 t*km
- CUTOFF Petroleum refining, for olefins production, at plant, internal offgas use: 0.016 kg
  (same comment as for CUTOFF Natural gas, processed, for olefins production, at plant, inter)
- CUTOFF Petroleum refining, for olefins production, at plant, material use: 0.667 kg
- Diesel, combusted in industrial equipment: 0.0033376 l
  Includes diesel fuel and distillate oil amounts.
- Residual fuel oil, combusted in industrial boiler: 0.0322913 l
- CUTOFF Disposal, solid waste, unspecified, to sanitary landfill: 0.000425262 kg
- Transport, pipeline, unspecified petroleum products: 0.237245 t*km
- Transport, barge, residual fuel oil powered: 0.124532 t*km
- Transport, barge, diesel powered: 0.0374531 t*km
- CUTOFF Disposal, solid waste, unspecified, to municipal incineration: 5.0949e-5 kg

## Emissions to nature
- Chlorine: 1e-7 kg
  This emission was reported by fewer than three companies. To indicate known emissions while protecting the confidentiality of individual company responses, the emission is reported only by order of magnitude.
- Oil and grease, unspecified: 1.7805e-5 kg
- COD, Chemical Oxygen Demand: 0.00108124 kg
- NMVOC, non-methane volatile organic compounds, unspecified: 1e-5 kg
  (same comment as for Chlorine)
- Carbon monoxide: 1e-5 kg
  (same comment as for Chlorine)
- Hydrogen: 1e-9 kg
  (same comment as for Chlorine)
- BOD5, Biological Oxygen Demand: 0.000467253 kg
- Dissolved solids: 0.000105404 kg
- TOC, Total Organic Carbon: 1e-8 kg
  (same comment as for Chlorine)
- Benzene: 1e-9 kg
  (same comment as for Chlorine)
- Particulates, > 2.5 um, and < 10um: 1e-6 kg
  (same comment as for Chlorine)
- Particulates, < 2.5 um: 1e-5 kg
  (same comment as for Chlorine)
- Suspended solids, unspecified: 1e-6 kg
  (same comment as for Chlorine)
- Sulfide: 1e-6 kg
  (same comment as for Chlorine)
- Nitrogen oxides: 6.233e-5 kg
- Sulfur oxides: 0.00044295 kg
- Carbon dioxide, fossil: 0.04521 kg
- Particulates, unspecified: 1.88516e-5 kg

## Sampling procedure
Data are from primary sources.

## Sources
- THE PLASTICS DIVISION OF THE AMERICAN C
