# Polystyrene, high impact, resin, at plant

Dataset: openLCA process, unit process
Category: Petrochemical Manufacturing
Geography: RNA
Time period: 2000-01-01 to 2003-01-01
Generated by: Franklin Associates
Published in: THE PLASTICS DIVISION OF THE AMERICAN C
restrictionsDescription: All information can be accessed by everybody.
copyright: false

## General comment
Scrap is produced as a coproduct during this process. A mass basis was used to partition the credit for scrap. Complete inventory data and metadata are available in full in the final report and appendices, Cradle-to-Gate Life Cycle Inventory of Nine Plastic Resins and Four Polyurethane Precursors. This report has been extensively reviewed within Franklin Associates and has undergone partial critical review by ACC Plastics Division members and is available at: www.americanchemistry.com. Quantities may vary slightly between the reference to main source and and this module due to rounding. Important note: although most of the data in the US LCI database has undergone some sort of review, the database as a whole has not yet undergone a formal validation process. Please email comments to lci@nrel.gov.

## Technology
Sterilization, removal of stalk/stem and homogenization of fresh fruit bunches followed by removal of crude palm oil by screw press, purification and refining

## Geography
US

## Reference product
- Polystyrene, high impact, resin, at plant: 1 kg

## Inputs from technosphere
- Transport, barge, diesel powered: 0.247988 t*km
  Transport is specific to ethylbenzene styrene delivered to styrene producers. Values for barge transport are calculated based on average fuel consumption rates as reported in Transportation Energy Data Book: Edition 22 from Oak Ridge National Laboratory, September 2002: 22% of barges use diesel fuel in their engines, 78% use residual oil to generate steam for steam turbines, and a barge that consumes residual oil consumes 3.4 gallons per 1,000 ton-miles
- CUTOFF Disposal, solid waste, unspecified, to waste-to-energy: 0.00114 kg
- Natural gas, combusted in industrial boiler: 0.0220992 m3
- White mineral oil, at plant: 0.0181 kg
- Electricity, at grid, US, 2008: 0.114198 kWh
- Transport, combination truck, diesel powered: 0.336106 t*km
  Transport is specific to ethylbenzene styrene and polybutadiene delivered to styrene producers.
- Polybutadiene, at plant: 0.064 kg
- Electricity, at cogen, for natural gas turbine: 0.0147928 kWh
- Transport, barge, residual fuel oil powered: 0.824559 t*km
  (same comment as for Transport, barge, diesel powered)
- Transport, ocean freighter, residual fuel oil powered: 0.211446 t*km
  Transport is specific to ethylbenzene styrene and polybutadiene delivered to styrene producers. Values for ocean freighter transport are calculated based on average fuel consumption rates as determined from a personal communication with Rich Sonnenschein, U.S. Department of Transportation, Maritime Administration in February 2004: 10% of ocean freighters use diesel fuel, 90% use residual fuel, and a freighter that consumes residual fuel consumes 1.9 gallons per 1,000 ton-miles
- Ethylbenzene styrene, at plant: 0.936 kg
- Transport, ocean freighter, diesel powered: 0.023494 t*km
  (same comment as for Transport, ocean freighter, residual fuel oil powered)
- Transport, train, diesel powered: 0.330931 t*km
  (same comment as for Transport, combination truck, diesel powered)

## Inputs from nature
- Water, process, unspecified natural origin/m3: 0.000121572 m3
  Consumptive use includes: water incorporated into the product, water evaporated during the process, and/or water used and released to a body other than that from which it was drawn.

## Emissions to nature
- Ammonia: 1e-7 kg
  This emission was reported by fewer than three companies. To indicate known emissions while protecting the confidentiality of individual company responses, the emission is reported only by order of magnitude.
- NMVOC, non-methane volatile organic compounds, unspecified: 2.8e-5 kg
- Methane, difluromonochloro-, HCFC-22: 1e-6 kg
  (same comment as for Ammonia)
- Phosphates: 1e-6 kg
  (same comment as for Ammonia)
- Dissolved solids: 0.00249 kg
- Oil and grease, unspecified: 1e-7 kg
  (same comment as for Ammonia)
- Zinc: 6e-5 kg
- Phenol compounds, unspecified: 1e-9 kg
  (same comment as for Ammonia)
- Sulfur oxides: 1e-7 kg
  (same comment as for Ammonia)
- Nitrogen oxides: 3.8e-5 kg
- Carbon monoxide: 1.1e-5 kg
- Methane: 1e-6 kg
  (same comment as for Ammonia)
- Cyanide: 1e-9 kg
  (same comment as for Ammonia)
- Chromium, unspecified: 1e-8 kg
  (same comment as for Ammonia)
- Acid gases, unspecified: 1e-9 kg
  (same comment as for Ammonia)
- Nickel: 1e-8 kg
  (same comment as for Ammonia)
- Suspended solids, unspecified: 2.9e-5 kg
- Lead: 1e-8 kg
  (same comment as for Ammonia)
- Iron: 1e-8 kg
  (same comment as for Ammonia)
- Particulates, unspecified: 1.6e-5 kg
  (same comment as for Ammonia)
- BOD5, Biological Oxygen Demand: 1e-7 kg
  (same comment as for Ammonia)
- Particulates, > 2.5 um, and < 10um: 1e-5 kg
- Organic substances, unspecified: 9.4e-6 kg

## Sampling procedure
Data are from primary sources.

## Sources
- THE PLASTICS DIVISION OF THE AMERICAN C
