# Polylactide Biopolymer Resin, at plant

Dataset: openLCA process, unit process
Category: Plastics Material and Resin Manufacturing
Geography: RNA
Time period: 2009-01-01 to 2009-01-01
Generated by: Erwin Vink
Published in: E.T.H. Vink
restrictionsDescription: All information can be accessed by everybody.
copyright: false

## General comment
Data has been peer reviewed by Dr. I. Boustead from Boustead Consulting, UK. Data only represents Ingeo polylactide (PLA) resin production by NatureWorks LLC in Blair Nebraska and cannot be used for PLA production in general. Final review report is attached to the Data Module Report.

## Technology
Ingeo Polylactide polymer production technology developed by NatureWorks LLC

## Geography
North America

## Reference product
- Polylactide Biopolymer Resin, at plant: 1 kg

## Inputs from technosphere
- CUTOFF Disposal, tailings waste, underground deposit: 0.00125867 kg
- Electricity, at grid, US, 2008: 1.627 MJ
- CUTOFF Disposal, chemical waste, unspecified, to sanitary landfill: 0.00101101 kg
- Natural gas, combusted in industrial boiler: 0.224 m3
  Used to produce steam (38.8MJ/m3 NG)
- CUTOFF Disposal, inert solid waste, to inert material landfill: 0.00166456 kg
- CUTOFF Disposal, mining waste, underground deposit: 0.00338058 kg
- Natural gas, combusted in industrial equipment: 0.154 m3
  Used for heating oil (38.8MJ/m3 NG)
- CUTOFF Disposal, slags & ash waste, unspecified reuse: 0.0014171 kg
- CUTOFF Disposal, mineral waste, underground deposit: 0.0169396 kg
  See Data Module report for further clarification
- CUTOFF Disposal, chemical waste, unspecified, to residual materials landfill: 0.000623442 kg
- Transport, combination truck, diesel powered: 0.12676 t*km

## Inputs from nature
- Occupation, arable, reduced tillage: 0.421632 m2
- Sand, unspecified, in ground: 0.00444607 kg
- Olivine, in ground: 5.23111e-7 kg
- Clay, bentonite, in ground: 5.33666e-6 kg
- Potassium chloride, in ground: 0.0148016 kg
- Bauxite ore, in ground: 5.03887e-6 kg
- Water, irrigation: 0.833957, 20.015 kg (2 entries, compartments not in this file)
  Water used for corn irrigation in East Nebraska and West Iowa.: 96% is ground, 4% is surface water (river).
- Coal, lignite, in ground: 2.5569e-5 kg
- Zinc ore, in ground: 1.14967e-8 kg
- Calcium carbonate, in ground: 0.101051 kg
- Water, cooling: 10.7445 kg
  This is the sum of make up water of cooling towers ( = the water to offset losses by evaporation, drift and blowdown) + the water used in once-though cooling water systems.
- Occupational, arable, conventional tillage: 0.266112 m2
- Fluorspar, 92%, in ground: 9.17236e-8 kg
- Coal, metallurgical, in ground: 2.26772e-5 kg
- Iron ore, in ground: 5.57605e-5 kg
- Coal, bituminous, 24.8 MJ/kg, in ground: 0.0173326 kg
- Sulfur, in ground: 0.0328869, 0.00775471 kg (2 entries, compartments not in this file)
- Carbon dioxide, biogenic: 1.833 kg
  CO2 taken from air during corn production and stored in polymer
- Phosphate as P2O5, phosphate rock, in ground: 0.00322101 kg
- Limestone, in ground: 0.0343806 kg
- Copper ore in ground: 1.71958e-11 kg
- Air: 0.254319 kg
- Shale, in ground: 7.60429e-8 kg
- Nitrogen, in air: 0.00111139 kg
- Oil, crude, in ground: 0.0466226 kg
- Lead ore, in ground: 3.15293e-7 kg
- Gravel, in ground: 2.05726e-7 kg
- Water, process: 16.1269 kg
  Net quantity of water used in processes such as the corn wet mill, the lactic acid production plant and the steam boiler.
- Oxygen, in air: 0.000172927 kg
- Occupation, arable, conservation tillage: 1.0368 m2
  net land use / kg PLA resin
- Barite, in ground: 7.25393e-5 kg
- Calcium sulphate, in ground: 2.68607e-8 kg
- Sodium chloride, in ground: 0.0814531 kg
- Gas, natural, in ground: 0.0479452 kg
- Dolomite, in ground: 6.9287e-7 kg
- Ferromanganese, in ground: 5.06453e-8 kg

## Emissions to nature
- Barium: 4.54583e-8 kg
- Detergents, unspecified: 4.70073e-8 kg
- Chlorine: 1.60324e-7, 1.79574e-9 kg (2 entries, compartments not in this file)
- Hydrogen chloride: 9.81554e-6 kg
- Methane, fossil: 0.00130205 kg
- Bifenthrin: 2.54851e-7 kg
- Silver compounds, unspecified: 4.42514e-11 kg
- Tefluthrin: 9.34448e-7 kg
- Sodium compounds, unspecified: 0.000616064 kg
- Strontium compounds, unspecified: 3.65596e-9 kg
- Fluorine: 1.5488e-10 kg
- Hydrogen sulfide: 1.34617e-7 kg
- Calcium, ion: 0.000251693 kg
- Chromium compounds, unspecified: 3.92919e-11 kg
- Carbon disulfide: 6.03564e-12 kg
- Permethrin: 1.27419e-7 kg
- Nickel compounds, unspecified: 4.23492e-10, 3.41341e-10 kg (2 entries, compartments not in this file)
- Cadmium compounds, unspecified: 3.09673e-11, 2.66438e-11 kg (2 entries, compartments not in this file)
- Particulates, > 10 um: -0.000138748 kg
- Chromium III: 9.98674e-10 kg
- Cyfluthrin: 5.94655e-8 kg
- Iron compounds, unspecified: 2.92663e-10, 1.25568e-5 kg (2 entries, compartments not in this file)
- Flumetsulam: 3.96437e-7 kg
- Mercury compounds, unspecified: 1.18858e-11, 1.36585e-10 kg (2 entries, compartments not in this file)
- Dinitrogen monoxide: 0.000370702 kg
- Cobalt compounds, unspecified: 2.61486e-11 kg
- Ammonium, ion: 3.50664e-7 kg
- Tebupirimphos: 1.18936e-6 kg
- Arsenicum compounds, unspecified: 1.22697e-10 kg
- Primisulfuron: 1.41586e-7 kg
- Dissolved solids: 2.3697e-7, 3.44394e-6 kg (2 entries, compartments not in this file)
- Sulfuric acid: 1.37649e-8 kg
- Molybdenum: 1.00571e-11, 1.30743e-11 kg (2 entries, compartments not in this file)
- Helium: 4.93806e-8 kg
- Lead compounds, unspecified: 5.62488e-11, 1.33711e-10 kg (2 entries, compartments not in this file)
- NMVOC, non-methane volatile organic compounds, unspecified origin: 0.000743247 kg
- organo-chlorine, unspecified: 1.02268e-5 kg
- Calcium compounds, unspecified: 0.000128375 kg
- Pendimethalin: 2.91656e-6 kg
- Foramsulfuron: 4.24747e-8 kg
- Arsenic compounds: 7.64825e-11 kg
- Berylium: 1.00571e-12 kg
- Sulfur dioxide: 0.0013644 kg
- Manganese compounds, unspecified: 3.62277e-9 kg
- Mesotrione: 1.84063e-6 kg
- Glufosinate: 1.40163e-6 kg
- Acetamide: 1.18936e-6 kg
- Alachlor: 4.87051e-6 kg
- Chlorpyrifos: 5.66333e-6 kg
- Zinc compounds, unspecified: 2.62416e-10, 4.7956e-10 kg (2 entries, compartments not in this file)
- Cypermethrin: 4.41291e-8 kg
- Chloride: 0.00125328 kg
- Acetochlor: 6.99424e-5 kg
- Potassium compounds, unspecified: 1.71885e-7 kg
- COD, Chemical Oxygen Demand: 0.00489455 kg
- Phosphorus compounds, unspecified: 1.21758e-5 kg
- Dimethenamid: 5.9182e-6 kg
- TOC, Total Organic Carbon: 1.11714e-5 kg
- Particulates, < 2.5 um: -1.32399e-5 kg
  come with credit for avoided mined gypsum
- Selenium compounds, unspecified: 6.03429e-11 kg
- Bromoxynil: 7.64552e-7 kg
- Imazethapyr: 1.98218e-8 kg
- Terbufos: 3.17142e-6 kg
- Phosphate: 3.14789e-8 kg
- Carbon monoxide, fossil: 0.0013073 kg
- Nitrogen oxides: 0.00536225 kg
- 2,4-D: 3.58255e-6 kg
- Tin: 6.336e-11 kg
- Copper compounds, unspecified: 4.73166e-11, 3.94397e-10 kg (2 entries, compartments not in this file)
- Barium compounds, unspecified: 6.55726e-10, 1.00471e-9 kg (2 entries, compartments not in this file)
- Rimsulfuron: 1.41586e-7 kg
- Hydrogen cyanide: 1.64641e-35 kg
- Fluoride: 5.04559e-7 kg
- Hydrogen: 9.02533e-5 kg
- Magnesium compounds, unspecified: 9.48453e-7 kg
- Atrazine: 0.00010884 kg
- Particulates, unspecified: 0.000239591 kg
- Phenol: 6.7606e-9 kg
- Nitrate: 0.00122687 kg
- Antimony compounds, unspecified: 3.24156e-11 kg
- Diflufenzopyr-sodium: 2.26529e-7 kg
- Chromium VI: 6.43657e-11 kg
- Metolachlor: 5.04783e-5 kg
- Glyphosate: 2.318e-5 kg
- Ammonia: 4.78711e-6 kg
- Vanadium compounds, unspecified: 1.55886e-9, 5.02857e-12 kg (2 entries, compartments not in this file)
- Dicamba: 2.03878e-6 kg
- Hydrogen fluoride: 3.73865e-7 kg
- Cyanide compounds, unspecified: 1.18674e-10 kg
- Bromine: 5.47109e-10 kg
- Lambda-cyhalothrin: 2.83161e-8 kg
- Suspended solids, unspecified: 0.00236903 kg
- Titanium: 1.10629e-11, 2.01143e-12 kg (2 entries, compartments not in this file)
- Carbonate: 2.47814e-7 kg
- Selenium: 2.01143e-12 kg
- Isoxaflutole: 6.79598e-7 kg
- Sulfate: 0.000137111 kg
- Manganese: 7.14057e-11 kg
- Paraquat: 7.22075e-7 kg
- Cyanide: 6.25388e-11 kg
- Imazapyr: 5.66333e-9 kg
- BOD5, Biological Oxygen Demand: 2.70364e-6 kg
- Corn dust (biomass): 7.63641e-5 kg
- Chlorate: 5.96615e-8 kg
- hydrocarbons, unspecified: 2.36527e-7 kg
- Prosulfuron: 2.54851e-8 kg
- Nitrogen compounds, unspecified: 0.000133134 kg
- Aluminum compounds, unspecified: 1.27556e-8 kg
- Fipronil: 3.39805e-7 kg
- Fluoride compounds, unspecified: 2.112e-11 kg
- Particulates, > 2.5 um, and < 10um: -0.000124712 kg
- Carbon dioxide, fossil: 0.265033 kg
- Simazine: 2.85997e-6 kg
- Ethene: 3.82858e-12 kg
- Particulates, < 2.5 um: 1.93097e-6 kg
- Strontium: 4.02286e-12 kg
- Bromate: 2.63954e-10 kg
- Nicosulfuron: 3.11483e-7 kg

## Sources
- E.T.H. Vink
- H. Shapouri
- E.T.H. Vink
- E.T.H. Vink
- P. Gruber
- E.T.H. Vink
- I. Boustead
