# Ethylbenzene styrene, at plant

Dataset: openLCA process, unit process
Category: All Other Basic Organic Chemical Manufacturing
Geography: RNA
Time period: 1993-01-01 to 2003-01-01
Generated by: Franklin Associates
Published in: THE PLASTICS DIVISION OF THE AMERICAN C
restrictionsDescription: All information can be accessed by everybody.
copyright: false

## General comment
Various coproduct streams are produced during this process. The energy requirements and environmental emissions for the production of styrene including the production of ethylbenzene. Various coproduct streams are produced during this process. A mass basis was used to partition the credit for these coproducts. CO2 atmospheric emissions may be overstated by an unknown amount of CO2 from fuel-based emissions included with reported process-based CO2. Complete inventory data and metadata are available in full in the final report and appendices, Cradle-to-Gate Life Cycle Inventory of Nine Plastic Resins and Four Polyurethane Precursors. This report has been extensively reviewed within Franklin Associates and has undergone partial critical review by ACC Plastics Division members and is available at: www.americanchemistry.com. Quantities may vary slightly between the reference to main source and and this module due to rounding. Important note: although most of the data in the US LCI database has undergone some sort of review, the database as a whole has not yet undergone a formal validation process. Please email comments to lci@nrel.gov.

## Technology
Ethylbenzene is produced by the alkylation of benzene with ethylene followed by dehydrogenation of ethylbenzene to yield styrene

## Geography
North America (US and Canada)

## Reference product
- Ethylbenzene styrene, at plant: 1 kg

## Inputs from technosphere
- Natural gas, combusted in industrial boiler: 0.426689 m3
- CUTOFF Disposal, solid waste, unspecified, to municipal incineration: 0.00044 kg
- Benzene, at plant: 0.783 kg
- Transport, barge, diesel powered: 0.0334988 t*km
- CUTOFF Electricity, cogenerated, at plant: 0.000220459 kWh
- Electricity, at grid, US, 2008: 0.16358 kWh
- Transport, pipeline, unspecified petroleum products: 0.0578323 t*km
- Ethylene, at plant: 0.293 kg
- Transport, barge, residual fuel oil powered: 0.111384 t*km
- CUTOFF Disposal, solid waste, unspecified, to sanitary landfill: 0.00161 kg

## Emissions to nature
- Suspended solids, unspecified: 1e-5 kg
- NMVOC, non-methane volatile organic compounds, unspecified: 1e-5 kg
- Sulfur oxides: 1e-7 kg
- Particulates, unspecified: 1e-5 kg
- Nitrogen oxides: 0.0001 kg
- VOC, volatile organic compounds: 9.3e-6 kg
- Benzene, ethyl-: 1e-6 kg
- Carbon dioxide, fossil: 0.261 kg
  Atmospheric carbon dioxide emissions may be overstated by an unknown amount due to the fact that fuel-based emissions were included with reported process-based carbon dioxide.
- Carbon monoxide: 0.00027 kg
- Styrene: 1e-6 kg

## Sampling procedure
Data are from primary sources.

## Sources
- THE PLASTICS DIVISION OF THE AMERICAN C
