# Laminated veneer lumber processing, at plant, US PNW

Dataset: openLCA process, unit process
Category: Softwood Veneer and Plywood Manufacturing
Geography: RNA
Time period: 2000-01-01 to 2000-01-01
Generated by: Jamie Meil
Published in: Dr. Jim Wilson
restrictionsDescription: All information can be accessed by everybody.
copyright: true

## General comment
Base process data presented with allocations to within process co-products noted. Refer to allocation worksheet for specifics. All allocations performed using mass or volume. To take profile back to cradle the user must add LCI profile information for PNW plywood and dry veneer from the PNW plywood LCI module., number of co-products produced (reported here in aggregate)
Important note: although most of the data in the US LCI database has
undergone some sort of review, the database as a whole has not yet
undergone a formal validation process.
Please email comments to lci@nrel.gov.

## Technology
typical

## Geography
US Pacific North West

## Reference product
- Laminated veneer lumber, at plant, US PNW: 1 kg

## By-products
- Co-products of laminated veneer lumber production, unspecified, US PNW: 0.0462 kg

## Inputs from technosphere
- Electricity, at grid, Western US, 2000: 0.112 kWh
- Natural gas, combusted in industrial boiler: 0.00725 m3
- Diesel, combusted in industrial boiler: 0.000324 l
- Liquefied petroleum gas, combusted in industrial boiler: 0.000668 l
- Dry veneer, at plywood plant, US PNW: 0.214 kg
- Phenol formaldehyde, at plant: 0.00428 kg
- Transport, combination truck, average fuel mix: 0.0626 t*km
- Plywood, at plywood plant, US PNW: 0.75 kg

## Inputs from nature
- Water: 0.0688 l

## Emissions to nature
- Acetaldehyde: 1.02e-6 kg
- Formaldehyde: 4.03e-7 kg
- Acetone: 7.51e-6 kg
- Methanol: 1.78e-5 kg
- Particulates, unspecified: 2.04e-5 kg
- Propanal: 4.58e-7 kg

## Sources
- Dr. Jim Wilson
