# Acetic acid, at plant

Dataset: openLCA process, unit process
Category: All Other Basic Organic Chemical Manufacturing
Geography: RNA
Time period: 2003-01-01 to 2003-01-01
Generated by: Franklin Associates
Published in: THE PLASTICS DIVISION OF THE AMERICAN CH
restrictionsDescription: All information can be accessed by everybody.
copyright: false

## General comment
100% of elementary flows and inputs from the technosphere were allocated to acetic acid, and 0% to recovered heat
Important note: although most of the data in the US LCI database has
undergone some sort of review, the database as a whole has not yet
undergone a formal validation process.
Please email comments to lci@nrel.gov.

## Technology
Carbonylation of methanol

## Geography
North America (US and Canada)

## Reference product
- Acetic acid, at plant: 1 kg

## By-products
- Recovered energy, at acetic acid production: 0.18841 MJ

## Inputs from technosphere
- Transport, pipeline, natural gas: 0.49246 t*km
  Represents inbound transport of processed natural gas. Original data expressed thus: 500 tonmiles/1000lb natural gas
- Methanol, at plant: 0.539 kg
- Transport, pipeline, unspecified petroleum products: 0.00086744 t*km
  Represents inbound transport of methanol
- Transport, barge, diesel powered: 0.0095418 t*km
  Represents inbound transport of methanol
- Transport, combination truck, diesel powered: 0.0049246 t*km
  Represents inbound transport of processed natural gas. Original data expressed thus: 5 tonmiles/1000lb natural gas
- Natural gas, processed, at plant: 0.4411 m3
- Transport, barge, residual fuel oil powered: 0.03383 t*km
  Represents inbound transport of methanol
- Electricity, at grid, US, 2000: 0.021826 kWh
- Transport, train, diesel powered: 0.0049246 t*km
  (same comment as for Transport, combination truck, diesel powered)
- CUTOFF Disposal, solid waste, unspecified, to sanitary landfill: 0.00056 kg
- Electricity, at cogen, for natural gas turbine: 0.0020503 kWh
- Natural gas, combusted in industrial boiler: 0.22355 m3

## Emissions to nature
- Ammonia: 5.2e-5, 0.00057 kg (2 entries, compartments not in this file)
- TOC, Total Organic Carbon: 0.00217 kg
- Acids, unspecified: 0.00096 kg
- Carbon monoxide: 0.00397 kg
- Methanol: 4e-5 kg
- Carbon dioxide: 0.00176 kg

## Sources
- THE PLASTICS DIVISION OF THE AMERICAN CH
