# Electricity, at eGrid, SRMW, 2008

Dataset: openLCA process, unit process
Category: Utilities
Geography: RNA
Time period: 2008-01-01 to 2008-01-01
Generated by: Alberta Carpenter
Published in: Chris Goemans, Athena Institute
restrictionsDescription: All information can be accessed by everybody.
copyright: false

## General comment
The methodology used to put together the grid information is outlined in reference 1.

## Technology
Typical

## Geography
SRMW Midwest electricity grid to include eastern Missouri (less SPNO) and Southern Illinois (less RFCW).

## Reference product
- Electricity, at eGrid, SRMW, 2008: 1 kWh

## Inputs from technosphere
- Electricity, residual fuel oil, at power plant: 2.57173e-5 kWh
  Petroleum (RFO) – Residual Fuel Oil (includes No. 5 and No. 6 Fuel Oils and Bunker C Fuel Oil)
- CUTOFF Electricity, hydropower, at power plant, unspecified: 0.00696067 kWh
  Hydroelectric WAT – Water (Conventional, Pumped Storage)
- Electricity, nuclear, at power plant: 0.21677 kWh
  Nuclear Fission NUC – Nuclear (Uranium, Plutonium, Thorium)
- Electricity, diesel, at power plant: 0.000768938 kWh
  Petroleum (DFO) – Distillate Fuel Oil (includes all Diesel and No. 1, No. 2, and No. 4 Fuel Oils)
- CUTOFF Electricity, biomass, gas, unspecified, at power plant: 4.41839e-5 kWh
  Gaseous Renewable Fuels (Biomass) OBG – Other Biomass Gases (Digester Gas, Methane, and other biomass gases)
- CUTOFF Electricity, biomass, gas, landfill, at power plant: 0.000998219 kWh
  Gaseous Renewable Fuels (Biomass) LFG - landfill gas
- Electricity, diesel, at power plant: 7.073e-8 kWh
  Petroleum (DFO) JF - jet fuel
- CUTOFF Electricity, tire derived fuel, at power plant: 8.32639e-5 kWh
  Solid Renewable Fuels (Biomass) TDF - tires, tire derived fuel
- Electricity, bituminous coal, at power plant: 0.0536234 kWh
  Bituminous Coal BIT - Anthracite Coal, and Bituminous Coal.
- Electricity, bituminous coal, at power plant: 0.00357245 kWh
  Bituminous Coal WC - Waste/Other Coal (Anthracite Culm, Bituminous Gob, Fine Coal, Lignite Waste, Waste Coal) .
- CUTOFF Electricity, at wind power plant, unspecified: 0.0117051 kWh
  Wind
- Electricity, bituminous coal, at power plant: 0.695516 kWh
  Subbituminous Coal
- Electricity, bituminous coal, at power plant: 5.17307e-5 kWh
  Bituminous Coal SC - Coal Synfuel. Coal-based solid fuel that has been processed by a coal synfuel plant, and coal-based fuels such as briquettes, pellets, or extrusions, which are formed from fresh or recycled coal and binding materials.
- Electricity, biomass, at power plant: 1.31125e-5 kWh
  Solid Renewable Fuels (Biomass) WDS – Wood/Wood Waste Solids (Paper Pellets, Railroad Ties, Utility Poles, Wood Chips, and other wood solids)
- Electricity, natural gas, at power plant: 0.00986701 kWh
  Natural Gas

## Sampling procedure
based on EIA electricity reports for all power plants in the US.

## Sources
- Chris Goemans, Athena Institute
- unspecified
- USEPA
- Statistics Canada
- Statistics Canada
- Statistics Canada
- Statistics Canada
- Statistics Canada
- Statistics Canada
- USEPA
- EIA
- EIA
- EIA
- EIA
- EIA
- EIA
- EIA
- EIA
- EIA
- EIA
- EIA
- US DOE
- International Energy Agency
- US DOE
