# Glue laminated beam processing, at plant, US PNW

Dataset: openLCA process, unit process
Category: Engineered Wood Member (ex. Truss) Manufacturing
Geography: RNA
Time period: 2000-01-01 to 2000-01-01
Generated by: Jamie Meil
Published in: Maureen E. Puettman
restrictionsDescription: All information can be accessed by everybody.
copyright: true

## General comment
Base process data presented with allocations to within process co-products noted. Refer to allocation worksheet for specifics. All allocations performed using mass or volume. To take profile back to cradle the user must add LCI profile information for PNW dry and rough green lumber from PNW dry lumber LCI module. Cradle-to-gate LCI information presented for PRF and MUF resins and hardeners which were derived from secondary source., number of co-products produced (reported here in aggregate)
Important note: although most of the data in the US LCI database has
undergone some sort of review, the database as a whole has not yet
undergone a formal validation process.
Please email comments to lci@nrel.gov.

## Technology
typical

## Geography
US Pacific North West

## Reference product
- Glue laminated beam processing, at plant, US PNW: 1 kg

## By-products
- Co-products of glue laminated beam production, at plant, unspecified, US PNW: 0.22377 kg

## Inputs from technosphere
- Natural gas, combusted in industrial boiler: 0.0082285 m3
- Melamine urea formaldehyde resin, at plant: 0.0016391 kg
- Diesel, combusted in industrial boiler: 0.00074888 l
- Gasoline, combusted in equipment: 0.00018957 l
- Liquefied petroleum gas, combusted in industrial boiler: 0.0033437 l
- Transport, combination truck, average fuel mix: 0.25067 t*km
- Melamine urea formaldehyde hardener, at plant: 0.00018212 kg
- Dry rough lumber, at kiln, US PNW: 0.91705 kg
- CUTOFF Hogfuel-Biomass (50% MC), combusted in industrial boiler: 0.1753 kg
- Electricity, at grid, Western US, 2000: 0.17447 kWh
- CUTOFF Kerosene, combusted in industrial boiler: 3.399e-7 l
- Rough green lumber, softwood, at sawmill, US PNW: 0.30818 kg

## Inputs from nature
- Water, unspecified natural origin: 0.073843 l

## Emissions to nature
- Phenol: 2.1689e-5 kg
- Ethanol: 1.0364e-5 kg
- Methanol: 2.149e-5 kg
- Resorcinol: 2.0695e-8 kg
- Particulates, unspecified: 0.0012781 kg
- VOC, volatile organic compounds: 0.00060265 kg
- 2-Propanol: 0.00043377 kg
- Formaldehyde: 7.1192e-7 kg

## Sources
- Maureen E. Puettman
