# Reforesting, medium intensity site, US SE

Dataset: openLCA process, unit process
Category: Forest Nurseries, Gathering Forest Prod.
Geography: RNA
Generated by: Jamie Meil
Published in: Leonard R. Johnson
restrictionsDescription: All information can be accessed by everybody.
copyright: true

## General comment
Base process data presented with allocations to within process co-products noted. Refer to allocation worksheet for specifics. All allocations performed using mass or volume.,
Important note: although most of the data in the US LCI database has
undergone some sort of review, the database as a whole has not yet
undergone a formal validation process.
Please email comments to lci@nrel.gov.

## Technology
Typical

## Geography
US South East

## Reference product
- Reforesting, medium intensity site, US SE: 1 m2

## Inputs from technosphere
- Gasoline, combusted in equipment: 0.0006602 l
- Seedlings, at greenhouse, US SE: 0.1794 Item(s)
- Nitrogen fertilizer, production mix, at plant: 0.026452 kg
- Diesel, combusted in industrial equipment: 0.0073522 l
- Phosphorous fertilizer, production mix, at plant: 0.0044834 kg

## Inputs from nature
- Carbon dioxide, in air: 25.69 kg
- Wood, soft, US SE, standing/m3: 0.025953 m3

## Sources
- Leonard R. Johnson
- Maureen Puetmann
- Michael Milota
