# Switchgrass, harvested, wet

Dataset: openLCA process, unit process
Geography: RNA
Time period: 2010-01-01 to 2010-01-01
Generated by: Daniel Inman
Published in: Hsu, D.
restrictionsDescription: All information can be accessed by everybody.
copyright: false

## General comment
mass of switchgrass at 34% moisture with 20% harvest loss.

## Technology
current

## Geography
North America

## Time period
2010

## Reference product
- Switchgrass, harvested, wet: 1.07 kg

## Inputs from technosphere
- CUTOFF Mowing, by rotary mower: 9.33e-5 ha
  occupation based on 10 years of production. Mowed directly to a cart. No windrower needed.
- Switchgrass, production, US, 2022: 1 kg
  Previous module was based on 15% moisture.
- CUTOFF Baling: 9.33e-5 ha

## Emissions to nature
- Carbon dioxide, biogenic: 0.295 kg
  carbon dioxide going to the air from biomass that is not harvested. This carbon dioxide was previously taken up by the biomass.

## Sources
- Hsu, D.
- Hess, J.
