# Electricity, at eGrid, NWPP, 2008

Dataset: openLCA process, unit process
Category: Utilities
Geography: RNA
Time period: 2008-01-01 to 2008-01-01
Generated by: Alberta Carpenter
Published in: Chris Goemans, Athena Institute
restrictionsDescription: All information can be accessed by everybody.
copyright: false

## General comment
The methodology used to put together the grid information is outlined in reference 1.

## Technology
Typical

## Geography
Northwest electricity grid to include Washington, Oregon, Idaho, Utah, most of Montana (less NROW), Wyoming (less RMPA), Nevada (less AZNM) and northern parts of California, Arizona and New Mexico.

## Reference product
- Electricity, at eGrid, NWPP, 2008: 1 kWh

## Inputs from technosphere
- Electricity, diesel, at power plant: 0.000438784 kWh
  Petroleum (DFO) – Distillate Fuel Oil (includes all Diesel and No. 1, No. 2, and No. 4 Fuel Oils)
- CUTOFF Electricity, geothermal, unspecified: 0.00547597 kWh
  Geothermal
- CUTOFF Electricity, petroleum coke, at power plant: 0.00129791 kWh
  Petroleum (Other Fossil) PC - petroleum coke
- Electricity, bituminous coal, at power plant: 0.000394782 kWh
  Bituminous Coal SC - Coal Synfuel. Coal-based solid fuel that has been processed by a coal synfuel plant, and coal-based fuels such as briquettes, pellets, or extrusions, which are formed from fresh or recycled coal and binding materials.
- CUTOFF Electricity, other gases, unspecified, at power plant: 0.00189575 kWh
  Other Gases OG – Other Gas (Butane, Coal Processes, Coke-Oven, Refinery, and other processes)
- Electricity, bituminous coal, at power plant: 0.126016 kWh
  Bituminous Coal BIT - Anthracite Coal, and Bituminous Coal.
- CUTOFF Electricity, biomass,liquid, unspecified, at power plant: 0.0025872 kWh
  Liquid Renewable Fuels (Biomass) BLQ - black liquor
- Electricity, bituminous coal, at power plant: 0.247396 kWh
  Subbituminous Coal
- CUTOFF Electricity, other fuels, unspecified, at power plant: 0.000461956 kWh
  Other Fuels WH – Waste heat not directly attributed to a fuel source. Note that WH should only be reported where the fuel source for the waste heat is undetermined, and for combined cycle steam turbines that are not supplementary fired
- CUTOFF Electricity, biomass, gas, landfill, at power plant: 0.000616033 kWh
  Gaseous Renewable Fuels (Biomass) LFG - landfill gas
- CUTOFF Electricity, other fuels, unspecified, at power plant: 0.000459979 kWh
  Other Fuels OTH – Other (Batteries, Chemicals, Coke Breeze, Hydrogen, Pitch, Sulfur, Tar Coal, and miscellaneous technologies)
- CUTOFF Electricity, MSW, non-biogenic, at power plant: 0.000300212 kWh
  Other Fuels MSN – Municipal Solid Waste – Non-biogenic components
- Electricity, residual fuel oil, at power plant: 1.65322e-5 kWh
  Petroleum (RFO) – Residual Fuel Oil (includes No. 5 and No. 6 Fuel Oils and Bunker C Fuel Oil)
- Electricity, nuclear, at power plant: 0.0298084 kWh
  Nuclear Fission
- CUTOFF Electricity, at wind power plant, unspecified: 0.0236762 kWh
  Wind
- Electricity, bituminous coal, at power plant: 0.00230858 kWh
  Bituminous Coal WC - Waste/Other Coal (Anthracite Culm, Bituminous Gob, Fine Coal, Lignite Waste, Waste Coal) .
- Electricity, diesel, at power plant: 5.67678e-7 kWh
  Petroleum (DFO) JF - jet fuel
- CUTOFF Electricity, biomass, solid, biogenic MSW, at power plant: 0.0003821 kWh
  Solid Renewable Fuels (Biomass) MSB
- CUTOFF Electricity, petroleum, waste oil, at power plant: 7.84082e-5 kWh
  Petroleum (Other Fossil) WO – Waste/Other Oil (including Crude Oil, Liquid Butane, Liquid Propane, Oil Waste, Re-Refined Motor Oil, Sludge Oil, Tar Oil, or other petroleum-based liquid wastes)
- CUTOFF Electricity, hydropower, at power plant, unspecified: 0.423179 kWh
  Hydroelectric
- Electricity, biomass, at power plant: 0.00537146 kWh
  Solid Renewable Fuels (Biomass) WDS – Wood/Wood Waste Solids (Paper Pellets, Railroad Ties, Utility Poles, Wood Chips, and other wood solids)
- CUTOFF Electricity, biomass, liquid, sludge, at power plant: 3.8334e-5 kWh
  Liquid Renewable Fuels (Biomass) SLW - sludge waste
- Electricity, natural gas, at power plant: 0.127799 kWh
  Natural Gas

## Sampling procedure
based on EIA electricity reports for all power plants in the US.

## Sources
- Chris Goemans, Athena Institute
- unspecified
- USEPA
- Statistics Canada
- Statistics Canada
- Statistics Canada
- Statistics Canada
- Statistics Canada
- Statistics Canada
- USEPA
- EIA
- EIA
- EIA
- EIA
- EIA
- EIA
- EIA
- EIA
- EIA
- EIA
- EIA
- US DOE
- International Energy Agency
- US DOE
