# Electricity, at Grid, SPP, 2008

Dataset: openLCA process, unit process
Category: Utilities
Geography: RNA
Time period: 2008-01-01 to 2008-01-01
Generated by: Alberta Carpenter
Published in: Chris Goemans, Athena Institute
restrictionsDescription: All information can be accessed by everybody.
copyright: false

## General comment
The methodology used to put together the grid information is outlined in reference 1.

## Technology
Typical

## Geography
Kansas and Oklahoma, and parts of Arkansas, Louisiana, Missouri, New Mexico, and Texas.

## Reference product
- Electricity, at Grid, SPP, 2008: 1 kWh

## Inputs from technosphere
- CUTOFF Electricity, hydropower, at power plant, unspecified: 0.0401758 kWh
  WAT – Water (Conventional, Pumped Storage)
- CUTOFF Electricity, petroleum, waste oil, at power plant: 5.90599e-5 kWh
  WO – Waste/Other Oil (including Crude Oil, Liquid Butane, Liquid Propane, Oil Waste, Re-Refined Motor Oil, Sludge Oil, Tar Oil, or other petroleum-based liquid wastes)
- Electricity, bituminous coal, at power plant: 0.532837 kWh
  SUB – Subbituminous Coal
- Electricity, residual fuel oil, at power plant: 3.7001e-5 kWh
  RFO – Residual Fuel Oil (includes No. 5 and No. 6 Fuel Oils and Bunker C Fuel Oil)
- Electricity, lignite coal, at power plant: 0.0434095 kWh
  LIG – Lignite Coal
- Electricity, diesel, at power plant: 0.00038385 kWh
  DFO – Distillate Fuel Oil (includes all Diesel and No. 1, No. 2, and No. 4 Fuel Oils)
- CUTOFF Electricity, biomass,liquid, unspecified, at power plant: 0.0061066 kWh
  BLQ – Black Liquor
- Electricity, nuclear, at power plant: 0.0385728 kWh
  NUC – Nuclear (Uranium, Plutonium, Thorium)
- Electricity, bituminous coal, at power plant: 0.0157502 kWh
  BIT - Anthracite Coal, and Bituminous Coal.
- CUTOFF Electricity, other gases, unspecified, at power plant: 1.17424e-5 kWh
  PG – Propane
- CUTOFF Electricity, petroleum coke, at power plant: 0.000401769 kWh
  PC – Petroleum Coke
- CUTOFF Electricity, other gases, unspecified, at power plant: 0.000355312 kWh
  BFG – Blast Furnace Gas
- CUTOFF Electricity, biomass, gas, landfill, at power plant: 0.000128093 kWh
  LFG – Landfill Gas
- CUTOFF Electricity, at wind power plant, unspecified: 0.0268163 kWh
  WND – Wind
- CUTOFF Electricity, biomass,solid, unspecified, at power plant: 0.000745272 kWh
  OBS – Other Biomass Solid (Animal Manure and Waste, Solid By-products, and other solid biomass not specified)
- CUTOFF Electricity, tire derived fuel, at power plant: 0.000503049 kWh
  TDF – Tired (tire derived fuel)
- Electricity, natural gas, at power plant: 0.28864 kWh
  NG – Natural Gas
- Electricity, diesel, at power plant: 2.5773e-7 kWh
  JF – Jet Fuel
- Electricity, biomass, at power plant: 0.00248017 kWh
  WDS – Wood/Wood Waste Solids (Paper Pellets, Railroad Ties, Utility Poles, Wood Chips, and other wood solids)
- CUTOFF Electricity, other fuels, unspecified, at power plant: 0.000216945 kWh
  OTH – Other (Batteries, Chemicals, Coke Breeze, Hydrogen, Pitch, Sulfur, Tar Coal, and miscellaneous technologies)
- CUTOFF Electricity, other gases, unspecified, at power plant: 0.00135191 kWh
  OG – Other Gas (Butane, Coal Processes, Coke-Oven, Refinery, and other processes)
- CUTOFF Electricity, other fuels, unspecified, at power plant: 0.00099986 kWh
  PUR – Purchased Steam
- CUTOFF Electricity, biomass, solid, agriculture by-products, at power plant: 1.6815e-5 kWh
  AB – Agriculture Crop By-products / Straw / Energy Crops

## Sampling procedure
based on EIA electricity reports for all power plants in the US.

## Sources
- Chris Goemans, Athena Institute
- unspecified
- USEPA
- Statistics Canada
- Statistics Canada
- Statistics Canada
- Statistics Canada
- Statistics Canada
- Statistics Canada
- USEPA
- EIA
- EIA
- EIA
- EIA
- EIA
- EIA
- EIA
- EIA
- EIA
- EIA
- EIA
- US DOE
- International Energy Agency
- US DOE
