# Recycled postconsumer PET flake

Dataset: openLCA process, unit process
Category: Processing postconsumer PET to flake
Geography: RNA
Time period: 2007-01-01 to 2008-01-01
Generated by: Franklin Associates
restrictionsDescription: All information can be accessed by everybody.
copyright: false

## General comment
Important note: although most of the data in the US LCI database has
undergone some sort of review, the database as a whole has not yet
undergone a formal validation process.
Please email comments to lci@nrel.gov.

## Technology
Typical

## Geography
United States

## Reference product
- Recycled postconsumer PET flake: 1 kg
  Depending on the practitioner's choice of methodology, some share of the virgin material burdens for initially producing the plastic may be allocated to the recycled resin.

## Inputs from technosphere
- Liquefied petroleum gas, combusted in industrial boiler: 0.000303659 l
- CUTOFF Surfactant, unspecified: 0.00076 kg
- Natural gas, combusted in industrial boiler: 0.075 m3
- Mixed recyclables, sorted at MRF: 0.78934 kg
  Includes wt of contaminants in incoming material from MRF.
- Transport, combination truck, diesel powered: 0.974719 t*km
  Represents transport of inbound material (PET and contaminants)
- CUTOFF Disposal, solid waste, unspecified, to unspecified landfill: 0.22 kg
  Includes bale wire trash, labels, PVC in incoming bale, and other materials that become processing wastes or sludges.
- Electricity, at grid, US, 2000: 0.46 kWh
- Deposit containers, at collection, CRV: 0.27206 kg
  Percentage of postconsumer PET collected via California container refund value (CRV) system. Includes wt of contaminants in incoming material.
- Deposit containers, at collection: 0.1586 kg
  Percentage of postconsumer PET collected via deposit programs. Includes wt of contaminants in incoming material.
- Transport, train, diesel powered: 0.235906 t*km
  Represents transport of inbound material (PET and contaminants)
- CUTOFF Wetting agent, unspecified: 0.00087 kg
- Sodium hydroxide, production mix, at plant: 0.024 kg
  Pure weight of NaOH for the solution used
- CUTOFF Defoamant, unspecified: 0.0022 kg

## Inputs from nature
- Water, process: 4.80106 l
  Water input to washing

## Emissions to nature
- BOD5, Biological Oxygen Demand: 0.0073 kg
  Unknown how much of the waterborne emissions are from washing chemicals versus material washed off received plastic. These emissions are not included in the material balance.
- VOC, volatile organic compounds: 3.7e-5 kg
- Particulates, unspecified: 3.9e-5 kg
- Suspended solids, unspecified: 0.003 kg
- COD, Chemical Oxygen Demand: 0.02 kg
- Water: 4.40114 l
  Water returned after washing (reflects evaporative losses of water carried out with washed resin and evaporated during drying)

## Sources
- THE PLASTICS DIVISION OF THE AMERICAN CH
