# Transport, ocean freighter, residual fuel oil powered

Dataset: openLCA process, unit process
Category: Deep Sea Freight Transportation
Geography: US
Time period: 2001-01-01 to 2001-01-01
Generated by: Franklin Associates
Published in: Franklin Associates
restrictionsDescription: All information can be accessed by everybody.
copyright: false

## General comment
Important note: although most of the data in the US LCI database has undergone some sort of review, the database as a whole has not yet undergone a formal validation process. Please email comments to lci@nrel.gov.

## Technology
Combustion of residual oil in an ocean freighter.

## Geography
United States

## Reference product
- Transport, ocean freighter, residual fuel oil powered: 1 t*km

## Inputs from technosphere
- Residual fuel oil, at refinery: 0.0049263 l

## Emissions to nature
- Nitrogen oxides: 0.00043403 kg
- Particulates, < 10 um: 1.0762e-5 kg
- Carbon dioxide, fossil: 0.01598 kg
- Carbon monoxide, fossil: 4.2797e-5 kg
- Methane, fossil: 7.8738e-7 kg
- VOC, volatile organic compounds: 1.6069e-5 kg
- Dinitrogen monoxide: 3.8929e-7 kg
- Sulfur oxides: 5.0468e-5 kg

## Sources
- Center for Transportation Research, Argo
- unspecified
- Franklin Associates
