# Chlor-alkali electrolysis, chlorine for PVC, at plant

Dataset: openLCA process, unit process
Category: All Other Basic Inorganic Chemical Manufacturing
Geography: US
Time period: 1989-01-01 to 2004-01-01
Generated by: Franklin Associates
Published in: THE PLASTICS DIVISION OF THE ACC
restrictionsDescription: All information can be accessed by everybody.
copyright: false

## General comment
Diaphragm and membrane cells are considered as the main source of chlorine/caustic in this module dataset. Per the Vinyl Institute, there are no producers of chlorine using the mercury cell technology and selling to the EDC producers in the United States. This data module assigns 100% of chlorine production to diaphragm/membrane cell electrolysis. The collected datasets were weighted using these fractions. Mass imbalance is due to unavailability of the weight of water inputs to production. Complete inventory data and metadata are available in full in the final report and appendices, Cradle-to-Gate Life Cycle Inventory of Nine Plastic Resins and Four Polyurethane Precursors. This report has been extensively reviewed within Franklin Associates by Rebe Feraldi and Melissa Huff and has undergone partial critical review by ACC Plastics Division members and is available at: www.americanchemistry.com. Quantities may vary slightly between the reference to main source and this module due to rounding. Important note: although most of the data in the US LCI database has undergone some sort of review, the database as a whole has not yet undergone a formal validation process. Please email comments to lci@nrel.gov.

## Technology
There are two commercial processes for the electrolysis of sodium chloride for chlorine sold to the EDC producers: (1) the diaphragm cell process-69.5% and (2) the membrane cell process-30.5%. These two technologies are represented in this average mix using the production percentages listed

## Geography
US

## Reference product
- Chlor-alkali electrolysis, chlorine for PVC, at plant: 1 kg
  Mass imbalance greater than 5% is due to unavailability of the weight of water inputs to production.

## Inputs from technosphere
- Electricity, at cogen, for natural gas turbine: 0.37958 kWh
- Bituminous coal, combusted in industrial boiler: 0.025726 kg
- Transport, pipeline, unspecified petroleum products: 0.32784 t*km
  Individual amounts of each incoming material were multiplied by the incoming distance travelled. These are totaled weighted averages of the primary incoming transport data from each participating facility. An average pipeline distance of 114 miles was used.
- Transport, barge, average fuel mix: 0.0035947 t*km
  Individual amounts of each incoming material were multiplied by the incoming distance travelled. These are totaled weighted averages of the primary incoming transport data from each participating facility. An average barge distance of 1.25 miles was used.
- Transport, train, diesel powered: 0.0035947 t*km
  Individual amounts of each incoming material were multiplied by the incoming distance travelled. These are totaled weighted averages of the primary incoming transport data from each participating facility. An average rail distance of 1.25 miles was used.
- Residual fuel oil, combusted in industrial boiler: 0.00031758 l
- CUTOFF Disposal, solid waste, unspecified, to municipal incineration: 0.0014437 kg
  Solid waste consists of control device wastes and hazardous wastes.
- Sodium chloride, at plant: 0.89365 kg
- Electricity, at grid, US, 2008: 0.59878 kWh
- CUTOFF Disposal, solid waste, unspecified, to sanitary landfill: 0.0005149 kg
  Solid waste consists of control device wastes and unknown process wastes.
- Natural gas, combusted in industrial boiler: 0.12293 m3

## Inputs from nature
- Water, process, unspecified natural origin/m3: 0.0034363 m3
  Franklin Associates uses a default as opposed to Egalitarian approach in collecting data for water use. During data collection, water use data were only requested and compiled in terms of 'evaporative' or consumptive use (i.e., ultimate withdraws, evaporation, or incorporation into the product). Data were not collected to determine reliable averages for non-evaporative water use. In other words, averages for water inputs and outputs are not available for this unit process. Consumptive use includes: water incorporated into the product, water evaporated during the process, and/or water used and released to a body other than that from which it was drawn.

## Emissions to nature
- Dissolved solids: 0.044879 kg
- BOD5, Biological Oxygen Demand: 0.00027386 kg
- Particulates, unspecified: 2.7914e-6 kg
- Chlorine: 1.1482e-6 kg
- Particulates, > 2.5 um, and < 10um: 2.1292e-5 kg
- Benzene: 2.2586e-8 kg
- Suspended solids, unspecified: 8.1309e-5 kg
- Lead: 1.1293e-11 kg
- Ethane, 1,1,1-trifluoro-2,2-dichloro-, HCFC-123: 9.0687e-8 kg
- Nitrogen oxides: 3.8585e-6 kg
- Copper: 1.2422e-10 kg
- Nickel: 5.9037e-10 kg
- Methane: 1.0874e-9 kg
- Methane, tetrachloro-, CFC-10: 1.9385e-7 kg
- Carbon monoxide: 1.3814e-7 kg
- Hydrogen chloride: 3.2638e-7 kg
- Particulates, < 2.5 um: 1.1926e-7 kg
- Carbon dioxide, fossil: 7.5216e-5 kg
- Ethane, 1,1,1,2-tetrafluoro-, HFC-134a: 9.0687e-8 kg
- NMVOC, non-methane volatile organic compounds, unspecified: 2.736e-7 kg
- Organic substances, unspecified: 8.1309e-9 kg
- Sulfur oxides: 5.5326e-7 kg

## Sampling procedure
Data are from primary sources. The chlorine/caustic data collected for this module represent 1 producer and 3 plants in the U.S. Also included in this average are 2 diaphragm plants collected from 1989. The chlorine/caustic producer who provided data for this module verified that the characteristics of their plant are representative of the diaphragm/membrane cell technology for North American chlorine/caustic production.

## Sources
- THE PLASTICS DIVISION OF THE ACC
