# Chlorine, production mix, at plant

Dataset: openLCA process, unit process
Category: All Other Basic Inorganic Chemical Manufacturing
Geography: US
Time period: 1989-01-01 to 2004-01-01
Generated by: Franklin Associates
Published in: THE PLASTICS DIVISION OF THE ACC
restrictionsDescription: All information can be accessed by everybody.
copyright: false

## General comment
Diaphragm, membrane, and mercury cells are considered as the main source of chlorine/caustic in this module dataset. Per the Chemical Economics Handbook, SRI Consulting, 2011, the production mix data module assigns 96.5% of chlorine and caustic soda production to diaphragm/membrane cell electrolysis and 3.5% to mercury cathode cell electrolysis. This data module for average production assigns 96.5 percent of chlorine and caustic soda production to diaphragm/membrane cell electrolysis and 3.5 percent of chlorine and caustic soda production to mercury cathode cell electrolysis. The collected datasets were weighted using these fractions. Co-product credit is given because sodium hydroxide and a small amount of hydrogen are produced when chlorine is produced from salt using an electrolytic cell. Mass imbalance is due to unavailability of the weight of water inputs to production. Complete inventory data and metadata are available in full in the final report and appendices, Cradle-to-Gate Life Cycle Inventory of Nine Plastic Resins and Four Polyurethane Precursors. This report has been extensively reviewed within Franklin Associates by Rebe Feraldi and Melissa Huff and has undergone partial critical review by ACC Plastics Division members and is available at: www.americanchemistry.com. Quantities may vary slightly between the reference to main source and this module due to rounding. Important note: although most of the data in the US LCI database has undergone some sort of review, the database as a whole has not yet undergone a formal validation process. Please email comments to lci@nrel.gov.

## Technology
There are three commercial processes for the electrolysis of sodium chloride: (1) the diaphragm cell process-67%, (2) the mercury cathode cell process-3.5%, and (3) the membrane cell process-29.5%. These three technologies are represented in this average mix using the production percentages listed.

## Geography
US

## Reference product
- Chlorine, production mix, at plant: 0.48 kg

## By-products
- Sodium hydroxide, production mix, at plant: 0.52 kg

## Inputs from technosphere
All rows: lognormal geomSd 1
- Natural gas, combusted in industrial boiler: 0.11918 m3
- Electricity, at grid, US, 2008: 0.629 kWh
- Transport, pipeline, unspecified petroleum products: 0.32643 t*km
- Bituminous coal, combusted in industrial boiler: 0.025421 kg
- Transport, train, diesel powered: 0.0035793 t*km
- Transport, barge, average fuel mix: 0.0035793 t*km
- Residual fuel oil, combusted in industrial boiler: 0.00069398 l
- Sodium chloride, at plant: 0.88982 kg
- Electricity, at cogen, for natural gas turbine: 0.36634 kWh
- CUTOFF Disposal, solid waste, unspecified, to municipal incineration: 0.0013933 kg
- CUTOFF Disposal, solid waste, unspecified, to sanitary landfill: 0.00079308 kg

## Inputs from nature
- Water, process, unspecified natural origin/m3: 0.0033419 m3; lognormal geomSd 1

## Emissions to nature
All rows: lognormal geomSd 1
- Suspended solids, unspecified: 7.8472e-5 kg
- Methane, tetrachloro-, CFC-10: 1.8708e-7 kg
- Ethane, 1,1,1,2-tetrafluoro-, HFC-134a: 8.7523e-8 kg
- Carbon dioxide, fossil: 7.2592e-5 kg
- Mercury: 6.5404e-8, 1.5443e-10 kg (2 entries, compartments not in this file)
- Copper: 1.1989e-10 kg
- Particulates, < 2.5 um: 1.151e-7 kg
- Particulates, > 2.5 um, and < 10um: 2.0549e-5 kg
- Hydrogen chloride: 3.1499e-7 kg
- Methane: 1.0495e-9 kg
- Benzene: 2.1798e-8 kg
- Carbon monoxide: 1.3332e-7 kg
- Lead: 1.0899e-11 kg
- BOD5, Biological Oxygen Demand: 0.0002643 kg
- Dissolved solids: 0.043313 kg
- Nitrogen oxides: 3.7239e-6 kg
- NMVOC, non-methane volatile organic compounds, unspecified: 2.6406e-7 kg
- Sulfur oxides: 5.3396e-7 kg
- Sulfide: 1.8168e-8 kg
- Chlorine: 1.1454e-6 kg
- Particulates, unspecified: 2.7485e-6 kg
- Nickel: 5.6977e-10 kg
- Ethane, 1,1,1-trifluoro-2,2-dichloro-, HCFC-123: 8.7523e-8 kg
- Organic substances, unspecified: 7.8472e-9 kg

## Sampling procedure
Data are from primary sources. The chlorine/caustic data collected for this module represent 1 producer and 3 plants in the U.S. The chlorine/caustic producer who provided data for this module verified that the characteristics of their plant are representative of the diaphragm/membrane cell technology for North American chlorine/caustic production.

## Sources
- THE PLASTICS DIVISION OF THE ACC
