# Metallurgical coke, at plant

Dataset: openLCA process, unit process
Category: Iron and Steel Mills
Geography: RNA
Time period: 2003-01-01 to 2003-01-01
Generated by: James Littlefield, Franklin Associates
Published in: Franklin Associates, A Division of ERG
restrictionsDescription: All information can be accessed by everybody.
copyright: false

## General comment
The primary method for manufacturing coke is the byproduct method, which accounts for more than 98 percent of U.S. coke production. In the byproduct method, air is excluded from the coking chambers, and the necessary heat for distillation is supplied from external combustion of some of the gas recovered from the coking process. Coproduct credit is given on a weight basis to all of the byproducts from the oven, except water.
Important note: although most of the data in the US LCI database has
undergone some sort of review, the database as a whole has not yet
undergone a formal validation process.
Please email comments to lci@nrel.gov.

## Technology
Byproduct method

## Geography
North America

## Reference product
- Metallurgical coke, at plant: 1 kg

## Inputs from technosphere
- Bituminous coal, at mine: 1.1 kg
- Electricity, at grid, US, 2000: 0.0388 kWh
- CUTOFF Disposal, solid waste, unspecified, to unspecified treatment: 0.004 kg

## Emissions to nature
- Nitrogen oxides: 0.00077 kg
- Ammonia: 8e-5, 3.2e-6 kg (2 entries, compartments not in this file)
- Dissolved solids: 8.9e-5 kg
- Cyanide: 3.4e-6 kg
- Phenol: 1.5e-6 kg
- Sulfur oxides: 0.004 kg
- NMVOC, non-methane volatile organic compounds: 0.00317 kg
- Carbon monoxide: 0.00073 kg
- Carbon dioxide, fossil: 0.13 kg
- Suspended solids, unspecified: 6e-7 kg
- Particulates, unspecified: 0.00142 kg

## Sources
- Franklin Associates, A Division of ERG
- The Aluminum Association
- Energy Information Administration (EIA)
- US Geological Survey
- IAI Statistical Report: Electrical Power
- US EPA
