# Sawn lumber, softwood, rough, green, at sawmill, INW

Dataset: openLCA process, unit process
Category: Sawmills
Geography: RNA
Time period: 2006-01-01 to 2007-01-01
Generated by: Maureen Puetmann
Published in: Francis G. Wagner
restrictionsDescription: All information can be accessed by everybody.
copyright: false

## General comment
Allocation based on mass.
Important note: although most of the data in the US LCI database has
undergone some sort of review, the database as a whole has not yet
undergone a formal validation process.
Please email comments to lci@nrel.gov.

## Technology
Average technology.

## Geography
Meant to represent operations in eastern Washington, eastern Oregon, Idaho and western Montana. Actual representative mill sample found in eastern Washington and Idaho only.

## Reference product
- Sawn lumber, softwood, rough, green, at sawmill, INW: 1 kg

## By-products
- Wood chips, softwood, green, at sawmill, INW: 0.454 kg
- Sawdust, softwood, green, at sawmill, INW: 0.109 kg
- Bark, softwood, green, at sawmill, INW: 0.0591 kg
- Wood fuel, softwood, green, at sawmill, INW: 0.127 kg
- Wood fiber, softwood, green, at sawmill, INW: 0.00695 kg

## Inputs from technosphere
- Gasoline, combusted in equipment: 0.00029 l
- Electricity, at grid, Western US, 2000: 0.0436 kWh
- Residual fuel oil, at refinery: 0.000164 l
  Proxy for hydraulic oils and motor oil
- Bark, softwood, green, at logyard, INW: 0.121 kg
- Roundwood, softwood, green, at logyard, INW: 1.63 kg
- Diesel, combusted in industrial equipment: 8.44e-5 l

## Sampling procedure
Questionnaires from 4 mills assumed to be representative of the softwood lumber industry in US Inland West.

## Sources
- Forest Products Laboratory
- Francis G. Wagner
- Maureen Puettmann
